#ifndef AMMR_VERSION
#define AMMR_VERSION "2.5.0-beta"
#define AMMR_VERSION_MAJOR 2
#define AMMR_VERSION_MINOR 5
#define AMMR_VERSION_PATCH 0
#endif

// AMMR 2.5 needs atleast AnyBody version 7.5 to work correctly
#if (ANYBODY_V1 < 7) | (ANYBODY_V1 == 7 & ANYBODY_V2 < 5)
Main = {
  AnyMessage NotSupported = {
  TriggerPreProcess = On;
  Type = MSG_ErrorFatal;
  Message = "AnyBody version 7.5 or higher is required for AMMR " + AMMR_VERSION;
  };
};
#endif
