//This file creates the environment around the human
//It creates the force plates and add the measure load to them

AnyFixedRefFrame GlobalRef ={
  Origin={0,0,0};
  AnyDrawRefFrame drw={ScaleXYZ=0.4*{1,1,1};};
};


ForcePlateType4AutoDetection Plate1 (
PlateName = Plate1,
Folder =Main.ModelSetup.DynamicDataSet,
Limb1=  ..HumanModel.BodyModel.Right.Leg.Seg.Foot,
Limb2=  ..HumanModel.BodyModel.Left.Leg.Seg.Foot,
No=0,
VerticalDirection ="Z",
HeightTolerance=0.07,
VelThreshold=2.2,
Fx=Main.ModelSetup.DynamicDataSet.Analog.DataFiltered.Fx2,
Fy=Main.ModelSetup.DynamicDataSet.Analog.DataFiltered.Fy2,
Fz=Main.ModelSetup.DynamicDataSet.Analog.DataFiltered.Fz2,
Mx=Main.ModelSetup.DynamicDataSet.Analog.DataFiltered.Mx2,
My=Main.ModelSetup.DynamicDataSet.Analog.DataFiltered.My2,
Mz=Main.ModelSetup.DynamicDataSet.Analog.DataFiltered.Mz2,
FootPresent=1)
={
  Cal=Main.ModelSetup.DynamicDataSet.Groups.FORCE_PLATFORM.CAL_MATRIX.Data[0];
};

ForcePlateType4AutoDetection Plate2 (
PlateName = Plate2,
Folder =Main.ModelSetup.DynamicDataSet,
Limb1=  ..HumanModel.BodyModel.Right.Leg.Seg.Foot,
Limb2=  ..HumanModel.BodyModel.Left.Leg.Seg.Foot,
No=1,
VerticalDirection ="Z",
HeightTolerance=0.07,
VelThreshold=2.2,
Fx=Main.ModelSetup.DynamicDataSet.Analog.DataFiltered.Fx,
Fy=Main.ModelSetup.DynamicDataSet.Analog.DataFiltered.Fy,
Fz=Main.ModelSetup.DynamicDataSet.Analog.DataFiltered.Fz,
Mx=Main.ModelSetup.DynamicDataSet.Analog.DataFiltered.Mx,
My=Main.ModelSetup.DynamicDataSet.Analog.DataFiltered.My,
Mz=Main.ModelSetup.DynamicDataSet.Analog.DataFiltered.Mz,
FootPresent=1)
={
    Cal=Main.ModelSetup.DynamicDataSet.Groups.FORCE_PLATFORM.CAL_MATRIX.Data[1];
};
