Main = {
  AnyFloatVar FrameRate = Main.ModelSetup.DynamicDataSet.Header.VideoFrameRate;
  AnyFolder ModelSetup ={

    AnyInputC3D DynamicDataSet =
    {
      FileName = ANYGAIT_PATH_PROJECTS + SubjectDef + "/" + FileNameDynamicDef;
      PointsScaleFactor = 0.001;
      ConstructModelOnOff = Off;
      ConstructChartOnOff = Off;
      MarkerLabels = {"LPSI","RPSI","LASI","RASI","LTHI","RTHI","RKNE","LKNE","LTIB","RTIB","LANK","RANK","LHEE","RHEE","LTOE","RTOE","LTHL","RTHL","LMMA","RMMA"};
      MarkerUseAllPointsOnOff=On;
      Filter =
      {
        AutomaticInitialConditionOnOff = On;
        FilterForwardBackwardOnOff = On;
        N = 2;
        Fc = {6};
        Type = LowPass;
      };
    };

    AnyInputC3D StaticData =
    {
      FileName = ANYGAIT_PATH_PROJECTS + SubjectDef + "/" + FileNameStaticDef;
      PointsScaleFactor = 0.001;
      ConstructModelOnOff = Off;
      ConstructChartOnOff = Off;
      MarkerLabels = {"LPSI","RPSI","LASI","RASI","LTHI","RTHI","RKNE","LKNE","LTIB","RTIB","LANK","RANK","LHEE","RHEE","LTOE","RTOE","LTHL","RTHL","LMMA","RMMA"};
      MarkerUseAllPointsOnOff=On;
    };


#if DefaultStartEndDef == 0
    AnyIntVar tStartFrame = iffun(ltfun(StartFrameNoDef,Main.ModelSetup.DynamicDataSet.Header.FirstFrameNo),
                          Main.ModelSetup.DynamicDataSet.Header.FirstFrameNo ,
                          iffun(ltfun(Main.ModelSetup.DynamicDataSet.Header.LastFrameNo,StartFrameNoDef),
                                Main.ModelSetup.DynamicDataSet.Header.LastFrameNo,
                                StartFrameNoDef)
                          );

    AnyIntVar tEndFrame = iffun(gtfun(LastFrameNoDef,Main.ModelSetup.DynamicDataSet.Header.LastFrameNo),
                          Main.ModelSetup.DynamicDataSet.Header.LastFrameNo ,
                          iffun(gtfun(LastFrameNoDef,tStartFrame),LastFrameNoDef ,tStartFrame)
                          );


    AnyFloatVar tStart = tStartFrame / Main.FrameRate;
    AnyFloatVar tEnd =   tEndFrame / Main.FrameRate;
    AnyIntVar   nStep =  tEndFrame-tStartFrame;
    //AnyIntVar   nStep =  100;
#else
    AnyIntVar tStartFrame = Main.ModelSetup.DynamicDataSet.Header.FirstFrameNo;
    AnyIntVar tEndFrame = Main.ModelSetup.DynamicDataSet.Header.LastFrameNo;
    AnyIntVar    nStep  =  Main.ModelSetup.DynamicDataSet.Header.LastFrameNo - Main.ModelSetup.DynamicDataSet.Header.FirstFrameNo;
    AnyFloatVar  tStart =  Main.ModelSetup.DynamicDataSet.Header.FirstFrameNo / Main.FrameRate;
    AnyFloatVar  tEnd   =  Main.ModelSetup.DynamicDataSet.Header.LastFrameNo / Main.FrameRate;
#endif


AnyVar tStartTime    =   tStart;//Main.FrameRate;
AnyVar tEndTime      =   tEnd;//Main.FrameRate;


  AnyVar tRightHeel   = Main.RightHeelStrike* Main.FrameRate;
  AnyVar tLeftHeel    = Main.LeftHeelStrike * Main.FrameRate;

  AnyVar tRightToe    = Main.RightToeOff * Main.FrameRate;
  AnyVar tLeftToe     = Main.LeftToeOff * Main.FrameRate;

  AnyVar tRightHeelTime   = Main.RightHeelStrike;
  AnyVar tLeftHeelTime    = Main.LeftHeelStrike;

  AnyVar tRightToeTime    = Main.RightToeOff;
  AnyVar tLeftToeTime     = Main.LeftToeOff;


  };
};
