    AnyRefNode MorphNodes = {
    AnyVar MarkerRadius= 0.012;
    sRel = .AnkleJoint.sRel;
      #ifdef RightLeg
        AnyFolder &ManequinRef = .....Mannequin.Posture.Right;
        // Coordinates of Medial and Lateral condyle markers in Talusref system
        AnyVec3 MedAnkleRef = (.Axes0'*( ManequinRef.sRAnkleMedial- ManequinRef.Talus.InitialPos.r0)')';
        AnyVec3 LatAnkleRef = (.Axes0'*( ManequinRef.sRAnkleLateral- ManequinRef.Talus.InitialPos.r0)')';
        AnyVec3 KneeCenterRef = (.Axes0'*( ManequinRef.sRKneeCenter- ManequinRef.Talus.InitialPos.r0)')';


      #endif
      #ifdef LeftLeg
        // Coordinates of Medial and Lateral condyle markers in Talusref system
        AnyVec3 MedAnkleRef = .....Mannequin.Posture.Left.Talus.LAnkleMedial.sRel_static;
        AnyVec3 LatAnkleRef = .....Mannequin.Posture.Left.Talus.LAnkleLateral.sRel_static;
        AnyVec3 KneeCenterRef = .....Mannequin.Posture.Left.Talus.LKneeCenter.sRel_static;
      #endif

//     // Calculate Ankle axis orientation in the MorphNodes coordinate system
     AnyVec3 sAnkleAxisZ = ( ARel'* .AnkleJoint.ARel*{0,0,1}' )';


     // Calculate a scale factor for the knee based on the knee width
     AnyVar AnkleWidth = vnorm(sMedAnkleMarker - sLatAnkleMarker )-2*MarkerRadius;
     AnyVar LegTDAnkleWidthStandard = 0.09796637;
     AnyVar AnkleScaleFactor = AnkleWidth /LegTDAnkleWidthStandard ;


     // Calculate Marker Positions in the MorphNodes coordinate system
     AnyVec3 sMedAnkleMarker = ( ARel'*(MedAnkleRef - sRel)' )';
     AnyVec3 sLatAnkleMarker = ( ARel'*(LatAnkleRef - sRel)' )';
     AnyVec3 sAnkleCenter  = ( ARel'*(.AnkleJoint.sRel - sRel)' )';
     AnyVec3 sSubTalarCenter  = ( ARel'*(.SubTalarJoint.sRel - sRel)' )';


     // Set up a coordinate system for the morphnodes. A similar coordinate system can be defined in
     // LegTLEM model so source and target point for morphing are defined in similar reference frames
     ARel = RotMat(.AnkleJoint.sRel, (.AnkleJoint.ARel*{0,0,1}')',.SubTalarJoint.sRel);

     AnyRefNode CenterAnkleControlPoint = {
        sRel = .sAnkleCenter;
        #include "ControlPointsDrw.any"
//                AnyDrawNode drw = { ScaleXYZ = {0.01, 0.01, 0.01};  };
     };

     // Medial ankle target morph node. Found by projection of the medial ankle marker
     // onto the ankle axis
     AnyRefNode MedialAnkleControlPoint = {
//        sRel = .sAnkleCenter + ( (.sMedAnkleMarker-.sAnkleCenter) *.sAnkleAxisZ'+.MarkerRadius ) * .sAnkleAxisZ;
        sRel = .sAnkleCenter - 0.02*.sAnkleAxisZ;
        #include "ControlPointsDrw.any"
//                AnyDrawNode drw = { ScaleXYZ = {0.01, 0.01, 0.01};  };

     };
     // Lateral ankle target morph node. Found by projection of the lateral ankle marker
     // onto the ankle axis
     AnyRefNode LateralAnkleControlPoint = {
//        sRel = .sAnkleCenter + ( (.sLatAnkleMarker- .sAnkleCenter) *.sAnkleAxisZ'-.MarkerRadius ) * .sAnkleAxisZ;
        sRel = .sAnkleCenter + 0.02 * .sAnkleAxisZ;

        #include "ControlPointsDrw.any"
//                AnyDrawNode drw = { ScaleXYZ = {0.01, 0.01, 0.01};  };

     };
      AnyRefNode AnteriorSubTalarControlPoint = {
        sRel = ( .ARel'*(..SubTalarJoint.sRel' + 0.02*..SubTalarJoint.ARel*{1,0,0}') )';
        #include "ControlPointsDrw.any"
//        AnyDrawNode drw = { ScaleXYZ = {0.01, 0.01, 0.01};  };

     };
     // Lateral ankle target morph node. Found by projection of the lateral ankle marker
     // onto the ankle axis
     AnyRefNode PosteriorSubTalarControlPoint = {
        sRel = (.ARel'*(..SubTalarJoint.sRel' - 0.02*..SubTalarJoint.ARel*{1,0,0}') )';
//        AnyDrawNode drw = { ScaleXYZ = {0.01, 0.01, 0.01};  };

        #include "ControlPointsDrw.any"
     };

     AnyRefNode SubTalarJointControlPoint = {
        sRel = .sSubTalarCenter ;
//        AnyDrawNode drw = { ScaleXYZ = {0.01, 0.01, 0.01};  };

        #include "ControlPointsDrw.any"
     };

  };// Talus MorphNode
