AnyFolder Mannequin = {

  AnyFolder Posture = {

    AnyParamFun &RASI = Main.ModelSetup.DynamicDataSet.Points.Markers.ABTdyn_RASI.PosInterpol;
    AnyParamFun &LASI = Main.ModelSetup.DynamicDataSet.Points.Markers.ABTdyn_LASI.PosInterpol;

    AnyParamFun &RPSI = Main.ModelSetup.DynamicDataSet.Points.Markers.ABTdyn_RPSI.PosInterpol;
    AnyParamFun &LPSI = Main.ModelSetup.DynamicDataSet.Points.Markers.ABTdyn_LPSI.PosInterpol;


    AnyVec3 u3 =  ( RASI(Main.ModelSetup.tStart) - LASI(Main.ModelSetup.tStart) ) / vnorm(RASI(Main.ModelSetup.tStart)- LASI(Main.ModelSetup.tStart)) ;
    AnyVec3 initPelvisPos = ( 0.5*(RPSI(Main.ModelSetup.tStart)+LPSI(Main.ModelSetup.tStart)) -LASI(Main.ModelSetup.tStart) )*u3'* u3 + LASI(Main.ModelSetup.tStart);

    AnyVar PelvisPosX = initPelvisPos[0] -0.1;
    AnyVar PelvisPosY = initPelvisPos[1] ;
    AnyVar PelvisPosZ =initPelvisPos[2] ;

    AnyVar PelvisRotZ = Main.InitialPositionOfBody.PelvisRotZ;
    AnyVar PelvisRotY = Main.InitialPositionOfBody.PelvisRotY;
    AnyVar PelvisRotX = Main.InitialPositionOfBody.PelvisRotX;

    // These variables control the rotation of the thorax wrt the
    // pelvis
    AnyVar PelvisThoraxExtension=0;
    AnyVar PelvisThoraxLateralBending=0;
    AnyVar PelvisThoraxRotation=0;

    AnyVar NeckExtension=0;


    AnyFolder Right =
    {
      //Arm
      AnyVar SternoClavicularProtraction=-23;   //This value is not used for initial position
      AnyVar SternoClavicularElevation=11.5;    //This value is not used for initial position
      AnyVar SternoClavicularAxialRotation=-20; //This value is not used for initial position

      AnyVar GlenohumeralFlexion =-10;
      AnyVar GlenohumeralAbduction = 10;
      AnyVar GlenohumeralExternalRotation = 00;

      AnyVar ElbowFlexion = 35;
      AnyVar ElbowPronation = -60.0;

      AnyVar WristFlexion =0;
      AnyVar WristAbduction =0;

      AnyVar HipFlexion = Main.InitialPositionOfBody.Right.HipFlexion;
      AnyVar HipAbduction = Main.InitialPositionOfBody.Right.HipAbduction;
      AnyVar HipExternalRotation = Main.InitialPositionOfBody.Right.HipExternalRotation;
      AnyVar KneeFlexion = Main.InitialPositionOfBody.Right.KneeFlexion;
      AnyVar AnklePlantarFlexion = Main.InitialPositionOfBody.Right.AnklePlantarFlexion;
      AnyVar SubTalarEversion =Main.InitialPositionOfBody.Right.SubTalarEversion;
    };
    AnyFolder Left =
    {

      //Arm
      AnyVar SternoClavicularProtraction=.Right.SternoClavicularProtraction;
      AnyVar SternoClavicularElevation=.Right.SternoClavicularElevation;
      AnyVar SternoClavicularAxialRotation=.Right.SternoClavicularAxialRotation;

      AnyVar GlenohumeralFlexion = .Right.GlenohumeralFlexion;
      AnyVar GlenohumeralAbduction =.Right.GlenohumeralAbduction ;
      AnyVar GlenohumeralExternalRotation =.Right.GlenohumeralExternalRotation ;

      AnyVar ElbowFlexion = .Right.ElbowFlexion ;
      AnyVar ElbowPronation =.Right.ElbowPronation;
      AnyVar WristFlexion =.Right.WristFlexion;
      AnyVar WristAbduction =.Right.WristAbduction;

      AnyVar HipFlexion = Main.InitialPositionOfBody.Left.HipFlexion;
      AnyVar HipAbduction = Main.InitialPositionOfBody.Left.HipAbduction;
      AnyVar HipExternalRotation = Main.InitialPositionOfBody.Left.HipExternalRotation;
      AnyVar KneeFlexion = Main.InitialPositionOfBody.Left.KneeFlexion;
      AnyVar AnklePlantarFlexion = Main.InitialPositionOfBody.Left.AnklePlantarFlexion;
      AnyVar SubTalarEversion =Main.InitialPositionOfBody.Left.SubTalarEversion;
    };


  };

  AnyFolder PostureVel={
    //This controls the position of the pelvi wrt. to the global reference frame
    AnyVar PelvisPosX=0;
    AnyVar PelvisPosY=0;
    AnyVar PelvisPosZ=0;

    //This controls the rotation of the pelvis wrt. to the global reference frame
    AnyVar PelvisRotX=0;
    AnyVar PelvisRotY=0;
    AnyVar PelvisRotZ=0;

    // These variables control the rotation of the thorax wrt the
    // pelvis
    AnyVar PelvisThoraxExtension=0;
    AnyVar PelvisThoraxLateralBending=0;
    AnyVar PelvisThoraxRotation=0;

    AnyVar NeckExtension=0;

    AnyFolder Right = {
      //Arm
      AnyVar SternoClavicularProtraction=0;   //This value is not used for initial position
      AnyVar SternoClavicularElevation=0;    //This value is not used for initial position
      AnyVar SternoClavicularAxialRotation=0; //This value is not used for initial position

      AnyVar GlenohumeralFlexion =0;
      AnyVar GlenohumeralAbduction = 0;
      AnyVar GlenohumeralExternalRotation = 0;

      AnyVar ElbowFlexion = 0.0;
      AnyVar ElbowPronation = 0.0;

      AnyVar WristFlexion =0;
      AnyVar WristAbduction =0;

      AnyVar HipFlexion = 0.0;
      AnyVar HipAbduction = 0.0;
      AnyVar HipExternalRotation = 0.0;

      AnyVar KneeFlexion = 0.0;

      AnyVar AnklePlantarFlexion =0.0;
      AnyVar SubTalarEversion=0.0;

    };

    AnyFolder Left = {
      //all values are set to be equal to the right side values
      //feel free to change this!

      //Arm
      AnyVar SternoClavicularProtraction=.Right.SternoClavicularProtraction;
      AnyVar SternoClavicularElevation=.Right.SternoClavicularElevation;
      AnyVar SternoClavicularAxialRotation=.Right.SternoClavicularAxialRotation;

      AnyVar GlenohumeralFlexion = .Right.GlenohumeralFlexion ;
      AnyVar GlenohumeralAbduction =.Right.GlenohumeralAbduction ;
      AnyVar GlenohumeralExternalRotation =.Right.GlenohumeralExternalRotation ;

      AnyVar ElbowFlexion = .Right.ElbowFlexion;
      AnyVar ElbowPronation = .Right.ElbowPronation;
      AnyVar WristFlexion =.Right.WristFlexion;
      AnyVar WristAbduction =.Right.WristAbduction;


      //Leg
      AnyVar HipFlexion =.Right.HipFlexion;
      AnyVar HipAbduction =.Right.HipAbduction;
      AnyVar HipExternalRotation = .Right.HipExternalRotation;
      AnyVar KneeFlexion = .Right.KneeFlexion;
      AnyVar AnklePlantarFlexion = .Right.AnklePlantarFlexion ;
      AnyVar SubTalarEversion=.Right.SubTalarEversion;


    };
  };
};
