AnyFolder Nodes = {

//  AnyFolder Right = {
  AnyVar HeelX = 0;
  AnyVar HeelY = 0;
  AnyVar HeelZ = 0;

  AnyVar SubTalarX = 0;
  AnyVar SubTalarY = 0;
  AnyVar SubTalarZ = 0;

  AnyVar BigToeX = 0;
  AnyVar BigToeY = 0;
  AnyVar BigToeZ = 0;

  AnyVar MetaX = 0;
  AnyVar MetaY = 0;
  AnyVar MetaZ = 0;

  AnyVar CalcX = 0;
  AnyVar CalcY = 0;
  AnyVar CalcZ = 0;

//};

//  AnyFolder Left = {
//  AnyVar HeelX = 0;
//  AnyVar HeelY = 0;
//  AnyVar HeelZ = 0;
//
//  AnyVar SubTalarX = 0;
//  AnyVar SubTalarY = 0;
//  AnyVar SubTalarZ = 0;
//
//  AnyVar BigToeX = 0;
//  AnyVar BigToeY = 0;
//  AnyVar BigToeZ = 0;
//
//  AnyVar MetaX = 0;
//  AnyVar MetaY = 0;
//  AnyVar MetaZ = 0;
//
//  AnyVar CalcX = 0;
//  AnyVar CalcY = 0;
//  AnyVar CalcZ = 0;
//
//};

};
