/* -------------------------------------------------------------------------------------------
This file implements a scaling law based on RBF functions. The geometry is scaled using source
and target points, which originates from a stick-figure model generated from motion capture
data of the subject

Morten Lund and Michael Skipper Andersen April 2011
------------------------------------------------------------------------------------------- */

AnyFolder Scaling = {

  AnyFolder StandardParameters = {
    #include "<ANYBODY_PATH_BODY>\BodyModels\Include\BodyParameters.any"

    #include "<ANYBODY_PATH_BODY>\Trunk\StandardParameters.any"
    #include "<ANYBODY_PATH_BODY>\Arm\StandardParameters.any"

    #if RIGHT_LEG_TD + LEFT_LEG_TD == 0
    #include "<ANYBODY_PATH_BODY>\Leg\StandardParameters.any"
    #else
    AnyFolder Right ={#include "<ANYBODY_PATH_BODY>\LegTLEM\StandardParameters.any"};
    AnyFolder Left ={#include "<ANYBODY_PATH_BODY>\LegTLEM\StandardParameters.any"};
    #endif

  };


  AnyFolder MassScaling = {
    AnyFolder Pelvis = { AnyVar MassScale = ..AnthroData.pelvis / ..StandardParameters.Pelvis.Mass; };
    AnyFolder Head = { AnyVar MassScale = (..AnthroData.head) / (..StandardParameters.Head.Mass); };
    AnyFolder Cervical = { AnyVar MassScale = .Head.MassScale;};
    AnyFolder Trunk = { AnyVar MassScale = ( ..AnthroData.thorax) / (..StandardParameters.Trunk.Mass  ); }; //Ratio of mass of thorax plus lumbar mass
    AnyFolder Lumbar = { AnyVar MassScale = (..AnthroData.lumbar) / (..StandardParameters.Lumbar.Mass); };//Ratio of mass of lumbar mass
    AnyFolder Clavicula = { AnyVar MassScale = (..AnthroData.clavicle_r ) / (..StandardParameters.Clavicula.Mass + ..StandardParameters.Scapula.Mass); };
    AnyFolder Scapula = { AnyVar MassScale = (..AnthroData.clavicle_r ) / (..StandardParameters.Clavicula.Mass + ..StandardParameters.Scapula.Mass); };
    AnyFolder Humerus = { AnyVar MassScale = ..AnthroData.upper_arm_r / ..StandardParameters.Humerus.Mass; };
    AnyFolder Ulna = { AnyVar MassScale = ..AnthroData.lower_arm_r / (2*..StandardParameters.Ulna.Mass); };
    AnyFolder Radius = { AnyVar MassScale = ..AnthroData.lower_arm_r / (2*..StandardParameters.Ulna.Mass);  };
    AnyFolder Hand = { AnyVar MassScale = ..AnthroData.hand_r / ..StandardParameters.Hand.Mass; };

    // Seleccion of the appropriate law depending on the included leg
    #if RIGHT_LEG_TD == 1
    AnyFolder Right = {
      AnyFolder Foot = { AnyVar MassScale = (...AnthroData.Right.foot + ...AnthroData.Right.ball) / ...StandardParameters.Right.Foot.Mass; };
      AnyFolder Talus = { AnyVar MassScale =1; };
      AnyFolder Shank = { AnyVar MassScale = ...AnthroData.Right.lower_leg / ...StandardParameters.Right.Shank.Mass; };
      AnyFolder Thigh = { AnyVar MassScale = ...AnthroData.Right.thigh / ...StandardParameters.Right.Thigh.Mass; };
    };
    #endif
    #if LEFT_LEG_TD == 1
    AnyFolder Left = {
      AnyFolder Foot = { AnyVar MassScale = (...AnthroData.Left.foot+...AnthroData.Left.ball) / ...StandardParameters.Left.Foot.Mass; };
      AnyFolder Talus = { AnyVar MassScale =1; };
      AnyFolder Shank = { AnyVar MassScale = ...AnthroData.Left.lower_leg / ...StandardParameters.Left.Shank.Mass; };
      AnyFolder Thigh = { AnyVar MassScale = ...AnthroData.Left.thigh / ...StandardParameters.Left.Thigh.Mass; };
    };
    #endif
  };

  AnyFolder StrengthScaling = {
    AnyVar Rother = 0.5;          // Mass fraction in the body of organs, blood, skeleton, etc.
    AnyVar Rfat = .FatPercent/100; // Fat ration in the entire body
    AnyVar Rfat0 = .StandardParameters.BodyParameters.FatPercent/100;
    AnyFolder Pelvis = { AnyVar StrengthScale = (..MassScaling.Pelvis.MassScale / ..GeometricalScaling.Pelvis.LengthScale) * ((1-.Rother-.Rfat)/(1-.Rother-.Rfat0)); };
    AnyFolder Spine = { AnyVar StrengthScale = (..MassScaling.Trunk.MassScale / ..GeometricalScaling.Trunk.LengthScale ) * ((1-.Rother-.Rfat)/(1-.Rother-.Rfat0)); };
    AnyFolder Humerus = { AnyVar StrengthScale = (..MassScaling.Humerus.MassScale / ..GeometricalScaling.Humerus.LengthScale ) * ((1-.Rother-.Rfat)/(1-.Rother-.Rfat0)); };
    AnyFolder Ulna = { AnyVar StrengthScale = (..MassScaling.Ulna.MassScale / ..GeometricalScaling.Ulna.LengthScale ) * ((1-.Rother-.Rfat)/(1-.Rother-.Rfat0)); };
    AnyFolder Hand = { AnyVar StrengthScale = (..MassScaling.Hand.MassScale / ..GeometricalScaling.Hand.ScaleFunction.LengthScale ) * ((1-.Rother-.Rfat)/(1-.Rother-.Rfat0)); };

    // Seleccion of the appropriate law depending on the included leg
    #if RIGHT_LEG_TD == 1
    AnyFolder Right ={
      AnyFolder Foot = { AnyVar StrengthScale = (...MassScaling.Right.Foot.MassScale / ...GeometricalScaling.Right.Foot.LengthScale) * ((1-..Rother-..Rfat)/(1-..Rother-..Rfat0)); };
      AnyFolder Shank = { AnyVar StrengthScale = (...MassScaling.Right.Shank.MassScale / ...GeometricalScaling.Right.Shank.LengthScale) * ((1-..Rother-..Rfat)/(1-..Rother-..Rfat0));};
      AnyFolder Thigh = { AnyVar StrengthScale = (...MassScaling.Right.Thigh.MassScale / ...GeometricalScaling.Right.Thigh.LengthScale) * ((1-..Rother-..Rfat)/(1-..Rother-..Rfat0)); };
    };
    #endif
    #if LEFT_LEG_TD == 1
    AnyFolder Left ={
      AnyFolder Foot = { AnyVar StrengthScale = (...MassScaling.Left.Foot.MassScale / ...GeometricalScaling.Left.Foot.LengthScale) * ((1-..Rother-..Rfat)/(1-..Rother-..Rfat0)); };
      AnyFolder Shank = { AnyVar StrengthScale = (...MassScaling.Left.Shank.MassScale / ...GeometricalScaling.Left.Shank.LengthScale) * ((1-..Rother-..Rfat)/(1-..Rother-..Rfat0));};
      AnyFolder Thigh = { AnyVar StrengthScale = (...MassScaling.Left.Thigh.MassScale / ...GeometricalScaling.Left.Thigh.LengthScale) * ((1-..Rother-..Rfat)/(1-..Rother-..Rfat0)); };
    };
    #endif
  };

  AnyFolder FiberLengthScaling = {
    AnyFolder Pelvis = { AnyVar FiberLengthScale = ..AnthroSegmentLengths.PelvisWidth / ..StandardParameters.Pelvis.Width; };

    // Selection of the appropriate law depending on the included leg
    #if RIGHT_LEG_TD == 1
    AnyFolder Right ={
      AnyFolder Shank = { AnyVar FiberLengthScale  = ...AnthroSegmentLengths.Right.ShankLength / ...StandardParameters.Right.Shank.Length; };
      AnyFolder Thigh = { AnyVar FiberLengthScale  = ...AnthroSegmentLengths.Right.ThighLength / ...StandardParameters.Right.Thigh.Length; };
    };
    #endif
    #if LEFT_LEG_TD == 1
    AnyFolder Left ={
      AnyFolder Shank = { AnyVar FiberLengthScale  = ...AnthroSegmentLengths.Left.ShankLength / ...StandardParameters.Left.Shank.Length; };
      AnyFolder Thigh = { AnyVar FiberLengthScale  = ...AnthroSegmentLengths.Left.ThighLength / ...StandardParameters.Left.Thigh.Length; };
    };
    #endif

  };


  AnyFolder GeometricalScaling = {


    // Seleccion of the appropriate law depending on the included leg
    // **************************************************************

    #if RIGHT_LEG_TD == 1

    AnyFolder Right ={
      #define Side Right

      AnyVar Sign = 1;

      AnyFolder Talus  = {
        AnySwitch ShowNodes = Off;

        #if 1
          AnyFunTransform3DIdentity ScaleFunction = {};
        #endif
      };


      AnyFolder Foot  = {
        AnySwitch ShowNodes = Off;
        #include "MorphNodesFootAlternative.any"
        #if !UseRbfScaling
        AnyFunTransform3DIdentity ScaleFunction = {};
        #else

        AnyFunTransform3DRBF ScaleFunction=
        {
          RBFDef.Param = 0.3;
          Points0 = {
            .MorphSourcePoints.CenterAnklePoint,
            .MorphSourcePoints.FootControlPoint1,
            .MorphSourcePoints.FootControlPoint2,
            .MorphSourcePoints.FootControlPoint3,
            .MorphSourcePoints.FootControlPoint4,
            .MorphSourcePoints.FootControlPoint5,
            .MorphSourcePoints.FootControlPoint6,
            .MorphSourcePoints.FootControlPoint7,
            .MorphSourcePoints.FootControlPoint8,
            .MorphSourcePoints.FootControlPoint9,
            .MorphSourcePoints.FootControlPoint10,
            .MorphSourcePoints.FootControlPoint11,
            .MorphSourcePoints.FootControlPoint12,
            .MorphSourcePoints.FootControlPoint13,
            .MorphSourcePoints.FootControlPoint14,
            .MorphSourcePoints.FootControlPoint15
          };
          Points1 = {
            .MorphTargetPoints.CenterAnklePoint,
            .MorphTargetPoints.FootControlPoint1,
            .MorphTargetPoints.FootControlPoint2,
            .MorphTargetPoints.FootControlPoint3,
            .MorphTargetPoints.FootControlPoint4,
            .MorphTargetPoints.FootControlPoint5,
            .MorphTargetPoints.FootControlPoint6,
            .MorphTargetPoints.FootControlPoint7,
            .MorphTargetPoints.FootControlPoint8,
            .MorphTargetPoints.FootControlPoint9,
            .MorphTargetPoints.FootControlPoint10,
            .MorphTargetPoints.FootControlPoint11,
            .MorphTargetPoints.FootControlPoint12,
            .MorphTargetPoints.FootControlPoint13,
            .MorphTargetPoints.FootControlPoint14,
            .MorphTargetPoints.FootControlPoint15
          };
        };
        #endif
      };

      AnyFolder Shank = {
        AnySwitch ShowNodes = Off;
        #include "MorphNodesShank.any"

        #if !UseRbfScaling
        AnyFunTransform3DIdentity ScaleFunction = {};
        #else

//        AnyFunTransform3DLin2 Transform =   {
//          Points0 = .ScaleFunction.Points0;
//          Points1 =. ScaleFunction.Points1;
//          Mode = VTK_LANDMARK_AFFINE;
//        };


        AnyFunTransform3DRBF ScaleFunction=      {
          //PreTransforms={&.Transform} ;
          RBFDef.Param = 0.3;
         //RBFDef.Type = RBF_ThinPlate;
          Points0 ={
            .MorphSourcePoints.KneeJointStandard ,
            .MorphSourcePoints.MedialKneePoint,
            .MorphSourcePoints.LateralKneePoint,
            .MorphSourcePoints.AnteriorKneePoint,
            .MorphSourcePoints.AboveAnteriorKneePoint,
            .MorphSourcePoints.AboveLateralKneePoint ,
            .MorphSourcePoints.AboveMedialKneePoint ,
            .MorphSourcePoints.AnkleJointStandard ,
            .MorphSourcePoints.MedialAnklePoint,
            .MorphSourcePoints.LateralAnklePoint,
            .MorphSourcePoints.AnteriorAnklePoint,
            .MorphSourcePoints.PosteriorKneePoint,
            .MorphSourcePoints.AbovePosteriorKneePoint,
            .MorphSourcePoints.PosteriorAnklePoint
          };
          Points1 = {
            .MorphTargetPoints.targetCenterKneeJoint ,
            .MorphTargetPoints.targetMedialKneePoint,
            .MorphTargetPoints.targetLateralKneePoint,
            .MorphTargetPoints.targetAnteriorKneePoint,
            .MorphTargetPoints.targetAboveAnteriorKneePoint,
            .MorphTargetPoints.targetAboveLateralKneePoint ,
            .MorphTargetPoints.targetAboveMedialKneePoint ,
            .MorphTargetPoints.targetAnkleCenter,
            .MorphTargetPoints.targetMedialAnklePoint,
            .MorphTargetPoints.targetLateralAnklePoint,
            .MorphTargetPoints.targetAnteriorAnklePoint,
            .MorphTargetPoints.targetPosteriorKneePoint,
            .MorphTargetPoints.targetAbovePosteriorKneePoint,
            .MorphTargetPoints.targetPosteriorAnklePoint};


        };
        #endif
      };


      AnyFolder Thigh = {
        AnySwitch ShowNodes = Off;


        #include "MorphNodesThigh.any"


        #if  !UseRbfScaling
        AnyFunTransform3DIdentity ScaleFunction = {};
        #else
        AnyFunTransform3DRBF ScaleFunction=
        {
          //RBFDef.Param = 0.3;
          RBFDef.Type = RBF_ThinPlate;
          Points0 ={
            .MorphSourcePoints.HipJointStandard, // Hip joint center
            .MorphSourcePoints.ThighCPoint1,
            .MorphSourcePoints.ThighCPoint2,
            .MorphSourcePoints.ThighCPoint3,
            .MorphSourcePoints.ThighCPoint4,
            .MorphSourcePoints.ThighCPoint5,
            .MorphSourcePoints.ThighCPoint6,
            .MorphSourcePoints.ThighCPoint7,
            .MorphSourcePoints.ThighCPoint8,
            .MorphSourcePoints.ThighCPoint9,
            .MorphSourcePoints.ThighCPoint10,
            .MorphSourcePoints.ThighCPoint11,
            .MorphSourcePoints.ThighCPoint12,
            .MorphSourcePoints.ThighCPoint13,
            .MorphSourcePoints.ThighCPoint14,
            .MorphSourcePoints.ThighCPoint15,
            .MorphSourcePoints.ThighCPoint16,
            .MorphSourcePoints.ThighCPoint17,
            .MorphSourcePoints.ThighCPoint18,
            .MorphSourcePoints.ThighCPoint19,
            .MorphSourcePoints.ThighCPoint20,
            .MorphSourcePoints.CenterKneePoint,
            .MorphSourcePoints.MedialKneePoint,
            .MorphSourcePoints.LateralKneePoint,
            .MorphSourcePoints.AnteriorKneePoint
          };
          Points1 = {
            .MorphTargetPoints.HipJointStandard, // Hip joint center
            .MorphTargetPoints.ThighCPoint1,
            .MorphTargetPoints.ThighCPoint2,
            .MorphTargetPoints.ThighCPoint3,
            .MorphTargetPoints.ThighCPoint4,
            .MorphTargetPoints.ThighCPoint5,
            .MorphTargetPoints.ThighCPoint6,
            .MorphTargetPoints.ThighCPoint7,
            .MorphTargetPoints.ThighCPoint8,
            .MorphTargetPoints.ThighCPoint9,
            .MorphTargetPoints.ThighCPoint10,
            .MorphTargetPoints.ThighCPoint11,
            .MorphTargetPoints.ThighCPoint12,
            .MorphTargetPoints.ThighCPoint13,
            .MorphTargetPoints.ThighCPoint14,
            .MorphTargetPoints.ThighCPoint15,
            .MorphTargetPoints.ThighCPoint16,
            .MorphTargetPoints.ThighCPoint17,
            .MorphTargetPoints.ThighCPoint18,
            .MorphTargetPoints.ThighCPoint19,
            .MorphTargetPoints.ThighCPoint20,
            .MorphTargetPoints.CenterKneePoint,
            .MorphTargetPoints.MedialKneePoint,
            .MorphTargetPoints.LateralKneePoint,
            .MorphTargetPoints.AnteriorKneePoint
           };
        };
        #endif
      };
       #undef Side
    }; // Right

    #else
    #endif

    #if LEFT_LEG_TD == 1

    AnyFolder Left ={
      #define Side Left

      AnyVar Sign = -1;

      AnyFolder Talus  = {
        AnySwitch ShowNodes = Off;

        #if 0
          AnyFunTransform3DIdentity ScaleFunction = {};
        #else
          AnyFunTransform3D &ScaleFunction = .Foot.ScaleFunction;
        #endif
      };


      AnyFolder Foot  = {
        AnySwitch ShowNodes = Off;
        #include "MorphNodesFootAlternative.any"
        #if !UseRbfScaling
        AnyFunTransform3DIdentity ScaleFunction = {};
        #else

//        AnyFunTransform3DIdentity ScaleFunction = {};


        AnyFunTransform3DRBF ScaleFunction =
        {
          RBFDef.Param = 0.3;
          //RBFDef.Type = RBF_ThinPlate;
          Points0 = {
            .MorphSourcePoints.CenterAnklePoint,
            .MorphSourcePoints.FootControlPoint1,
            .MorphSourcePoints.FootControlPoint2,
            .MorphSourcePoints.FootControlPoint3,
            .MorphSourcePoints.FootControlPoint4,
            .MorphSourcePoints.FootControlPoint5,
            .MorphSourcePoints.FootControlPoint6,
            .MorphSourcePoints.FootControlPoint7,
            .MorphSourcePoints.FootControlPoint8,
            .MorphSourcePoints.FootControlPoint9,
            .MorphSourcePoints.FootControlPoint10,
            .MorphSourcePoints.FootControlPoint11,
            .MorphSourcePoints.FootControlPoint12,
            .MorphSourcePoints.FootControlPoint13,
            .MorphSourcePoints.FootControlPoint14,
            .MorphSourcePoints.FootControlPoint15
          };
          Points1 = {
            .MorphTargetPoints.CenterAnklePoint,
            .MorphTargetPoints.FootControlPoint1,
            .MorphTargetPoints.FootControlPoint2,
            .MorphTargetPoints.FootControlPoint3,
            .MorphTargetPoints.FootControlPoint4,
            .MorphTargetPoints.FootControlPoint5,
            .MorphTargetPoints.FootControlPoint6,
            .MorphTargetPoints.FootControlPoint7,
            .MorphTargetPoints.FootControlPoint8,
            .MorphTargetPoints.FootControlPoint9,
            .MorphTargetPoints.FootControlPoint10,
            .MorphTargetPoints.FootControlPoint11,
            .MorphTargetPoints.FootControlPoint12,
            .MorphTargetPoints.FootControlPoint13,
            .MorphTargetPoints.FootControlPoint14,
            .MorphTargetPoints.FootControlPoint15
          };
        };
        #endif
      };

      AnyFolder Shank = {
        AnySwitch ShowNodes = Off;
        #include "MorphNodesShank.any"

        #if !UseRbfScaling
        AnyFunTransform3DIdentity ScaleFunction = {};
        #else


        AnyFunTransform3DRBF ScaleFunction =
        {
          RBFDef.Param = 0.3;
          //RBFDef.Type = RBF_ThinPlate;
        Points0 ={
            .MorphSourcePoints.KneeJointStandard ,
            .MorphSourcePoints.MedialKneePoint,
            .MorphSourcePoints.LateralKneePoint,
            .MorphSourcePoints.AnteriorKneePoint,
            .MorphSourcePoints.AboveAnteriorKneePoint,
            .MorphSourcePoints.AboveLateralKneePoint ,
            .MorphSourcePoints.AboveMedialKneePoint ,
            .MorphSourcePoints.AnkleJointStandard ,
            .MorphSourcePoints.MedialAnklePoint,
            .MorphSourcePoints.LateralAnklePoint,
            .MorphSourcePoints.AnteriorAnklePoint,
            .MorphSourcePoints.PosteriorKneePoint,
            .MorphSourcePoints.AbovePosteriorKneePoint,
            .MorphSourcePoints.PosteriorAnklePoint
          };
          Points1 = {
            .MorphTargetPoints.targetCenterKneeJoint ,
            .MorphTargetPoints.targetMedialKneePoint,
            .MorphTargetPoints.targetLateralKneePoint,
            .MorphTargetPoints.targetAnteriorKneePoint,
            .MorphTargetPoints.targetAboveAnteriorKneePoint,
            .MorphTargetPoints.targetAboveLateralKneePoint ,
            .MorphTargetPoints.targetAboveMedialKneePoint ,
            .MorphTargetPoints.targetAnkleCenter,
            .MorphTargetPoints.targetMedialAnklePoint,
            .MorphTargetPoints.targetLateralAnklePoint,
            .MorphTargetPoints.targetAnteriorAnklePoint,
            .MorphTargetPoints.targetPosteriorKneePoint,
            .MorphTargetPoints.targetAbovePosteriorKneePoint,
            .MorphTargetPoints.targetPosteriorAnklePoint };


        };
        #endif
      };

      AnyFolder Thigh = {
        AnySwitch ShowNodes = Off;

        #include "MorphNodesThigh.any"


        #if  !UseRbfScaling
        AnyFunTransform3DIdentity ScaleFunction = {};
        #else


        AnyFunTransform3DRBF ScaleFunction =
        {
          //RBFDef.Param = 0.3;
          RBFDef.Type = RBF_ThinPlate;
          Points0 ={
            .MorphSourcePoints.HipJointStandard, // Hip joint center
            .MorphSourcePoints.ThighCPoint1,
            .MorphSourcePoints.ThighCPoint2,
            .MorphSourcePoints.ThighCPoint3,
            .MorphSourcePoints.ThighCPoint4,
            .MorphSourcePoints.ThighCPoint5,
            .MorphSourcePoints.ThighCPoint6,
            .MorphSourcePoints.ThighCPoint7,
            .MorphSourcePoints.ThighCPoint8,
            .MorphSourcePoints.ThighCPoint9,
            .MorphSourcePoints.ThighCPoint10,
            .MorphSourcePoints.ThighCPoint11,
            .MorphSourcePoints.ThighCPoint12,
            .MorphSourcePoints.ThighCPoint13,
            .MorphSourcePoints.ThighCPoint14,
            .MorphSourcePoints.ThighCPoint15,
            .MorphSourcePoints.ThighCPoint16,
            .MorphSourcePoints.ThighCPoint17,
            .MorphSourcePoints.ThighCPoint18,
            .MorphSourcePoints.ThighCPoint19,
            .MorphSourcePoints.ThighCPoint20,
            .MorphSourcePoints.CenterKneePoint,
            .MorphSourcePoints.MedialKneePoint,
            .MorphSourcePoints.LateralKneePoint,
            .MorphSourcePoints.AnteriorKneePoint
          };
          Points1 = {
            .MorphTargetPoints.HipJointStandard, // Hip joint center
            .MorphTargetPoints.ThighCPoint1,
            .MorphTargetPoints.ThighCPoint2,
            .MorphTargetPoints.ThighCPoint3,
            .MorphTargetPoints.ThighCPoint4,
            .MorphTargetPoints.ThighCPoint5,
            .MorphTargetPoints.ThighCPoint6,
            .MorphTargetPoints.ThighCPoint7,
            .MorphTargetPoints.ThighCPoint8,
            .MorphTargetPoints.ThighCPoint9,
            .MorphTargetPoints.ThighCPoint10,
            .MorphTargetPoints.ThighCPoint11,
            .MorphTargetPoints.ThighCPoint12,
            .MorphTargetPoints.ThighCPoint13,
            .MorphTargetPoints.ThighCPoint14,
            .MorphTargetPoints.ThighCPoint15,
            .MorphTargetPoints.ThighCPoint16,
            .MorphTargetPoints.ThighCPoint17,
            .MorphTargetPoints.ThighCPoint18,
            .MorphTargetPoints.ThighCPoint19,
            .MorphTargetPoints.ThighCPoint20,
            .MorphTargetPoints.CenterKneePoint,
            .MorphTargetPoints.MedialKneePoint,
            .MorphTargetPoints.LateralKneePoint,
            .MorphTargetPoints.AnteriorKneePoint
          };
        };
        #endif
      };
       #undef Side

    }; // Left

    #else
    #endif


    // Common law for the upper body
    // *****************************

    AnyFolder Pelvis = {

      //      AnyMat33 AFwd = {{1.03652092e+00,  -1.09638814e-02,   5.18107474e-03},{4.95366278e-04,   9.82704250e-01,  -1.11534133e-03},{2.55795044e-04,  -1.03051812e-03,   8.90635444e-01}};
      //      AnyVec3 sFwd = {-4.85406463e-03,   1.81634855e-03,   2.76898546e-05};
      //      AnyMat33 ARv = {{9.99982522e-01,   5.44723955e-03,  -2.29869535e-03},{-5.44653268e-03,   9.99985118e-01,   3.13656882e-04},{2.30036970e-03,  -3.01131481e-04,   9.99997309e-01}};
      //      AnyVec3 sRv = {0.0042582,  -0.00246698, -0.00011655};


      AnySwitch ShowNodes = Off;
      #include "MorphNodesPelvis.any"
      #if !UseRbfScaling
      AnyFunTransform3DLin ScaleFunction = { ScaleMat = {{1, 0, 0},{0, 1, 0},{0, 0, 1}}; Offset = {0,0,0};};
      #else
      AnyFunTransform3DRBF ScaleFunction=
      {
        RBFDef.Param = 1.0;
        RBFDef.Type = RBF_ThinPlate;// RBF_Gaussian; //
        Points0 = {
          .MorphSourcePoints.RightAsisMarker ,
          .MorphSourcePoints.LeftAsisMarker ,
          .MorphSourcePoints.RightHipJointPoint ,
          .MorphSourcePoints.LeftHipJointPoint ,
          .MorphSourcePoints.RightPSISMarker,
          .MorphSourcePoints.LeftPSISMarker,
          .MorphSourcePoints.CBox1,
          .MorphSourcePoints.CBox2,
          .MorphSourcePoints.CBox3,
          .MorphSourcePoints.CBox4,
          .MorphSourcePoints.CBox5,
          .MorphSourcePoints.CBox6,
          .MorphSourcePoints.CBox7,
          .MorphSourcePoints.CBox8
        };
        Points1 = {
          .MorphTargetPoints.RightAsisMarker ,
          .MorphTargetPoints.LeftAsisMarker ,
          .MorphTargetPoints.RightHipJointPoint ,
          .MorphTargetPoints.LeftHipJointPoint ,
          .MorphTargetPoints.RightPSISMarker,
          .MorphTargetPoints.LeftPSISMarker,
          .MorphTargetPoints.CBox1,
          .MorphTargetPoints.CBox2,
          .MorphTargetPoints.CBox3,
          .MorphTargetPoints.CBox4,
          .MorphTargetPoints.CBox5,
          .MorphTargetPoints.CBox6,
          .MorphTargetPoints.CBox7,
          .MorphTargetPoints.CBox8
        };
      };


      //
      //      AnyMat33 invA = {{9.6476e-001,  1.0758e-002,  -5.5988e-003},{-4.8664e-004,  1.0176e+000,  1.2772e-003},{-2.7765e-004,  1.1743e-003,  1.1228e+000}};
      //      AnyFunTransform3DLin L2Affine = {
      //        ScaleMat = .AFwd;
      //        Offset = .sFwd*.invA';
      //      };
      //      // BACK
      //      AnyFunTransform3DLin ScaleFunction  = {
      //        PreTransforms = {&.L2Affine};
      //        ScaleMat=.ARv;
      //        Offset = .sRv*.ARv;
      //      };


      #endif
    };

    //    AnyFolder Pelvis = {
    //      AnySwitch ShowNodes = On;
    //      #include "MorphNodesPelvis.any"
    //      #if !UseRbfScaling
    //      AnyFunTransform3DLin ScaleFunction = { ScaleMat = {{1, 0, 0},{0, 1, 0},{0, 0, 1}}; Offset = {0,0,0};};
    //      #else
    //      AnyFunTransform3DRBF ScaleFunction=
    //      {
    //        RBFDef.Type = RBF_Gaussian;
    //        RBFDef.Param = 1;
    //        //RBFDef.Type = RBF_Biharmonic;
    //        Points0 = {
    //          .MorphSourcePoints.RightAsisMarker ,
    //          .MorphSourcePoints.LeftAsisMarker ,
    //          .MorphSourcePoints.RightHipJointPoint ,
    //          .MorphSourcePoints.LeftHipJointPoint ,
    //          .MorphSourcePoints.SacrumMarker};
    //        Points1 = {
    //          .MorphTargetPoints.RightAsisMarker ,
    //          .MorphTargetPoints.LeftAsisMarker ,
    //          .MorphTargetPoints.RightHipJointPoint ,
    //          .MorphTargetPoints.LeftHipJointPoint ,
    //          .MorphTargetPoints.SacrumMarker};
    //      };
    //      #endif
    //    };

    AnyFolder Trunk = {
      AnyVar LengthScale = (..AnthroSegmentLengths.TrunkHeight / ..StandardParameters.Trunk.Height);
      AnyVar ms = ..MassScaling.Trunk.MassScale;
      AnyVar ls = LengthScale;
      AnyFunTransform3DLin ScaleFunction = {
        ScaleMat = {{(.ms/.ls)^0.5, 0, 0},{0, .ls, 0},{0, 0, (.ms/.ls)^0.5}};
        Offset = {0,0,0};
      };
    };

    AnyFolder Head = {
      AnyVar LengthScale = (..AnthroSegmentLengths.HeadHeight / ..StandardParameters.Head.Height);
      AnyVar ms = ..MassScaling.Head.MassScale;
      AnyVar ls = LengthScale;
      AnyFunTransform3DLin ScaleFunction = {
        ScaleMat = {{(.ms/.ls)^0.5, 0, 0},{0, .ls, 0},{0, 0, (.ms/.ls)^0.5}};
        Offset = {0,0,0};
      };
    };


    AnyFolder Cervical = {
      AnyFunTransform3DLin &ScaleFunction = .Head.ScaleFunction;
    };


    AnyFolder Lumbar = {
      AnyVar LengthScale = (..AnthroSegmentLengths.TrunkHeight / ..StandardParameters.Trunk.Height);
      AnyVar ms = ..MassScaling.Lumbar.MassScale;
      AnyVar ls = LengthScale;
      AnyFunTransform3DLin ScaleFunction = {
        ScaleMat = {{(.ms/.ls)^0.5, 0, 0},{0, .ls, 0},{0, 0, (.ms/.ls)^0.5}};
        Offset = {0,0,0};
      };
    };

    AnyFolder Clavicula = {
      AnyFunTransform3DLin ScaleFunction = {
        //        AnyMat33 ARel={{-0.280836, -0.004752, 0.959744}, {0.188095, 0.980323, 0.059893}, {-0.941144, 0.197343, -0.274416}};

        AnyMat33 ARel= {      {-0.280836,  0.188095, -0.941144},      {-0.004752,  0.980323, 0.197343},       { 0.959744, 0.059893,  -0.274416}}';


        ScaleMat = ARel*..Trunk.ScaleFunction.ScaleMat*(ARel');
        Offset = {0,0,0}*ARel';
      };

    };


    AnyFolder Scapula = {
      AnyFunTransform3DLin ScaleFunction = {
        //AnyMat33 ARel ={{0.588988, 0.186879, 0.786238}, {-0.159489, 0.980641, -0.113609}, {-0.792248, -0.058482, 0.607391}};
        AnyMat33 ARel ={{0.561294, -0.097357, -0.821870},    {0.151325, 0.988389, -0.013736},    {0.813664, -0.116660, 0.569509}}';


        ScaleMat = ARel*..Trunk.ScaleFunction.ScaleMat*(ARel');
        Offset = {0,0,0}*ARel';
      };
    };

    AnyFolder Humerus = {
      AnyVar LengthScale = (..AnthroSegmentLengths.UpperArmLength / ..StandardParameters.Humerus.Length);
      AnyVar ms = ..MassScaling.Humerus.MassScale;
      AnyVar ls = LengthScale;
      AnyFunTransform3DLin ScaleFunction = {
        ScaleMat = {{(.ms/.ls)^0.5, 0, 0},{0, .ls, 0},{0, 0, (.ms/.ls)^0.5}};
        Offset = {0,0,0};
      };
    };

    AnyFolder Ulna = {
      AnyVar LengthScale = (..AnthroSegmentLengths.LowerArmLength / ..StandardParameters.Ulna.Length);
      AnyVar ms = ..MassScaling.Ulna.MassScale;
      AnyVar ls = LengthScale;
      AnyFunTransform3DLin ScaleFunction = {
        ScaleMat = {{(.ms/.ls)^0.5, 0, 0},{0, .ls, 0},{0, 0, (.ms/.ls)^0.5}};
        Offset = {0,0,0};
      };
    };

    AnyFolder Radius = {
      AnyFunTransform3DLin ScaleFunction = {
        //This Arel is used for mapping the scaling of ulna into the radius coordinate system
        //which is rotated, Arel has been found for a neutral position
        AnyMat33 ARel = {{-0.145873, -0.989303, -0.000001}, {0.989303, -0.145873, 0.000001}, {-0.000001, -0.000000, 1.000000}};
        AnyMat33 ScaleXYZ = ..Ulna.ScaleFunction.ScaleMat;
        ScaleMat = ARel'*ScaleXYZ*ARel;
        Offset = {0,0,0}*ARel;      };
    };

    AnyFolder Hand = {
      AnyVar HandLength =..AnthroSegmentLengths.HandLength;
      AnyVar HandBreadth = ..AnthroSegmentLengths.HandBreadth;
      AnyFunTransform3DLin ScaleFunction = {
        AnyVar BreadthScale = .HandBreadth/...StandardParameters.Hand.HandBreadth;
        AnyVar LengthScale =  .HandLength/...StandardParameters.Hand.HandLength;

        ScaleMat ={{LengthScale,0,0},{0,BreadthScale,0},{0,0,BreadthScale}};

        Offset = {0,0,0};
      };
    };

    AnyFolder &PelvisSeg = Pelvis;
    AnyFolder &SkullSeg = Head;
    AnyFolder &ThoraxSeg = Cervical;

    AnyFolder &C1Seg = Cervical;
    AnyFolder &C2Seg = Cervical;
    AnyFolder &C3Seg = Cervical;
    AnyFolder &C4Seg = Cervical;
    AnyFolder &C5Seg = Cervical;
    AnyFolder &C6Seg = Cervical;
    AnyFolder &C7Seg = Cervical;

    AnyFolder &L1Seg = Lumbar;
    AnyFolder &L2Seg = Lumbar;
    AnyFolder &L3Seg = Lumbar;
    AnyFolder &L4Seg = Lumbar;
    AnyFolder &L5Seg = Lumbar;
    AnyFolder &SacrumSeg = Lumbar;


  };

};
