#include "../libdef.any"
#path Mainpath "."
#ifdef ANYGAIT_PATH_SETUPFILE
#include "<ANYGAIT_PATH_SETUPFILE>AnyGaitSetup.any"
#endif
#include "../../../AnyGaitCommonSetup.any"
//#path ANYGAIT_PATH_PROJECTS "../../../Projects/"
#define IncludeRight 1
#define IncludeLeft 1

#define IncludeHip 1
#define IncludeKnee 1
#define IncludeAnkle 1

#define IncludeLegTDModel 1

#define UseDanamicLoadPosition 1
#define BM_BONY_LANDMARK_DEFINED_JOINTAXIS ON


#define HideStickModelGraphics 0

#define UseRbfScaling 1

#define LoadInverseDynamicModel 1

// Macro for loading marker data from files
#include "../../../Model/OptLegModel/BaseModel/EmulateC3DMacros.any"
#include "../../../Model/OptLegModel/KinOptModel/ClassTemplates.any"
//#include "<ANYBODY_PATH_TOOLBOX>/Mocap/ForcePlateType2AutoDetection.any"
#include "<ANYBODY_PATH_TOOLBOX>/Mocap/ForcePlateType4AutoDetection.any"
//#include "<ANYBODY_PATH_TOOLBOX>/Mocap/ForcePlateType3AutoDetection.any"
#include "<ANYBODY_PATH_TOOLBOX>/Mocap/ForcePlateType2AutoDetection.any"
#include "<ANYBODY_PATH_TOOLBOX>/Mocap/ForcePlateType4.any"
//#include "<ANYBODY_PATH_TOOLBOX>/Mocap/ForcePlateType3.any"
#include "<ANYBODY_PATH_TOOLBOX>/Mocap/ForcePlateType2.any"
#include  "../../../Model/OptLegModel/LegTDModel\MomentArmTemplate.any"


Main = {

#include "<ANYGAIT_PATH_PROJECTS>CurrentConfig.any"
#include "Project.any"

  #include "<SubjectPath>/setupfile.any"

  #include "../../../Model/OptLegModel/BaseModel/ModelSetup.any"
  #include "SetupSpecificData.any"
  #include "../../../Model/OptLegModel/BaseModel/DrawSettings.any"
  #include "../../../Model/OptLegModel/BaseModel/GeneralSettings.any"
 #include "../../../Model/OptLegModel/KinOptModel/Marker.any"

  AnyOperationMacro InverseSequence = {
    MacroStr={
      "operation Main.AnyBodyGaitAppModel.InverseDynamicStudy.InverseDynamics",
      "run"
    };
  };

  Main.Project={
    Files={
      MainFile = "InverseDynamicsModel.main.any";
    };

    Tasks={
      Processing_Run = {
        Description = {
          AnyFile filename = "ProcessingRun.htm";
          HTMLURL = "file:///"+FilePathCompleteOf(filename)
        +"?numvals=12"
        +"&subjectname=" + SubjectDef
        +"&0n="+NameOf(Main.ModelSetup.DynamicDataSet.Header.FirstFrameNo)
        +"&0v="+strval(Main.ModelSetup.DynamicDataSet.Header.FirstFrameNo)
        +"&1n="+NameOf(Main.ModelSetup.DynamicDataSet.Header.LastFrameNo)
        +"&1v="+strval(Main.ModelSetup.DynamicDataSet.Header.LastFrameNo)

        +"&2n="+NameOf(Main.ModelSetup.tStart)
        +"&2v="+strval(Main.ModelSetup.tStartFrame)
        +"&3n="+NameOf(Main.ModelSetup.tEnd)
        +"&3v="+strval(Main.ModelSetup.tEndFrame)

        +"&4n="+NameOf(Main.ModelSetup.tStartTime)
        +"&4v="+strval(Main.ModelSetup.tStartTime,"%-0.4g")
        +"&5n="+NameOf(Main.ModelSetup.tEndTime)
        +"&5v="+strval(Main.ModelSetup.tEndTime,"%-0.4g")

        +"&6n="+NameOf(Main.ModelSetup.tRightHeel)
        +"&6v="+strval(Main.ModelSetup.tRightHeel,"%-0.4g")
        +"&7n="+NameOf(Main.ModelSetup.tLeftHeel)
        +"&7v="+strval(Main.ModelSetup.tLeftHeel,"%-0.4g")

        +"&8n="+NameOf(Main.ModelSetup.tRightToe)
        +"&8v="+strval(Main.ModelSetup.tRightToe,"%-0.4g")
        +"&9n="+NameOf(Main.ModelSetup.tLeftToe)
        +"&9v="+strval(Main.ModelSetup.tLeftToe,"%-0.4g")

        +"&10n="+NameOf(Main.ModelSetup.tRightHeelTime)
        +"&10v="+strval(Main.ModelSetup.tRightHeelTime,"%-0.4g")
        +"&11n="+NameOf(Main.ModelSetup.tLeftHeelTime)
        +"&11v="+strval(Main.ModelSetup.tLeftHeelTime,"%-0.4g")

        +"&12n="+NameOf(Main.ModelSetup.tRightToeTime)
        +"&12v="+strval(Main.ModelSetup.tRightToeTime,"%-0.4g")
        +"&13n="+NameOf(Main.ModelSetup.tLeftToeTime)
        +"&13v="+strval(Main.ModelSetup.tLeftToeTime,"%-0.4g")

        +"&14n="+NameOf(Main.BodyMass)
        +"&14v="+strval(Main.BodyMass,"%-0.4g")
        +"&15n="+NameOf(Main.BodyHeight)
        +"&15v="+strval(Main.BodyHeight,"%-0.4g")
        ;
      };
        Operation = &Main.InverseSequence ;
        TaskView = &Main.Project.Views.View_All;
      };

    };
    Views = {
      AnyProjectModelViewDefinition View_All = {
        DrawGroupSequence = {&Main.DrawGroups.All};
        ShowModelDefined = {On};
      };
    };
    Output = {
      AnyProjectChart RightHipForces = {
        Chart = &Main.Charts.Chart1;
      };
      AnyProjectChart RightKneeForces= {
        Chart = &Main.Charts.Chart2;
      };
      AnyProjectChart RightAnkleForces= {
        Chart = &Main.Charts.Chart3;
      };

      AnyProjectChart LeftHipForces= {
        Chart = &Main.Charts.Chart5;
      };
      AnyProjectChart LeftKneeForces= {
        Chart = &Main.Charts.Chart6;
      };
      AnyProjectChart LeftAnkleForces= {
        Chart = &Main.Charts.Chart7;
      };

    };
  };
  AnyFolder Charts = {
    #include "ProjectChart_1.any"
    #include "ProjectChart_2.any"
    #include "ProjectChart_3.any"
    #include "ProjectChart_5.any"
    #include "ProjectChart_6.any"
    #include "ProjectChart_7.any"

  };
  AnyFolder DrawGroups = {
    AnyDrawGroup All = {
      Objects = ObjSearchRecursive("Main.AnyBodyGaitAppModel","*");
    };
  };
  AnyFolder JntParameterOptModel = {

    #include "../../../Model/OptLegModel/KinOptModel/StickFigure.any"

    // The actual body model goes in this folder
    AnyFolder LegModel = {

      AnyFolder Trunk = {
        #include "../../../Model/OptLegModel/KinOptModel/TrunkSegments.any"
      };

      #if IncludeRight == 1
      #define RightLeg
      AnyFolder Right = {
        #include "../../../Model/OptLegModel/KinOptModel/LegSegments.any"
        #include "../../../Model/OptLegModel/KinOptModel/Joints.any"
        AnyFloat Sign = 1;
      };
      #undef RightLeg
      #endif

      #if IncludeLeft == 1
      #define LeftLeg
      AnyFolder Left = {
        #include "../../../Model/OptLegModel/KinOptModel\LegSegments.any"
        #include "../../../Model/OptLegModel/KinOptModel\Joints.any"
        AnyFloat Sign = -1;
      };
      #undef LeftLeg
      #endif

      #include "../../../Model/OptLegModel/KinOptModel\Interface.any"
    };

    AnyFolder Environment = {
      #include "../../../Model/OptLegModel/KinOptModel\Drivers.any"
    };

    AnyBodyStudy KinematicStudy =
    {
      tStart = Main.ModelSetup.tStart;
      tEnd = Main.ModelSetup.tEnd;
      nStep = Main.ModelSetup.nStep;
      Gravity = {0, 0, 0};

      AnyFolder &C3DData=Main.ModelSetup.DynamicDataSet ;
      AnyFolder &LegModel = .LegModel;
      AnyFolder &Environment = .Environment;

      #include "../../../Model/OptLegModel/KinOptModel\JointAngleOutputs.any"

      InitialConditions.SolverType = KinSolOverDeterminate;
      Kinematics.SolverType = KinSolOverDeterminate;
      InitialConditions.PosAnalysisOnlyOnOff=On;
      Kinematics.PosAnalysisOnlyOnOff=On;
    };
  };

  #if IncludeLegTDModel  == 1
  AnyFolder AnyBodyGaitAppModel = {
    #include "../../../Model/OptLegModel/LegTDModel/HumanModel.any"

    AnyBodyStudy InverseDynamicStudy =
    {
      tStart = Main.ModelSetup.tStart;
      tEnd = Main.ModelSetup.tEnd;
      nStep = Main.ModelSetup.nStep;
      Gravity = Main.GeneralSettings.Gravity;


    AnyOutputGCD GCDOutput=
    {
        FileName = ANYGAIT_PATH_PROJECTS + SubjectDef + "/" + "GCD";// + Main.GeneralSettings.OutputFilename;
      /*NumberFormat =
      {
      Digits = 15;
      Width = 22;
      Style = ScientificNumber;
      FormatStr = "";
      };*/
      //Search = ;
      //SepSign = ",";
      //LineSepSign = "";
      /*Header =
      {
      TitleSectionOnOff = On;
      ConstSectionOnOff = On;
      VarSectionOnOff = On;
      ColumnNamesOnOff = On;
      LinePrefix = "";
      };*/
      LeftHeelStrike1 = Main.LeftHeelStrike;
      LeftHeelStrike2 = Main.LeftToeOff;
//      LeftFootOff = Main.LeftToeOff;
      RightHeelStrike1 = Main.RightHeelStrike;
      RightHeelStrike2 = Main.RightToeOff;
//      RightFootOff = Main.RightToeOff;
      /*Right =
      {
      };*/
      /*Left =
      {
      };*/
      //Points = 51;
         AnyFloat RightHipForces = .JointReactionForces.RightHipForceInThighCoordinateSystem;
         AnyFloat RightKneeForces = .JointReactionForces.RightKneeForceInShankCoordinateSystem;
         AnyFloat RightAnkleForces = .JointReactionForces.RightAnkleForceInFootCoordinateSystem;
//         AnyFloat RightHipMoments = .JointReactionForces.RightHipForceInThighCoordinateSystem;
//         AnyFloat RightKneeMoments = .JointReactionForces.RightKneeForceInShankCoordinateSystem;
//         AnyFloat RightAnkleMoments = .JointReactionForces.RightAnkleForceInFootCoordinateSystem;
//         AnyFloat RightHipAngles = .JointReactionForces.RightHipForceInThighCoordinateSystem;
//         AnyFloat RightKneeAngles = .JointReactionForces.RightKneeForceInShankCoordinateSystem;
//         AnyFloat RightAnkleAngles = .JointReactionForces.RightAnkleForceInFootCoordinateSystem;

         AnyFloat LeftHipForces = .JointReactionForces.LeftHipForceInThighCoordinateSystem;
         AnyFloat LeftKneeForces = .JointReactionForces.LeftKneeForceInShankCoordinateSystem;
         AnyFloat LeftAnkleForces = .JointReactionForces.LeftAnkleForceInFootCoordinateSystem;
//         AnyFloat LeftHipMoments = .JointReactionForces.LeftHipForceInThighCoordinateSystem;
//         AnyFloat LeftKneeMoments = .JointReactionForces.LeftKneeForceInShankCoordinateSystem;
//         AnyFloat LeftAnkleMoments = .JointReactionForces.LeftAnkleForceInFootCoordinateSystem;
//         AnyFloat LeftHipAngles = .JointReactionForces.LeftHipForceInThighCoordinateSystem;
//         AnyFloat LeftKneeAngles = .JointReactionForces.LeftKneeForceInShankCoordinateSystem;
//         AnyFloat LeftAnkleAngles = .JointReactionForces.LeftAnkleForceInFootCoordinateSystem;

       };


      AnyOutputFile OutputFile = {
        FileName = ANYGAIT_PATH_PROJECTS + SubjectDef + "/" + "Results.txt";
        #include "../../../Model/OptLegModel/BaseModel/OutputDefinition.any"
        SepSign = Main.GeneralSettings.OutputSepSign;
      };


      AnyFolder &OptKinModel = Main.JntParameterOptModel.LegModel;
      AnyFolder HumanModel = {
        AnyFolder &BodyModel = ..HumanModel.BodyModel ;
        AnyFolder &Scaling = ..HumanModel.Scaling;
        AnyFolder &Mannequin = ..HumanModel.Mannequin;
      };
      AnyFolder EnvironmentModel = {
        AnyFolder DrawC3DMarkers = {};
        #include "../../../Model/OptLegModel/BaseModel/Environment.any"
      };

      AnyFolder ModelEnvironmentConnection = {
        #include "../../../Model/OptLegModel/LegTDModel/JointsAndDriversOptimized.any"
        #include "../../../Model/OptLegModel/KinOptModel/JointsAndDriversOptimized.any"
      };

      InverseDynamics.Criterion.PrimaryTerm.LowerLimit = 1e-30;//1;//1e-10;
      InverseDynamics.Criterion.AuxLinearTerm.LowerLimit = 1e-30;//1;//1e-10;
      InverseDynamics.Criterion.AuxQuadraticTerm.LowerLimit = 1e-30;//1;//1e-10;
      InverseDynamics.Criterion.UpperBoundVar.LowerLimit = 1e-30;//1;//1e-10;
      InverseDynamics.Criterion.LowerBoundVar.LowerLimit = 1e-30;//1;//1e-10;
      InverseDynamics.Criterion.UpperBoundOnOff=Off;
      InitialConditions.SolverType = KinSolOff;
      Kinematics.SolverType = KinSolOff;
      InitialConditions.PosAnalysisOnlyOnOff=Off;
      Kinematics.PosAnalysisOnlyOnOff=Off;

      InverseDynamics.Criterion.Power = Main.GeneralSettings.MuscleRecruitmentOrder;

      #include "../../../Model/OptLegModel/BaseModel/JointReactionForces.any"


    };
  };

  #endif

     AnyFolder InitialPositionOfBody ={
      AnyVar PelvisRotZ = 90;
      AnyVar PelvisRotY = 0;
      AnyVar PelvisRotX = 90;

      AnyFolder Right={
        AnyVar HipFlexion = 20.31705;
        AnyVar HipAbduction = 5.707386;
        AnyVar HipExternalRotation = -3.079478;
        AnyVar KneeFlexion = 06;
        AnyVar AnklePlantarFlexion = 0;
        AnyVar SubTalarEversion = 0.2;
      };

      AnyFolder Left ={
        AnyVar HipFlexion = -20.1819;
        AnyVar HipAbduction = -3.050171;
        AnyVar HipExternalRotation = 0*-16.907892;
        AnyVar KneeFlexion = 7;
        AnyVar AnklePlantarFlexion = 0;
        AnyVar SubTalarEversion =0.20;
      };
    };
};  // Main
