AnyChart Chart1 = {
  Series = {
    AnyChartSerie Serie1 = {
      Lines.RGB = {1,0,0};
      Abscissa  = "Main.AnyBodyGaitAppModel.InverseDynamicStudy.Output.Abscissa.t";
      Value     = "Main.AnyBodyGaitAppModel.InverseDynamicStudy.Output.OutputFile.RightHipForces";
      Lines = {
        Thickness = 3.0;
      };
    };
  };

  #include "projectchart_setup.any"

}; // My Chart
