#if IncludeRight == 1
   #if IncludeHip == 1
      AnyDesVar RHip_P1 = {
        Val = .ModelRef.Trunk.Seg.Pelvis.RHipJoint.sRel[0];
      };
      AnyDesVar RHip_P2 = {
        Val = .ModelRef.Trunk.Seg.Pelvis.RHipJoint.sRel[1];
      };
      AnyDesVar RHip_P3 = {
        Val = .ModelRef.Trunk.Seg.Pelvis.RHipJoint.sRel[2];
      };
      AnyDesVar RHip_P4 =  {
        Val = .ModelRef.Right.Seg.Thigh.HipJoint.sRel[0];
      };
      AnyDesVar RHip_P5 = {
        Val = .ModelRef.Right.Seg.Thigh.HipJoint.sRel[1];
        };
      AnyDesVar RHip_P6 =  {
        Val = .ModelRef.Right.Seg.Thigh.HipJoint.sRel[2];
      };
   #endif
   #if IncludeKnee == 1
      AnyDesVar RKnee_P1 = {
        Val = .ModelRef.Right.Seg.Thigh.KneeJoint.xRot;
      };
      AnyDesVar RKnee_P2 = {
        Val = .ModelRef.Right.Seg.Thigh.KneeJoint.yRot;
      };
      AnyDesVar RKnee_P3 = {
        Val = .ModelRef.Right.Seg.Shank.KneeJoint.xRot;
      };
      AnyDesVar RKnee_P4 =  {
        Val = .ModelRef.Right.Seg.Shank.KneeJoint.yRot;
      };
      AnyDesVar RKnee_P5 = {
        Val = .ModelRef.Right.Seg.Thigh.KneeJoint.sRel[0];
        };
      AnyDesVar RKnee_P6 =  {
        Val = .ModelRef.Right.Seg.Thigh.KneeJoint.sRel[1];
      };
      AnyDesVar RKnee_P7 =  {
        Val = .ModelRef.Right.Seg.Shank.KneeJoint.sRel[0];
      };
      AnyDesVar RKnee_P8 =  {
        Val = .ModelRef.Right.Seg.Shank.KneeJoint.sRel[1];
      };
      AnyDesVar RKnee_P9 =  {
        Val = .ModelRef.Right.Seg.Shank.KneeJoint.sRel[2];
      };
   #endif
   #if IncludeAnkle == 1
      AnyDesVar RAnkle_P1 =  {
        Val = .ModelRef.Right.Seg.Shank.AnkleJoint.xRot;
      };
      AnyDesVar RAnkle_P2 =  {
        Val = .ModelRef.Right.Seg.Shank.AnkleJoint.yRot;
      };
      AnyDesVar RAnkle_P6 =  {
        Val = .ModelRef.Right.Seg.Shank.AnkleJoint.sRel[0];
      };
      AnyDesVar RAnkle_P7 =  {
        Val = .ModelRef.Right.Seg.Shank.AnkleJoint.sRel[1];
      };
    #endif
#endif


#if IncludeLeft == 1
   #if IncludeHip == 1
      AnyDesVar LHip_P1 = {
        Val = .ModelRef.Trunk.Seg.Pelvis.LHipJoint.sRel[0];
      };
      AnyDesVar LHip_P2 = {
        Val = .ModelRef.Trunk.Seg.Pelvis.LHipJoint.sRel[1];
      };
      AnyDesVar LHip_P3 = {
        Val = .ModelRef.Trunk.Seg.Pelvis.LHipJoint.sRel[2];
      };
      AnyDesVar LHip_P4 =  {
        Val = .ModelRef.Left.Seg.Thigh.HipJoint.sRel[0];
      };
      AnyDesVar LHip_P5 = {
        Val = .ModelRef.Left.Seg.Thigh.HipJoint.sRel[1];
        };
      AnyDesVar LHip_P6 =  {
        Val = .ModelRef.Left.Seg.Thigh.HipJoint.sRel[2];
      };
   #endif
   #if IncludeKnee == 1
      AnyDesVar LKnee_P1 = {
        Val = .ModelRef.Left.Seg.Thigh.KneeJoint.xRot;
      };
      AnyDesVar LKnee_P2 = {
        Val = .ModelRef.Left.Seg.Thigh.KneeJoint.yRot;
      };
      AnyDesVar LKnee_P3 = {
        Val = .ModelRef.Left.Seg.Shank.KneeJoint.xRot;
      };
      AnyDesVar LKnee_P4 =  {
        Val = .ModelRef.Left.Seg.Shank.KneeJoint.yRot;
      };
      AnyDesVar LKnee_P5 = {
        Val = .ModelRef.Left.Seg.Thigh.KneeJoint.sRel[0];
        };
      AnyDesVar LKnee_P6 =  {
        Val = .ModelRef.Left.Seg.Thigh.KneeJoint.sRel[1];
      };
      AnyDesVar LKnee_P7 =  {
        Val = .ModelRef.Left.Seg.Shank.KneeJoint.sRel[0];
      };
      AnyDesVar LKnee_P8 =  {
        Val = .ModelRef.Left.Seg.Shank.KneeJoint.sRel[1];
      };
      AnyDesVar LKnee_P9 =  {
        Val = .ModelRef.Left.Seg.Shank.KneeJoint.sRel[2];
      };
   #endif
   #if IncludeAnkle == 1
      AnyDesVar LAnkle_P1 =  {
        Val = .ModelRef.Left.Seg.Shank.AnkleJoint.xRot;
      };
      AnyDesVar LAnkle_P2 =  {
        Val = .ModelRef.Left.Seg.Shank.AnkleJoint.yRot;
      };
      AnyDesVar LAnkle_P6 =  {
        Val = .ModelRef.Left.Seg.Shank.AnkleJoint.sRel[0];
      };
      AnyDesVar LAnkle_P7 =  {
        Val = .ModelRef.Left.Seg.Shank.AnkleJoint.sRel[1];
      };
      AnyDesVar LAnkle_P8 =  {
        Val = .ModelRef.Left.Seg.Shank.AnkleJoint.sRel[2];
      };
    #endif
#endif
