AnyFolder JointAngleOutputs = {

  #if IncludeHip == 1

  AnyOutputFile OutputFile1 = {
    FileName = ANYGAIT_PATH_PROJECTS + SubjectDef + "/"+ "-output-euler-pelvis.txt";

    SepSign = " ";

    AnyVector PelvisPosX = ..LegModel.Interface.Trunk.PelvisDriveNodePosX.Pos;
    AnyVector PelvisPosY = ..LegModel.Interface.Trunk.PelvisDriveNodePosY.Pos;
    AnyVector PelvisPosZ = ..LegModel.Interface.Trunk.PelvisDriveNodePosZ.Pos;
    AnyVector PelvisRot0 = ..LegModel.Interface.Trunk.PelvisDriveNodeRot0.Pos;
    AnyVector PelvisRot1 = ..LegModel.Interface.Trunk.PelvisDriveNodeRot1.Pos;
    AnyVector PelvisRot2 = ..LegModel.Interface.Trunk.PelvisDriveNodeRot2.Pos;
  };
  #endif


  #if IncludeLeft + IncludeKnee + IncludeAnkle == 3

  AnyOutputFile OutputFile2 = {
    FileName = ANYGAIT_PATH_PROJECTS + SubjectDef + "/"+ "-output-euler-leftlegtd.txt";

    SepSign = " ";

    AnyVector HipMeasure0 = Main.JntParameterOptModel.LegModel.Interface.Left.HipJointMeasure0.Pos;
    AnyVector HipMeasure1 = Main.JntParameterOptModel.LegModel.Interface.Left.HipJointMeasure1.Pos;
    AnyVector HipMeasure2 = Main.JntParameterOptModel.LegModel.Interface.Left.HipJointMeasure2.Pos;
    AnyVector KneeJointMeasure = Main.JntParameterOptModel.LegModel.Interface.Left.KneeJointMeasure.Pos;
    AnyVector AnkleJointMeasure = Main.JntParameterOptModel.LegModel.Interface.Left.AnkleJointMeasure.Pos;
  };

  #endif


  #if IncludeRight + IncludeKnee + IncludeAnkle == 3


  AnyOutputFile OutputFile3 = {
    FileName = ANYGAIT_PATH_PROJECTS + SubjectDef + "/"+ "-output-euler-rightlegtd.txt";
    SepSign = " ";

    AnyVector HipMeasure0 = ...LegModel.Interface.Right.HipJointMeasure0.Pos;
    AnyVector HipMeasure1 = ...LegModel.Interface.Right.HipJointMeasure1.Pos;
    AnyVector HipMeasure2 = ...LegModel.Interface.Right.HipJointMeasure2.Pos;
    AnyVector KneeJointMeasure = ...LegModel.Interface.Right.KneeJointMeasure.Pos;
    AnyVector AnkleJointMeasure = ...LegModel.Interface.Right.AnkleJointMeasure.Pos;
  };

  #endif


}; //JointAngleOutputs
