AnyFolder Seg = {

#if IncludeHip == 1
AnySeg Pelvis =
{
  r0 = ....Mannequin.Posture.Pelvis.r0_init;
  Axes0 = ....Mannequin.Posture.Pelvis.Axes0_init;

  Mass = 10.6;
  Jii = {0.0221, 0.01, 0.0221};

  AnyRefNode HipJoint = {
    #ifdef UseAnatomicalParameters
      sRel = .....Mannequin.Posture.Pelvis.HipJoint.sRel_init;
    #else
      sRel = {-0.058, -0.037, 0.109};
    #endif
  };

  AnyRefNode RASIS = {
    sRel = .....Mannequin.Posture.Pelvis.RASIS.sRel_init;

  };
  AnyRefNode LASIS = {
    sRel = .....Mannequin.Posture.Pelvis.LASIS.sRel_init;
  };
  AnyRefNode Sacral = {
    sRel = .....Mannequin.Posture.Pelvis.Sacral.sRel_init;
  };

  AnyDrawNodes DrwNodes = {
    RGB = {0,1,0};
    Opacity = 0.5;
    ScaleXYZ = {0.01, 0.01, 0.01};
  };
  AnyDrawRefFrame DrwFrame =
  {
    ScaleXYZ = {0.1, 0.1, 0.1};
  };

  AnyDrawSurf drwSurf =
  {
    Opacity = 0.5;
    RGB = {0, 1, 0};
    FileName = "pelvisWOS";
    AnyFunTransform3DLin Transform = {
      ScaleMat = RotMat(0.35,z) * {{1.07,0,0},{0,1.07,0},{0,0,1.07}} ;
      Offset = {-0.13,0.0, 0};
    };
  };

};
#endif

#if IncludeKnee + IncludeHip > 0

AnySeg Thigh = {

  Mass = 50.5;
  Jii = {0.01, 0.005, 0.01};

  r0 = ....Mannequin.Posture.Thigh.r0_init;

  Axes0 = ....Mannequin.Posture.Thigh.Axes0_init;

  AnyRefNode RThighSuperior = {
    sRel = .....Mannequin.Posture.Thigh.RThighSuperior.sRel_init;
  };
    AnyRefNode RThighInferior = {
    sRel = .....Mannequin.Posture.Thigh.RThighInferior.sRel_init;
  };
    AnyRefNode RThighLateral = {
    sRel = .....Mannequin.Posture.Thigh.RThighLateral.sRel_init;
  };
    AnyRefNode RKneeLateral = {
    sRel = .....Mannequin.Posture.Thigh.RKneeLateral.sRel_init;
  };
    AnyRefNode RKneeMedial = {
    sRel = .....Mannequin.Posture.Thigh.RKneeMedial.sRel_init;
  };

  // Thigh length is .418m, keep relative distances from centroid
  AnyRefNode HipJoint = {
    #ifdef UseAnatomicalParameters
      sRel = .....Mannequin.Posture.Thigh.HipJoint.sRel_init;
    #else
      sRel = {0,0,0};
    #endif
  };

  AnyRefNode KneeJoint = {
    #ifdef UseAnatomicalParameters
      AnyFloat xRot = 0;
      AnyFloat yRot = 0;
      sRel = .....Mannequin.Posture.Thigh.KneeJoint.sRel_init;
      ARel = RotMat(xRot,x)*RotMat(yRot,y);
    #else
      AnyFloat xRot = 0;
      AnyFloat yRot = 0;
      sRel = {0,-0.45, -0.052};
      ARel = RotMat(xRot,x)*RotMat(yRot,y);
    #endif
  };


  AnyDrawNodes DrwNodes = {
    RGB = {1,0,0};
    Opacity = 0.5;
    ScaleXYZ = {0.01, 0.01, 0.01};

  };

  AnyDrawLine DrwLine =
  {
    p0 = .HipJoint.sRel;
    p1 = .KneeJoint.sRel;
    GlobalCoord = Off;
    Line.Thickness = 0.01;
    Line.RGB = {1,0,0};
  };

  AnyDrawRefFrame drwref =
  {
    //RGB = {0.91796875, 0.76953125, 0.06640625};
    ScaleXYZ = {0.1, 0.1, 0.1};
  };


}; // End of ThighSeg
#endif

#if IncludeKnee + IncludeAnkle > 0
AnySeg Shank = {

  // Initial Segment position
  r0 = ....Mannequin.Posture.Shank.r0_init;

  Mass = 7.5;
  Jii = {0.005, 0.0025, 0.005};
  Axes0 = ....Mannequin.Posture.Shank.Axes0_init;

  AnyRefNode RShankSuperior = {
    sRel = .....Mannequin.Posture.Shank.RShankSuperior.sRel_init;
  };
    AnyRefNode RShankInferior = {
    sRel = .....Mannequin.Posture.Shank.RShankInferior.sRel_init;
  };
    AnyRefNode RShankLateral = {
    sRel = .....Mannequin.Posture.Shank.RShankLateral.sRel_init;
  };
    AnyRefNode RAnkleLateral = {
    sRel = .....Mannequin.Posture.Shank.RAnkleLateral.sRel_init;
  };
    AnyRefNode RAnkleMedial = {
    sRel = .....Mannequin.Posture.Shank.RAnkleMedial.sRel_init;
  };

  AnyRefNode KneeJoint = {
    #ifdef UseAnatomicalParameters
      sRel = .....Mannequin.Posture.Shank.KneeJoint.sRel_init;
      AnyFloat xRot = 0.0;
      AnyFloat yRot = 0.0;
      ARel = RotMat(xRot,x)*RotMat(yRot,y);
    #else
      sRel = {0,0,0};
      AnyFloat xRot = 0.0;
      AnyFloat yRot = 0.0;
      ARel = RotMat(xRot,x)*RotMat(yRot,y);
    #endif
  };

  AnyRefNode AnkleJoint = {
    #ifdef UseAnatomicalParameters
      sRel = .....Mannequin.Posture.Shank.AnkleJoint.sRel_init;
      AnyFloat xRot = 0.0;
      AnyFloat yRot = 0.0;
      ARel = RotMat(xRot,x)*RotMat(yRot,y);
    #else
      sRel = {0,-0.413,0.055};
      AnyFloat xRot = 0.0;
      AnyFloat yRot = 0.00;
      ARel = RotMat(xRot,x)*RotMat(yRot,y);
    #endif

  };

  AnyDrawNodes DrwNodes = {
    RGB = {1,0,1};
    Opacity = 0.5;
    ScaleXYZ = {0.01, 0.01, 0.01};

  };

  AnyDrawLine DrwLine =
  {
    //Visible = On;
    //Opacity = 1;
    p0 = .KneeJoint.sRel;
    p1 = .AnkleJoint.sRel;
    //Offset = {0, 0, 0};
    GlobalCoord = Off;
    //DirAxis = ;
    Line.Thickness = 0.01;
    Line.RGB = {1,0,1};
  };


}; // End of Shank Seg
#endif

#if IncludeAnkle == 1

AnySeg Talus = {
  // Initial Segment position
  r0 = ....Mannequin.Posture.Talus.r0_init;

  // Initialize to some value which make look OK when loaded.
  Axes0 =  {{-0.5011894, -0.03120064, -0.864775}, {-0.8642414, -0.03223931, 0.5020433}, {-0.04354382, 0.9989931, -0.01080689}};


  Mass = 0.1;
  Jii = {0.00005, 0.000025, 0.00005};

  AnyRefNode AnkleJoint = {
    #ifdef UseAnatomicalParameters
      sRel = .....Mannequin.Posture.Talus.AnkleJoint.sRel_init;
    #else
      sRel = {0,0,0};
    #endif
  };

  AnyRefNode SubTalarJoint = {
    #ifdef UseAnatomicalParameters
       sRel = .....Mannequin.Posture.Talus.SubTalarJoint.sRel_init;
       AnyFloat yRot = 0;
       ARel = RotMat(yRot,y);
     #else
       sRel = {0,-0.012,0};
       AnyFloat yRot = 0.2;
       ARel = RotMat(yRot,y);
     #endif


  };

};


AnySeg Foot = {

  // Initial Segment position
  r0 = ....Mannequin.Posture.Foot.r0_init;

  Mass = 0.8;
  sCoM = {0.16,0, 0};
  Jii = {0.0002, 0.003, 0.00295};
  JaboutCoMOnOff = On;
  //Jij = {0.01,0.1, 0.01};

  Axes0 = ....Mannequin.Posture.Foot.Axes0_init;

  AnyRefNode RHeel = {
    sRel = .....Mannequin.Posture.Foot.RHeel.sRel_init;
  };
  AnyRefNode RToe = {
    sRel = .....Mannequin.Posture.Foot.RToe.sRel_init;
  };
  AnyRefNode RMidfootSuperior = {
    sRel = .....Mannequin.Posture.Foot.RMidfootSuperior.sRel_init;
  };
  AnyRefNode RMidfootLateral = {
    sRel = .....Mannequin.Posture.Foot.RMidfootLateral.sRel_init;
  };

  AnyRefNode SubTalarJoint = {
    #ifdef UseAnatomicalParameters
      sRel = .....Mannequin.Posture.Foot.SubTalarJoint.sRel_init;
      AnyFloat yRot = 0;
      AnyFloat zRot = 0;
      ARel = RotMat(yRot,y)*RotMat(zRot,z);
    #else
      sRel = {0.091, 0.039, 0.01};
      AnyFloat yRot = -0.15;
      AnyFloat zRot = 0.58;
      ARel = RotMat(yRot,y)*RotMat(zRot,z);
    #endif

  };


  AnyDrawLine DrwLine0 =
  {
    p0 = .RHeel.sRel;
    p1 = .RToe.sRel;
    GlobalCoord = Off;
    Line.Thickness = 0.01;
    Line.RGB = {1,0,0};
  };
    AnyDrawLine DrwLine1 =
  {
    p0 = .RHeel.sRel;
    p1 = .SubTalarJoint.sRel;
    GlobalCoord = Off;
    Line.Thickness = 0.01;
    Line.RGB = {1,0,0};
  };
    AnyDrawLine DrwLine2 =
  {
    p0 = .RToe.sRel;
    p1 = .SubTalarJoint.sRel;
    GlobalCoord = Off;
    Line.Thickness = 0.01;
    Line.RGB = {1,0,0};
  };

  AnyDrawNodes DrwNodes = {
    RGB = {1,0,0};
    Opacity = 0.5;
    ScaleXYZ = {0.01, 0.01, 0.01};

  };
};

#endif

};
