#include "../libdef.any"
#ifdef ANYGAIT_PATH_SETUPFILE
#include "<ANYGAIT_PATH_SETUPFILE>AnyGaitSetup.any"
#endif
#include "../../../AnyGaitCommonSetup.any"
//#path ANYGAIT_PATH_PROJECTS "../../../Projects/"
#define LoadPreProcessing

#define IncludeRight 1
#define IncludeLeft 1

#define IncludeHip 1
#define IncludeKnee 1
#define IncludeAnkle 1

#define UseDanamicLoadPosition 0
#define EnableJointAxisScaling 1

#define HideStickModelGraphics 0


// Macro for loading marker data from files
#include "../../../Model/OptLegModel/BaseModel/EmulateC3DMacros.any"
#include "../../../Model/OptLegModel/KinOptModel/ClassTemplates.any"
#include "<ANYBODY_PATH_TOOLBOX>/Mocap/ForcePlateType2.any"
#include  "../../../Model/OptLegModel/LegTDModel\MomentArmTemplate.any"
//#include "<ANYBODY_PATH_TOOLBOX>/Mocap/CreateMarkerClassGaitApp.any"
#include "<ANYBODY_PATH_TOOLBOX>/Mocap/CreateMarkerClass.any"
#include "<ANYBODY_PATH_TOOLBOX>/Mocap/CreateMarkerClassTD.any"


Main = {

#include "<ANYGAIT_PATH_PROJECTS>CurrentConfig.any"
#include "Project.any"


  #include "<SubjectPath>/setupfile.any"

  #include "../../../Model/OptLegModel/BaseModel/ModelSetup.any"
  #include "SetupSpecificData.any"
  #include "../../../Model/OptLegModel/BaseModel/DrawSettings.any"
  #include "../../../Model/OptLegModel/BaseModel/GeneralSettings.any"
 #include "../../../Model/OptLegModel/KinOptModel/Marker.any"

  AnyOperationMacro KinematicsSequence = {
    MacroStr={
      "operation Main.JntParameterOptModel.KinematicStudy.Kinematics",
      "run"
    };
  };
    Main.Project={
    Files={
      MainFile = "KinematicModel.main.any";
    };


  Tasks = {
    PreProcessing_Run = {
      Description = {
        AnyFile filename = "PreProcessingRunValues.htm";
        HTMLURL = "file:///"+FilePathCompleteOf(filename)
        +"?numvals=12"
        +"&subjectname=" + SubjectDef
        +"&0n="+NameOf(Main.ModelSetup.DynamicDataSet.Header.FirstFrameNo)
        +"&0v="+strval(Main.ModelSetup.DynamicDataSet.Header.FirstFrameNo)
        +"&1n="+NameOf(Main.ModelSetup.DynamicDataSet.Header.LastFrameNo)
        +"&1v="+strval(Main.ModelSetup.DynamicDataSet.Header.LastFrameNo)
        +"&2n="+NameOf(Main.ModelSetup.tStart)
        +"&2v="+strval(Main.ModelSetup.tStartFrame)
        +"&3n="+NameOf(Main.ModelSetup.tEnd)
        +"&3v="+strval(Main.ModelSetup.tEndFrame)
        +"&4n="+NameOf(Main.BodyMass)
        +"&4v="+strval(Main.BodyMass,"%-0.4g")
        +"&5n="+NameOf(Main.BodyHeight)
        +"&5v="+strval(Main.BodyHeight,"%-0.4g")       ;
      };
        Operation = &Main.KinematicsSequence;
        TaskView = &Main.Project.Views.View_All;
      };
    };
    Views = {
      AnyProjectModelViewDefinition View_All = {
        DrawGroupSequence = {&Main.DrawGroups.All};
        ShowModelDefined = {On};
      };
    };
  };
  AnyFolder DrawGroups = {
    AnyDrawGroup All = {
      Objects = ObjSearchRecursive("Main","*");
    };
  };
  AnyFolder JntParameterOptModel = {

    #include "../../../Model/OptLegModel/KinOptModel/StickFigure.any"

    // The actual body model goes in this folder
    AnyFolder LegModel = {

      AnyFolder Trunk = {
        #include "../../../Model/OptLegModel/KinOptModel/TrunkSegments.any"
      };

      #if IncludeRight == 1
      #define RightLeg
      AnyFolder Right = {
        #include "../../../Model/OptLegModel/KinOptModel/LegSegments.any"
        #include "../../../Model/OptLegModel/KinOptModel/Joints.any"
        AnyFloat Sign = 1;
      };
      #undef RightLeg
      #endif

      #if IncludeLeft == 1
      #define LeftLeg
      AnyFolder Left = {
        #include "../../../Model/OptLegModel/KinOptModel\LegSegments.any"
        #include "../../../Model/OptLegModel/KinOptModel\Joints.any"
        AnyFloat Sign = -1;
      };
      #undef LeftLeg
      #endif

      #include "../../../Model/OptLegModel/KinOptModel\Interface.any"

    };

    AnyFolder Environment = {
      #include "../../../Model/OptLegModel/KinOptModel\Drivers.any"
    };


    AnyBodyStudy KinematicStudy =
    {
      tStart = Main.ModelSetup.tStart;
      tEnd = Main.ModelSetup.tEnd;
      nStep = Main.ModelSetup.nStep;
      Gravity = {0, 0, 0};

      AnyFolder &C3DData=Main.ModelSetup.DynamicDataSet ;
      AnyFolder &LegModel = .LegModel;
      AnyFolder &Environment = .Environment;

      #include "../../../Model/OptLegModel/KinOptModel\JointAngleOutputs.any"

      InitialConditions.SolverType = KinSolOverDeterminate;
      Kinematics.SolverType = KinSolOverDeterminate;
      InitialConditions.PosAnalysisOnlyOnOff=On;
      Kinematics.PosAnalysisOnlyOnOff=On;
      Main.JntParameterOptModel.KinematicStudy.Kinematics.KinematicTol = 0.0001;   //introduced by Amir
    };

  };


};  // Main
