Main = {

  // The actual body model goes in this folder
  AnyFolder Forelimb = {

    // Global Reference Frame
    AnyFixedRefFrame GlobalRef = {
      AnyDrawRefFrame DrwGlobalRef = {
      ScaleXYZ = {0.25, 0.25, 0.25};
      };

      AnyRefNode HangNode = {
        sRel = {0.5,0.5,0.5};
      };

//      AnyDrawNodes RefNodes = {
//        ScaleXYZ={0.015,0.015,0.015};
//        RGB={1.0,1.0,0.0};
//      };

      // Todo: Add points for grounding of the model here

    }; // Global reference frame

    #include "../../../Body/Beta/AAUCow/Environment.any"
    #include "../../../Body/Beta/AAUCow/Segments.any"
    #include "../../../Body/Beta/AAUCow/Joints.any"
    #include "../../../Body/Beta/AAUCow/Muscles.any"
    #include "../../../Body/Beta/AAUCow/MotionTracker.any"
    #include "InitialPositions.any"

  }; // Forelimb

  // The study: Operations to be performed on the model
  AnyBodyStudy MyStudy = {
    AnyFolder &Model = .Forelimb;
    RecruitmentSolver = MinMaxSimplex;
    Gravity = {0.0, 0.0, -9.81};
    tStart = 0;
    tEnd = 1.225;
    nStep = 122;
    KinematicTol = 0.01;
  };


};  // Main
