AnyFolder   FootType = {

  AnyFolder Right = {


  // Egyptian: 69 % of the general population
//  AnyVar ProxScaleVal = 1.85;
//  AnyVar DistScaleVal = 1.15;

  // Greek: 22 % of the general population
//  AnyVar ProxScaleVal = 1.20;
//  AnyVar DistScaleVal = 1.00;

  // Squared: 9 % of the general population
//  AnyVar ProxScaleVal = 1.40;
//  AnyVar DistScaleVal = 1.10;


  // Standard original size: can be considered as Greek
  AnyVar MetaScaleVal = 1.0;
  AnyVar ProxScaleVal = 1.0;
  AnyVar DistScaleVal = 1.0;


    AnyMat33 MetaScale ={{1,0,0},{0,MetaScaleVal,0},{0,0,1}};
    AnyMat33 ProxPhalScale ={{1,0,0},{0,ProxScaleVal,0},{0,0,1}};
    AnyMat33 DistPhalScale ={{1,0,0},{0,DistScaleVal,0},{0,0,1}};


  };


  AnyFolder Left = {


  AnyVar MetaScaleVal = .Right.MetaScaleVal;
  AnyVar ProxScaleVal = .Right.ProxScaleVal;
  AnyVar DistScaleVal = .Right.DistScaleVal;


    AnyMat33 MetaScale ={{1,0,0},{0,MetaScaleVal,0},{0,0,1}};
    AnyMat33 ProxPhalScale ={{1,0,0},{0,ProxScaleVal,0},{0,0,1}};
    AnyMat33 DistPhalScale ={{1,0,0},{0,DistScaleVal,0},{0,0,1}};


  };


}; // FootType
