// This is to switch On or Off the MannequinDrivers. It is a quick way to drive any joint of the body
// with pre-existing drivers. They are based on the FreePosture drivers,
// so they are driving directly the joint angles and are really independent from each other. Also
// all DOF can be driven separatly.
// 0 switch the driver Off and 1 switch it On.
// The input value for each driver is the joint angles and velocities defined below in the Mannequin folder.
// Notice that even if it is possible to drive fully the model with those drivers, we originaly thinked them
// as alternative or debug drivers.
// *********************************************************************************************************

// Global switch:
// - if turned to 1 the drivers will be activated according to their individual statut.
// - if turned to 0 all drivers will desactivated (regardless to their individual statut).
#define GLOBAL_DRIVER_SWITCH 0

// Drivers for attaching the pelvis to the global reference system
#define PELVIS_POS_X_DRIVER 1
#define PELVIS_POS_Y_DRIVER 1
#define PELVIS_POS_Z_DRIVER 1

#define PELVIS_ROT_Z_DRIVER 1
#define PELVIS_ROT_Y_DRIVER 1
#define PELVIS_ROT_X_DRIVER 1


// Drivers for the spine
#define NECK_DRIVER 1

#define PELVIS_THORAX_LATERAL_BENDING_DRIVER 1
#define PELVIS_THORAX_ROTATION_DRIVER 1
#define PELVIS_THORAX_EXTENSION_DRIVER 1


// Drivers for the right arm
#define STERNO_CLAVICULAR_RIGHT_DRIVER 1

#define GLENOHUMERAL_ABDUCTION_RIGHT_DRIVER 1
#define GLENOHUMERAL_FLEXION_RIGHT_DRIVER 1
#define GLENOHUMERAL_EXTERNAL_ROTATION_RIGHT_DRIVER 1

#define ELBOW_FLEXION_RIGHT_DRIVER 1
#define ELBOW_PRONATION_RIGHT_DRIVER 1

#define WRIST_FLEXION_RIGHT_DRIVER 1
#define WRIST_ABDUCTION_RIGHT_DRIVER 1


// Drivers for the left arm
#define STERNO_CLAVICULAR_LEFT_DRIVER 1

#define GLENOHUMERAL_ABDUCTION_LEFT_DRIVER 1
#define GLENOHUMERAL_FLEXION_LEFT_DRIVER 1
#define GLENOHUMERAL_EXTERNAL_ROTATION_LEFT_DRIVER 1

#define ELBOW_FLEXION_LEFT_DRIVER 1
#define ELBOW_PRONATION_LEFT_DRIVER 1

#define WRIST_FLEXION_LEFT_DRIVER 1
#define WRIST_ABDUCTION_LEFT_DRIVER 1


// Drivers for the right leg
#define HIP_FLEXION_RIGHT_DRIVER 1
#define HIP_EXTERNAL_ROTATION_RIGHT_DRIVER 1
#define HIP_ABDUCTION_RIGHT_DRIVER 1

#define KNEE_FLEXION_RIGHT_DRIVER 1

#define ANKLE_FLEXION_RIGHT_DRIVER 1
#define ANKLE_EVERSION_RIGHT_DRIVER 0
#define ANKLE_SUBTALAR_EVERSION_RIGHT_DRIVER 1


// Drivers for the Left leg
#define HIP_FLEXION_LEFT_DRIVER 1
#define HIP_EXTERNAL_ROTATION_LEFT_DRIVER 1
#define HIP_ABDUCTION_LEFT_DRIVER 1

#define KNEE_FLEXION_LEFT_DRIVER 1

#define ANKLE_FLEXION_LEFT_DRIVER 1
#define ANKLE_EVERSION_LEFT_DRIVER 0
#define ANKLE_SUBTALAR_EVERSION_LEFT_DRIVER 1


// Those variable control the initial position of the body.
// They are also the input values for the MannequinDrivers if switched On above.
// ****************************************************************************


AnyFolder Mannequin = {

  AnyFolder Posture = {
    //This controls the position of the pelvi wrt. to the global reference frame
    AnyVar PelvisPosX=0;
    AnyVar PelvisPosY=1.0;
    AnyVar PelvisPosZ=0;

    //This controls the rotation of the pelvis wrt. to the global reference frame
    AnyVar PelvisRotX=0;
    AnyVar PelvisRotY=0;
    AnyVar PelvisRotZ=0;

    // These variables control the rotation of the thorax wrt the
    // pelvis
    AnyVar PelvisThoraxExtension=0;
    AnyVar PelvisThoraxLateralBending=0;
    AnyVar PelvisThoraxRotation=0;

    AnyVar NeckExtension=0;

    AnyFolder Right = {
      //Arm
      AnyVar SternoClavicularProtraction=-23;   //This value is not used for initial position
      AnyVar SternoClavicularElevation=11.5;    //This value is not used for initial position
      AnyVar SternoClavicularAxialRotation=-20; //This value is not used for initial position

      AnyVar GlenohumeralFlexion =45;
      AnyVar GlenohumeralAbduction = 90;
      AnyVar GlenohumeralExternalRotation = 00;

      AnyVar ElbowFlexion = 5;
      AnyVar ElbowPronation = -60.0;

      AnyVar WristFlexion =0;
      AnyVar WristAbduction =0;

      //Hand
      AnyFolder Finger1 ={
        AnyVar CMCDeviation=-20;
        AnyVar CMCFlexion=20;
        AnyVar MCPFlexion= 20;
        AnyVar MCPDeviation=0;
        AnyVar DIPFlexion=20;
      };

      AnyFolder Finger2 ={
        AnyVar MCPFlexion=20;
        AnyVar PIPFlexion=20;
        AnyVar DIPFlexion=20;
      };

      AnyFolder Finger3 ={
        AnyVar MCPFlexion=20;
        AnyVar PIPFlexion=20;
        AnyVar DIPFlexion=20;
      };

      AnyFolder Finger4 ={
        AnyVar MCPFlexion=20;
        AnyVar PIPFlexion=20;
        AnyVar DIPFlexion=20;
      };

      AnyFolder Finger5 ={
        AnyVar MCPFlexion=20;
        AnyVar PIPFlexion=20;
        AnyVar DIPFlexion=20;
      };

      //Leg
      AnyVar HipFlexion = 0.0;
      AnyVar HipAbduction = 0.0;
      AnyVar HipExternalRotation = 0.0;

      AnyVar KneeFlexion = 0.0;

      AnyVar AnklePlantarFlexion =0.0;
      AnyVar SubTalarEversion =0.0;

      //Feet
      AnyVar TaloNavicularDorsiFlexion = 0;
      AnyVar TaloNavicularAbduction = 0;
      AnyVar TaloNavicularEversion = 0;

      AnyVar CalcaneoCuboidDorsiFlexion = 0;
      AnyVar CalcaneoCuboidAbduction = 0;
      AnyVar CalcaneoCuboidEversion = 0;

      AnyVar NaviculoMedialCuneiformDorsiFlexion = 0;
      AnyVar NaviculoMedialCuneiformAbduction = 0;
      AnyVar NaviculoMedialCuneiformEversion = 0;

      AnyVar NaviculoIntermediateCuneiformDorsiFlexion = 0;
      AnyVar NaviculoIntermediateCuneiformAbduction = 0;

      AnyVar NaviculoLateralCuneiformDorsiFlexion = 0;
      AnyVar NaviculoLateralCuneiformAbduction = 0;


      AnyVar TarsoMetatarsal1DorsiFlexion = 0;
      AnyVar TarsoMetatarsal1Abduction = 0;
      AnyVar TarsoMetatarsal1Eversion = 0;

      AnyVar TarsoMetatarsal2DorsiFlexion = 0;
      AnyVar TarsoMetatarsal2Abduction = 0;

      AnyVar TarsoMetatarsal3DorsiFlexion = 0;
      AnyVar TarsoMetatarsal3Abduction = 0;

      AnyVar TarsoMetatarsal4DorsiFlexion = 0;
      AnyVar TarsoMetatarsal4Abduction = 0;

      AnyVar TarsoMetatarsal5SkewDorsiFlexion = 0;
      AnyVar TarsoMetatarsal5SkewEversion = 0;
      AnyVar TarsoMetatarsal5Abduction = 0;


      AnyVar MetatarsoPhalangeal1DorsiFlexion = 0;
      AnyVar MetatarsoPhalangeal1Abduction = 0;

      AnyVar MetatarsoPhalangeal2DorsiFlexion = 0;
      AnyVar MetatarsoPhalangeal2Abduction = 0;

      AnyVar MetatarsoPhalangeal3DorsiFlexion = 0;
      AnyVar MetatarsoPhalangeal3Abduction = 0;

      AnyVar MetatarsoPhalangeal4DorsiFlexion = 0;
      AnyVar MetatarsoPhalangeal4Abduction = 0;

      AnyVar MetatarsoPhalangeal5DorsiFlexion = 0;
      AnyVar MetatarsoPhalangeal5Abduction = 0;


      AnyVar ProximoDistalPhalange1DorsiFlexion = 0;

      AnyVar ProximoMedialPhalange2DorsiFlexion = 0;
      AnyVar ProximoMedialPhalange3DorsiFlexion = 0;
      AnyVar ProximoMedialPhalange4DorsiFlexion = 0;
      AnyVar ProximoMedialPhalange5DorsiFlexion = 0;

      AnyVar MedioDistalPhalange2DorsiFlexion = 0;
      AnyVar MedioDistalPhalange3DorsiFlexion = 0;
      AnyVar MedioDistalPhalange4DorsiFlexion = 0;
      AnyVar MedioDistalPhalange5DorsiFlexion = 0;


    };

    AnyFolder Left = {
      //all values are set to be equal to the right side values
      //feel free to change this!

      //Arm
      AnyVar SternoClavicularProtraction=.Right.SternoClavicularProtraction;
      AnyVar SternoClavicularElevation=.Right.SternoClavicularElevation;
      AnyVar SternoClavicularAxialRotation=.Right.SternoClavicularAxialRotation;

      AnyVar GlenohumeralFlexion = .Right.GlenohumeralFlexion ;
      AnyVar GlenohumeralAbduction =.Right.GlenohumeralAbduction ;
      AnyVar GlenohumeralExternalRotation =.Right.GlenohumeralExternalRotation ;

      AnyVar ElbowFlexion = .Right.ElbowFlexion;
      AnyVar ElbowPronation = .Right.ElbowPronation;
      AnyVar WristFlexion =.Right.WristFlexion;
      AnyVar WristAbduction =.Right.WristAbduction;

      //Hand
      AnyFolder Finger1 ={
        AnyVar CMCDeviation=-20;
        AnyVar CMCFlexion=20;
        AnyVar MCPFlexion= 20;
        AnyVar MCPDeviation=0;
        AnyVar DIPFlexion=20;
      };

      AnyFolder Finger2 ={
        AnyVar MCPFlexion=20;
        AnyVar PIPFlexion=20;
        AnyVar DIPFlexion=20;
      };

      AnyFolder Finger3 ={
        AnyVar MCPFlexion=20;
        AnyVar PIPFlexion=20;
        AnyVar DIPFlexion=20;
      };

      AnyFolder Finger4 ={
        AnyVar MCPFlexion=20;
        AnyVar PIPFlexion=20;
        AnyVar DIPFlexion=20;
      };

      AnyFolder Finger5 ={
        AnyVar MCPFlexion=20;
        AnyVar PIPFlexion=20;
        AnyVar DIPFlexion=20;
      };

      //Leg
      AnyVar HipFlexion =.Right.HipFlexion;
      AnyVar HipAbduction =.Right.HipAbduction;
      AnyVar HipExternalRotation = .Right.HipExternalRotation;
      AnyVar KneeFlexion = .Right.KneeFlexion;
      AnyVar AnklePlantarFlexion = .Right.AnklePlantarFlexion ;
      AnyVar SubTalarEversion =.Right.SubTalarEversion;

      //Feet
      AnyVar TaloNavicularDorsiFlexion = .Right.TaloNavicularDorsiFlexion;
      AnyVar TaloNavicularAbduction = .Right.TaloNavicularAbduction;
      AnyVar TaloNavicularEversion = .Right.TaloNavicularEversion;

      AnyVar CalcaneoCuboidDorsiFlexion = .Right.CalcaneoCuboidDorsiFlexion;
      AnyVar CalcaneoCuboidAbduction = .Right.CalcaneoCuboidAbduction;
      AnyVar CalcaneoCuboidEversion = .Right.CalcaneoCuboidEversion;

      AnyVar NaviculoMedialCuneiformDorsiFlexion = .Right.NaviculoMedialCuneiformDorsiFlexion;
      AnyVar NaviculoMedialCuneiformAbduction = .Right.NaviculoMedialCuneiformAbduction;
      AnyVar NaviculoMedialCuneiformEversion = .Right.NaviculoMedialCuneiformEversion;

      AnyVar NaviculoIntermediateCuneiformDorsiFlexion = .Right.NaviculoIntermediateCuneiformDorsiFlexion;
      AnyVar NaviculoIntermediateCuneiformAbduction = .Right.NaviculoIntermediateCuneiformAbduction;

      AnyVar NaviculoLateralCuneiformDorsiFlexion = .Right.NaviculoLateralCuneiformDorsiFlexion;
      AnyVar NaviculoLateralCuneiformAbduction = .Right.NaviculoLateralCuneiformAbduction;


      AnyVar TarsoMetatarsal1DorsiFlexion = .Right.TarsoMetatarsal1DorsiFlexion;
      AnyVar TarsoMetatarsal1Abduction = .Right.TarsoMetatarsal1Abduction;
      AnyVar TarsoMetatarsal1Eversion = .Right.TarsoMetatarsal1Eversion;

      AnyVar TarsoMetatarsal2DorsiFlexion = .Right.TarsoMetatarsal2DorsiFlexion;
      AnyVar TarsoMetatarsal2Abduction = .Right.TarsoMetatarsal2Abduction;

      AnyVar TarsoMetatarsal3DorsiFlexion = .Right.TarsoMetatarsal3DorsiFlexion;
      AnyVar TarsoMetatarsal3Abduction = .Right.TarsoMetatarsal3Abduction;

      AnyVar TarsoMetatarsal4DorsiFlexion = .Right.TarsoMetatarsal4DorsiFlexion;
      AnyVar TarsoMetatarsal4Abduction = .Right.TarsoMetatarsal4Abduction;

      AnyVar TarsoMetatarsal5SkewDorsiFlexion =.Right.TarsoMetatarsal5SkewDorsiFlexion;
      AnyVar TarsoMetatarsal5SkewEversion = .Right.TarsoMetatarsal5SkewEversion;
      AnyVar TarsoMetatarsal5Abduction = .Right.TarsoMetatarsal5Abduction;


      AnyVar MetatarsoPhalangeal1DorsiFlexion = .Right.MetatarsoPhalangeal1DorsiFlexion;
      AnyVar MetatarsoPhalangeal1Abduction = .Right.MetatarsoPhalangeal1Abduction;

      AnyVar MetatarsoPhalangeal2DorsiFlexion = .Right.MetatarsoPhalangeal2DorsiFlexion;
      AnyVar MetatarsoPhalangeal2Abduction = .Right.MetatarsoPhalangeal2Abduction;

      AnyVar MetatarsoPhalangeal3DorsiFlexion = .Right.MetatarsoPhalangeal3DorsiFlexion;
      AnyVar MetatarsoPhalangeal3Abduction = .Right.MetatarsoPhalangeal3Abduction;

      AnyVar MetatarsoPhalangeal4DorsiFlexion = .Right.MetatarsoPhalangeal4DorsiFlexion;
      AnyVar MetatarsoPhalangeal4Abduction = .Right.MetatarsoPhalangeal4Abduction;

      AnyVar MetatarsoPhalangeal5DorsiFlexion = .Right.MetatarsoPhalangeal5DorsiFlexion;
      AnyVar MetatarsoPhalangeal5Abduction = .Right.MetatarsoPhalangeal5Abduction;


      AnyVar ProximoDistalPhalange1DorsiFlexion = .Right.ProximoDistalPhalange1DorsiFlexion;

      AnyVar ProximoMedialPhalange2DorsiFlexion = .Right.ProximoMedialPhalange2DorsiFlexion;
      AnyVar ProximoMedialPhalange3DorsiFlexion = .Right.ProximoMedialPhalange3DorsiFlexion;
      AnyVar ProximoMedialPhalange4DorsiFlexion = .Right.ProximoMedialPhalange4DorsiFlexion;
      AnyVar ProximoMedialPhalange5DorsiFlexion = .Right.ProximoMedialPhalange5DorsiFlexion;

      AnyVar MedioDistalPhalange2DorsiFlexion = .Right.MedioDistalPhalange2DorsiFlexion;
      AnyVar MedioDistalPhalange3DorsiFlexion = .Right.MedioDistalPhalange3DorsiFlexion;
      AnyVar MedioDistalPhalange4DorsiFlexion = .Right.MedioDistalPhalange4DorsiFlexion;
      AnyVar MedioDistalPhalange5DorsiFlexion = .Right.MedioDistalPhalange5DorsiFlexion;


    };
  };


AnyFolder PostureVel={
      //This controls the position of the pelvi wrt. to the global reference frame
    AnyVar PelvisPosX=0;
    AnyVar PelvisPosY=0;
    AnyVar PelvisPosZ=0;

    //This controls the rotation of the pelvis wrt. to the global reference frame
    AnyVar PelvisRotX=0;
    AnyVar PelvisRotY=0;
    AnyVar PelvisRotZ=0;

    // These variables control the rotation of the thorax wrt the
    // pelvis
    AnyVar PelvisThoraxExtension=0;
    AnyVar PelvisThoraxLateralBending=0;
    AnyVar PelvisThoraxRotation=0;

    AnyVar NeckExtension=0;

    AnyFolder Right = {
      //Arm
      AnyVar SternoClavicularProtraction=0;   //This value is not used for initial position
      AnyVar SternoClavicularElevation=0;    //This value is not used for initial position
      AnyVar SternoClavicularAxialRotation=0; //This value is not used for initial position

      AnyVar GlenohumeralFlexion =0;
      AnyVar GlenohumeralAbduction = 0;
      AnyVar GlenohumeralExternalRotation = 0;

      AnyVar ElbowFlexion = 0.0;
      AnyVar ElbowPronation = 0.0;

      AnyVar WristFlexion =0;
      AnyVar WristAbduction =0;

      AnyVar HipFlexion = 0.0;
      AnyVar HipAbduction = 0.0;
      AnyVar HipExternalRotation = 0.0;

      AnyVar KneeFlexion = 0.0;

      AnyVar AnklePlantarFlexion =0.0;
      AnyVar SubTalarEversion =0.0;

      //Feet
      AnyVar TaloNavicularDorsiFlexion = 0;
      AnyVar TaloNavicularAbduction = 0;
      AnyVar TaloNavicularEversion = 0;

      AnyVar CalcaneoCuboidDorsiFlexion = 0;
      AnyVar CalcaneoCuboidAbduction = 0;
      AnyVar CalcaneoCuboidEversion = 0;

      AnyVar NaviculoMedialCuneiformDorsiFlexion = 0;
      AnyVar NaviculoMedialCuneiformAbduction = 0;
      AnyVar NaviculoMedialCuneiformEversion = 0;

      AnyVar NaviculoIntermediateCuneiformDorsiFlexion = 0;
      AnyVar NaviculoIntermediateCuneiformAbduction = 0;

      AnyVar NaviculoLateralCuneiformDorsiFlexion = 0;
      AnyVar NaviculoLateralCuneiformAbduction = 0;


      AnyVar TarsoMetatarsal1DorsiFlexion = 0;
      AnyVar TarsoMetatarsal1Abduction = 0;
      AnyVar TarsoMetatarsal1Eversion = 0;

      AnyVar TarsoMetatarsal2DorsiFlexion = 0;
      AnyVar TarsoMetatarsal2Abduction = 0;

      AnyVar TarsoMetatarsal3DorsiFlexion = 0;
      AnyVar TarsoMetatarsal3Abduction = 0;

      AnyVar TarsoMetatarsal4DorsiFlexion = 0;
      AnyVar TarsoMetatarsal4Abduction = 0;

      AnyVar TarsoMetatarsal5SkewDorsiFlexion =0;
      AnyVar TarsoMetatarsal5SkewEversion =0;
      AnyVar TarsoMetatarsal5Abduction = 0;


      AnyVar MetatarsoPhalangeal1DorsiFlexion = 0;
      AnyVar MetatarsoPhalangeal1Abduction = 0;

      AnyVar MetatarsoPhalangeal2DorsiFlexion = 0;
      AnyVar MetatarsoPhalangeal2Abduction = 0;

      AnyVar MetatarsoPhalangeal3DorsiFlexion = 0;
      AnyVar MetatarsoPhalangeal3Abduction = 0;

      AnyVar MetatarsoPhalangeal4DorsiFlexion = 0;
      AnyVar MetatarsoPhalangeal4Abduction = 0;

      AnyVar MetatarsoPhalangeal5DorsiFlexion = 0;
      AnyVar MetatarsoPhalangeal5Abduction = 0;


      AnyVar ProximoDistalPhalange1DorsiFlexion = 0;

      AnyVar ProximoMedialPhalange2DorsiFlexion = 0;
      AnyVar ProximoMedialPhalange3DorsiFlexion = 0;
      AnyVar ProximoMedialPhalange4DorsiFlexion = 0;
      AnyVar ProximoMedialPhalange5DorsiFlexion = 0;

      AnyVar MedioDistalPhalange2DorsiFlexion = 0;
      AnyVar MedioDistalPhalange3DorsiFlexion = 0;
      AnyVar MedioDistalPhalange4DorsiFlexion = 0;
      AnyVar MedioDistalPhalange5DorsiFlexion = 0;


    };

    AnyFolder Left = {
      //all values are set to be equal to the right side values
      //feel free to change this!

      //Arm
      AnyVar SternoClavicularProtraction=.Right.SternoClavicularProtraction;
      AnyVar SternoClavicularElevation=.Right.SternoClavicularElevation;
      AnyVar SternoClavicularAxialRotation=.Right.SternoClavicularAxialRotation;

      AnyVar GlenohumeralFlexion = .Right.GlenohumeralFlexion ;
      AnyVar GlenohumeralAbduction =.Right.GlenohumeralAbduction ;
      AnyVar GlenohumeralExternalRotation =.Right.GlenohumeralExternalRotation ;

      AnyVar ElbowFlexion = .Right.ElbowFlexion;
      AnyVar ElbowPronation = .Right.ElbowPronation;
      AnyVar WristFlexion =.Right.WristFlexion;
      AnyVar WristAbduction =.Right.WristAbduction;


      //Leg
      AnyVar HipFlexion =.Right.HipFlexion;
      AnyVar HipAbduction =.Right.HipAbduction;
      AnyVar HipExternalRotation = .Right.HipExternalRotation;
      AnyVar KneeFlexion = .Right.KneeFlexion;
      AnyVar AnklePlantarFlexion = .Right.AnklePlantarFlexion ;
      AnyVar SubTalarEversion =.Right.SubTalarEversion;

      //Feet
      AnyVar TaloNavicularDorsiFlexion = 0;
      AnyVar TaloNavicularAbduction = 0;
      AnyVar TaloNavicularEversion = 0;

      AnyVar CalcaneoCuboidDorsiFlexion = 0;
      AnyVar CalcaneoCuboidAbduction = 0;
      AnyVar CalcaneoCuboidEversion = 0;

      AnyVar NaviculoMedialCuneiformDorsiFlexion = 0;
      AnyVar NaviculoMedialCuneiformAbduction = 0;
      AnyVar NaviculoMedialCuneiformEversion = 0;

      AnyVar NaviculoIntermediateCuneiformDorsiFlexion = 0;
      AnyVar NaviculoIntermediateCuneiformAbduction = 0;

      AnyVar NaviculoLateralCuneiformDorsiFlexion = 0;
      AnyVar NaviculoLateralCuneiformAbduction = 0;


      AnyVar TarsoMetatarsal1DorsiFlexion = 0;
      AnyVar TarsoMetatarsal1Abduction = 0;
      AnyVar TarsoMetatarsal1Eversion = 0;

      AnyVar TarsoMetatarsal2DorsiFlexion = 0;
      AnyVar TarsoMetatarsal2Abduction = 0;

      AnyVar TarsoMetatarsal3DorsiFlexion = 0;
      AnyVar TarsoMetatarsal3Abduction = 0;

      AnyVar TarsoMetatarsal4DorsiFlexion = 0;
      AnyVar TarsoMetatarsal4Abduction = 0;

      AnyVar TarsoMetatarsal5SkewDorsiFlexion =0;
      AnyVar TarsoMetatarsal5SkewEversion =0;
      AnyVar TarsoMetatarsal5Abduction = 0;


      AnyVar MetatarsoPhalangeal1DorsiFlexion = 0;
      AnyVar MetatarsoPhalangeal1Abduction = 0;

      AnyVar MetatarsoPhalangeal2DorsiFlexion = 0;
      AnyVar MetatarsoPhalangeal2Abduction = 0;

      AnyVar MetatarsoPhalangeal3DorsiFlexion = 0;
      AnyVar MetatarsoPhalangeal3Abduction = 0;

      AnyVar MetatarsoPhalangeal4DorsiFlexion = 0;
      AnyVar MetatarsoPhalangeal4Abduction = 0;

      AnyVar MetatarsoPhalangeal5DorsiFlexion = 0;
      AnyVar MetatarsoPhalangeal5Abduction = 0;


      AnyVar ProximoDistalPhalange1DorsiFlexion = 0;

      AnyVar ProximoMedialPhalange2DorsiFlexion = 0;
      AnyVar ProximoMedialPhalange3DorsiFlexion = 0;
      AnyVar ProximoMedialPhalange4DorsiFlexion = 0;
      AnyVar ProximoMedialPhalange5DorsiFlexion = 0;

      AnyVar MedioDistalPhalange2DorsiFlexion = 0;
      AnyVar MedioDistalPhalange3DorsiFlexion = 0;
      AnyVar MedioDistalPhalange4DorsiFlexion = 0;
      AnyVar MedioDistalPhalange5DorsiFlexion = 0;
    };
  };


};
