AnyFolder Muscles = {
      //       Muscle models
      AnyFolder MusMdl = {
    //muscle PCS in cm^2
        AnyVar PCS_FP = 4.79;
        AnyVar PCS_FS = 4.79;
        AnyVar PCS_EC = 1.39;
        AnyVar PCS_EI = 1.12;
        AnyVar PCS_LU = 0.28;
        AnyVar PCS_UI = 2.80;
        AnyVar PCS_RI = 3.53;
         //muscle fiber length in m
        AnyVar Lf_FP = 0.066;
        AnyVar Lf_FS = 0.070;
        AnyVar Lf_EC = 0.060;
        AnyVar Lf_EI = 0.060;
        AnyVar Lf_LU = 0.066;
        AnyVar Lf_UI = 0.015;
        AnyVar Lf_RI = 0.014;

        AnyVar k_f = 0.3;
        //tendon length in m
        AnyVar L0_FP = k_f * Lf_FP;
        AnyVar L0_FS = k_f * Lf_FS;
        AnyVar L0_EC = k_f * Lf_EC;
        AnyVar L0_EI = k_f * Lf_EI;
        AnyVar L0_LU = k_f * Lf_LU;
        AnyVar L0_UI = 2*k_f * Lf_UI;
        AnyVar L0_RI = 2*k_f * Lf_RI;
        //peenation angle in deg
        AnyVar penn_LE = 3.5;
        AnyVar penn_RI = 9.2;
        AnyVar penn_UI = 9.2;
        AnyVar penn_FP = 12.1;
        AnyVar penn_FS = 3.1;
        AnyVar penn_LU = 1.2;

        AnyMuscleModel3E FP = {
          F0 = .PCS_FP*30;
          Lfbar = .Lf_FP;
          Gammabar = .penn_FP*pi/180;
          Lt0 = .L0_FP;
          Epsilonbar = 0.05;
          Fcfast = 0.8;
          Jt = 3.0;
          Jpe =3.0;
          K1 =2;
          K2 =8;
          PEFactor =5;
        };
        AnyMuscleModel3E FS = {
           F0 = .PCS_FS*30;
          Lfbar = .Lf_FS;
          Lt0 = .L0_FS;
          Epsilonbar = .Lf_FS;
          Gammabar = .penn_FS*pi/180;
          Fcfast = 0.2;
          Jt = 3.0;
          Jpe =3.0;
          K1 =2;
          K2 =8;
          PEFactor =5;
        };
        //        AnyMuscleModel EC = {
         AnyMuscleModel3E EC = {
          F0 = .PCS_EC*30*0.5;
          Lfbar = .Lf_EC;
          Lt0 = .L0_EC;
          Epsilonbar = 0.05;
          Gammabar = .penn_LE*pi/180;
          Fcfast = 0.4;
          Jt = 3.0;
          Jpe =3.0;
          K1 =2;
          K2 =8;
          PEFactor =5;
        };
        AnyMuscleModel2ELin EC_RB = {
          F0 = .PCS_EC*30*0.5;
          Lfbar = .Lf_EC;
          Lt0 = .L0_EC;
          Epsilonbar = 0.05;
          V0 = -1.0;
        };


        //        AnyMuscleModel EI = {
        AnyMuscleModel3E EI = {
          F0 = .PCS_EI*30*0.5;
          Lfbar = .Lf_EI;
          Lt0 = .L0_EI;
          Epsilonbar = 0.05;
          Gammabar = .penn_LE*pi/180;
          Fcfast = 0.4;
          Jt = 3.0;
          Jpe =3.0;
          K1 =2;
          K2 =8;
          PEFactor =5;
        };
        AnyMuscleModel2ELin EI_UB = {
          F0 = .PCS_EI*30*0.5;
          Lfbar = .Lf_EI;
          Lt0 = .L0_EI;
          Epsilonbar = 0.05;
          V0 = -1.0;
        };

        //        AnyMuscleModel LU = {
        AnyMuscleModel3E LU = {
          F0 = .PCS_LU*30;
          Lfbar = .Lf_LU;
          Lt0 = .L0_LU;
          Epsilonbar = 0.05;
          Gammabar = .penn_LU*pi/180;
          Fcfast = 0.5;
          Jt = 3.0;
          Jpe =3.0;
          K1 =2;
          K2 =8;
          PEFactor =5;
        };

        AnyMuscleModel2ELin LU_ES = {
          F0 = .PCS_LU*30*0.5;
          Lfbar = .Lf_LU;
          Lt0 = .L0_LU;
          Epsilonbar = 0.05;
          V0 = -1.0;
        };

        //        AnyMuscleModel UI = {
        AnyMuscleModel3E UI = {
          F0 = .PCS_UI*30*0.5;
          Lfbar = .Lf_UI;
          Lt0 = .L0_UI;
          Epsilonbar = 0.05;
          Gammabar = .penn_UI*pi/180;
          Fcfast = 0.4;
          Jt = 3.0;
          Jpe =3.0;
          K1 =2;
          K2 =8;
          PEFactor =5;
        };
        AnyMuscleModel2ELin UI_ES = {
          F0 = .PCS_UI*30*0.5;
          Lfbar = .Lf_UI;
          Lt0 = .L0_UI;
          Epsilonbar = 0.05;
          V0 = -1.0;
        };
        //        AnyMuscleModel RI = {
        AnyMuscleModel3E RI = {
          F0 = .PCS_RI*30*0.5;
          Lfbar = .Lf_RI;
          Lt0 = .L0_RI;
          Epsilonbar = 0.05;
          Gammabar = .penn_RI*pi/180;
          Fcfast = 0.4;
          Jt = 3.0;
          Jpe =3.0;
          K1 =2;
          K2 =8;
          PEFactor =5;
        };
        AnyMuscleModel2ELin RI_ES = {
          F0 = .PCS_RI*30*0.5;
          Lfbar = .Lf_RI;
          Lt0 = .L0_RI;
          Epsilonbar = 0.05;
          V0 = -1.0;
        };

      };// muscle models
      //---------------------------------

        AnyShortestPathMuscle FP = {
//        AnyViaPointMuscle FP = {
        AnyMuscleModel &MusMdl = ..Muscles.MusMdl.FP;
        AnySurface &Srf1a = ..Segs.Distal_Phalanx.Dis_DIPO.Dis_DIP;
        AnySurface &Srf1b = ..Segs.Middle_Phalanx.Mid_DIPO.Mid_DIP;
        AnySurface &Srf1c = ..Segs.Middle_Phalanx.Mid_PIPO.Mid_PIP;
        AnySurface &Srf1d = ..Segs.Proximal_Phalanx.Pro_PIPO.Pro_PIP;
        AnySurface &Srf1e = ..Segs.Proximal_Phalanx.Pro_MCPO.Pro_MCP;
        AnySurface &Srf1f = ..GlobalRef.Met_MCPO.Met_MCP;
        AnySurface &Srf2 = ..Segs.Middle_Phalanx.middle;
        AnySurface &Srf3 = ..Segs.Proximal_Phalanx.proximal;
        AnyRefNode &Org = ..Segs.Distal_Phalanx.FPNode;
        AnyRefNode &Via1a = ..Segs.Middle_Phalanx.FP_DIP_Node;
        AnyRefNode &A4 = ..Segs.Middle_Phalanx.A4_Node;
        AnyRefNode &Via1b = ..Segs.Middle_Phalanx.FP_PIP_Node;
        AnyRefNode &Via2a = ..Segs.Proximal_Phalanx.FP_PIP_Node;
        AnyRefNode &A2 = ..Segs.Proximal_Phalanx.A2_Node;
        AnyRefNode &Via2b = ..Segs.Proximal_Phalanx.FP_MP_Node;
        AnyRefNode &Via3 = ..GlobalRef.FP_MP_Node;
        SPLine.StringMesh = 20;
        AnyDrawViaPointMuscle DrwMus =
        {Thickness = 0.0003;
          RGB = {0.5546875, 0.0, 0.1171875};};
      };

      AnyShortestPathMuscle FS = {
//      AnyViaPointMuscle FS = {
        AnyMuscleModel &MusMdl = ..Muscles.MusMdl.FS;
        AnySurface &Srf1a = ..Segs.Distal_Phalanx.Dis_DIPO.Dis_DIP;
        AnySurface &Srf1b = ..Segs.Middle_Phalanx.Mid_DIPO.Mid_DIP;
        AnySurface &Srf1c = ..Segs.Middle_Phalanx.Mid_PIPO.Mid_PIP;
        AnySurface &Srf1d = ..Segs.Proximal_Phalanx.Pro_PIPO.Pro_PIP;
        AnySurface &Srf1e = ..Segs.Proximal_Phalanx.Pro_MCPO.Pro_MCP;
        AnySurface &Srf1f = ..GlobalRef.Met_MCPO.Met_MCP;
        AnySurface &Srf2 = ..Segs.Middle_Phalanx.middle;
        AnySurface &Srf3 = ..Segs.Proximal_Phalanx.proximal;
        AnyRefNode &Org = ..Segs.Middle_Phalanx.FS_PIP_Node;
        AnyRefNode &Via1 = ..Segs.Proximal_Phalanx.FS_PIP_Node;
        AnyRefNode &A2 = ..Segs.Proximal_Phalanx.A2_Node;
        AnyRefNode &Ins = ..Segs.Proximal_Phalanx.FS_MP_Node;
        AnyRefNode &Via3 = ..GlobalRef.FS_MP_Node;
        SPLine.StringMesh = 20;
        AnyDrawViaPointMuscle DrwMus =
        {Thickness = 0.0003;
          RGB = {0.5546875, 0.0, 0.1171875};};
      };

      AnyShortestPathMuscle EC = {
//      AnyViaPointMuscle EC = {
        AnyMuscleModel &MusMdl = ..Muscles.MusMdl.EC;
        AnySurface &Srf1a = ..Segs.Distal_Phalanx.Dis_DIPO.Dis_DIP;
        AnySurface &Srf1b = ..Segs.Middle_Phalanx.Mid_DIPO.Mid_DIP;
        AnySurface &Srf1c = ..Segs.Middle_Phalanx.Mid_PIPO.Mid_PIP;
        AnySurface &Srf1d = ..Segs.Proximal_Phalanx.Pro_PIPO.Pro_PIP;
        AnySurface &Srf1e = ..Segs.Proximal_Phalanx.Pro_MCPO.Pro_MCP;
        AnySurface &Srf1f = ..GlobalRef.Met_MCPO.Met_MCP;
        AnySurface &Srf2 = ..Segs.Middle_Phalanx.middle;
        AnySurface &Srf3 = ..Segs.Proximal_Phalanx.proximal;
        AnyRefNode &Org = ..Segs.Distal_Phalanx.TENode;
        AnyRefNode &Via0 = ..Segs.Middle_Phalanx.TE_DIP_Node;
        AnyRefFrame &End = ..Segs.Middle_Phalanx.ES_PIP_Node;
        AnyRefFrame &Via = ..Segs.Proximal_Phalanx.ES_PIP_Node;
        AnyRefNode &Ins = ..Segs.Proximal_Phalanx.LER_MP_Node;
        AnyRefNode &Via3 = ..GlobalRef.EC_MP_Node;
        SPLine.StringMesh = 20;
        AnyDrawViaPointMuscle DrwMus =
        {Thickness = 0.0003;
          RGB = {0.5546875, 0.0, 0.1171875};};
      };
      AnyViaPointMuscle EC_RB =
      {
        AnyMuscleModel &MusMdl = ..Muscles.MusMdl.EC_RB;
        AnyRefNode &Via1 = ..Segs.Middle_Phalanx.RB_PIP_Node;
        AnyRefNode &Via2 = ..Segs.Proximal_Phalanx.RB_PIP_Node;
        AnyRefFrame &Ins = ..Segs.Proximal_Phalanx.LER_MP_Node;
        AnyRefNode &Via3 = ..GlobalRef.EC_MP_Node;
        AnyDrawViaPointMuscle DrwMus =
        {Thickness = 0.0003;
          RGB = {0.5546875, 0.0, 0.1171875};};
      };

      AnyShortestPathMuscle EI = {
//      AnyViaPointMuscle EI = {
        AnyMuscleModel &MusMdl = ..Muscles.MusMdl.EI;
        AnySurface &Srf1a = ..Segs.Distal_Phalanx.Dis_DIPO.Dis_DIP;
        AnySurface &Srf1b = ..Segs.Middle_Phalanx.Mid_DIPO.Mid_DIP;
        AnySurface &Srf1c = ..Segs.Middle_Phalanx.Mid_PIPO.Mid_PIP;
        AnySurface &Srf1d = ..Segs.Proximal_Phalanx.Pro_PIPO.Pro_PIP;
        AnySurface &Srf1e = ..Segs.Proximal_Phalanx.Pro_MCPO.Pro_MCP;
        AnySurface &Srf1f = ..GlobalRef.Met_MCPO.Met_MCP;
        AnySurface &Srf2 = ..Segs.Middle_Phalanx.middle;
        AnySurface &Srf3 = ..Segs.Proximal_Phalanx.proximal;
        AnyRefNode &Org = ..Segs.Distal_Phalanx.TENode;
        AnyRefNode &Via0 = ..Segs.Middle_Phalanx.TE_DIP_Node;
        AnyRefFrame &End = ..Segs.Middle_Phalanx.ES_PIP_Node;
        AnyRefFrame &Via = ..Segs.Proximal_Phalanx.ES_PIP_Node;
        AnyRefNode &Ins = ..Segs.Proximal_Phalanx.LEU_MP_Node;
        AnyRefNode &Via3 = ..GlobalRef.EI_MP_Node;
        SPLine.StringMesh = 20;
        AnyDrawViaPointMuscle DrwMus =
        {Thickness = 0.0003;
          RGB = {0.5546875, 0.0, 0.1171875};};
      };

       AnyViaPointMuscle EI_UB =
      {
        AnyMuscleModel &MusMdl = ..Muscles.MusMdl.EI_UB;
        AnyRefNode &Via1 = ..Segs.Middle_Phalanx.UB_PIP_Node;
        AnyRefNode &Via2 = ..Segs.Proximal_Phalanx.UB_PIP_Node;
        AnyRefFrame &Via3 = ..Segs.Proximal_Phalanx.LEU_MP_Node;
        AnyRefNode &Ins = ..GlobalRef.EI_MP_Node;
        AnyDrawViaPointMuscle DrwMus =
        {Thickness = 0.0003;
          RGB = {0.5546875, 0.0, 0.1171875};};
      };

      AnyShortestPathMuscle RI = {
//        AnyViaPointMuscle RI = {
        AnyMuscleModel &MusMdl = ..Muscles.MusMdl.RI;
        AnySurface &Srf1a = ..Segs.Distal_Phalanx.Dis_DIPO.Dis_DIP;
        AnySurface &Srf1b = ..Segs.Middle_Phalanx.Mid_DIPO.Mid_DIP;
        AnySurface &Srf1c = ..Segs.Middle_Phalanx.Mid_PIPO.Mid_PIP;
        AnySurface &Srf1d = ..Segs.Proximal_Phalanx.Pro_PIPO.Pro_PIP;
        AnySurface &Srf1e = ..Segs.Proximal_Phalanx.Pro_MCPO.Pro_MCP;
        AnySurface &Srf1f = ..GlobalRef.Met_MCPO.Met_MCP;
        AnySurface &Srf2 = ..Segs.Middle_Phalanx.middle;
        AnySurface &Srf3 = ..Segs.Proximal_Phalanx.proximal;
//        AnyRefFrame &End1 = ..Segs.Middle_Phalanx.RB_PIP_Node;
        AnyRefFrame &Via = ..Segs.Proximal_Phalanx.RB_PIP_Node;
        AnyRefNode &Ins = ..Segs.Proximal_Phalanx.RI_MP_Node;
        AnyRefNode &Via3 = ..GlobalRef.RI_MP_Node;
        SPLine.StringMesh = 20;
        AnyDrawViaPointMuscle DrwMus =
        {Thickness = 0.0003;
          RGB = {0.5546875, 0.0, 0.1171875};};
      };
      AnyViaPointMuscle RI_ES =
      {
        AnyMuscleModel &MusMdl = ..Muscles.MusMdl.RI_ES;
        AnyRefNode &Ins = ..Segs.Proximal_Phalanx.RI_MP_Node;
        AnyRefFrame &Via = ..Segs.Proximal_Phalanx.ES_PIP_Node;
        AnyRefFrame &End1 = ..Segs.Middle_Phalanx.ES_PIP_Node;
        AnyRefNode &Via3 = ..GlobalRef.RI_MP_Node;
        AnyDrawViaPointMuscle DrwMus =
        {Thickness = 0.0003;
          RGB = {0.5546875, 0.0, 0.1171875};};
      };
        AnyShortestPathMuscle LU = {
//        AnyViaPointMuscle LU = {
        AnyMuscleModel &MusMdl = ..Muscles.MusMdl.LU;
        AnySurface &Srf1a = ..Segs.Distal_Phalanx.Dis_DIPO.Dis_DIP;
        AnySurface &Srf1b = ..Segs.Middle_Phalanx.Mid_DIPO.Mid_DIP;
        AnySurface &Srf1c = ..Segs.Middle_Phalanx.Mid_PIPO.Mid_PIP;
        AnySurface &Srf1d = ..Segs.Proximal_Phalanx.Pro_PIPO.Pro_PIP;
        AnySurface &Srf1e = ..Segs.Proximal_Phalanx.Pro_MCPO.Pro_MCP;
        AnySurface &Srf1f = ..GlobalRef.Met_MCPO.Met_MCP;
        AnySurface &Srf2 = ..Segs.Middle_Phalanx.middle;
        AnySurface &Srf3 = ..Segs.Proximal_Phalanx.proximal;
        AnyRefNode &Org = ..Segs.Distal_Phalanx.TENode;
        AnyRefNode &Via0 = ..Segs.Middle_Phalanx.TE_DIP_Node;
        AnyRefNode &Via1 = ..Segs.Middle_Phalanx.RB_PIP_Node;
        AnyRefNode &Via2 = ..Segs.Proximal_Phalanx.RB_PIP_Node;
        AnyRefNode &Ins = ..Segs.Proximal_Phalanx.LU_MP_Node;
        AnyRefNode &Via3 = ..GlobalRef.LU_MP_Node;
        SPLine.StringMesh = 20;
        AnyDrawViaPointMuscle DrwMus =
        {Thickness = 0.0003;
          RGB = {0.5546875, 0.0, 0.1171875};};
      };
      AnyViaPointMuscle LU_ES =
      {
        AnyMuscleModel &MusMdl = ..Muscles.MusMdl.LU_ES;
        AnyRefFrame &End = ..Segs.Middle_Phalanx.ES_PIP_Node;
        AnyRefFrame &Via = ..Segs.Proximal_Phalanx.ES_PIP_Node;
        AnyRefFrame &Ins = ..Segs.Proximal_Phalanx.LU_MP_Node;
        AnyRefNode &Via3 = ..GlobalRef.LU_MP_Node;
        AnyDrawViaPointMuscle DrwMus =
        {Thickness = 0.0003;
          RGB = {0.5546875, 0.0, 0.1171875};};
      };

      AnyShortestPathMuscle UI = {
//        AnyViaPointMuscle UI = {
        AnyMuscleModel &MusMdl = ..Muscles.MusMdl.UI;
        AnySurface &Srf1a = ..Segs.Distal_Phalanx.Dis_DIPO.Dis_DIP;
        AnySurface &Srf1b = ..Segs.Middle_Phalanx.Mid_DIPO.Mid_DIP;
        AnySurface &Srf1c = ..Segs.Middle_Phalanx.Mid_PIPO.Mid_PIP;
        AnySurface &Srf1d = ..Segs.Proximal_Phalanx.Pro_PIPO.Pro_PIP;
        AnySurface &Srf1e = ..Segs.Proximal_Phalanx.Pro_MCPO.Pro_MCP;
        AnySurface &Srf1f = ..GlobalRef.Met_MCPO.Met_MCP;
        AnySurface &Srf2 = ..Segs.Middle_Phalanx.middle;
        AnySurface &Srf3 = ..Segs.Proximal_Phalanx.proximal;
        AnyRefNode &Org = ..Segs.Distal_Phalanx.TENode;
        AnyRefNode &Via0 = ..Segs.Middle_Phalanx.TE_DIP_Node;
        AnyRefNode &Via1 = ..Segs.Middle_Phalanx.UB_PIP_Node;
        AnyRefNode &Via2 = ..Segs.Proximal_Phalanx.UB_PIP_Node;
        AnyRefNode &Ins = ..Segs.Proximal_Phalanx.UI_MP_Node;
        AnyRefNode &Via3 = ..GlobalRef.UI_MP_Node;
        SPLine.StringMesh = 20;
        AnyDrawViaPointMuscle DrwMus =
        {Thickness = 0.0003;
          RGB = {0.5546875, 0.0, 0.1171875};};
      };
      //
       AnyViaPointMuscle UI_ES =
      {
        AnyMuscleModel &MusMdl = ..Muscles.MusMdl.UI_ES;
        AnyRefFrame &End = ..Segs.Middle_Phalanx.ES_PIP_Node;
        AnyRefFrame &Via = ..Segs.Proximal_Phalanx.ES_PIP_Node;
        AnyRefFrame &Ins = ..Segs.Proximal_Phalanx.UI_MP_Node;
        AnyRefNode &Via3 = ..GlobalRef.UI_MP_Node;
        AnyDrawViaPointMuscle DrwMus =
        {Thickness = 0.0003;
          RGB = {0.5546875, 0.0, 0.1171875};};
      };

    }; // Muscles folder
    //
