//Biggs (1999), middle: DIS 20.0mm; MID 31.9mm; PRO 49.5mm
//An (1983), index: Dis/Mid/Pro: 19.7/24.7/43.6 (mm)

AnyVar MLength = 0.02016; // Units in meter (24.67 mm)
AnyVar DLength = MLength*(19.67/24.67); // Units in meter (19.67 mm)
AnyVar PLength = 0.01974; // Units in meter (43.57 mm)
AnyVar LoadPosition = 0.020; //meter
AnyVar O12 = 0.224;
AnyVar O23 = 1.000;
AnyVar O34 = 0.288;
AnyVar O45 = 1.919;
AnyVar O56 = 0.432;
AnyVar f_m = 1.0;
AnyVar f_i = 1.0;
AnyVar f_force = 1.0;
AnyVar m1 = f_m*3.91E-3;
AnyVar i1xx = f_i*1.04E-7;
AnyVar i1yy = f_i*1.90E-7;
AnyVar i1zz = f_i*1.70E-7;
AnyVar m2 = f_m*6.79E-3;
AnyVar i2xx = f_i*2.32E-7;
AnyVar i2yy = f_i*4.84E-7;
AnyVar i2zz = f_i*4.51E-7;
AnyVar m3 = f_m*1.55E-2;
AnyVar i3xx = f_i*6.48E-7;
AnyVar i3yy = f_i*2.86E-6;
AnyVar i3zz = f_i*2.83E-6;
