// File of anthropometric data
// In this file you have to enter the legnth of each segment individualy

AnyVar BMI = AnthroData.Body_Mass/(AnthroData.body_height^2);
AnyVar FatPercent = (-0.09 + 0.0149*BMI - 0.00009*BMI^2)*100; //Estimation from Frankenfield et al. (2001) valid for men

AnyFolder AnthroData = {
  AnyVar Body_Mass = Main.TrialSpecificData.Anthropometrics.BodyMass;
  AnyVar body_height =Main.TrialSpecificData.Anthropometrics.BodyHeight;


  //Segment masses in kg from Winter ("Biomechanics and motor control of human movement." David A. Winter)
  AnyVar lumbar = 0.139*Body_Mass; // T12-L1 to L5-Sacrum
  AnyVar thorax = 0.1894*Body_Mass; // C7-T1 to T12-L1 (modified from 0.216 winter to separate scapula)
  AnyVar pelvis = 0.142*Body_Mass;
  AnyVar clavicle_r = 0.0133*Body_Mass;
  AnyVar upper_arm_r = 0.028*Body_Mass;
  AnyVar lower_arm_r = 0.016*Body_Mass;
  AnyVar hand_r = 0.006*Body_Mass;
  AnyVar clavicle_l = 0.0133*Body_Mass;
  AnyVar upper_arm_l = 0.028*Body_Mass;
  AnyVar lower_arm_l = 0.016*Body_Mass;
  AnyVar hand_l = 0.006*Body_Mass;
  AnyVar head = 0.081*Body_Mass; // head and cervical
  AnyVar thigh_r = 0.1*Body_Mass;
  AnyVar lower_leg_r = 0.0465*Body_Mass;
  AnyVar foot_r = 0.0145*Body_Mass;
  AnyVar ball_r = 0.000;
  AnyVar thigh_l = 0.1*Body_Mass;
  AnyVar lower_leg_l = 0.0465*Body_Mass;
  AnyVar foot_l = 0.0145*Body_Mass;
  AnyVar ball_l = 0.000;


  // Those two folders are used by the TD leg
  AnyFolder Right ={
    AnyVar thigh = 0.1*.Body_Mass;
    AnyVar lower_leg = 0.0465*.Body_Mass;
    AnyVar talus = 0.00020*.Body_Mass;
    AnyVar foot = 0.0145*.Body_Mass;
    AnyVar ball = 0.000;
  };
  AnyFolder Left={
    AnyVar thigh = 0.1*.Body_Mass;
    AnyVar lower_leg = 0.0465*.Body_Mass;
    AnyVar talus = 0.020*.Body_Mass;
    AnyVar foot = 0.0145*.Body_Mass;
    AnyVar ball = 0.000;
  };


 /* AnyVar TotalMass=
   pelvis +
   lumbar +
   thorax +
   clavicle_r +
   upper_arm_r +
   lower_arm_r +
   hand_r +
   clavicle_l +
   upper_arm_l+
   lower_arm_l+
   hand_l +
   head +
   thigh_r +
   lower_leg_r +
   foot_r +
   ball_r +
   thigh_l+
   lower_leg_l+
   foot_l+
   ball_l;
  */

};


AnyFolder AnthroSegmentLengths = {
  AnyVar ThighLength = 0.45579;
  AnyVar ShankLength = 0.46;

  AnyVar FootLength = 0.2353423; //Back of heel (tuber calcanei) to second toe tip.
  AnyVar FootWidth = 0.07649351; //MPjnt1 center to MPjnt5 center.
  AnyVar FootHeight = 0.07116012; //vertical from base of heel (medial process) to ankle joint.

  AnyVar PelvisWidth = Main.TrialSpecificData.Anthropometrics.PelvisWidth; //distance between hip joints
  AnyVar HeadHeight = 0.14;//height in neutral position from  C1HatNode to top of head
  AnyVar TrunkHeight = 0.620233;//height in neautral position from  C1HatNode to L5SacrumJnt
  AnyVar UpperArmLength = 0.340079;
  AnyVar LowerArmLength =0.2690167;
  AnyVar HandLength = 0.182;
  AnyVar HandBreadth = 0.058;


  // Those two folders are used by the TD leg
  AnyFolder Right ={
    AnyVar ThighLength = Main.TrialSpecificData.Anthropometrics.ThighLength ;
    AnyVar ShankLength =Main.TrialSpecificData.Anthropometrics.ShankLength ;
    AnyVar FootLength = ...BodyModel.Right.Leg.Seg.Calcaneus.TuberCalcanei.sRel[1] - ...BodyModel.Right.Leg.Seg.DistalPhalange2.ToeTip.sRel[1]; //Back of heel (tuber calcanei) to second toe tip.
    AnyVar FootWidth = abs(...BodyModel.Right.Leg.Seg.Metatarsal5.MtPhalJoint.sRel[2] - ...BodyModel.Right.Leg.Seg.Metatarsal1.MtPhalJoint.sRel[2]); //MPjnt1 center to MPjnt5 center.
    AnyVar FootHeight = ...BodyModel.Right.Leg.Seg.Talus.AnkleJoint.sRel[0] - ...BodyModel.Right.Leg.Seg.Calcaneus.MedialProcess.sRel[0]; //vertical from base of heel (medial process) to ankle joint.
    AnyVar TalusLength = 0.03808687;

    //AnyFolder Talus = {
    //AnyVar Length = vnorm(....BodyModel.Right.Leg.Seg.Talus.SubTalarJointStandard-....BodyModel.Right.Leg.Seg.Talus.AnkleJointStandard,2);
    //};
    //AnyFolder Foot = {
    //  AnyVar Length = vnorm(....BodyModel.Right.Leg.Seg.Foot.SubTalarJointStandard-....BodyModel.Right.Leg.Seg.Foot.ToeJointStandard,2);
    //};
    //AnyFolder Shank = {
    //  AnyVar Length = vnorm(....BodyModel.Right.Leg.Seg.Shank.KneeJointStandard-....BodyModel.Right.Leg.Seg.Shank.AnkleJointStandard,2);
    //};
    //AnyFolder Thigh = {
    //  AnyVar Length = vnorm(....BodyModel.Right.Leg.Seg.Thigh.KneeJointStandard-....BodyModel.Right.Leg.Seg.Thigh.HipJointStandard,2);
    //};
  };

  AnyFolder Left ={
    AnyVar ThighLength = .Right.ThighLength;
    AnyVar ShankLength = .Right.ShankLength;
    AnyVar FootLength = .Right.FootLength;
    AnyVar FootWidth = .Right.FootWidth;
    AnyVar FootHeight = .Right.FootHeight;
    AnyVar TalusLength = .Right.TalusLength;
  };

};
