AnyOperationMacro InverseDynamicAnalysisSequence = {  FileName = "Sequence2.anymcr";   };
//AnyOperationMacro KinematicAnalysisSequence = {  FileName = "Sequence3.anymcr";   };


#define DynamicCalibration

//This study is used for running the inverse dynamic analysis of the optimized motion
//***********************************************************************************
AnyFolder Studies ={

  HumanModel={
    AnyFolder &Mannequin=.InverseDynamicStudy.Mannequin;
    #include  "BodyPartsSetup.any"

    AnyVar ArchHeight = (BodyModel.Right.Leg.Seg.Navicular.TaloNavicularJoint.sRel*BodyModel.Right.Leg.Seg.Talus.AnkleJoint.ARel)[1] - (BodyModel.Right.Leg.Seg.Calcaneus.MedialProcess.sRel*BodyModel.Right.Leg.Seg.Talus.AnkleJoint.ARel)[1];
    AnyVar ArchLength = (BodyModel.Right.Leg.Seg.Metatarsal1.MTHeadPlantarNode.sRel*BodyModel.Right.Leg.Seg.Talus.AnkleJoint.ARel)[0] - (BodyModel.Right.Leg.Seg.Calcaneus.MedialProcess.sRel*BodyModel.Right.Leg.Seg.Talus.AnkleJoint.ARel)[0];
    AnyVar FootFlatness = ArchHeight/ArchLength;
  };
  #include "HumanModel.any"

  AnyBodyStudy InverseDynamicStudy = {
    AnyFolder &C3DData=..ModelSetup.C3DFileData ;
    AnyFolder &HumanModel=.HumanModel.BodyModel;
    #include "Mannequin.any"

    //Environment around the human
    AnyFolder EnvironmentModel ={

      AnyFolder DrawC3DMarkers = {};
      //Model of the floor and force plates this is where the force plates are defined
      AnyFolder &HumanModelRef=..HumanModel.BodyModel;
      #include "Environment.any"
    };

    //Connection between environment and the human
    AnyFolder ModelEnvironmentConnection = {
      //Drivers for the model
      #include "JointsAndDriversOptimized.any"
    };


    InverseDynamics.Criterion.UpperBoundOnOff=Off;
    nStep=  Main.ModelSetup.nStep;
    Gravity ={0,0, -9.81};
    tStart = Main.TrialSpecificData.tStart+2*Kinematics.ApproxVelAccPerturb;
    tEnd = Main.TrialSpecificData.tEnd-2*Kinematics.ApproxVelAccPerturb;

    InitialConditions.KinematicTol= 1e-5;
    Kinematics.KinematicTol= 1e-5;
  };


  //This study is only used for loading the optimized parameters
  AnyOptKinStudy LoadParametersOptimizationResults =     {
    AnyFolder &Study = .InverseDynamicStudy;
    AnyFolder &HumanModel = .HumanModel;
    ParameterOptimization.ConvergenceTol=1e-3;
    Analysis =   {
      AnyOperation &ref = .Study.Kinematics;
    };
  };
};
