AnyFolder JointAngleOutputs = {

  AnyOutputFile OutputFile1 = {
    FileName = "../Input/" + Main.ModelSetup.C3DFileData.NameOfFile+"-output-euler-trunk.txt";
    SepSign = " ";

    AnyVector PelvisPosX = ..HumanModel.BodyModel.Interface.Trunk.PelvisPosX.Pos;
    AnyVector PelvisPosY = ..HumanModel.BodyModel.Interface.Trunk.PelvisPosY.Pos;
    AnyVector PelvisPosZ = ..HumanModel.BodyModel.Interface.Trunk.PelvisPosZ.Pos;
    AnyVector PelvisRotX = ..HumanModel.BodyModel.Interface.Trunk.PelvisRotX.Pos;
    AnyVector PelvisRotY = ..HumanModel.BodyModel.Interface.Trunk.PelvisRotY.Pos;
    AnyVector PelvisRotZ = ..HumanModel.BodyModel.Interface.Trunk.PelvisRotZ.Pos;
    AnyVector PelvisThoraxExtension = ..HumanModel.BodyModel.Interface.Trunk.PelvisThoraxExtension.Pos;
    AnyVector PelvisThoraxLateralBending = ..HumanModel.BodyModel.Interface.Trunk.PelvisThoraxLateralBending.Pos;
    AnyVector PelvisThoraxRotation = ..HumanModel.BodyModel.Interface.Trunk.PelvisThoraxRotation.Pos;
  };


  #if LEFT_LEG_TD == 1

  AnyOutputFile OutputFile2 = {
    FileName = "../Input/" +  Main.ModelSetup.C3DFileData.NameOfFile+"-output-euler-leftlegtd.txt";
    SepSign = " ";

    AnyVector HipFlexion = ..HumanModel.BodyModel.Interface.Left.HipFlexion.Pos;
    AnyVector HipAbduction = ..HumanModel.BodyModel.Interface.Left.HipAbduction.Pos;
    AnyVector HipExternalRotation = ..HumanModel.BodyModel.Interface.Left.HipExternalRotation.Pos;
    AnyVector KneeFlexion = ..HumanModel.BodyModel.Interface.Left.KneeFlexion.Pos;
    AnyVector AnklePlantarFlexion = ..HumanModel.BodyModel.Interface.Left.AnklePlantarFlexion.Pos;
    AnyVector SubTalarEversion = ..HumanModel.BodyModel.Interface.Left.SubTalarEversion.Pos;
  };

    #if LEFT_DETAILLED_FOOT == 1

    AnyOutputFile OutputFile8 = {
      FileName = "../Input/" +  Main.ModelSetup.C3DFileData.NameOfFile+"-output-euler-leftdetailedfoot.txt";
      SepSign = " ";

      AnyVector CalcaneoCuboidDorsiFlexion = ..HumanModel.BodyModel.Interface.Left.CalcaneoCuboidDorsiFlexion.Pos;
//      AnyVector CalcaneoCuboidAbduction = ..HumanModel.BodyModel.Interface.Left.CalcaneoCuboidAbduction.Pos;
      AnyVector CalcaneoCuboidEversion = ..HumanModel.BodyModel.Interface.Left.CalcaneoCuboidEversion.Pos;
      AnyVector TaloNavicularDorsiFlexion = ..HumanModel.BodyModel.Interface.Left.TaloNavicularDorsiFlexion.Pos;
      AnyVector TaloNavicularAbduction = ..HumanModel.BodyModel.Interface.Left.TaloNavicularAbduction.Pos;
      AnyVector TaloNavicularEversion = ..HumanModel.BodyModel.Interface.Left.TaloNavicularEversion.Pos;
      AnyVector NaviculoMedialCuneiformDorsiFlexion = ..HumanModel.BodyModel.Interface.Left.NaviculoMedialCuneiformDorsiFlexion.Pos;
      AnyVector NaviculoMedialCuneiformAbduction = ..HumanModel.BodyModel.Interface.Left.NaviculoMedialCuneiformAbduction.Pos;
      AnyVector NaviculoIntermediateCuneiformDorsiFlexion = ..HumanModel.BodyModel.Interface.Left.NaviculoIntermediateCuneiformDorsiFlexion.Pos;
//      AnyVector NaviculoIntermediateCuneiformAbduction = ..HumanModel.BodyModel.Interface.Left.NaviculoIntermediateCuneiformAbduction.Pos;
      AnyVector NaviculoLateralCuneiformDorsiFlexion = ..HumanModel.BodyModel.Interface.Left.NaviculoLateralCuneiformDorsiFlexion.Pos;
//      AnyVector NaviculoLateralCuneiformAbduction = ..HumanModel.BodyModel.Interface.Left.NaviculoLateralCuneiformAbduction.Pos;
      AnyVector TarsoMetatarsal1DorsiFlexion = ..HumanModel.BodyModel.Interface.Left.TarsoMetatarsal1DorsiFlexion.Pos;
      AnyVector TarsoMetatarsal1Abduction = ..HumanModel.BodyModel.Interface.Left.TarsoMetatarsal1Abduction.Pos;
      AnyVector TarsoMetatarsal2DorsiFlexion = ..HumanModel.BodyModel.Interface.Left.TarsoMetatarsal2DorsiFlexion.Pos;
//      AnyVector TarsoMetatarsal2Abduction = ..HumanModel.BodyModel.Interface.Left.TarsoMetatarsal2Abduction.Pos;
      AnyVector TarsoMetatarsal3DorsiFlexion = ..HumanModel.BodyModel.Interface.Left.TarsoMetatarsal3DorsiFlexion.Pos;
//      AnyVector TarsoMetatarsal3Abduction = ..HumanModel.BodyModel.Interface.Left.TarsoMetatarsal3Abduction.Pos;
      AnyVector TarsoMetatarsal4DorsiFlexion = ..HumanModel.BodyModel.Interface.Left.TarsoMetatarsal4DorsiFlexion.Pos;
//      AnyVector TarsoMetatarsal4Abduction = ..HumanModel.BodyModel.Interface.Left.TarsoMetatarsal4Abduction.Pos;
      AnyVector TarsoMetatarsal5SkewDorsiFlexion = ..HumanModel.BodyModel.Interface.Left.TarsoMetatarsal5SkewDorsiFlexion.Pos;
//      AnyVector TarsoMetatarsal5Abduction = ..HumanModel.BodyModel.Interface.Left.TarsoMetatarsal5Abduction.Pos;
      AnyVector MetatarsoPhalangeal1DorsiFlexion = ..HumanModel.BodyModel.Interface.Left.MetatarsoPhalangeal1DorsiFlexion.Pos;
      AnyVector MetatarsoPhalangeal1Abduction = ..HumanModel.BodyModel.Interface.Left.MetatarsoPhalangeal1Abduction.Pos;
      AnyVector MetatarsoPhalangeal2DorsiFlexion = ..HumanModel.BodyModel.Interface.Left.MetatarsoPhalangeal2DorsiFlexion.Pos;
      AnyVector MetatarsoPhalangeal2Abduction = ..HumanModel.BodyModel.Interface.Left.MetatarsoPhalangeal2Abduction.Pos;
      AnyVector MetatarsoPhalangeal3DorsiFlexion = ..HumanModel.BodyModel.Interface.Left.MetatarsoPhalangeal3DorsiFlexion.Pos;
      AnyVector MetatarsoPhalangeal3Abduction = ..HumanModel.BodyModel.Interface.Left.MetatarsoPhalangeal3Abduction.Pos;
      AnyVector MetatarsoPhalangeal4DorsiFlexion = ..HumanModel.BodyModel.Interface.Left.MetatarsoPhalangeal4DorsiFlexion.Pos;
      AnyVector MetatarsoPhalangeal4Abduction = ..HumanModel.BodyModel.Interface.Left.MetatarsoPhalangeal4Abduction.Pos;
      AnyVector MetatarsoPhalangeal5DorsiFlexion = ..HumanModel.BodyModel.Interface.Left.MetatarsoPhalangeal5DorsiFlexion.Pos;
      AnyVector MetatarsoPhalangeal5Abduction = ..HumanModel.BodyModel.Interface.Left.MetatarsoPhalangeal5Abduction.Pos;
      AnyVector ProximoDistalPhalange1DorsiFlexion = ..HumanModel.BodyModel.Interface.Left.ProximoDistalPhalange1DorsiFlexion.Pos;
      AnyVector ProximoMedialPhalange2DorsiFlexion = ..HumanModel.BodyModel.Interface.Left.ProximoMedialPhalange2DorsiFlexion.Pos;
      AnyVector ProximoMedialPhalange3DorsiFlexion = ..HumanModel.BodyModel.Interface.Left.ProximoMedialPhalange3DorsiFlexion.Pos;
      AnyVector ProximoMedialPhalange4DorsiFlexion = ..HumanModel.BodyModel.Interface.Left.ProximoMedialPhalange4DorsiFlexion.Pos;
      AnyVector ProximoMedialPhalange5DorsiFlexion = ..HumanModel.BodyModel.Interface.Left.ProximoMedialPhalange5DorsiFlexion.Pos;
      AnyVector MedioDistalPhalange2DorsiFlexion = ..HumanModel.BodyModel.Interface.Left.MedioDistalPhalange2DorsiFlexion.Pos;
      AnyVector MedioDistalPhalange3DorsiFlexion = ..HumanModel.BodyModel.Interface.Left.MedioDistalPhalange3DorsiFlexion.Pos;
      AnyVector MedioDistalPhalange4DorsiFlexion = ..HumanModel.BodyModel.Interface.Left.MedioDistalPhalange4DorsiFlexion.Pos;
      AnyVector MedioDistalPhalange5DorsiFlexion = ..HumanModel.BodyModel.Interface.Left.MedioDistalPhalange5DorsiFlexion.Pos;
    };

    #endif

  #endif


  #if RIGHT_LEG_TD == 1

  AnyOutputFile OutputFile3 = {
    FileName = "../Input/" +  Main.ModelSetup.C3DFileData.NameOfFile+"-output-euler-rightlegtd.txt";
    SepSign = " ";

    AnyVector HipFlexion = ..HumanModel.BodyModel.Interface.Right.HipFlexion.Pos;
    AnyVector HipAbduction = ..HumanModel.BodyModel.Interface.Right.HipAbduction.Pos;
    AnyVector HipExternalRotation = ..HumanModel.BodyModel.Interface.Right.HipExternalRotation.Pos;
    AnyVector KneeFlexion = ..HumanModel.BodyModel.Interface.Right.KneeFlexion.Pos;
    AnyVector AnklePlantarFlexion = ..HumanModel.BodyModel.Interface.Right.AnklePlantarFlexion.Pos;
    AnyVector SubTalarEversion = ..HumanModel.BodyModel.Interface.Right.SubTalarEversion.Pos;
  };

    #if RIGHT_DETAILLED_FOOT == 1

    AnyOutputFile OutputFile9 = {
      FileName = "../Input/" +  Main.ModelSetup.C3DFileData.NameOfFile+"-output-euler-rightdetailedfoot.txt";
      SepSign = " ";

      AnyVector CalcaneoCuboidDorsiFlexion = ..HumanModel.BodyModel.Interface.Right.CalcaneoCuboidDorsiFlexion.Pos;
//      AnyVector CalcaneoCuboidAbduction = ..HumanModel.BodyModel.Interface.Right.CalcaneoCuboidAbduction.Pos;
      AnyVector CalcaneoCuboidEversion = ..HumanModel.BodyModel.Interface.Right.CalcaneoCuboidEversion.Pos;
      AnyVector TaloNavicularDorsiFlexion = ..HumanModel.BodyModel.Interface.Right.TaloNavicularDorsiFlexion.Pos;
      AnyVector TaloNavicularAbduction = ..HumanModel.BodyModel.Interface.Right.TaloNavicularAbduction.Pos;
      AnyVector TaloNavicularEversion = ..HumanModel.BodyModel.Interface.Right.TaloNavicularEversion.Pos;
      AnyVector NaviculoMedialCuneiformDorsiFlexion = ..HumanModel.BodyModel.Interface.Right.NaviculoMedialCuneiformDorsiFlexion.Pos;
      AnyVector NaviculoMedialCuneiformAbduction = ..HumanModel.BodyModel.Interface.Right.NaviculoMedialCuneiformAbduction.Pos;
      AnyVector NaviculoIntermediateCuneiformDorsiFlexion = ..HumanModel.BodyModel.Interface.Right.NaviculoIntermediateCuneiformDorsiFlexion.Pos;
//      AnyVector NaviculoIntermediateCuneiformAbduction = ..HumanModel.BodyModel.Interface.Right.NaviculoIntermediateCuneiformAbduction.Pos;
      AnyVector NaviculoLateralCuneiformDorsiFlexion = ..HumanModel.BodyModel.Interface.Right.NaviculoLateralCuneiformDorsiFlexion.Pos;
//      AnyVector NaviculoLateralCuneiformAbduction = ..HumanModel.BodyModel.Interface.Right.NaviculoLateralCuneiformAbduction.Pos;
      AnyVector TarsoMetatarsal1DorsiFlexion = ..HumanModel.BodyModel.Interface.Right.TarsoMetatarsal1DorsiFlexion.Pos;
      AnyVector TarsoMetatarsal1Abduction = ..HumanModel.BodyModel.Interface.Right.TarsoMetatarsal1Abduction.Pos;
      AnyVector TarsoMetatarsal2DorsiFlexion = ..HumanModel.BodyModel.Interface.Right.TarsoMetatarsal2DorsiFlexion.Pos;
//      AnyVector TarsoMetatarsal2Abduction = ..HumanModel.BodyModel.Interface.Right.TarsoMetatarsal2Abduction.Pos;
      AnyVector TarsoMetatarsal3DorsiFlexion = ..HumanModel.BodyModel.Interface.Right.TarsoMetatarsal3DorsiFlexion.Pos;
//      AnyVector TarsoMetatarsal3Abduction = ..HumanModel.BodyModel.Interface.Right.TarsoMetatarsal3Abduction.Pos;
      AnyVector TarsoMetatarsal4DorsiFlexion = ..HumanModel.BodyModel.Interface.Right.TarsoMetatarsal4DorsiFlexion.Pos;
//      AnyVector TarsoMetatarsal4Abduction = ..HumanModel.BodyModel.Interface.Right.TarsoMetatarsal4Abduction.Pos;
      AnyVector TarsoMetatarsal5SkewDorsiFlexion = ..HumanModel.BodyModel.Interface.Right.TarsoMetatarsal5SkewDorsiFlexion.Pos;
//      AnyVector TarsoMetatarsal5Abduction = ..HumanModel.BodyModel.Interface.Right.TarsoMetatarsal5Abduction.Pos;
      AnyVector MetatarsoPhalangeal1DorsiFlexion = ..HumanModel.BodyModel.Interface.Right.MetatarsoPhalangeal1DorsiFlexion.Pos;
      AnyVector MetatarsoPhalangeal1Abduction = ..HumanModel.BodyModel.Interface.Right.MetatarsoPhalangeal1Abduction.Pos;
      AnyVector MetatarsoPhalangeal2DorsiFlexion = ..HumanModel.BodyModel.Interface.Right.MetatarsoPhalangeal2DorsiFlexion.Pos;
      AnyVector MetatarsoPhalangeal2Abduction = ..HumanModel.BodyModel.Interface.Right.MetatarsoPhalangeal2Abduction.Pos;
      AnyVector MetatarsoPhalangeal3DorsiFlexion = ..HumanModel.BodyModel.Interface.Right.MetatarsoPhalangeal3DorsiFlexion.Pos;
      AnyVector MetatarsoPhalangeal3Abduction = ..HumanModel.BodyModel.Interface.Right.MetatarsoPhalangeal3Abduction.Pos;
      AnyVector MetatarsoPhalangeal4DorsiFlexion = ..HumanModel.BodyModel.Interface.Right.MetatarsoPhalangeal4DorsiFlexion.Pos;
      AnyVector MetatarsoPhalangeal4Abduction = ..HumanModel.BodyModel.Interface.Right.MetatarsoPhalangeal4Abduction.Pos;
      AnyVector MetatarsoPhalangeal5DorsiFlexion = ..HumanModel.BodyModel.Interface.Right.MetatarsoPhalangeal5DorsiFlexion.Pos;
      AnyVector MetatarsoPhalangeal5Abduction = ..HumanModel.BodyModel.Interface.Right.MetatarsoPhalangeal5Abduction.Pos;
      AnyVector ProximoDistalPhalange1DorsiFlexion = ..HumanModel.BodyModel.Interface.Right.ProximoDistalPhalange1DorsiFlexion.Pos;
      AnyVector ProximoMedialPhalange2DorsiFlexion = ..HumanModel.BodyModel.Interface.Right.ProximoMedialPhalange2DorsiFlexion.Pos;
      AnyVector ProximoMedialPhalange3DorsiFlexion = ..HumanModel.BodyModel.Interface.Right.ProximoMedialPhalange3DorsiFlexion.Pos;
      AnyVector ProximoMedialPhalange4DorsiFlexion = ..HumanModel.BodyModel.Interface.Right.ProximoMedialPhalange4DorsiFlexion.Pos;
      AnyVector ProximoMedialPhalange5DorsiFlexion = ..HumanModel.BodyModel.Interface.Right.ProximoMedialPhalange5DorsiFlexion.Pos;
      AnyVector MedioDistalPhalange2DorsiFlexion = ..HumanModel.BodyModel.Interface.Right.MedioDistalPhalange2DorsiFlexion.Pos;
      AnyVector MedioDistalPhalange3DorsiFlexion = ..HumanModel.BodyModel.Interface.Right.MedioDistalPhalange3DorsiFlexion.Pos;
      AnyVector MedioDistalPhalange4DorsiFlexion = ..HumanModel.BodyModel.Interface.Right.MedioDistalPhalange4DorsiFlexion.Pos;
      AnyVector MedioDistalPhalange5DorsiFlexion = ..HumanModel.BodyModel.Interface.Right.MedioDistalPhalange5DorsiFlexion.Pos;
    };

    #endif

  #endif


  #if LEFT_LEG == 1

  AnyOutputFile OutputFile4 = {
    FileName = "../Input/" +  Main.ModelSetup.C3DFileData.NameOfFile+"-output-euler-leftleg.txt";
    SepSign = " ";

    AnyVector HipFlexion = ..HumanModel.BodyModel.Interface.Left.HipFlexion.Pos;
    AnyVector HipAbduction = ..HumanModel.BodyModel.Interface.Left.HipAbduction.Pos;
    AnyVector HipExternalRotation = ..HumanModel.BodyModel.Interface.Left.HipExternalRotation.Pos;
    AnyVector KneeFlexion = ..HumanModel.BodyModel.Interface.Left.KneeFlexion.Pos;
    AnyVector AnklePlantarFlexion = ..HumanModel.BodyModel.Interface.Left.AnklePlantarFlexion.Pos;
    AnyVector AnkleEversion = ..HumanModel.BodyModel.Interface.Left.AnkleEversion.Pos;
  };

  #endif


  #if RIGHT_LEG == 1

  AnyOutputFile OutputFile5 = {
    FileName = "../Input/" +  Main.ModelSetup.C3DFileData.NameOfFile+"-output-euler-rightleg.txt";
    SepSign = " ";

    AnyVector HipFlexion = ..HumanModel.BodyModel.Interface.Right.HipFlexion.Pos;
    AnyVector HipAbduction = ..HumanModel.BodyModel.Interface.Right.HipAbduction.Pos;
    AnyVector HipExternalRotation = ..HumanModel.BodyModel.Interface.Right.HipExternalRotation.Pos;
    AnyVector KneeFlexion = ..HumanModel.BodyModel.Interface.Right.KneeFlexion.Pos;
    AnyVector AnklePlantarFlexion = ..HumanModel.BodyModel.Interface.Right.AnklePlantarFlexion.Pos;
    AnyVector AnkleEversion = ..HumanModel.BodyModel.Interface.Right.AnkleEversion.Pos;
  };

  #endif


  #if LEFT_ARM == 1

  AnyOutputFile OutputFile6 = {
    FileName = "../Input/" +  Main.ModelSetup.C3DFileData.NameOfFile+"-output-euler-leftarm.txt";
    SepSign = " ";

    AnyVector GlenohumeralFlexion = ..HumanModel.BodyModel.Interface.Left.GlenohumeralFlexion.Pos;
    AnyVector GlenohumeralExternalRotation = ..HumanModel.BodyModel.Interface.Left.GlenohumeralExternalRotation.Pos;
    AnyVector GlenohumeralAbduction = ..HumanModel.BodyModel.Interface.Left.GlenohumeralAbduction.Pos;
    AnyVector ElbowFlexion = ..HumanModel.BodyModel.Interface.Left.ElbowFlexion.Pos;
    AnyVector ElbowPronation = ..HumanModel.BodyModel.Interface.Left.ElbowPronation.Pos;
    AnyVector WristFlexion = ..HumanModel.BodyModel.Interface.Left.WristFlexion.Pos;
    AnyVector WristAbduction = ..HumanModel.BodyModel.Interface.Left.WristAbduction.Pos;
  };

  #endif


  #if RIGHT_ARM == 1

  AnyOutputFile OutputFile7 = {
    FileName = "../Input/" +  Main.ModelSetup.C3DFileData.NameOfFile+"-output-euler-rightarm.txt";
    SepSign = " ";

    AnyVector GlenohumeralFlexion = ..HumanModel.BodyModel.Interface.Right.GlenohumeralFlexion.Pos;
    AnyVector GlenohumeralExternalRotation = ..HumanModel.BodyModel.Interface.Right.GlenohumeralExternalRotation.Pos;
    AnyVector GlenohumeralAbduction = ..HumanModel.BodyModel.Interface.Right.GlenohumeralAbduction.Pos;
    AnyVector ElbowFlexion = ..HumanModel.BodyModel.Interface.Right.ElbowFlexion.Pos;
    AnyVector ElbowPronation = ..HumanModel.BodyModel.Interface.Right.ElbowPronation.Pos;
    AnyVector WristFlexion = ..HumanModel.BodyModel.Interface.Right.WristFlexion.Pos;
    AnyVector WristAbduction = ..HumanModel.BodyModel.Interface.Right.WristAbduction.Pos;
  };

  #endif


}; //JointAngleOutputs
