AnyFolder JointsAndDrivers = {

  // Aliases for convenient referencing
  AnyFolder &JntPos=..Mannequin.Posture;
  AnyFolder &JntVel=..Mannequin.PostureVel;


  AnyKinEqSimpleDriver NeckDrv={
    AnyKinMeasureOrg &ref1= ...HumanModel.Interface.Trunk.NeckJoint;
    DriverPos={0};
    DriverVel={0};
    Reaction.Type={Off};
  };

  AnyKinEqInterPolDriver JntDriverTrunk = {
    FileErrorContinueOnOff = On;
    Type = Bspline;
    BsplineOrder = 4;
    FileName = "../Input/" + Main.ModelSetup.C3DFileData.NameOfFile+"-output-euler-trunk.txt";
    AnyKinMeasureOrg &PelvisPosX = ...HumanModel.Interface.Trunk.PelvisPosX;
    AnyKinMeasureOrg &PelvisPosY = ...HumanModel.Interface.Trunk.PelvisPosY;
    AnyKinMeasureOrg &PelvisPosZ = ...HumanModel.Interface.Trunk.PelvisPosZ;
    AnyKinMeasureOrg &PelvisRotX = ...HumanModel.Interface.Trunk.PelvisRotX;
    AnyKinMeasureOrg &PelvisRotY = ...HumanModel.Interface.Trunk.PelvisRotY;
    AnyKinMeasureOrg &PelvisRotZ = ...HumanModel.Interface.Trunk.PelvisRotZ;
    AnyKinMeasureOrg &PelvisThoraxExtension = ...HumanModel.Interface.Trunk.PelvisThoraxExtension;
    AnyKinMeasureOrg &PelvisThoraxLateralBending = ...HumanModel.Interface.Trunk.PelvisThoraxLateralBending;
    AnyKinMeasureOrg &PelvisThoraxRotation = ...HumanModel.Interface.Trunk.PelvisThoraxRotation;
    Reaction.Type={On,On,On,On,On,On,Off,Off,Off};
  };

  #if LEFT_LEG_TD == 1
  AnyKinEqInterPolDriver JntDriverLeftLegTD = {
    FileErrorContinueOnOff = On;
    Type = Bspline;
    BsplineOrder = 4;
    FileName = "../Input/" + Main.ModelSetup.C3DFileData.NameOfFile+"-output-euler-leftlegtd.txt";
    AnyKinMeasureOrg &HipFlexion = ...HumanModel.Interface.Left.HipFlexion;
    AnyKinMeasureOrg &HipAbduction = ...HumanModel.Interface.Left.HipAbduction;
    AnyKinMeasureOrg &HipExternalRotation = ...HumanModel.Interface.Left.HipExternalRotation;
    AnyKinMeasureOrg &KneeFlexion = ...HumanModel.Interface.Left.KneeFlexion;
    AnyKinMeasureOrg &AnklePlantarFlexion = ...HumanModel.Interface.Left.AnklePlantarFlexion;
    AnyKinMeasureOrg &SubTalarEversion = ...HumanModel.Interface.Left.SubTalarEversion;
    Reaction.Type={Off,Off,Off,Off,Off,Off};
  };

    #if LEFT_DETAILLED_FOOT == 1
    AnyKinEqInterPolDriver JntDriverLeftDetailedFoot = {
      FileErrorContinueOnOff = On;
      Type = Bspline;
      BsplineOrder = 4;
      FileName = "../Input/" + Main.ModelSetup.C3DFileData.NameOfFile+"-output-euler-leftdetailedfoot.txt";
      AnyKinMeasureOrg &CalcaneoCuboidDorsiFlexion = ...HumanModel.Interface.Left.CalcaneoCuboidDorsiFlexion;
//      AnyKinMeasureOrg &CalcaneoCuboidAbduction = ...HumanModel.Interface.Left.CalcaneoCuboidAbduction;
      AnyKinMeasureOrg &CalcaneoCuboidEversion = ...HumanModel.Interface.Left.CalcaneoCuboidEversion;
      AnyKinMeasureOrg &TaloNavicularDorsiFlexion = ...HumanModel.Interface.Left.TaloNavicularDorsiFlexion;
      AnyKinMeasureOrg &TaloNavicularAbduction = ...HumanModel.Interface.Left.TaloNavicularAbduction;
      AnyKinMeasureOrg &TaloNavicularEversion = ...HumanModel.Interface.Left.TaloNavicularEversion;
      AnyKinMeasureOrg &NaviculoMedialCuneiformDorsiFlexion = ...HumanModel.Interface.Left.NaviculoMedialCuneiformDorsiFlexion;
      AnyKinMeasureOrg &NaviculoMedialCuneiformAbduction = ...HumanModel.Interface.Left.NaviculoMedialCuneiformAbduction;
      AnyKinMeasureOrg &NaviculoIntermediateCuneiformDorsiFlexion = ...HumanModel.Interface.Left.NaviculoIntermediateCuneiformDorsiFlexion;
//      AnyKinMeasureOrg &NaviculoIntermediateCuneiformAbduction = ...HumanModel.Interface.Left.NaviculoIntermediateCuneiformAbduction;
      AnyKinMeasureOrg &NaviculoLateralCuneiformDorsiFlexion = ...HumanModel.Interface.Left.NaviculoLateralCuneiformDorsiFlexion;
//      AnyKinMeasureOrg &NaviculoLateralCuneiformAbduction = ...HumanModel.Interface.Left.NaviculoLateralCuneiformAbduction;
      AnyKinMeasureOrg &TarsoMetatarsal1DorsiFlexion = ...HumanModel.Interface.Left.TarsoMetatarsal1DorsiFlexion;
      AnyKinMeasureOrg &TarsoMetatarsal1Abduction = ...HumanModel.Interface.Left.TarsoMetatarsal1Abduction;
      AnyKinMeasureOrg &TarsoMetatarsal2DorsiFlexion = ...HumanModel.Interface.Left.TarsoMetatarsal2DorsiFlexion;
//      AnyKinMeasureOrg &TarsoMetatarsal2Abduction = ...HumanModel.Interface.Left.TarsoMetatarsal2Abduction;
      AnyKinMeasureOrg &TarsoMetatarsal3DorsiFlexion = ...HumanModel.Interface.Left.TarsoMetatarsal3DorsiFlexion;
//      AnyKinMeasureOrg &TarsoMetatarsal3Abduction = ...HumanModel.Interface.Left.TarsoMetatarsal3Abduction;
      AnyKinMeasureOrg &TarsoMetatarsal4DorsiFlexion = ...HumanModel.Interface.Left.TarsoMetatarsal4DorsiFlexion;
//      AnyKinMeasureOrg &TarsoMetatarsal4Abduction = ...HumanModel.Interface.Left.TarsoMetatarsal4Abduction;
      AnyKinMeasureOrg &TarsoMetatarsal5SkewDorsiFlexion = ...HumanModel.Interface.Left.TarsoMetatarsal5SkewDorsiFlexion;
//      AnyKinMeasureOrg &TarsoMetatarsal5Abduction = ...HumanModel.Interface.Left.TarsoMetatarsal5Abduction;
      AnyKinMeasureOrg &MetatarsoPhalangeal1DorsiFlexion = ...HumanModel.Interface.Left.MetatarsoPhalangeal1DorsiFlexion;
      AnyKinMeasureOrg &MetatarsoPhalangeal1Abduction = ...HumanModel.Interface.Left.MetatarsoPhalangeal1Abduction;
      AnyKinMeasureOrg &MetatarsoPhalangeal2DorsiFlexion = ...HumanModel.Interface.Left.MetatarsoPhalangeal2DorsiFlexion;
      AnyKinMeasureOrg &MetatarsoPhalangeal2Abduction = ...HumanModel.Interface.Left.MetatarsoPhalangeal2Abduction;
      AnyKinMeasureOrg &MetatarsoPhalangeal3DorsiFlexion = ...HumanModel.Interface.Left.MetatarsoPhalangeal3DorsiFlexion;
      AnyKinMeasureOrg &MetatarsoPhalangeal3Abduction = ...HumanModel.Interface.Left.MetatarsoPhalangeal3Abduction;
      AnyKinMeasureOrg &MetatarsoPhalangeal4DorsiFlexion = ...HumanModel.Interface.Left.MetatarsoPhalangeal4DorsiFlexion;
      AnyKinMeasureOrg &MetatarsoPhalangeal4Abduction = ...HumanModel.Interface.Left.MetatarsoPhalangeal4Abduction;
      AnyKinMeasureOrg &MetatarsoPhalangeal5DorsiFlexion = ...HumanModel.Interface.Left.MetatarsoPhalangeal5DorsiFlexion;
      AnyKinMeasureOrg &MetatarsoPhalangeal5Abduction = ...HumanModel.Interface.Left.MetatarsoPhalangeal5Abduction;
      AnyKinMeasureOrg &ProximoDistalPhalange1DorsiFlexion = ...HumanModel.Interface.Left.ProximoDistalPhalange1DorsiFlexion;
      AnyKinMeasureOrg &ProximoMedialPhalange2DorsiFlexion = ...HumanModel.Interface.Left.ProximoMedialPhalange2DorsiFlexion;
      AnyKinMeasureOrg &ProximoMedialPhalange3DorsiFlexion = ...HumanModel.Interface.Left.ProximoMedialPhalange3DorsiFlexion;
      AnyKinMeasureOrg &ProximoMedialPhalange4DorsiFlexion = ...HumanModel.Interface.Left.ProximoMedialPhalange4DorsiFlexion;
      AnyKinMeasureOrg &ProximoMedialPhalange5DorsiFlexion = ...HumanModel.Interface.Left.ProximoMedialPhalange5DorsiFlexion;
      AnyKinMeasureOrg &MedioDistalPhalange2DorsiFlexion = ...HumanModel.Interface.Left.MedioDistalPhalange2DorsiFlexion;
      AnyKinMeasureOrg &MedioDistalPhalange3DorsiFlexion = ...HumanModel.Interface.Left.MedioDistalPhalange3DorsiFlexion;
      AnyKinMeasureOrg &MedioDistalPhalange4DorsiFlexion = ...HumanModel.Interface.Left.MedioDistalPhalange4DorsiFlexion;
      AnyKinMeasureOrg &MedioDistalPhalange5DorsiFlexion = ...HumanModel.Interface.Left.MedioDistalPhalange5DorsiFlexion;
      Reaction.Type={Off,Off,Off,Off,Off,Off,Off,Off,Off,Off,Off,Off,Off,Off,Off,Off,Off,Off,Off,Off,Off,Off,Off,Off,Off,Off,Off,Off,Off,Off,Off,Off,Off,Off,Off,Off,Off};
    };

    #endif

  #endif


  #if RIGHT_LEG_TD == 1
  AnyKinEqInterPolDriver JntDriverRightLegTD =  {
    FileErrorContinueOnOff = On;
    Type = Bspline;
    BsplineOrder = 4;
    FileName = "../Input/" + Main.ModelSetup.C3DFileData.NameOfFile+"-output-euler-rightlegtd.txt";
    AnyKinMeasureOrg &HipFlexion = ...HumanModel.Interface.Right.HipFlexion;
    AnyKinMeasureOrg &HipAbduction = ...HumanModel.Interface.Right.HipAbduction;
    AnyKinMeasureOrg &HipExternalRotation = ...HumanModel.Interface.Right.HipExternalRotation;
    AnyKinMeasureOrg &KneeFlexion = ...HumanModel.Interface.Right.KneeFlexion;
    AnyKinMeasureOrg &AnklePlantarFlexion = ...HumanModel.Interface.Right.AnklePlantarFlexion;
    AnyKinMeasureOrg &SubTalarEversion = ...HumanModel.Interface.Right.SubTalarEversion;
    Reaction.Type={Off,Off,Off,Off,Off,Off};
  };

    #if RIGHT_DETAILLED_FOOT == 1
    AnyKinEqInterPolDriver JntDriverRightDetailedFoot = {
      FileErrorContinueOnOff = On;
      Type = Bspline;
      BsplineOrder = 4;
      FileName = "../Input/" + Main.ModelSetup.C3DFileData.NameOfFile+"-output-euler-rightdetailedfoot.txt";
      AnyKinMeasureOrg &CalcaneoCuboidDorsiFlexion = ...HumanModel.Interface.Right.CalcaneoCuboidDorsiFlexion;
//      AnyKinMeasureOrg &CalcaneoCuboidAbduction = ...HumanModel.Interface.Right.CalcaneoCuboidAbduction;
      AnyKinMeasureOrg &CalcaneoCuboidEversion = ...HumanModel.Interface.Right.CalcaneoCuboidEversion;
      AnyKinMeasureOrg &TaloNavicularDorsiFlexion = ...HumanModel.Interface.Right.TaloNavicularDorsiFlexion;
      AnyKinMeasureOrg &TaloNavicularAbduction = ...HumanModel.Interface.Right.TaloNavicularAbduction;
      AnyKinMeasureOrg &TaloNavicularEversion = ...HumanModel.Interface.Right.TaloNavicularEversion;
      AnyKinMeasureOrg &NaviculoMedialCuneiformDorsiFlexion = ...HumanModel.Interface.Right.NaviculoMedialCuneiformDorsiFlexion;
      AnyKinMeasureOrg &NaviculoMedialCuneiformAbduction = ...HumanModel.Interface.Right.NaviculoMedialCuneiformAbduction;
      AnyKinMeasureOrg &NaviculoIntermediateCuneiformDorsiFlexion = ...HumanModel.Interface.Right.NaviculoIntermediateCuneiformDorsiFlexion;
//      AnyKinMeasureOrg &NaviculoIntermediateCuneiformAbduction = ...HumanModel.Interface.Right.NaviculoIntermediateCuneiformAbduction;
      AnyKinMeasureOrg &NaviculoLateralCuneiformDorsiFlexion = ...HumanModel.Interface.Right.NaviculoLateralCuneiformDorsiFlexion;
//      AnyKinMeasureOrg &NaviculoLateralCuneiformAbduction = ...HumanModel.Interface.Right.NaviculoLateralCuneiformAbduction;
      AnyKinMeasureOrg &TarsoMetatarsal1DorsiFlexion = ...HumanModel.Interface.Right.TarsoMetatarsal1DorsiFlexion;
      AnyKinMeasureOrg &TarsoMetatarsal1Abduction = ...HumanModel.Interface.Right.TarsoMetatarsal1Abduction;
      AnyKinMeasureOrg &TarsoMetatarsal2DorsiFlexion = ...HumanModel.Interface.Right.TarsoMetatarsal2DorsiFlexion;
//      AnyKinMeasureOrg &TarsoMetatarsal2Abduction = ...HumanModel.Interface.Right.TarsoMetatarsal2Abduction;
      AnyKinMeasureOrg &TarsoMetatarsal3DorsiFlexion = ...HumanModel.Interface.Right.TarsoMetatarsal3DorsiFlexion;
//      AnyKinMeasureOrg &TarsoMetatarsal3Abduction = ...HumanModel.Interface.Right.TarsoMetatarsal3Abduction;
      AnyKinMeasureOrg &TarsoMetatarsal4DorsiFlexion = ...HumanModel.Interface.Right.TarsoMetatarsal4DorsiFlexion;
//      AnyKinMeasureOrg &TarsoMetatarsal4Abduction = ...HumanModel.Interface.Right.TarsoMetatarsal4Abduction;
      AnyKinMeasureOrg &TarsoMetatarsal5SkewDorsiFlexion = ...HumanModel.Interface.Right.TarsoMetatarsal5SkewDorsiFlexion;
//      AnyKinMeasureOrg &TarsoMetatarsal5Abduction = ...HumanModel.Interface.Right.TarsoMetatarsal5Abduction;
      AnyKinMeasureOrg &MetatarsoPhalangeal1DorsiFlexion = ...HumanModel.Interface.Right.MetatarsoPhalangeal1DorsiFlexion;
      AnyKinMeasureOrg &MetatarsoPhalangeal1Abduction = ...HumanModel.Interface.Right.MetatarsoPhalangeal1Abduction;
      AnyKinMeasureOrg &MetatarsoPhalangeal2DorsiFlexion = ...HumanModel.Interface.Right.MetatarsoPhalangeal2DorsiFlexion;
      AnyKinMeasureOrg &MetatarsoPhalangeal2Abduction = ...HumanModel.Interface.Right.MetatarsoPhalangeal2Abduction;
      AnyKinMeasureOrg &MetatarsoPhalangeal3DorsiFlexion = ...HumanModel.Interface.Right.MetatarsoPhalangeal3DorsiFlexion;
      AnyKinMeasureOrg &MetatarsoPhalangeal3Abduction = ...HumanModel.Interface.Right.MetatarsoPhalangeal3Abduction;
      AnyKinMeasureOrg &MetatarsoPhalangeal4DorsiFlexion = ...HumanModel.Interface.Right.MetatarsoPhalangeal4DorsiFlexion;
      AnyKinMeasureOrg &MetatarsoPhalangeal4Abduction = ...HumanModel.Interface.Right.MetatarsoPhalangeal4Abduction;
      AnyKinMeasureOrg &MetatarsoPhalangeal5DorsiFlexion = ...HumanModel.Interface.Right.MetatarsoPhalangeal5DorsiFlexion;
      AnyKinMeasureOrg &MetatarsoPhalangeal5Abduction = ...HumanModel.Interface.Right.MetatarsoPhalangeal5Abduction;
      AnyKinMeasureOrg &ProximoDistalPhalange1DorsiFlexion = ...HumanModel.Interface.Right.ProximoDistalPhalange1DorsiFlexion;
      AnyKinMeasureOrg &ProximoMedialPhalange2DorsiFlexion = ...HumanModel.Interface.Right.ProximoMedialPhalange2DorsiFlexion;
      AnyKinMeasureOrg &ProximoMedialPhalange3DorsiFlexion = ...HumanModel.Interface.Right.ProximoMedialPhalange3DorsiFlexion;
      AnyKinMeasureOrg &ProximoMedialPhalange4DorsiFlexion = ...HumanModel.Interface.Right.ProximoMedialPhalange4DorsiFlexion;
      AnyKinMeasureOrg &ProximoMedialPhalange5DorsiFlexion = ...HumanModel.Interface.Right.ProximoMedialPhalange5DorsiFlexion;
      AnyKinMeasureOrg &MedioDistalPhalange2DorsiFlexion = ...HumanModel.Interface.Right.MedioDistalPhalange2DorsiFlexion;
      AnyKinMeasureOrg &MedioDistalPhalange3DorsiFlexion = ...HumanModel.Interface.Right.MedioDistalPhalange3DorsiFlexion;
      AnyKinMeasureOrg &MedioDistalPhalange4DorsiFlexion = ...HumanModel.Interface.Right.MedioDistalPhalange4DorsiFlexion;
      AnyKinMeasureOrg &MedioDistalPhalange5DorsiFlexion = ...HumanModel.Interface.Right.MedioDistalPhalange5DorsiFlexion;

//      Reaction.Type={Off,Off,Off,Off,Off,Off,Off,Off,Off,Off,Off,Off,Off,Off,Off,Off,Off,Off,Off,Off,Off,Off,Off,Off,Off,Off,Off,Off,Off,Off,Off,Off,Off,Off};

      Reaction.Type={Off,Off,Off,Off,Off, //cuboid and navicular
                     Off,Off,Off,Off, //cuneiforms
                     Off,Off,Off,Off,Off,Off, //TarsoMeta
                     Off,Off,Off,Off,Off,Off,Off,Off,Off,Off, //MP joint
//                     Off,Off,Off,Off,Off,Off,Off,Off,Off}; //toe phalanges
                     Off,On,Off,Off,On,On,Off,Off,On}; //toe phalanges
    };

    #endif

  #endif


  #if LEFT_LEG == 1
  AnyKinEqInterPolDriver JntDriverLeftLeg =
  {
    FileErrorContinueOnOff = On;
    Type = Bspline;
    BsplineOrder = 4;
    FileName = "../Input/" + Main.ModelSetup.C3DFileData.NameOfFile+"-output-euler-leftleg.txt";
    AnyKinMeasureOrg &HipFlexion = ...HumanModel.Interface.Left.HipFlexion;
    AnyKinMeasureOrg &HipAbduction = ...HumanModel.Interface.Left.HipAbduction;
    AnyKinMeasureOrg &HipExternalRotation = ...HumanModel.Interface.Left.HipExternalRotation;
    AnyKinMeasureOrg &KneeFlexion = ...HumanModel.Interface.Left.KneeFlexion;
    AnyKinMeasureOrg &AnklePlantarFlexion = ...HumanModel.Interface.Left.AnklePlantarFlexion;
    AnyKinMeasureOrg &AnkleEversion = ...HumanModel.Interface.Left.AnkleEversion;
    Reaction.Type={Off,Off,Off,Off,Off,Off};
  };
  #endif


  #if RIGHT_LEG == 1
  AnyKinEqInterPolDriver JntDriverRightLeg =
  {
    FileErrorContinueOnOff = On;
    Type = Bspline;
    BsplineOrder = 4;
    FileName = "../Input/" + Main.ModelSetup.C3DFileData.NameOfFile+"-output-euler-rightleg.txt";
    AnyKinMeasureOrg &HipFlexion = ...HumanModel.Interface.Right.HipFlexion;
    AnyKinMeasureOrg &HipAbduction = ...HumanModel.Interface.Right.HipAbduction;
    AnyKinMeasureOrg &HipExternalRotation = ...HumanModel.Interface.Right.HipExternalRotation;
    AnyKinMeasureOrg &KneeFlexion = ...HumanModel.Interface.Right.KneeFlexion;
    AnyKinMeasureOrg &AnklePlantarFlexion = ...HumanModel.Interface.Right.AnklePlantarFlexion;
    AnyKinMeasureOrg &AnkleEversion = ...HumanModel.Interface.Right.AnkleEversion;
    Reaction.Type={Off,Off,Off,Off,Off,Off};
  };
  #endif


  #if LEFT_ARM == 1
  AnyKinEqSimpleDriver SCDriverLeft ={
    AnyKinMeasureOrg &ref1 =...HumanModel.Interface.Left.SternoClavicularProtraction;
    AnyKinMeasureOrg &ref2 =...HumanModel.Interface.Left.SternoClavicularElevation;
    AnyKinMeasureOrg &ref3 =...HumanModel.Interface.Left.SternoClavicularAxialRotation;
    DriverPos = pi/180*{
      .JntPos.Left.SternoClavicularProtraction,
      .JntPos.Left.SternoClavicularElevation,
      .JntPos.Left.SternoClavicularAxialRotation
    };
    DriverVel = pi/180*{
      .JntVel.Left.SternoClavicularProtraction,
      .JntVel.Left.SternoClavicularElevation,
      .JntVel.Left.SternoClavicularAxialRotation
    };
    Reaction.Type={Off,Off,Off};
  };

  AnyKinEqInterPolDriver JntDriverLeftArm =
  {
    FileErrorContinueOnOff = On;
    Type = Bspline;
    BsplineOrder = 4;
    FileName = "../Input/" + Main.ModelSetup.C3DFileData.NameOfFile+"-output-euler-leftarm.txt";
    AnyKinMeasureOrg &GlenohumeralFlexion = ...HumanModel.Interface.Left.GlenohumeralFlexion;
    AnyKinMeasureOrg &GlenohumeralExternalRotation = ...HumanModel.Interface.Left.GlenohumeralExternalRotation;
    AnyKinMeasureOrg &GlenohumeralAbduction = ...HumanModel.Interface.Left.GlenohumeralAbduction;
    AnyKinMeasureOrg &ElbowFlexion = ...HumanModel.Interface.Left.ElbowFlexion;
    AnyKinMeasureOrg &ElbowPronation = ...HumanModel.Interface.Left.ElbowPronation;
    AnyKinMeasureOrg &WristFlexion = ...HumanModel.Interface.Left.WristFlexion;
    AnyKinMeasureOrg &WristAbduction = ...HumanModel.Interface.Left.WristAbduction;
    Reaction.Type={Off,Off,Off,Off,Off,Off,Off};
  };
  #endif


  #if RIGHT_ARM == 1
  AnyKinEqSimpleDriver SCDriverRight ={
    AnyKinMeasureOrg &ref1 =...HumanModel.Interface.Right.SternoClavicularProtraction;
    AnyKinMeasureOrg &ref2 =...HumanModel.Interface.Right.SternoClavicularElevation;
    AnyKinMeasureOrg &ref3 =...HumanModel.Interface.Right.SternoClavicularAxialRotation;
    DriverPos = pi/180*{
      .JntPos.Right.SternoClavicularProtraction,
      .JntPos.Right.SternoClavicularElevation,
      .JntPos.Right.SternoClavicularAxialRotation
    };
    DriverVel = {
      .JntVel.Right.SternoClavicularProtraction,
      .JntVel.Right.SternoClavicularElevation,
      .JntVel.Right.SternoClavicularAxialRotation
    };
    Reaction.Type={Off,Off,Off};
  };

  AnyKinEqInterPolDriver JntDriverRightArm =
  {
    FileErrorContinueOnOff = On;
    Type = Bspline;
    BsplineOrder = 4;
    FileName = "../Input/" + Main.ModelSetup.C3DFileData.NameOfFile+"-output-euler-rightarm.txt";
    AnyKinMeasureOrg &GlenohumeralFlexion = ...HumanModel.Interface.Right.GlenohumeralFlexion;
    AnyKinMeasureOrg &GlenohumeralExternalRotation = ...HumanModel.Interface.Right.GlenohumeralExternalRotation;
    AnyKinMeasureOrg &GlenohumeralAbduction = ...HumanModel.Interface.Right.GlenohumeralAbduction;
    AnyKinMeasureOrg &ElbowFlexion = ...HumanModel.Interface.Right.ElbowFlexion;
    AnyKinMeasureOrg &ElbowPronation = ...HumanModel.Interface.Right.ElbowPronation;
    AnyKinMeasureOrg &WristFlexion = ...HumanModel.Interface.Right.WristFlexion;
    AnyKinMeasureOrg &WristAbduction = ...HumanModel.Interface.Right.WristAbduction;
    Reaction.Type={Off,Off,Off,Off,Off,Off,Off};
  };
  #endif


  #include "ToeContact.any"
};
