  //
  // This class creates a marker in each of the two models, additionally it creates marker drivers and design variables to opitmize marker location
  //
  //  CreateMarker MX (    //MX is the folder name for the marker all foldr names has to be different so usually use M1....MX
  //  MarkerName=XXX,      //This is the name of you marker it has to be the same name as in the C3D file
  //  MarkerPlacement =Right.Leg.Seg.Thigh,  //this is the segmnt
  //  OptX=On,OptY=Off,OptZ=On,  //this determines if the design variable is going to be optimized or left unchanged in paramter optimization studies
  //
  //
  //  Model1=MotionAndParameterOptimizationModel, Model2= InverseDynamicModel   //always leave this line unchanged
  //  ) = {
  //    sRelOpt ={-0.0717627324329,-0.1724679985805,0.0763244306406};   //coordinates of the marker unscaled
  //  };
  //
  // sRelOpt = {-0.04970743, -0.1556847, 0.08576939}
  //   {-0.07176273, -0.172468, 0.07632443}


    #if RAIC_Def == 1

  CreateMarkerTDFoot   RAIC (
  MarkerName=PrefixDef(RAIC),
  MarkerPlacement=Trunk.SegmentsLumbar.PelvisSeg,
  OptX="Off",OptY="Off",OptZ="Off",
  WeightX=1.0,WeightY=1.0,WeightZ=1.0,
  Model1=MotionAndParameterOptimizationModel, Model2= InverseDynamicModel
  ) = {
    sRelOpt =  {0.11, -0.05+0.02, 0.145};
  };

  #endif
  #if LAIC_Def == 1

  CreateMarkerTDFoot     LAIC (
  MarkerName=PrefixDef(LAIC) ,
  MarkerPlacement=Trunk.SegmentsLumbar.PelvisSeg,
  OptX="Off",OptY="Off",OptZ="Off",
  WeightX=1.0,WeightY=1.0,WeightZ=1.0,
  Model1=MotionAndParameterOptimizationModel, Model2= InverseDynamicModel
  ) = {
    sRelOpt =  {0.11, -0.05+0.02, -0.145};
  };

  #endif
  #if RPSI_Def == 1

  CreateMarkerTDFoot    RPSI (
  MarkerName=PrefixDef(RPSI),
  MarkerPlacement=Trunk.SegmentsLumbar.PelvisSeg,
  OptX="Off", OptY="Off", OptZ="On",
  WeightX=1.0,WeightY=1.0,WeightZ=1.0,
  Model1=MotionAndParameterOptimizationModel, Model2= InverseDynamicModel
  ) = {
    sRelOpt = {-0.06727544, -0.0, 0.045};
  };

  #endif
  #if LPSI_Def == 1

  CreateMarkerTDFoot  LPSI (
  MarkerName=PrefixDef(LPSI),
  MarkerPlacement=Trunk.SegmentsLumbar.PelvisSeg,
  OptX="Off", OptY="Off", OptZ="On",
  WeightX=1.0,WeightY=1.0,WeightZ=1.0,
  Model1=MotionAndParameterOptimizationModel, Model2= InverseDynamicModel
  ) = {
    sRelOpt ={-0.06727544, -0.0, -0.045};
  };

  #endif
  #if RGT_Def == 1

  CreateMarkerTDFoot  RGT (
  MarkerName=PrefixDef(RGT),
  MarkerPlacement =Right.Leg.Seg.Thigh,
  OptX="Off",OptY="Off",OptZ="Off",
  WeightX=1.0,WeightY=1.0,WeightZ=1.0,
  Model1=MotionAndParameterOptimizationModel, Model2= InverseDynamicModel
  )= {
    sRelOpt = {-0.0, -0.02, 0.08};
  };

  #endif
  #if THI1_Def == 1

  CreateMarkerTDFoot  THI1 (
  MarkerName=PrefixDef(THI1),
  MarkerPlacement =Right.Leg.Seg.Thigh,
  OptX="On",OptY="On",OptZ="On",
  WeightX=1.0,WeightY=1.0,WeightZ=1.0,
  Model1=MotionAndParameterOptimizationModel, Model2= InverseDynamicModel
  )= {
    sRelOpt = {0.00102465, -0.2569603, 0.1139464};
  };

  #endif
  #if THI2_Def == 1

  CreateMarkerTDFoot  THI2 (
  MarkerName=PrefixDef(THI2),
  MarkerPlacement =Right.Leg.Seg.Thigh,
  OptX="On",OptY="On",OptZ="On",
  WeightX=1.0,WeightY=1.0,WeightZ=1.0,
  Model1=MotionAndParameterOptimizationModel, Model2= InverseDynamicModel
  )= {
    sRelOpt = {0.00102465, -0.3369603, 0.1139464};
  };

  #endif
  #if LKNE_Def == 1

  CreateMarkerTDFoot  LKNE (
  MarkerName=PrefixDef(LKNE) ,
  MarkerPlacement=Right.Leg.Seg.Thigh,
  OptX="Off",OptY="Off",OptZ="Off",
  WeightX=1.0,WeightY=1.0,WeightZ=1.0,
  Model1=MotionAndParameterOptimizationModel, Model2= InverseDynamicModel
  ) = {
    sRelOpt ={0.031, -0.4015619, 0.05};
  };

  #endif
  #if HFIB_Def == 1

  CreateMarkerTDFoot  HFIB (
  MarkerName=PrefixDef(HFIB),
  MarkerPlacement=Right.Leg.Seg.Shank,
  OptX="Off",OptY="Off",OptZ="On",
  WeightX=1.0,WeightY=1.0,WeightZ=1.0,
  Model1=MotionAndParameterOptimizationModel, Model2= InverseDynamicModel
  ) = {
    sRelOpt = {0.01751226, 0.38, 0.05};
  };

  #endif
  #if TTUB_Def == 1

  CreateMarkerTDFoot  TTUB (
  MarkerName=PrefixDef(TTUB),
  MarkerPlacement=Right.Leg.Seg.Shank,
  OptX="On",OptY="On",OptZ="On",
  WeightX=1.0,WeightY=1.0,WeightZ=1.0,
  Model1=MotionAndParameterOptimizationModel, Model2= InverseDynamicModel
  ) = {
    sRelOpt = {0.06, 0.355, -0.02};
  };

  #endif
  #if SHN1_Def == 1

  CreateMarkerTDFoot  SHN1 (
  MarkerName=PrefixDef(SHN1),
  MarkerPlacement=Right.Leg.Seg.Shank,
  OptX="On",OptY="On",OptZ="On",
  WeightX=1.0,WeightY=1.0,WeightZ=1.0,
  Model1=MotionAndParameterOptimizationModel, Model2= InverseDynamicModel
  ) = {
    sRelOpt = {0.01751226, 0.1539194, 0.08};
  };

  #endif
  #if SHN2_Def == 1

  CreateMarkerTDFoot  SHN2 (
  MarkerName=PrefixDef(SHN2),
  MarkerPlacement=Right.Leg.Seg.Shank,
  OptX="On",OptY="On",OptZ="On",
  WeightX=1.0,WeightY=1.0,WeightZ=1.0,
  Model1=MotionAndParameterOptimizationModel, Model2= InverseDynamicModel
  ) = {
    sRelOpt = {0.01751226, 0.0539194, 0.08};
  };

  #endif
  #if LMAL_Def == 1

  CreateMarkerTDFoot  LMAL (
  MarkerName=PrefixDef(LMAL) ,
  MarkerPlacement=Right.Leg.Seg.Shank,
  OptX="Off",OptY="Off",OptZ="On",
  WeightX=1.0,WeightY=1.0,WeightZ=1.0,
  Model1=MotionAndParameterOptimizationModel, Model2= InverseDynamicModel
  ) = {
    sRelOpt = {-0.00071602, -0.004789666, 0.03542605};
  };

  #endif
  #if MMAL_Def == 1

  CreateMarkerTDFoot  MMAL (
  MarkerName=PrefixDef(MMAL) ,
  MarkerPlacement=Right.Leg.Seg.Shank,
  OptX="Off",OptY="Off",OptZ="On",
  WeightX=1.0,WeightY=1.0,WeightZ=1.0,
  Model1=MotionAndParameterOptimizationModel, Model2= InverseDynamicModel
  ) = {
    sRelOpt = {-0.00371602, 0.008789666, -0.045};
  };

  #endif
  #if ICAL_Def == 1

  CreateMarkerFoot ICAL (
  MarkerName=PrefixDef(ICAL) ,
  MarkerPlacement=Right.Leg.Seg.Calcaneus,
  OptX="Off",OptY="Off",OptZ="On",
  WeightX=1.0,WeightY=1.0,WeightZ=1.0,
  Model1=MotionAndParameterOptimizationModel, Model2= InverseDynamicModel
  ) = {
    sRelOpt = {0.015, 0.15, 0.0};
  };

  #endif
  #if SCAL_Def == 1

  CreateMarkerFoot SCAL (
  MarkerName=PrefixDef(SCAL) ,
  MarkerPlacement=Right.Leg.Seg.Calcaneus,
  OptX="On",OptY="On",OptZ="On",
  WeightX=1.0,WeightY=1.0,WeightZ=1.0,
  Model1=MotionAndParameterOptimizationModel, Model2= InverseDynamicModel
  ) = {
    sRelOpt = {0.035, 0.15, 0.0};
  };

  #endif
  #if LCAL_Def == 1

  CreateMarkerFoot LCAL (
  MarkerName=PrefixDef(LCAL) ,
  MarkerPlacement=Right.Leg.Seg.Calcaneus,
  OptX="On",OptY="On",OptZ="Off",
  WeightX=1.0,WeightY=1.0,WeightZ=1.0,
  Model1=MotionAndParameterOptimizationModel, Model2= InverseDynamicModel
  ) = {
    sRelOpt = {0.023, 0.06, 0.035};
  };

  #endif
  #if MCAL_Def == 1

  CreateMarkerFoot MCAL (
  MarkerName=PrefixDef(MCAL) ,
  MarkerPlacement=Right.Leg.Seg.Calcaneus,
  OptX="On",OptY="On",OptZ="Off",
  WeightX=1.0,WeightY=1.0,WeightZ=1.0,
  Model1=MotionAndParameterOptimizationModel, Model2= InverseDynamicModel
  ) = {
    sRelOpt = {0.035, 0.055, -0.035};
  };

  #endif
  #if NAV_Def == 1

  CreateMarkerFoot NAV (
  MarkerName=PrefixDef(NAV) ,
  MarkerPlacement=Right.Leg.Seg.Navicular,
  OptX="Off",OptY="Off",OptZ="Off",
  WeightX=1.0,WeightY=1.0,WeightZ=1.0,
  Model1=MotionAndParameterOptimizationModel, Model2= InverseDynamicModel
  ) = {
    sRelOpt = {0.029, 0.025, -0.030};
  };

  #endif
  //  For CUB, ICUN and LCUN: only drive on the normal direction to the bone
  //  (change ARel to point to bone center and use this axis)
  #if CUB_Def == 1

  CreateMarkerFoot CUB (
  MarkerName=PrefixDef(CUB) ,
  MarkerPlacement=Right.Leg.Seg.Cuboid,
  OptX="On",OptY="On",OptZ="On",
  WeightX=1.0,WeightY=1.0,WeightZ=1.0,
  Model1=MotionAndParameterOptimizationModel, Model2= InverseDynamicModel
  ) = {
    //sRelOpt = {0.026, 0.025, 0.024}; //expected location
    sRelOpt = {0.035, 0.023, 0.035};
  };

  #endif
  #if LCUN_Def == 1

  CreateMarkerFoot LCUN (
  MarkerName=PrefixDef(LCUN) ,
  MarkerPlacement=Right.Leg.Seg.LateralCuneiform,
  OptX="Off",OptY="On",OptZ="On",
  WeightX=1.0,WeightY=1.0,WeightZ=1.0,
  Model1=MotionAndParameterOptimizationModel, Model2= InverseDynamicModel
  ) = {
    //sRelOpt = {0.038, 0.004, 0.01}; //expected location
    sRelOpt = {0.041, 0.004, 0.024};
  };

  #endif
  #if ICUN_Def == 1

  CreateMarkerFoot ICUN (
  MarkerName=PrefixDef(ICUN) ,
  MarkerPlacement=Right.Leg.Seg.IntermediateCuneiform,
  OptX="Off",OptY="On",OptZ="On",
  WeightX=1.0,WeightY=1.0,WeightZ=1.0,
  Model1=MotionAndParameterOptimizationModel, Model2= InverseDynamicModel
  ) = {
    //sRelOpt = {0.042, 0.004, -0.002}; //expected location
    sRelOpt = {0.046, -0.014, 0.003};
  };

  #endif
  #if P1MT_Def == 1

  CreateMarkerFoot P1MT (
  MarkerName=PrefixDef(P1MT) ,
  MarkerPlacement=Right.Leg.Seg.Metatarsal1,
  OptX="Off",OptY="On",OptZ="Off",
  WeightX=1.0,WeightY=1.0,WeightZ=1.0,
  Model1=MotionAndParameterOptimizationModel, Model2= InverseDynamicModel
  ) = {
    sRelOpt = {0.022, 0.002, -0.03}*HumanModel.FootType.Right.MetaScale;
  };

  #endif
  #if C1MT_Def == 1

  CreateMarkerFoot C1MT (
  MarkerName=PrefixDef(C1MT) ,
  MarkerPlacement=Right.Leg.Seg.Metatarsal1,
  OptX="On",OptY="On",OptZ="On",
  WeightX=1.0,WeightY=1.0,WeightZ=1.0,
  Model1=MotionAndParameterOptimizationModel, Model2= InverseDynamicModel
  ) = {
    sRelOpt = {0.015, -0.03, -0.032}*HumanModel.FootType.Right.MetaScale;
  };

  #endif
  #if M1MT_Def == 1

  CreateMarkerFoot M1MT (
  MarkerName=PrefixDef(M1MT) ,
  MarkerPlacement=Right.Leg.Seg.Metatarsal1,
  OptX="Off",OptY="Off",OptZ="Off",
  WeightX=1.0,WeightY=1.0,WeightZ=1.0,
  Model1=MotionAndParameterOptimizationModel, Model2= InverseDynamicModel
  ) = {
    sRelOpt = {0.004, -0.066, -0.033}*HumanModel.FootType.Right.MetaScale;
  };

  #endif
  #if P5MT_Def == 1

  CreateMarkerFoot P5MT (
  MarkerName=PrefixDef(P5MT) ,
  MarkerPlacement=Right.Leg.Seg.Metatarsal5,
  OptX="Off",OptY="Off",OptZ="Off",
  WeightX=1.0,WeightY=1.0,WeightZ=1.0,
  Model1=MotionAndParameterOptimizationModel, Model2= InverseDynamicModel
  ) = {
    sRelOpt = {0.002, 0.018, 0.051};
  };

  #endif
  #if D5MT_Def == 1

  CreateMarkerFoot D5MT (
  MarkerName=PrefixDef(D5MT) ,
  MarkerPlacement=Right.Leg.Seg.Metatarsal5,
  OptX="Off",OptY="Off",OptZ="Off",
  WeightX=1.0,WeightY=1.0,WeightZ=1.0,
  Model1=MotionAndParameterOptimizationModel, Model2= InverseDynamicModel
  ) = {
    sRelOpt = {0.001, -0.036, 0.059};
  };

  #endif
  #if D4MT_Def == 1

  CreateMarkerFoot D4MT (
  MarkerName=PrefixDef(D4MT) ,
  MarkerPlacement=Right.Leg.Seg.Metatarsal4,
  OptX="Off",OptY="On",OptZ="On",
  WeightX=1.0,WeightY=1.0,WeightZ=0.2,
  Model1=MotionAndParameterOptimizationModel, Model2= InverseDynamicModel
  ) = {
    sRelOpt = {0.007, -0.052, 0.045};
  };


  #endif
  #if D3MT_Def == 1

  CreateMarkerFoot D3MT (
  MarkerName=PrefixDef(D3MT) ,
  MarkerPlacement=Right.Leg.Seg.Metatarsal3,
  OptX="Off",OptY="On",OptZ="On",
  WeightX=1.0,WeightY=1.0,WeightZ=0.2,
  Model1=MotionAndParameterOptimizationModel, Model2= InverseDynamicModel
  ) = {
    sRelOpt = {0.010, -0.061, 0.029};
  };


  #endif
  #if D2MT_Def == 1

  CreateMarkerFoot D2MT (
  MarkerName=PrefixDef(D2MT) ,
  MarkerPlacement=Right.Leg.Seg.Metatarsal2,
  OptX="Off",OptY="On",OptZ="On",
  WeightX=1.0,WeightY=1.0,WeightZ=0.2,
  Model1=MotionAndParameterOptimizationModel, Model2= InverseDynamicModel
  ) = {
    sRelOpt = {0.012, -0.069, 0.013};
  };

  #endif
  #if HLX1_Def == 1

  CreateMarkerFoot HLX1 (
  MarkerName=PrefixDef(HLX1) ,
  MarkerPlacement=Right.Leg.Seg.ProximalPhalange1,
  OptX="Off",OptY="Off",OptZ="Off",
  WeightX=1.0,WeightY=1.0,WeightZ=1.0,
  Model1=MotionAndParameterOptimizationModel, Model2= InverseDynamicModel
  ) = {
    sRelOpt = {0.015, -0.085, -0.015}*HumanModel.FootType.Right.MetaScale;
  };

  #endif
  #if HLX2_Def == 1

  CreateMarkerFoot HLX2 (
  MarkerName=PrefixDef(HLX2) ,
  MarkerPlacement=Right.Leg.Seg.ProximalPhalange1,
  OptX="On",OptY="On",OptZ="On",
  WeightX=1.0,WeightY=1.0,WeightZ=1.0,
  Model1=MotionAndParameterOptimizationModel, Model2= InverseDynamicModel
  ) = {
    sRelOpt = {0.02, -0.103, -0.007}*HumanModel.FootType.Right.ProxPhalScale;
  };

  #endif
  #if HLX3_Def == 1

  CreateMarkerFoot HLX3 (
  MarkerName=PrefixDef(HLX3) ,
  MarkerPlacement=Right.Leg.Seg.DistalPhalange1,
  OptX="Off",OptY="Off",OptZ="Off",
  WeightX=1.0,WeightY=1.0,WeightZ=1.0,
  Model1=MotionAndParameterOptimizationModel, Model2= InverseDynamicModel
  ) = {
    sRelOpt = {0.01, -0.12, 0.00}*HumanModel.FootType.Right.DistPhalScale;
  };

  #endif
  #if D2PP_Def == 1

  CreateMarkerFoot D2PP (
  MarkerName=PrefixDef(D2PP) ,
  MarkerPlacement=Right.Leg.Seg.ProximalPhalange2,
  OptX="Off",OptY="On",OptZ="On",
  WeightX=0.2,WeightY=0.2,WeightZ=0.2,
  Model1=MotionAndParameterOptimizationModel, Model2= InverseDynamicModel
  ) = {
    sRelOpt = {0.01, -0.095, 0.018};
  };

  #endif
  #if D3PP_Def == 1

  CreateMarkerFoot D3PP (
  MarkerName=PrefixDef(D3PP) ,
  MarkerPlacement=Right.Leg.Seg.ProximalPhalange3,
  OptX="Off",OptY="On",OptZ="On",
  WeightX=0.2,WeightY=0.2,WeightZ=0.2,
  Model1=MotionAndParameterOptimizationModel, Model2= InverseDynamicModel
  ) = {
    sRelOpt = {0.008, -0.089, 0.031};
  };

  #endif
  #if D4PP_Def == 1

  CreateMarkerFoot D4PP (
  MarkerName=PrefixDef(D4PP) ,
  MarkerPlacement=Right.Leg.Seg.ProximalPhalange4,
  OptX="Off",OptY="On",OptZ="On",
  WeightX=0.2,WeightY=0.2,WeightZ=0.2,
  Model1=MotionAndParameterOptimizationModel, Model2= InverseDynamicModel
  ) = {
    sRelOpt = {0.006, -0.077, 0.048};
  };

  #endif
  #if D5PP_Def == 1

  CreateMarkerFoot D5PP (
  MarkerName=PrefixDef(D5PP) ,
  MarkerPlacement=Right.Leg.Seg.ProximalPhalange5,
  OptX="Off",OptY="On",OptZ="On",
  WeightX=0.2,WeightY=0.2,WeightZ=0.2,
  Model1=MotionAndParameterOptimizationModel, Model2= InverseDynamicModel
  ) = {
    sRelOpt = {-0.002, -0.056, 0.065};
  };

  #endif
  #if D5DP_Def == 1

  CreateMarkerFoot D5DP (
  MarkerName=PrefixDef(D5DP) ,
  MarkerPlacement=Right.Leg.Seg.DistalPhalange5,
  OptX="Off",OptY="Off",OptZ="Off",
  WeightX=1.0,WeightY=1.0,WeightZ=1.0,
  Model1=MotionAndParameterOptimizationModel, Model2= InverseDynamicModel
  ) = {
    sRelOpt = {-0.012, -0.079, 0.064};
  };

  #endif
  #if D4DP_Def == 1

  CreateMarkerFoot D4DP (
  MarkerName=PrefixDef(D4DP) ,
  MarkerPlacement=Right.Leg.Seg.DistalPhalange4,
  OptX="Off",OptY="Off",OptZ="Off",
  WeightX=1.0,WeightY=1.0,WeightZ=1.0,
  Model1=MotionAndParameterOptimizationModel, Model2= InverseDynamicModel
  ) = {
    sRelOpt = {-0.009, -0.098, 0.051};
  };

  #endif
  #if D3DP_Def == 1

  CreateMarkerFoot D3DP (
  MarkerName=PrefixDef(D3DP) ,
  MarkerPlacement=Right.Leg.Seg.DistalPhalange3,
  OptX="Off",OptY="Off",OptZ="Off",
  WeightX=1.0,WeightY=1.0,WeightZ=1.0,
  Model1=MotionAndParameterOptimizationModel, Model2= InverseDynamicModel
  ) = {
    sRelOpt = {-0.002, -0.112, 0.04};
  };


  #endif
  #if D3DP_Def == 1

  CreateMarkerFoot D2DP (
  MarkerName=PrefixDef(D2DP) ,
  MarkerPlacement=Right.Leg.Seg.DistalPhalange2,
  OptX="Off",OptY="Off",OptZ="Off",
  WeightX=1.0,WeightY=1.0,WeightZ=1.0,
  Model1=MotionAndParameterOptimizationModel, Model2= InverseDynamicModel
  ) = {
    sRelOpt = {0.002, -0.119, 0.022};
  };

  #endif
