  AnyIntVar FirstFrame = C3DFileData.Header.FirstFrameNo;
  AnyIntVar LastFrame = C3DFileData.Header.LastFrameNo;
  AnyIntVar nStep =(LastFrame-FirstFrame);

  AnyFloatVar  tStart = Main.TrialSpecificData.tStart;
  AnyFloatVar   tEnd = Main.TrialSpecificData.tEnd;
