  // ************************************
  // Drivers for the spine
  // ************************************

  //Neck driver
  AnyKinEqSimpleDriver NeckJntDriver = {
    AnyRevoluteJoint &T12L1Joint = ..HumanModel.Interface.Trunk.NeckJoint;
    DriverPos = pi/180*{.JntPos.NeckExtension};
    DriverVel = pi/180*{.JntVel.NeckExtension};
    Reaction.Type = {Off};
  };

  //Thorax pelvis rotation driver
  AnyKinEqSimpleDriver PostureDriver ={
    //AnyKinMeasureOrg &Ref2 = ..HumanModel.Interface.Trunk.PelvisThoraxLateralBending;
    AnyKinMeasureOrg &Ref3 = ..HumanModel.Interface.Trunk.PelvisThoraxRotation;
    //AnyKinMeasureOrg &Ref1 = ..HumanModel.Interface.Trunk.PelvisThoraxExtension;

    DriverPos = pi/180*{
      //.JntPos.PelvisThoraxLateralBending,
      .JntPos.PelvisThoraxRotation
      //.JntPos.PelvisThoraxExtension
    };
    DriverVel = pi/180*{
      //.JntVel.PelvisThoraxLateralBending,
      .JntVel.PelvisThoraxRotation
      //.JntVel.PelvisThoraxExtension
    };
    Reaction.Type = {Off};
  };


  AnyKinEqSimpleDriver LateralBendDriver ={
    AnyKinLinear lin ={
      AnySeg &ref1=  ...HumanModel.Trunk.SegmentsLumbar.PelvisSeg;
      AnySeg &ref2=  ...HumanModel.Trunk.SegmentsThorax.SkullSeg;
    };
    DriverPos={0,0};
    DriverVel={0,0};
    MeasureOrganizer={0,1};
    Reaction.Type = {Off,Off};
  };
