AnyFixedRefFrame GlobalRef ={};

AnyKinMeasureOrg Dof ={
  AnyKinLinear lin ={
    AnyFixedRefFrame &ref1=..GlobalRef;
    AnySeg  &seg =..Seg;
  };

  AnyKinRotational rot ={
    AnyFixedRefFrame &ref1=..GlobalRef;
    AnySeg  &seg =..Seg;
    Type=RotAxesAngles;
  };
};


AnyKinMeasureOrg lin_x={AnyKinMeasureOrg &ref=.Dof;MeasureOrganizer={0};};
AnyKinMeasureOrg lin_y={AnyKinMeasureOrg &ref=.Dof;MeasureOrganizer={1};};
AnyKinMeasureOrg lin_z={AnyKinMeasureOrg &ref=.Dof;MeasureOrganizer={2};};
AnyKinMeasureOrg rot_z={AnyKinMeasureOrg &ref=.Dof;MeasureOrganizer={0};};
AnyKinMeasureOrg rot_y={AnyKinMeasureOrg &ref=.Dof;MeasureOrganizer={1};};
AnyKinMeasureOrg rot_x={AnyKinMeasureOrg &ref=.Dof;MeasureOrganizer={2};};


AnyMuscleModel MusMdl_lin ={F0=..LinStrength;};
AnyMuscleModel MusMdl_rot ={F0=..RotStrength;};


AnyGeneralMuscle Neg_lin_x={    AnyKinMeasureOrg &dof = .lin_x; AnyMuscleModel &ref=.MusMdl_lin;   ForceDirection =-1;  };
AnyGeneralMuscle Pos_lin_x={    AnyKinMeasureOrg &dof = .lin_x; AnyMuscleModel &ref=.MusMdl_lin;   ForceDirection =1;  };
AnyGeneralMuscle Neg_lin_y={    AnyKinMeasureOrg &dof = .lin_y; AnyMuscleModel &ref=.MusMdl_lin;   ForceDirection =-1;  };
AnyGeneralMuscle Pos_lin_y={    AnyKinMeasureOrg &dof = .lin_y; AnyMuscleModel &ref=.MusMdl_lin;   ForceDirection =1;  };
AnyGeneralMuscle Neg_lin_z={    AnyKinMeasureOrg &dof = .lin_z; AnyMuscleModel &ref=.MusMdl_lin;   ForceDirection =-1;  };
AnyGeneralMuscle Pos_lin_z={    AnyKinMeasureOrg &dof = .lin_z; AnyMuscleModel &ref=.MusMdl_lin;   ForceDirection =1;  };

AnyGeneralMuscle Neg_rot_x={    AnyKinMeasureOrg &dof = .rot_x; AnyMuscleModel &ref=.MusMdl_rot;   ForceDirection =-1;  };
AnyGeneralMuscle Pos_rot_x={    AnyKinMeasureOrg &dof = .rot_x; AnyMuscleModel &ref=.MusMdl_rot;   ForceDirection =1;  };
AnyGeneralMuscle Neg_rot_y={    AnyKinMeasureOrg &dof = .rot_y; AnyMuscleModel &ref=.MusMdl_rot;   ForceDirection =-1;  };
AnyGeneralMuscle Pos_rot_y={    AnyKinMeasureOrg &dof = .rot_y; AnyMuscleModel &ref=.MusMdl_rot;   ForceDirection =1;  };
AnyGeneralMuscle Neg_rot_z={    AnyKinMeasureOrg &dof = .rot_z; AnyMuscleModel &ref=.MusMdl_rot;   ForceDirection =-1;  };
AnyGeneralMuscle Pos_rot_z={    AnyKinMeasureOrg &dof = .rot_z; AnyMuscleModel &ref=.MusMdl_rot;   ForceDirection =1;  };
