  Main.DrawSettings.Muscle.Visible = Off;
  Main.HumanModel.BodyModel.Trunk.SegmentsLumbar.PelvisSeg.DrwPelvis.Visible = Off;
  Main.HumanModel.BodyModel.Trunk.SegmentsThorax.ThoraxSeg.DrwSurf.Visible = Off;
  Main.HumanModel.BodyModel.Trunk.SegmentsLumbar.PelvisSeg.DrwSacrum.Visible = Off;
  Main.HumanModel.BodyModel.Trunk.SegmentsCervicalSpine.SkullSeg.DrwSurf.Visible = Off;
  Main.HumanModel.BodyModel.Trunk.SegmentsLumbar.L5Seg.DrwSTL.Visible = Off;
  Main.HumanModel.BodyModel.Trunk.SegmentsLumbar.L4Seg.DrwSTL.Visible = Off;
  Main.HumanModel.BodyModel.Trunk.SegmentsLumbar.L3Seg.DrwSTL.Visible = Off;
  Main.HumanModel.BodyModel.Trunk.SegmentsLumbar.L2Seg.DrwSTL.Visible = Off;
  Main.HumanModel.BodyModel.Trunk.SegmentsLumbar.L1Seg.DrwSTL.Visible = Off;
  Main.HumanModel.BodyModel.Trunk.SegmentsCervicalSpine.C7Seg.DrwSTL.Visible = Off;
  Main.HumanModel.BodyModel.Trunk.SegmentsCervicalSpine.C6Seg.DrwSTL.Visible = Off;
  Main.HumanModel.BodyModel.Trunk.SegmentsCervicalSpine.C5Seg.DrwSTL.Visible = Off;
  Main.HumanModel.BodyModel.Trunk.SegmentsCervicalSpine.C4Seg.DrwSTL.Visible = Off;
  Main.HumanModel.BodyModel.Trunk.SegmentsCervicalSpine.C3Seg.DrwSTL.Visible = Off;
  Main.HumanModel.BodyModel.Trunk.SegmentsCervicalSpine.C2Seg.DrwSTL.Visible = Off;
  Main.HumanModel.BodyModel.Trunk.SegmentsCervicalSpine.C1Seg.DrwSTL.Visible = Off;


//  Main.HumanModel.BodyModel.Right.Leg.Seg.Thigh.Drw3.Visible = Off;
  Main.HumanModel.BodyModel.Right.Leg.Seg.STL.FilenameThigh = "ThighCut";


  Main.HumanModel.BodyModel.Right.Leg.Seg.Thigh.Drw3.Opacity = 0.2;
  Main.HumanModel.BodyModel.Right.Leg.Seg.Patella.DrwSurf.Opacity = 0.2;


  Main.HumanModel.BodyModel.Right.Leg.Seg.Shank.KneeJoint = {
       AnyDrawLine drwAxis = {
        Visible ??=On;
        p0 = ..Sign*{0,0,-0.055};
        p1 = ..Sign*{0,0, 0.055};
        GlobalCoord = Off;
        Line.Thickness = 0.002;
     };
   };
    Main.HumanModel.BodyModel.Right.Leg.Seg.Thigh.KneeJoint = {
     AnyDrawLine drwAxis = {
        Visible ??=Off;
        p0 = ..Sign*{0,0,-0.035};
        p1 = ..Sign*{0,0, 0.085};
        GlobalCoord = Off;
        Line.Thickness = 0.002;
        Line.RGB={0.8,0,0};
     };
   };

  Main.HumanModel.BodyModel.Right.Leg.Seg.Thigh.PatellaFemurJoint.DrwRef.Visible= Off;

  Main.HumanModel.BodyModel.Right.Leg.Seg.Thigh.KneeJoint.DrwRef.Visible = Off;

  Main.HumanModel.BodyModel.Right.Leg.Seg.Shank.KneeJoint.DrwRef.Visible = Off;

  Main.HumanModel.BodyModel.Right.Leg.Seg.Thigh.KneeJoint = {
    AnyDrawNode drwn = {ScaleXYZ = 0.002*{1,1,1}; RGB={0.8,0,0}; };
  };
    Main.HumanModel.BodyModel.Right.Leg.Seg.Shank.KneeJoint = {
    AnyDrawNode drwn = {ScaleXYZ = 0.002*{1,1,1};RGB={0.0,0,0.9};};
  };
