    refThigh = {
      AnyRefNode MedialLigAttach1 = {
        sRel = .Scale({7.6,-39.6,-3.2})*0.01+.Scale({-0.003,0.0,-0.003});

      };

      AnyRefNode MedialLigAttach2 = {
        sRel = .MedialLigAttach1.sRel+.Scale({0.003,0.0,0.003});
      };

      AnyRefNode MedialLigAttach3 = {
        sRel = .MedialLigAttach1.sRel+.Scale({-0.003,0.0,-0.003});
      };


      AnyRefNode PCLAttach = {
        sRel = .Scale({5.7,-40.5,0.4})*0.01;
      };

      AnyRefNode ACLAttach = {
        sRel = .Scale({3.7,-38.4,1.0})*0.01;
  };

      AnyRefNode ObliquePoplitealAttach = {
        sRel = .Scale({3.3,-37.9,3.0})*0.01;
      };


      AnyRefNode LateralLigAttach1 = {
        sRel = .Scale({3.0,-40.3,5.0})*0.01+.Scale({-0.005,0.023,-0.011});
      };

      AnyRefNode LateralLigAttach2 = {
        sRel = .LateralLigAttach1.sRel+.Scale({0.002,0.0,0.002});
      };
      AnyRefNode LateralLigAttach3 = {
        sRel = .LateralLigAttach1.sRel+.Scale({-0.002,0.0,-0.002});
      };

    };

    refShank = {
      AnyRefNode MedialLigAttach1 = {
        sRel = .Scale({7.5,-48.4,0.1})*0.01;
      };

      AnyRefNode MedialLigAttach2 = {
        sRel = .MedialLigAttach1.sRel+.Scale({0.003,0.0,0.003});
      };

      AnyRefNode MedialLigAttach3 = {
        sRel = .MedialLigAttach1.sRel+.Scale({-0.003,0.0,-0.003});
      };

      AnyRefNode MedialLigAttachVia1 = {
        sRel = .Scale({8.0,-43.6,-3.0})*0.01;
      };

      AnyRefNode MedialLigAttachVia2 = {
        sRel = .MedialLigAttachVia1.sRel+.Scale({0.003,0.0,0.003});
      };

      AnyRefNode MedialLigAttachVia3 = {
        sRel = .MedialLigAttachVia1.sRel+.Scale({-0.003,0.0,-0.003});
      };

      AnyRefNode MedialLigCylNode = {
        sRel = .Scale({0.5,-43.6,-4.0})*0.01;
        ARel=RotMat(60*pi/180,y);

        AnySurfCylinder Cyl =
        {
          Radius = 0.016;
          Length = 0.10;
        };
      };

      AnyRefNode LateralLigCylNode = {
        sRel = .Scale({-1.7,-42.8,0.7})*0.01;
        ARel=RotMat(60*pi/180,y);

        AnySurfCylinder Cyl =
        {
          Radius = 0.016;
          Length = 0.10;
        };
      };

      AnyRefNode PCLAttach = {
        sRel = .Scale({3.5,-42.8,0.6})*0.01;
      };

      AnyRefNode ACLAttach = {
        sRel = .Scale({6.5,-41.5,1.9})*0.01;
      };

      AnyRefNode ObliquePoplitealAttach = {
        sRel = .Scale({3.5,-44.0,-2.3})*0.01;
      };


      AnyRefNode LateralLigAttach1 = {
        sRel = .Scale({2.7,-45.4,6.3})*0.01+.Scale({-0.005,0.01,-0.004});
      };

      AnyRefNode LateralLigAttach2 = {
        sRel = .LateralLigAttach1.sRel+.Scale({0.001,0.0,0.001});
      };

      AnyRefNode LateralLigAttach3 = {
        sRel = .LateralLigAttach1.sRel+.Scale({-0.001,0.0,-0.001});
      };

    };


    AnyKinPLine MedialLigPLine1 = {
      AnyRefFrame &ref1 = .refThigh.MedialLigAttach1;
      AnyRefFrame &ref3 = .refShank.MedialLigAttach1;
      AnyDrawPLine ArtLigPLine =
      {
        Thickness = 0.001;
        RGB = ..RGB;
      };

    };

    AnyKinPLine MedialLigPLine2 = {
      AnyRefFrame &ref1 = .refThigh.MedialLigAttach2;
      AnyRefFrame &ref3 = .refShank.MedialLigAttach2;

      AnyDrawPLine ArtLigPLine =
      {
        Thickness = 0.001;
        RGB = ..RGB;
      };
    };

    AnyKinPLine MedialLigPLine3 = {
      AnyRefFrame &ref1 = .refThigh.MedialLigAttach3;
      AnyRefFrame &ref3 = .refShank.MedialLigAttach3;

      AnyDrawPLine ArtLigPLine =
      {
        Thickness = 0.001;
        RGB = ..RGB;
      };
    };


    AnyKinPLine PCLPLine = {
      AnyRefFrame &ref1 = .refThigh.PCLAttach;
      AnyRefFrame &ref3 = .refShank.PCLAttach;
      AnyDrawPLine ArtLigPLine =
      {
        Thickness = 0.001;
        RGB = ..RGB;
      };
    };

    AnyKinPLine ACLPLine = {
      AnyRefFrame &ref1 = .refThigh.ACLAttach;
      AnyRefFrame &ref3 = .refShank.ACLAttach;
      AnyDrawPLine ArtLigPLine =
      {
        Thickness = 0.001;
        RGB = ..RGB;
      };
    };


    AnyKinPLine ObliquePoplitealPLine = {
      AnyRefFrame &ref1 = .refThigh.ObliquePoplitealAttach;
      AnyRefFrame &ref3 = .refShank.ObliquePoplitealAttach;
      AnyDrawPLine ArtLigPLine =
      {
        Thickness = 0.001;
        RGB = ..RGB;
      };
    };


    AnyKinPLine LateralLigPLine1 = {
      AnyRefFrame &ref1 = .refThigh.LateralLigAttach1;
      AnyRefFrame &ref2 = .refShank.LateralLigAttach1;
      AnyDrawPLine ArtLigPLine =
      {
        Thickness = 0.001;
        RGB = ..RGB;
      };
    };


    AnyKinPLine LateralLigPLine2 = {
      AnyRefFrame &ref1 = .refThigh.LateralLigAttach2;
      AnyRefFrame &ref2 = .refShank.LateralLigAttach2;

      AnyDrawPLine ArtLigPLine =
      {
        Thickness = 0.001;
        RGB = ..RGB;
      };
    };

    AnyKinPLine LateralLigPLine3 = {
      AnyRefFrame &ref1 = .refThigh.LateralLigAttach3;
      AnyRefFrame &ref2 = .refShank.LateralLigAttach3;
      AnyDrawPLine ArtLigPLine =
      {
        Thickness = 0.001;
        RGB = ..RGB;
      };
    };
