// Switch to define knee implant
#ifndef USE_FDK
#define USE_FDK 1
#endif

/** Modelling parameters for the knee implant and contact model */
AnyFolder Parameters={

     AnyVar ContactStiffnessTibiaFemur = 463e6*8; // N / m^3
    AnyVar ContactStiffnessPatellaFemur = 463e6*8*10; // N / m^3

    AnyInt MeshRefinementMaster = 0;
    AnyInt MeshRefinementSlave = 0;
    AnySwitch SingleSidedContact = Off;

    AnyVar MeniscusStiffnessAP = 0;
    AnyVar MeniscusStiffnessML = 0;

    AnyVar Duration= 18.75;//21.65; //s
    AnyInt TimeSteps= 130;//150;


    AnyVar ACLSlackStrain =-0.0;
    AnyVar PCLSlackStrain =-0.15;

    AnyVector  KneeForceDepDriverPos =     {    1.2985e-3,-3.4225e-3,-5.1812e-4,-6.3627e-2,-1.2035e-2};
    AnyVector PatellaForceDepDriverPos =   {-7.46e-3};

  };
