Main.HumanModel.BodyModel.Right.Leg.Jnt = {

AnyFolder PatellaContactForces ={

  AnyFolder SurfaceForce =
  {


    AnyRefFrame &segMaster = ...Seg.Thigh;
    AnyRefFrame &segSlave = ...Seg.Patella;


    AnyForceSurfaceContact FContactThighPatella =
    {
      AnySurface &sMaster = .segMaster.KneeContactSurfacePatella ;
      AnySurface &sSlave = .segSlave.KneeContactSurfacePatella ;

      PressureModule = Main.Parameters.ContactStiffnessPatellaFemur;

      ForceViewOnOff = On;
      MeshRefinementMaster = Main.Parameters.MeshRefinementMaster;
      MeshRefinementSlave = Main.Parameters.MeshRefinementSlave;

      SingleSidedOnOff= Main.Parameters.SingleSidedContact;

    };


  };

  // artifical ligament

  AnyFolder &refThigh = ..Seg.Thigh;
  AnyFolder &refPatella = ..Seg.Patella;

  refThigh = {
    AnyRefNode ArtLigAttach1 = {
      sRel = .Scale({0.08,-0.33,0.03});
    };

    AnyRefNode ArtLigAttach2 = {
      sRel = .Scale({0.087,-0.39,-0.025});

    };

    AnyRefNode ArtLigAttach3 = {
      sRel = .Scale({0.03,-0.39,0.06});

    };

  };


  refPatella = {
    AnyRefNode ArtLigAttach2 = {
      sRel = .Scale({0.105,-0.38,0.02});
    };

    AnyRefNode ArtLigAttach3 = {
      sRel = .Scale({0.09,-0.38,0.055});
    };

  };


  AnyKinPLine ArtLigPLine2 = {
    AnyRefFrame &ref1 = .refThigh.ArtLigAttach2;
    AnyRefFrame &ref2 = .refPatella.ArtLigAttach2;
    AnyDrawPLine ArtLigPLine =
    {
      Thickness = 0.001;
      RGB = Main.DrawSettings.Ligament.RGB;
    };

  };


  AnyKinPLine ArtLigPLine3 = {
    AnyRefFrame &ref1 = .refThigh.ArtLigAttach3;
    AnyRefFrame &ref2 = .refPatella.ArtLigAttach3;
    AnyDrawPLine ArtLigPLine =
    {
      Thickness = 0.001;
      RGB = Main.DrawSettings.Ligament.RGB;
    };

  };


 AnyForce ArtificalLigament2 = {
   AnyVar k=1000;

    AnyVar l0=0.0;

   AnyKinMeasure &meas  =.ArtLigPLine2;

  #include "LigamentModelPoly2.any"
   F = Val;
 };

 AnyForce ArtificalLigament3 = {
   AnyVar k=1000;

    AnyVar l0=0.0;


   AnyKinMeasure &meas  =.ArtLigPLine3;

   #include "LigamentModelPoly2.any"
   F = Val;
 };


};

};
