AnyFolder FMM = {

  /* Definition of ForceMomentMeasures for all forces applied to the
  femur segment.
  */

  AnyForceMomentMeasure fmm_Femur_mus_extensor_digitorum_longus_1Node0 = {
    AnyForceBase &f =  Main.RatModel.Muscles.mus_extensor_digitorum_longus_1 ;
    AnyRefFrame &r = Main.RatModel.Seg.Femur.Femur_mus_extensor_digitorum_longus_1Node0;
    #include "CutForceDefs.any"
  };
  AnyForceMomentMeasure fmm_Femur_mus_extensor_digitorum_longus_2Node0 = {
    AnyForceBase &f =  Main.RatModel.Muscles.mus_extensor_digitorum_longus_2 ;
    AnyRefFrame &r = Main.RatModel.Seg.Femur.Femur_mus_extensor_digitorum_longus_2Node0;
    #include "CutForceDefs.any"
  };
  AnyForceMomentMeasure fmm_Femur_mus_extensor_digitorum_longus_3Node0 = {
    AnyForceBase &f =  Main.RatModel.Muscles.mus_extensor_digitorum_longus_3 ;
    AnyRefFrame &r = Main.RatModel.Seg.Femur.Femur_mus_extensor_digitorum_longus_3Node0;
    #include "CutForceDefs.any"
  };
  AnyForceMomentMeasure fmm_Femur_mus_extensor_digitorum_longus_4Node0 = {
    AnyForceBase &f =  Main.RatModel.Muscles.mus_extensor_digitorum_longus_4 ;
    AnyRefFrame &r = Main.RatModel.Seg.Femur.Femur_mus_extensor_digitorum_longus_4Node0;
    #include "CutForceDefs.any"
  };
  AnyForceMomentMeasure fmm_Femur_mus_popliteus_1Node0 = {
    AnyForceBase &f =  Main.RatModel.Muscles.mus_popliteus_1 ;
    AnyRefFrame &r = Main.RatModel.Seg.Femur.Femur_mus_popliteus_1Node0;
    #include "CutForceDefs.any"
  };
  AnyForceMomentMeasure fmm_Femur_mus_popliteus_1Node1 = {
    AnyForceBase &f =  Main.RatModel.Muscles.mus_popliteus_1 ;
    AnyRefFrame &r = Main.RatModel.Seg.Femur.Femur_mus_popliteus_1Node1;
    #include "CutForceDefs.any"
  };
  AnyForceMomentMeasure fmm_Femur_mus_popliteus_2Node0 = {
    AnyForceBase &f =  Main.RatModel.Muscles.mus_popliteus_2 ;
    AnyRefFrame &r = Main.RatModel.Seg.Femur.Femur_mus_popliteus_2Node0;
    #include "CutForceDefs.any"
  };
  AnyForceMomentMeasure fmm_Femur_mus_popliteus_2Node1 = {
    AnyForceBase &f =  Main.RatModel.Muscles.mus_popliteus_2 ;
    AnyRefFrame &r = Main.RatModel.Seg.Femur.Femur_mus_popliteus_2Node1;
    #include "CutForceDefs.any"
  };
  AnyForceMomentMeasure fmm_Femur_mus_tibialis_anteriorNode0 = {
    AnyForceBase &f =  Main.RatModel.Muscles.mus_tibialis_anterior ;
    AnyRefFrame &r = Main.RatModel.Seg.Femur.Femur_mus_tibialis_anteriorNode0;
    #include "CutForceDefs.any"
  };
  AnyForceMomentMeasure fmm_Femur_mus_gastrocnemius_soleus_1Node0 = {
    AnyForceBase &f =  Main.RatModel.Muscles.mus_gastrocnemius_soleus_1 ;
    AnyRefFrame &r = Main.RatModel.Seg.Femur.Femur_mus_gastrocnemius_soleus_1Node0;
    #include "CutForceDefs.any"
  };
  AnyForceMomentMeasure fmm_Femur_mus_gastrocnemius_soleus_2Node0 = {
    AnyForceBase &f =  Main.RatModel.Muscles.mus_gastrocnemius_soleus_2 ;
    AnyRefFrame &r = Main.RatModel.Seg.Femur.Femur_mus_gastrocnemius_soleus_2Node0;
    #include "CutForceDefs.any"
  };
  AnyForceMomentMeasure fmm_Femur_mus_tensor_fasciae_latae_1Node3 = {
    AnyForceBase &f =  Main.RatModel.Muscles.mus_tensor_fasciae_latae_1 ;
    AnyRefFrame &r = Main.RatModel.Seg.Femur.Femur_mus_tensor_fasciae_latae_1Node3;
    #include "CutForceDefs.any"
  };
  AnyForceMomentMeasure fmm_Femur_mus_tensor_fasciae_latae_1Node4 = {
    AnyForceBase &f =  Main.RatModel.Muscles.mus_tensor_fasciae_latae_1 ;
    AnyRefFrame &r = Main.RatModel.Seg.Femur.Femur_mus_tensor_fasciae_latae_1Node4;
    #include "CutForceDefs.any"
  };
  AnyForceMomentMeasure fmm_Femur_mus_tensor_fasciae_latae_1Node5 = {
    AnyForceBase &f =  Main.RatModel.Muscles.mus_tensor_fasciae_latae_1 ;
    AnyRefFrame &r = Main.RatModel.Seg.Femur.Femur_mus_tensor_fasciae_latae_1Node5;
    #include "CutForceDefs.any"
  };
  AnyForceMomentMeasure fmm_Femur_mus_tensor_fasciae_latae_2Node3 = {
    AnyForceBase &f =  Main.RatModel.Muscles.mus_tensor_fasciae_latae_2 ;
    AnyRefFrame &r = Main.RatModel.Seg.Femur.Femur_mus_tensor_fasciae_latae_2Node3;
    #include "CutForceDefs.any"
  };
  AnyForceMomentMeasure fmm_Femur_mus_tensor_fasciae_latae_2Node4 = {
    AnyForceBase &f =  Main.RatModel.Muscles.mus_tensor_fasciae_latae_2 ;
    AnyRefFrame &r = Main.RatModel.Seg.Femur.Femur_mus_tensor_fasciae_latae_2Node4;
    #include "CutForceDefs.any"
  };
  AnyForceMomentMeasure fmm_Femur_mus_tensor_fasciae_latae_2Node5 = {
    AnyForceBase &f =  Main.RatModel.Muscles.mus_tensor_fasciae_latae_2 ;
    AnyRefFrame &r = Main.RatModel.Seg.Femur.Femur_mus_tensor_fasciae_latae_2Node5;
    #include "CutForceDefs.any"
  };
  AnyForceMomentMeasure fmm_Femur_mus_fasciae_latae_3Node3 = {
    AnyForceBase &f =  Main.RatModel.Muscles.mus_fasciae_latae_3 ;
    AnyRefFrame &r = Main.RatModel.Seg.Femur.Femur_mus_fasciae_latae_3Node3;
    #include "CutForceDefs.any"
  };
  AnyForceMomentMeasure fmm_Femur_mus_fasciae_latae_3Node4 = {
    AnyForceBase &f =  Main.RatModel.Muscles.mus_fasciae_latae_3 ;
    AnyRefFrame &r = Main.RatModel.Seg.Femur.Femur_mus_fasciae_latae_3Node4;
    #include "CutForceDefs.any"
  };
  AnyForceMomentMeasure fmm_Femur_mus_fasciae_latae_3Node5 = {
    AnyForceBase &f =  Main.RatModel.Muscles.mus_fasciae_latae_3 ;
    AnyRefFrame &r = Main.RatModel.Seg.Femur.Femur_mus_fasciae_latae_3Node5;
    #include "CutForceDefs.any"
  };
  AnyForceMomentMeasure fmm_Femur_mus_semitendinosusNode1 = {
    AnyForceBase &f =  Main.RatModel.Muscles.mus_semitendinosus ;
    AnyRefFrame &r = Main.RatModel.Seg.Femur.Femur_mus_semitendinosusNode1;
    #include "CutForceDefs.any"
  };
  AnyForceMomentMeasure fmm_Femur_mus_semimembranosusNode1 = {
    AnyForceBase &f =  Main.RatModel.Muscles.mus_semimembranosus ;
    AnyRefFrame &r = Main.RatModel.Seg.Femur.Femur_mus_semimembranosusNode1;
    #include "CutForceDefs.any"
  };
  AnyForceMomentMeasure fmm_Femur_mus_semimembranosusNode2 = {
    AnyForceBase &f =  Main.RatModel.Muscles.mus_semimembranosus ;
    AnyRefFrame &r = Main.RatModel.Seg.Femur.Femur_mus_semimembranosusNode2;
    #include "CutForceDefs.any"
  };
  AnyForceMomentMeasure fmm_Femur_mus_quadratus_femorisNode2 = {
    AnyForceBase &f =  Main.RatModel.Muscles.mus_quadratus_femoris ;
    AnyRefFrame &r = Main.RatModel.Seg.Femur.Femur_mus_quadratus_femorisNode2;
    #include "CutForceDefs.any"
  };
  AnyForceMomentMeasure fmm_Femur_mus_psoas_minor_1Node1 = {
    AnyForceBase &f =  Main.RatModel.Muscles.mus_psoas_minor_1 ;
    AnyRefFrame &r = Main.RatModel.Seg.Femur.Femur_mus_psoas_minor_1Node1;
    #include "CutForceDefs.any"
  };
  AnyForceMomentMeasure fmm_Femur_mus_psoas_minor_1Node2 = {
    AnyForceBase &f =  Main.RatModel.Muscles.mus_psoas_minor_1 ;
    AnyRefFrame &r = Main.RatModel.Seg.Femur.Femur_mus_psoas_minor_1Node2;
    #include "CutForceDefs.any"
  };
  AnyForceMomentMeasure fmm_Femur_mus_psoas_minor_2Node1 = {
    AnyForceBase &f =  Main.RatModel.Muscles.mus_psoas_minor_2 ;
    AnyRefFrame &r = Main.RatModel.Seg.Femur.Femur_mus_psoas_minor_2Node1;
    #include "CutForceDefs.any"
  };
  AnyForceMomentMeasure fmm_Femur_mus_psoas_minor_2Node2 = {
    AnyForceBase &f =  Main.RatModel.Muscles.mus_psoas_minor_2 ;
    AnyRefFrame &r = Main.RatModel.Seg.Femur.Femur_mus_psoas_minor_2Node2;
    #include "CutForceDefs.any"
  };
  AnyForceMomentMeasure fmm_Femur_mus_psoas_minor_3Node1 = {
    AnyForceBase &f =  Main.RatModel.Muscles.mus_psoas_minor_3 ;
    AnyRefFrame &r = Main.RatModel.Seg.Femur.Femur_mus_psoas_minor_3Node1;
    #include "CutForceDefs.any"
  };
  AnyForceMomentMeasure fmm_Femur_mus_psoas_minor_3Node2 = {
    AnyForceBase &f =  Main.RatModel.Muscles.mus_psoas_minor_3 ;
    AnyRefFrame &r = Main.RatModel.Seg.Femur.Femur_mus_psoas_minor_3Node2;
    #include "CutForceDefs.any"
  };
  AnyForceMomentMeasure fmm_Femur_mus_psoas_minor_4Node1 = {
    AnyForceBase &f =  Main.RatModel.Muscles.mus_psoas_minor_4 ;
    AnyRefFrame &r = Main.RatModel.Seg.Femur.Femur_mus_psoas_minor_4Node1;
    #include "CutForceDefs.any"
  };
  AnyForceMomentMeasure fmm_Femur_mus_psoas_minor_4Node2 = {
    AnyForceBase &f =  Main.RatModel.Muscles.mus_psoas_minor_4 ;
    AnyRefFrame &r = Main.RatModel.Seg.Femur.Femur_mus_psoas_minor_4Node2;
    #include "CutForceDefs.any"
  };
  AnyForceMomentMeasure fmm_Femur_mus_psoas_major_1Node1 = {
    AnyForceBase &f =  Main.RatModel.Muscles.mus_psoas_major_1 ;
    AnyRefFrame &r = Main.RatModel.Seg.Femur.Femur_mus_psoas_major_1Node1;
    #include "CutForceDefs.any"
  };
  AnyForceMomentMeasure fmm_Femur_mus_psoas_major_1Node2 = {
    AnyForceBase &f =  Main.RatModel.Muscles.mus_psoas_major_1 ;
    AnyRefFrame &r = Main.RatModel.Seg.Femur.Femur_mus_psoas_major_1Node2;
    #include "CutForceDefs.any"
  };
  AnyForceMomentMeasure fmm_Femur_mus_psoas_major_2Node1 = {
    AnyForceBase &f =  Main.RatModel.Muscles.mus_psoas_major_2 ;
    AnyRefFrame &r = Main.RatModel.Seg.Femur.Femur_mus_psoas_major_2Node1;
    #include "CutForceDefs.any"
  };
  AnyForceMomentMeasure fmm_Femur_mus_psoas_major_2Node2 = {
    AnyForceBase &f =  Main.RatModel.Muscles.mus_psoas_major_2 ;
    AnyRefFrame &r = Main.RatModel.Seg.Femur.Femur_mus_psoas_major_2Node2;
    #include "CutForceDefs.any"
  };
  AnyForceMomentMeasure fmm_Femur_mus_psoas_major_3Node1 = {
    AnyForceBase &f =  Main.RatModel.Muscles.mus_psoas_major_3 ;
    AnyRefFrame &r = Main.RatModel.Seg.Femur.Femur_mus_psoas_major_3Node1;
    #include "CutForceDefs.any"
  };
  AnyForceMomentMeasure fmm_Femur_mus_psoas_major_3Node2 = {
    AnyForceBase &f =  Main.RatModel.Muscles.mus_psoas_major_3 ;
    AnyRefFrame &r = Main.RatModel.Seg.Femur.Femur_mus_psoas_major_3Node2;
    #include "CutForceDefs.any"
  };
  AnyForceMomentMeasure fmm_Femur_mus_psoas_major_4Node1 = {
    AnyForceBase &f =  Main.RatModel.Muscles.mus_psoas_major_4 ;
    AnyRefFrame &r = Main.RatModel.Seg.Femur.Femur_mus_psoas_major_4Node1;
    #include "CutForceDefs.any"
  };
  AnyForceMomentMeasure fmm_Femur_mus_psoas_major_4Node2 = {
    AnyForceBase &f =  Main.RatModel.Muscles.mus_psoas_major_4 ;
    AnyRefFrame &r = Main.RatModel.Seg.Femur.Femur_mus_psoas_major_4Node2;
    #include "CutForceDefs.any"
  };
  AnyForceMomentMeasure fmm_Femur_mus_pectineusNode1 = {
    AnyForceBase &f =  Main.RatModel.Muscles.mus_pectineus ;
    AnyRefFrame &r = Main.RatModel.Seg.Femur.Femur_mus_pectineusNode1;
    #include "CutForceDefs.any"
  };
  AnyForceMomentMeasure fmm_Femur_mus_obturatorius_internus_1Node2 = {
    AnyForceBase &f =  Main.RatModel.Muscles.mus_obturatorius_internus_1 ;
    AnyRefFrame &r = Main.RatModel.Seg.Femur.Femur_mus_obturatorius_internus_1Node2;
    #include "CutForceDefs.any"
  };
  AnyForceMomentMeasure fmm_Femur_mus_obturatorius_internus_2Node2 = {
    AnyForceBase &f =  Main.RatModel.Muscles.mus_obturatorius_internus_2 ;
    AnyRefFrame &r = Main.RatModel.Seg.Femur.Femur_mus_obturatorius_internus_2Node2;
    #include "CutForceDefs.any"
  };
  AnyForceMomentMeasure fmm_Femur_mus_obturatorius_externus_1Node2 = {
    AnyForceBase &f =  Main.RatModel.Muscles.mus_obturatorius_externus_1 ;
    AnyRefFrame &r = Main.RatModel.Seg.Femur.Femur_mus_obturatorius_externus_1Node2;
    #include "CutForceDefs.any"
  };
  AnyForceMomentMeasure fmm_Femur_mus_obturatorius_externus_2Node2 = {
    AnyForceBase &f =  Main.RatModel.Muscles.mus_obturatorius_externus_2 ;
    AnyRefFrame &r = Main.RatModel.Seg.Femur.Femur_mus_obturatorius_externus_2Node2;
    #include "CutForceDefs.any"
  };
  AnyForceMomentMeasure fmm_Femur_mus_extensor_digitorum_brevis_11Node2 = {
    AnyForceBase &f =  Main.RatModel.Muscles.mus_extensor_digitorum_brevis_11 ;
    AnyRefFrame &r = Main.RatModel.Seg.Femur.Femur_mus_extensor_digitorum_brevis_11Node2;
    #include "CutForceDefs.any"
  };
  AnyForceMomentMeasure fmm_Femur_mus_extensor_digitorum_brevis_12Node2 = {
    AnyForceBase &f =  Main.RatModel.Muscles.mus_extensor_digitorum_brevis_12 ;
    AnyRefFrame &r = Main.RatModel.Seg.Femur.Femur_mus_extensor_digitorum_brevis_12Node2;
    #include "CutForceDefs.any"
  };
  AnyForceMomentMeasure fmm_Femur_mus_extensor_digitorum_brevis_13Node2 = {
    AnyForceBase &f =  Main.RatModel.Muscles.mus_extensor_digitorum_brevis_13 ;
    AnyRefFrame &r = Main.RatModel.Seg.Femur.Femur_mus_extensor_digitorum_brevis_13Node2;
    #include "CutForceDefs.any"
  };
  AnyForceMomentMeasure fmm_Femur_mus_extensor_digitorum_brevis_14Node2 = {
    AnyForceBase &f =  Main.RatModel.Muscles.mus_extensor_digitorum_brevis_14 ;
    AnyRefFrame &r = Main.RatModel.Seg.Femur.Femur_mus_extensor_digitorum_brevis_14Node2;
    #include "CutForceDefs.any"
  };
  AnyForceMomentMeasure fmm_Femur_mus_extensor_digitorum_brevis_15Node2 = {
    AnyForceBase &f =  Main.RatModel.Muscles.mus_extensor_digitorum_brevis_15 ;
    AnyRefFrame &r = Main.RatModel.Seg.Femur.Femur_mus_extensor_digitorum_brevis_15Node2;
    #include "CutForceDefs.any"
  };
  AnyForceMomentMeasure fmm_Femur_mus_iliacusNode3 = {
    AnyForceBase &f =  Main.RatModel.Muscles.mus_iliacus ;
    AnyRefFrame &r = Main.RatModel.Seg.Femur.Femur_mus_iliacusNode3;
    #include "CutForceDefs.any"
  };
  AnyForceMomentMeasure fmm_Femur_mus_iliacusNode4 = {
    AnyForceBase &f =  Main.RatModel.Muscles.mus_iliacus ;
    AnyRefFrame &r = Main.RatModel.Seg.Femur.Femur_mus_iliacusNode4;
    #include "CutForceDefs.any"
  };
  AnyForceMomentMeasure fmm_Femur_mus_gracilis_posticusNode2 = {
    AnyForceBase &f =  Main.RatModel.Muscles.mus_gracilis_posticus ;
    AnyRefFrame &r = Main.RatModel.Seg.Femur.Femur_mus_gracilis_posticusNode2;
    #include "CutForceDefs.any"
  };
  AnyForceMomentMeasure fmm_Femur_mus_gracilis_posticusNode3 = {
    AnyForceBase &f =  Main.RatModel.Muscles.mus_gracilis_posticus ;
    AnyRefFrame &r = Main.RatModel.Seg.Femur.Femur_mus_gracilis_posticusNode3;
    #include "CutForceDefs.any"
  };
  AnyForceMomentMeasure fmm_Femur_mus_gracilis_posticusNode4 = {
    AnyForceBase &f =  Main.RatModel.Muscles.mus_gracilis_posticus ;
    AnyRefFrame &r = Main.RatModel.Seg.Femur.Femur_mus_gracilis_posticusNode4;
    #include "CutForceDefs.any"
  };
  AnyForceMomentMeasure fmm_Femur_mus_gracilis_anticusNode2 = {
    AnyForceBase &f =  Main.RatModel.Muscles.mus_gracilis_anticus ;
    AnyRefFrame &r = Main.RatModel.Seg.Femur.Femur_mus_gracilis_anticusNode2;
    #include "CutForceDefs.any"
  };
  AnyForceMomentMeasure fmm_Femur_mus_gracilis_anticusNode3 = {
    AnyForceBase &f =  Main.RatModel.Muscles.mus_gracilis_anticus ;
    AnyRefFrame &r = Main.RatModel.Seg.Femur.Femur_mus_gracilis_anticusNode3;
    #include "CutForceDefs.any"
  };
  AnyForceMomentMeasure fmm_Femur_mus_gracilis_anticusNode4 = {
    AnyForceBase &f =  Main.RatModel.Muscles.mus_gracilis_anticus ;
    AnyRefFrame &r = Main.RatModel.Seg.Femur.Femur_mus_gracilis_anticusNode4;
    #include "CutForceDefs.any"
  };
  AnyForceMomentMeasure fmm_Femur_mus_gluteus_minimus_1Node3 = {
    AnyForceBase &f =  Main.RatModel.Muscles.mus_gluteus_minimus_1 ;
    AnyRefFrame &r = Main.RatModel.Seg.Femur.Femur_mus_gluteus_minimus_1Node3;
    #include "CutForceDefs.any"
  };
  AnyForceMomentMeasure fmm_Femur_mus_gluteus_minimus_2Node2 = {
    AnyForceBase &f =  Main.RatModel.Muscles.mus_gluteus_minimus_2 ;
    AnyRefFrame &r = Main.RatModel.Seg.Femur.Femur_mus_gluteus_minimus_2Node2;
    #include "CutForceDefs.any"
  };
  AnyForceMomentMeasure fmm_Femur_mus_gluteus_mediusNode3 = {
    AnyForceBase &f =  Main.RatModel.Muscles.mus_gluteus_medius ;
    AnyRefFrame &r = Main.RatModel.Seg.Femur.Femur_mus_gluteus_mediusNode3;
    #include "CutForceDefs.any"
  };
  AnyForceMomentMeasure fmm_Femur_mus_gluteus_mediusNode4 = {
    AnyForceBase &f =  Main.RatModel.Muscles.mus_gluteus_medius ;
    AnyRefFrame &r = Main.RatModel.Seg.Femur.Femur_mus_gluteus_mediusNode4;
    #include "CutForceDefs.any"
  };
  AnyForceMomentMeasure fmm_Femur_mus_gluteus_maximus_1Node3 = {
    AnyForceBase &f =  Main.RatModel.Muscles.mus_gluteus_maximus_1 ;
    AnyRefFrame &r = Main.RatModel.Seg.Femur.Femur_mus_gluteus_maximus_1Node3;
    #include "CutForceDefs.any"
  };
  AnyForceMomentMeasure fmm_Femur_mus_gluteus_maximus_1Node4 = {
    AnyForceBase &f =  Main.RatModel.Muscles.mus_gluteus_maximus_1 ;
    AnyRefFrame &r = Main.RatModel.Seg.Femur.Femur_mus_gluteus_maximus_1Node4;
    #include "CutForceDefs.any"
  };
  AnyForceMomentMeasure fmm_Femur_mus_gluteus_maximus_1Node5 = {
    AnyForceBase &f =  Main.RatModel.Muscles.mus_gluteus_maximus_1 ;
    AnyRefFrame &r = Main.RatModel.Seg.Femur.Femur_mus_gluteus_maximus_1Node5;
    #include "CutForceDefs.any"
  };
  AnyForceMomentMeasure fmm_Femur_mus_gluteus_maximus_2Node3 = {
    AnyForceBase &f =  Main.RatModel.Muscles.mus_gluteus_maximus_2 ;
    AnyRefFrame &r = Main.RatModel.Seg.Femur.Femur_mus_gluteus_maximus_2Node3;
    #include "CutForceDefs.any"
  };
  AnyForceMomentMeasure fmm_Femur_mus_gluteus_maximus_2Node4 = {
    AnyForceBase &f =  Main.RatModel.Muscles.mus_gluteus_maximus_2 ;
    AnyRefFrame &r = Main.RatModel.Seg.Femur.Femur_mus_gluteus_maximus_2Node4;
    #include "CutForceDefs.any"
  };
  AnyForceMomentMeasure fmm_Femur_mus_gluteus_maximus_2Node5 = {
    AnyForceBase &f =  Main.RatModel.Muscles.mus_gluteus_maximus_2 ;
    AnyRefFrame &r = Main.RatModel.Seg.Femur.Femur_mus_gluteus_maximus_2Node5;
    #include "CutForceDefs.any"
  };
  AnyForceMomentMeasure fmm_Femur_mus_gluteus_maximus_2Node6 = {
    AnyForceBase &f =  Main.RatModel.Muscles.mus_gluteus_maximus_2 ;
    AnyRefFrame &r = Main.RatModel.Seg.Femur.Femur_mus_gluteus_maximus_2Node6;
    #include "CutForceDefs.any"
  };
  AnyForceMomentMeasure fmm_Femur_mus_gluteus_maximus_3Node3 = {
    AnyForceBase &f =  Main.RatModel.Muscles.mus_gluteus_maximus_3 ;
    AnyRefFrame &r = Main.RatModel.Seg.Femur.Femur_mus_gluteus_maximus_3Node3;
    #include "CutForceDefs.any"
  };
  AnyForceMomentMeasure fmm_Femur_mus_gluteus_maximus_3Node4 = {
    AnyForceBase &f =  Main.RatModel.Muscles.mus_gluteus_maximus_3 ;
    AnyRefFrame &r = Main.RatModel.Seg.Femur.Femur_mus_gluteus_maximus_3Node4;
    #include "CutForceDefs.any"
  };
  AnyForceMomentMeasure fmm_Femur_mus_gluteus_maximus_3Node5 = {
    AnyForceBase &f =  Main.RatModel.Muscles.mus_gluteus_maximus_3 ;
    AnyRefFrame &r = Main.RatModel.Seg.Femur.Femur_mus_gluteus_maximus_3Node5;
    #include "CutForceDefs.any"
  };
  AnyForceMomentMeasure fmm_Femur_mus_gluteus_maximus_3Node6 = {
    AnyForceBase &f =  Main.RatModel.Muscles.mus_gluteus_maximus_3 ;
    AnyRefFrame &r = Main.RatModel.Seg.Femur.Femur_mus_gluteus_maximus_3Node6;
    #include "CutForceDefs.any"
  };
  AnyForceMomentMeasure fmm_Femur_mus_gluteus_maximus_4Node3 = {
    AnyForceBase &f =  Main.RatModel.Muscles.mus_gluteus_maximus_4 ;
    AnyRefFrame &r = Main.RatModel.Seg.Femur.Femur_mus_gluteus_maximus_4Node3;
    #include "CutForceDefs.any"
  };
  AnyForceMomentMeasure fmm_Femur_mus_gluteus_maximus_4Node4 = {
    AnyForceBase &f =  Main.RatModel.Muscles.mus_gluteus_maximus_4 ;
    AnyRefFrame &r = Main.RatModel.Seg.Femur.Femur_mus_gluteus_maximus_4Node4;
    #include "CutForceDefs.any"
  };
  AnyForceMomentMeasure fmm_Femur_mus_gluteus_maximus_4Node5 = {
    AnyForceBase &f =  Main.RatModel.Muscles.mus_gluteus_maximus_4 ;
    AnyRefFrame &r = Main.RatModel.Seg.Femur.Femur_mus_gluteus_maximus_4Node5;
    #include "CutForceDefs.any"
  };
  AnyForceMomentMeasure fmm_Femur_mus_gluteus_maximus_5Node3 = {
    AnyForceBase &f =  Main.RatModel.Muscles.mus_gluteus_maximus_5 ;
    AnyRefFrame &r = Main.RatModel.Seg.Femur.Femur_mus_gluteus_maximus_5Node3;
    #include "CutForceDefs.any"
  };
  AnyForceMomentMeasure fmm_Femur_mus_gluteus_maximus_5Node4 = {
    AnyForceBase &f =  Main.RatModel.Muscles.mus_gluteus_maximus_5 ;
    AnyRefFrame &r = Main.RatModel.Seg.Femur.Femur_mus_gluteus_maximus_5Node4;
    #include "CutForceDefs.any"
  };
  AnyForceMomentMeasure fmm_Femur_mus_gluteus_maximus_5Node5 = {
    AnyForceBase &f =  Main.RatModel.Muscles.mus_gluteus_maximus_5 ;
    AnyRefFrame &r = Main.RatModel.Seg.Femur.Femur_mus_gluteus_maximus_5Node5;
    #include "CutForceDefs.any"
  };
  AnyForceMomentMeasure fmm_Femur_mus_gluteus_maximus_5Node6 = {
    AnyForceBase &f =  Main.RatModel.Muscles.mus_gluteus_maximus_5 ;
    AnyRefFrame &r = Main.RatModel.Seg.Femur.Femur_mus_gluteus_maximus_5Node6;
    #include "CutForceDefs.any"
  };
  AnyForceMomentMeasure fmm_Femur_mus_gemellus_inferiorNode2 = {
    AnyForceBase &f =  Main.RatModel.Muscles.mus_gemellus_inferior ;
    AnyRefFrame &r = Main.RatModel.Seg.Femur.Femur_mus_gemellus_inferiorNode2;
    #include "CutForceDefs.any"
  };
  AnyForceMomentMeasure fmm_Femur_mus_gemellus_inferiorNode3 = {
    AnyForceBase &f =  Main.RatModel.Muscles.mus_gemellus_inferior ;
    AnyRefFrame &r = Main.RatModel.Seg.Femur.Femur_mus_gemellus_inferiorNode3;
    #include "CutForceDefs.any"
  };
  AnyForceMomentMeasure fmm_Femur_mus_gemellus_superiorNode3 = {
    AnyForceBase &f =  Main.RatModel.Muscles.mus_gemellus_superior ;
    AnyRefFrame &r = Main.RatModel.Seg.Femur.Femur_mus_gemellus_superiorNode3;
    #include "CutForceDefs.any"
  };
  AnyForceMomentMeasure fmm_Femur_mus_gemellus_superiorNode4 = {
    AnyForceBase &f =  Main.RatModel.Muscles.mus_gemellus_superior ;
    AnyRefFrame &r = Main.RatModel.Seg.Femur.Femur_mus_gemellus_superiorNode4;
    #include "CutForceDefs.any"
  };
  AnyForceMomentMeasure fmm_Femur_mus_rectus_femoris_1Node1 = {
    AnyForceBase &f =  Main.RatModel.Muscles.mus_rectus_femoris_1 ;
    AnyRefFrame &r = Main.RatModel.Seg.Femur.Femur_mus_rectus_femoris_1Node1;
    #include "CutForceDefs.any"
  };
  AnyForceMomentMeasure fmm_Femur_mus_rectus_femoris_1Node2 = {
    AnyForceBase &f =  Main.RatModel.Muscles.mus_rectus_femoris_1 ;
    AnyRefFrame &r = Main.RatModel.Seg.Femur.Femur_mus_rectus_femoris_1Node2;
    #include "CutForceDefs.any"
  };
  AnyForceMomentMeasure fmm_Femur_mus_rectus_femoris_1Node3 = {
    AnyForceBase &f =  Main.RatModel.Muscles.mus_rectus_femoris_1 ;
    AnyRefFrame &r = Main.RatModel.Seg.Femur.Femur_mus_rectus_femoris_1Node3;
    #include "CutForceDefs.any"
  };
  AnyForceMomentMeasure fmm_Femur_mus_rectus_femoris_2Node1 = {
    AnyForceBase &f =  Main.RatModel.Muscles.mus_rectus_femoris_2 ;
    AnyRefFrame &r = Main.RatModel.Seg.Femur.Femur_mus_rectus_femoris_2Node1;
    #include "CutForceDefs.any"
  };
  AnyForceMomentMeasure fmm_Femur_mus_rectus_femoris_2Node2 = {
    AnyForceBase &f =  Main.RatModel.Muscles.mus_rectus_femoris_2 ;
    AnyRefFrame &r = Main.RatModel.Seg.Femur.Femur_mus_rectus_femoris_2Node2;
    #include "CutForceDefs.any"
  };
  AnyForceMomentMeasure fmm_Femur_mus_rectus_femoris_2Node3 = {
    AnyForceBase &f =  Main.RatModel.Muscles.mus_rectus_femoris_2 ;
    AnyRefFrame &r = Main.RatModel.Seg.Femur.Femur_mus_rectus_femoris_2Node3;
    #include "CutForceDefs.any"
  };
  AnyForceMomentMeasure fmm_Femur_mus_rectus_femoris_3Node1 = {
    AnyForceBase &f =  Main.RatModel.Muscles.mus_rectus_femoris_3 ;
    AnyRefFrame &r = Main.RatModel.Seg.Femur.Femur_mus_rectus_femoris_3Node1;
    #include "CutForceDefs.any"
  };
  AnyForceMomentMeasure fmm_Femur_mus_rectus_femoris_3Node2 = {
    AnyForceBase &f =  Main.RatModel.Muscles.mus_rectus_femoris_3 ;
    AnyRefFrame &r = Main.RatModel.Seg.Femur.Femur_mus_rectus_femoris_3Node2;
    #include "CutForceDefs.any"
  };
  AnyForceMomentMeasure fmm_Femur_mus_rectus_femoris_3Node3 = {
    AnyForceBase &f =  Main.RatModel.Muscles.mus_rectus_femoris_3 ;
    AnyRefFrame &r = Main.RatModel.Seg.Femur.Femur_mus_rectus_femoris_3Node3;
    #include "CutForceDefs.any"
  };
  AnyForceMomentMeasure fmm_Femur_mus_rectus_femoris_4Node1 = {
    AnyForceBase &f =  Main.RatModel.Muscles.mus_rectus_femoris_4 ;
    AnyRefFrame &r = Main.RatModel.Seg.Femur.Femur_mus_rectus_femoris_4Node1;
    #include "CutForceDefs.any"
  };
  AnyForceMomentMeasure fmm_Femur_mus_rectus_femoris_4Node2 = {
    AnyForceBase &f =  Main.RatModel.Muscles.mus_rectus_femoris_4 ;
    AnyRefFrame &r = Main.RatModel.Seg.Femur.Femur_mus_rectus_femoris_4Node2;
    #include "CutForceDefs.any"
  };
  AnyForceMomentMeasure fmm_Femur_mus_rectus_femoris_5Node1 = {
    AnyForceBase &f =  Main.RatModel.Muscles.mus_rectus_femoris_5 ;
    AnyRefFrame &r = Main.RatModel.Seg.Femur.Femur_mus_rectus_femoris_5Node1;
    #include "CutForceDefs.any"
  };
  AnyForceMomentMeasure fmm_Femur_mus_rectus_femoris_5Node2 = {
    AnyForceBase &f =  Main.RatModel.Muscles.mus_rectus_femoris_5 ;
    AnyRefFrame &r = Main.RatModel.Seg.Femur.Femur_mus_rectus_femoris_5Node2;
    #include "CutForceDefs.any"
  };
  AnyForceMomentMeasure fmm_Femur_mus_vastus_lateralis_1Node0 = {
    AnyForceBase &f =  Main.RatModel.Muscles.mus_vastus_lateralis_1 ;
    AnyRefFrame &r = Main.RatModel.Seg.Femur.Femur_mus_vastus_lateralis_1Node0;
    #include "CutForceDefs.any"
  };
  AnyForceMomentMeasure fmm_Femur_mus_vastus_lateralis_1Node1 = {
    AnyForceBase &f =  Main.RatModel.Muscles.mus_vastus_lateralis_1 ;
    AnyRefFrame &r = Main.RatModel.Seg.Femur.Femur_mus_vastus_lateralis_1Node1;
    #include "CutForceDefs.any"
  };
  AnyForceMomentMeasure fmm_Femur_mus_vastus_lateralis_2Node0 = {
    AnyForceBase &f =  Main.RatModel.Muscles.mus_vastus_lateralis_2 ;
    AnyRefFrame &r = Main.RatModel.Seg.Femur.Femur_mus_vastus_lateralis_2Node0;
    #include "CutForceDefs.any"
  };
  AnyForceMomentMeasure fmm_Femur_mus_vastus_lateralis_2Node1 = {
    AnyForceBase &f =  Main.RatModel.Muscles.mus_vastus_lateralis_2 ;
    AnyRefFrame &r = Main.RatModel.Seg.Femur.Femur_mus_vastus_lateralis_2Node1;
    #include "CutForceDefs.any"
  };
  AnyForceMomentMeasure fmm_Femur_mus_vastus_lateralis_2Node2 = {
    AnyForceBase &f =  Main.RatModel.Muscles.mus_vastus_lateralis_2 ;
    AnyRefFrame &r = Main.RatModel.Seg.Femur.Femur_mus_vastus_lateralis_2Node2;
    #include "CutForceDefs.any"
  };
  AnyForceMomentMeasure fmm_Femur_mus_vastus_lateralis_3Node0 = {
    AnyForceBase &f =  Main.RatModel.Muscles.mus_vastus_lateralis_3 ;
    AnyRefFrame &r = Main.RatModel.Seg.Femur.Femur_mus_vastus_lateralis_3Node0;
    #include "CutForceDefs.any"
  };
  AnyForceMomentMeasure fmm_Femur_mus_vastus_lateralis_3Node1 = {
    AnyForceBase &f =  Main.RatModel.Muscles.mus_vastus_lateralis_3 ;
    AnyRefFrame &r = Main.RatModel.Seg.Femur.Femur_mus_vastus_lateralis_3Node1;
    #include "CutForceDefs.any"
  };
  AnyForceMomentMeasure fmm_Femur_mus_vastus_lateralis_3Node2 = {
    AnyForceBase &f =  Main.RatModel.Muscles.mus_vastus_lateralis_3 ;
    AnyRefFrame &r = Main.RatModel.Seg.Femur.Femur_mus_vastus_lateralis_3Node2;
    #include "CutForceDefs.any"
  };
  AnyForceMomentMeasure fmm_Femur_mus_vastus_lateralis_4Node0 = {
    AnyForceBase &f =  Main.RatModel.Muscles.mus_vastus_lateralis_4 ;
    AnyRefFrame &r = Main.RatModel.Seg.Femur.Femur_mus_vastus_lateralis_4Node0;
    #include "CutForceDefs.any"
  };
  AnyForceMomentMeasure fmm_Femur_mus_vastus_lateralis_4Node1 = {
    AnyForceBase &f =  Main.RatModel.Muscles.mus_vastus_lateralis_4 ;
    AnyRefFrame &r = Main.RatModel.Seg.Femur.Femur_mus_vastus_lateralis_4Node1;
    #include "CutForceDefs.any"
  };
  AnyForceMomentMeasure fmm_Femur_mus_vastus_medialisNode0 = {
    AnyForceBase &f =  Main.RatModel.Muscles.mus_vastus_medialis ;
    AnyRefFrame &r = Main.RatModel.Seg.Femur.Femur_mus_vastus_medialisNode0;
    #include "CutForceDefs.any"
  };
  AnyForceMomentMeasure fmm_Femur_mus_vastus_medialisNode1 = {
    AnyForceBase &f =  Main.RatModel.Muscles.mus_vastus_medialis ;
    AnyRefFrame &r = Main.RatModel.Seg.Femur.Femur_mus_vastus_medialisNode1;
    #include "CutForceDefs.any"
  };
  AnyForceMomentMeasure fmm_Femur_mus_vastus_intermediusNode0 = {
    AnyForceBase &f =  Main.RatModel.Muscles.mus_vastus_intermedius ;
    AnyRefFrame &r = Main.RatModel.Seg.Femur.Femur_mus_vastus_intermediusNode0;
    #include "CutForceDefs.any"
  };
  AnyForceMomentMeasure fmm_Femur_mus_vastus_intermediusNode1 = {
    AnyForceBase &f =  Main.RatModel.Muscles.mus_vastus_intermedius ;
    AnyRefFrame &r = Main.RatModel.Seg.Femur.Femur_mus_vastus_intermediusNode1;
    #include "CutForceDefs.any"
  };
  AnyForceMomentMeasure fmm_Femur_mus_caudofemoralisNode3 = {
    AnyForceBase &f =  Main.RatModel.Muscles.mus_caudofemoralis ;
    AnyRefFrame &r = Main.RatModel.Seg.Femur.Femur_mus_caudofemoralisNode3;
    #include "CutForceDefs.any"
  };
  AnyForceMomentMeasure fmm_Femur_mus_caudofemoralisNode4 = {
    AnyForceBase &f =  Main.RatModel.Muscles.mus_caudofemoralis ;
    AnyRefFrame &r = Main.RatModel.Seg.Femur.Femur_mus_caudofemoralisNode4;
    #include "CutForceDefs.any"
  };
  AnyForceMomentMeasure fmm_Femur_mus_caudofemoralisNode5 = {
    AnyForceBase &f =  Main.RatModel.Muscles.mus_caudofemoralis ;
    AnyRefFrame &r = Main.RatModel.Seg.Femur.Femur_mus_caudofemoralisNode5;
    #include "CutForceDefs.any"
  };
  AnyForceMomentMeasure fmm_Femur_mus_caudofemoralisNode6 = {
    AnyForceBase &f =  Main.RatModel.Muscles.mus_caudofemoralis ;
    AnyRefFrame &r = Main.RatModel.Seg.Femur.Femur_mus_caudofemoralisNode6;
    #include "CutForceDefs.any"
  };
  AnyForceMomentMeasure fmm_Femur_mus_biceps_femoris_1Node2 = {
    AnyForceBase &f =  Main.RatModel.Muscles.mus_biceps_femoris_1 ;
    AnyRefFrame &r = Main.RatModel.Seg.Femur.Femur_mus_biceps_femoris_1Node2;
    #include "CutForceDefs.any"
  };
  AnyForceMomentMeasure fmm_Femur_mus_biceps_femoris_1Node3 = {
    AnyForceBase &f =  Main.RatModel.Muscles.mus_biceps_femoris_1 ;
    AnyRefFrame &r = Main.RatModel.Seg.Femur.Femur_mus_biceps_femoris_1Node3;
    #include "CutForceDefs.any"
  };
  AnyForceMomentMeasure fmm_Femur_mus_biceps_femoris_1Node4 = {
    AnyForceBase &f =  Main.RatModel.Muscles.mus_biceps_femoris_1 ;
    AnyRefFrame &r = Main.RatModel.Seg.Femur.Femur_mus_biceps_femoris_1Node4;
    #include "CutForceDefs.any"
  };
  AnyForceMomentMeasure fmm_Femur_mus_popliteus_12Node3 = {
    AnyForceBase &f =  Main.RatModel.Muscles.mus_popliteus_12 ;
    AnyRefFrame &r = Main.RatModel.Seg.Femur.Femur_mus_popliteus_12Node3;
    #include "CutForceDefs.any"
  };
  AnyForceMomentMeasure fmm_Femur_mus_biceps_femoris_3Node2 = {
    AnyForceBase &f =  Main.RatModel.Muscles.mus_biceps_femoris_3 ;
    AnyRefFrame &r = Main.RatModel.Seg.Femur.Femur_mus_biceps_femoris_3Node2;
    #include "CutForceDefs.any"
  };
  AnyForceMomentMeasure fmm_Femur_mus_adductor_brevis_1Node2 = {
    AnyForceBase &f =  Main.RatModel.Muscles.mus_adductor_brevis_1 ;
    AnyRefFrame &r = Main.RatModel.Seg.Femur.Femur_mus_adductor_brevis_1Node2;
    #include "CutForceDefs.any"
  };
  AnyForceMomentMeasure fmm_Femur_mus_adductor_brevis_1Node3 = {
    AnyForceBase &f =  Main.RatModel.Muscles.mus_adductor_brevis_1 ;
    AnyRefFrame &r = Main.RatModel.Seg.Femur.Femur_mus_adductor_brevis_1Node3;
    #include "CutForceDefs.any"
  };
  AnyForceMomentMeasure fmm_Femur_mus_adductor_brevis_1Node4 = {
    AnyForceBase &f =  Main.RatModel.Muscles.mus_adductor_brevis_1 ;
    AnyRefFrame &r = Main.RatModel.Seg.Femur.Femur_mus_adductor_brevis_1Node4;
    #include "CutForceDefs.any"
  };
  AnyForceMomentMeasure fmm_Femur_mus_adductor_brevis_2Node2 = {
    AnyForceBase &f =  Main.RatModel.Muscles.mus_adductor_brevis_2 ;
    AnyRefFrame &r = Main.RatModel.Seg.Femur.Femur_mus_adductor_brevis_2Node2;
    #include "CutForceDefs.any"
  };
  AnyForceMomentMeasure fmm_Femur_mus_adductor_brevis_2Node3 = {
    AnyForceBase &f =  Main.RatModel.Muscles.mus_adductor_brevis_2 ;
    AnyRefFrame &r = Main.RatModel.Seg.Femur.Femur_mus_adductor_brevis_2Node3;
    #include "CutForceDefs.any"
  };
  AnyForceMomentMeasure fmm_Femur_mus_adductor_brevis_2Node4 = {
    AnyForceBase &f =  Main.RatModel.Muscles.mus_adductor_brevis_2 ;
    AnyRefFrame &r = Main.RatModel.Seg.Femur.Femur_mus_adductor_brevis_2Node4;
    #include "CutForceDefs.any"
  };
  AnyForceMomentMeasure fmm_Femur_mus_adductor_brevis_3Node2 = {
    AnyForceBase &f =  Main.RatModel.Muscles.mus_adductor_brevis_3 ;
    AnyRefFrame &r = Main.RatModel.Seg.Femur.Femur_mus_adductor_brevis_3Node2;
    #include "CutForceDefs.any"
  };
  AnyForceMomentMeasure fmm_Femur_mus_adductor_brevis_3Node3 = {
    AnyForceBase &f =  Main.RatModel.Muscles.mus_adductor_brevis_3 ;
    AnyRefFrame &r = Main.RatModel.Seg.Femur.Femur_mus_adductor_brevis_3Node3;
    #include "CutForceDefs.any"
  };
  AnyForceMomentMeasure fmm_Femur_mus_adductor_brevis_4Node2 = {
    AnyForceBase &f =  Main.RatModel.Muscles.mus_adductor_brevis_4 ;
    AnyRefFrame &r = Main.RatModel.Seg.Femur.Femur_mus_adductor_brevis_4Node2;
    #include "CutForceDefs.any"
  };
  AnyForceMomentMeasure fmm_Femur_mus_adductor_brevis_4Node3 = {
    AnyForceBase &f =  Main.RatModel.Muscles.mus_adductor_brevis_4 ;
    AnyRefFrame &r = Main.RatModel.Seg.Femur.Femur_mus_adductor_brevis_4Node3;
    #include "CutForceDefs.any"
  };
  AnyForceMomentMeasure fmm_Femur_mus_adductor_brevis_4Node4 = {
    AnyForceBase &f =  Main.RatModel.Muscles.mus_adductor_brevis_4 ;
    AnyRefFrame &r = Main.RatModel.Seg.Femur.Femur_mus_adductor_brevis_4Node4;
    #include "CutForceDefs.any"
  };
  AnyForceMomentMeasure fmm_Femur_mus_adductor_longus_1Node2 = {
    AnyForceBase &f =  Main.RatModel.Muscles.mus_adductor_longus_1 ;
    AnyRefFrame &r = Main.RatModel.Seg.Femur.Femur_mus_adductor_longus_1Node2;
    #include "CutForceDefs.any"
  };
  AnyForceMomentMeasure fmm_Femur_mus_adductor_longus_1Node3 = {
    AnyForceBase &f =  Main.RatModel.Muscles.mus_adductor_longus_1 ;
    AnyRefFrame &r = Main.RatModel.Seg.Femur.Femur_mus_adductor_longus_1Node3;
    #include "CutForceDefs.any"
  };
  AnyForceMomentMeasure fmm_Femur_mus_adductor_longus_2Node2 = {
    AnyForceBase &f =  Main.RatModel.Muscles.mus_adductor_longus_2 ;
    AnyRefFrame &r = Main.RatModel.Seg.Femur.Femur_mus_adductor_longus_2Node2;
    #include "CutForceDefs.any"
  };
  AnyForceMomentMeasure fmm_Femur_mus_adductor_longus_2Node3 = {
    AnyForceBase &f =  Main.RatModel.Muscles.mus_adductor_longus_2 ;
    AnyRefFrame &r = Main.RatModel.Seg.Femur.Femur_mus_adductor_longus_2Node3;
    #include "CutForceDefs.any"
  };
  AnyForceMomentMeasure fmm_Femur_mus_adductor_longus_3Node2 = {
    AnyForceBase &f =  Main.RatModel.Muscles.mus_adductor_longus_3 ;
    AnyRefFrame &r = Main.RatModel.Seg.Femur.Femur_mus_adductor_longus_3Node2;
    #include "CutForceDefs.any"
  };
  AnyForceMomentMeasure fmm_Femur_mus_adductor_longus_3Node3 = {
    AnyForceBase &f =  Main.RatModel.Muscles.mus_adductor_longus_3 ;
    AnyRefFrame &r = Main.RatModel.Seg.Femur.Femur_mus_adductor_longus_3Node3;
    #include "CutForceDefs.any"
  };
  AnyForceMomentMeasure fmm_Femur_mus_adductor_magnusNode2 = {
    AnyForceBase &f =  Main.RatModel.Muscles.mus_adductor_magnus ;
    AnyRefFrame &r = Main.RatModel.Seg.Femur.Femur_mus_adductor_magnusNode2;
    #include "CutForceDefs.any"
  };
  AnyForceMomentMeasure fmm_Femur_mus_adductor_magnusNode3 = {
    AnyForceBase &f =  Main.RatModel.Muscles.mus_adductor_magnus ;
    AnyRefFrame &r = Main.RatModel.Seg.Femur.Femur_mus_adductor_magnusNode3;
    #include "CutForceDefs.any"
  };
  AnyForceMomentMeasure fmm_Femur_mus_adductor_magnusNode4 = {
    AnyForceBase &f =  Main.RatModel.Muscles.mus_adductor_magnus ;
    AnyRefFrame &r = Main.RatModel.Seg.Femur.Femur_mus_adductor_magnusNode4;
    #include "CutForceDefs.any"
  };
  AnyForceMomentMeasure fmm_Femur_mus_adductor_magnusNode5 = {
    AnyForceBase &f =  Main.RatModel.Muscles.mus_adductor_magnus ;
    AnyRefFrame &r = Main.RatModel.Seg.Femur.Femur_mus_adductor_magnusNode5;
    #include "CutForceDefs.any"
  };
  AnyForceMomentMeasure fmm_Hip = {
    AnyForceBase &f =  Main.RatModel.Jnts.Hip.Constraints.Reaction ;
    AnyForceBase &fx = Main.RatModel.ModelEnvironmentConnection.Drivers.DriverHipRotX.Reaction;
    AnyForceBase &fy = Main.RatModel.ModelEnvironmentConnection.Drivers.DriverHipRotY.Reaction;
    AnyForceBase &fz = Main.RatModel.ModelEnvironmentConnection.Drivers.DriverHipRotZ.Reaction;
    AnyRefFrame &r = Main.RatModel.Seg.Femur.Hip;
    #include "CutForceDefs.any"
  };
  AnyForceMomentMeasure fmm_Knee = {
    AnyForceBase &f =  Main.RatModel.Jnts.Knee.Constraints.Reaction ;
    AnyForceBase &fx = Main.RatModel.ModelEnvironmentConnection.Drivers.DriverKneeRotX.Reaction;
    AnyForceBase &fy = Main.RatModel.ModelEnvironmentConnection.Drivers.DriverKneeRotY.Reaction;
    AnyForceBase &fz = Main.RatModel.ModelEnvironmentConnection.Drivers.DriverKneeRotZ.Reaction;
    AnyRefFrame &r = Main.RatModel.Seg.Femur.Knee;
    #include "CutForceDefs.any"
  };
  AnyForceMomentMeasure fmm_Pat = {
    AnyForceBase &f =  Main.RatModel.Jnts.Pat.Constraints.Reaction ;
    AnyForceBase &fx = Main.RatModel.ModelEnvironmentConnection.Drivers.DriverPatRotX.Reaction;
    AnyForceBase &fy = Main.RatModel.ModelEnvironmentConnection.Drivers.DriverPatRotY.Reaction;
    AnyForceBase &fz = Main.RatModel.ModelEnvironmentConnection.Drivers.DriverPatRotZ.Reaction;
    AnyRefFrame &r = Main.RatModel.Seg.Femur.Pat;
    #include "CutForceDefs.any"
  };

  AnyForceMomentMeasure2 fmm_COP ={
    AnyRefFrame &r = Main.RatModel.Seg.Femur.Cut_Node;
    AnySeg &s = Main.RatModel.Seg.Femur;
    IncludeGravity = On;
    IncludeInertiaForces = On;
    #include "CutForceDefs.any"
  };

};
