AnyFolder FractureForces = {

  #include "ForceMomentMeasures.any"

  AnyVec3 Fcut_dist =
  FMM.fmm_Femur_mus_extensor_digitorum_longus_1Node0.F_dist +
  FMM.fmm_Femur_mus_extensor_digitorum_longus_2Node0.F_dist +
  FMM.fmm_Femur_mus_extensor_digitorum_longus_3Node0.F_dist +
  FMM.fmm_Femur_mus_extensor_digitorum_longus_4Node0.F_dist +
  FMM.fmm_Femur_mus_popliteus_1Node0.F_dist +
  FMM.fmm_Femur_mus_popliteus_1Node1.F_dist +
  FMM.fmm_Femur_mus_popliteus_2Node0.F_dist +
  FMM.fmm_Femur_mus_popliteus_2Node1.F_dist +
  FMM.fmm_Femur_mus_tibialis_anteriorNode0.F_dist +
  FMM.fmm_Femur_mus_gastrocnemius_soleus_1Node0.F_dist +
  FMM.fmm_Femur_mus_gastrocnemius_soleus_2Node0.F_dist +
  FMM.fmm_Femur_mus_tensor_fasciae_latae_1Node3.F_dist +
  FMM.fmm_Femur_mus_tensor_fasciae_latae_1Node4.F_dist +
  FMM.fmm_Femur_mus_tensor_fasciae_latae_1Node5.F_dist +
  FMM.fmm_Femur_mus_tensor_fasciae_latae_2Node3.F_dist +
  FMM.fmm_Femur_mus_tensor_fasciae_latae_2Node4.F_dist +
  FMM.fmm_Femur_mus_tensor_fasciae_latae_2Node5.F_dist +
  FMM.fmm_Femur_mus_fasciae_latae_3Node3.F_dist +
  FMM.fmm_Femur_mus_fasciae_latae_3Node4.F_dist +
  FMM.fmm_Femur_mus_fasciae_latae_3Node5.F_dist +
  FMM.fmm_Femur_mus_semitendinosusNode1.F_dist +
  FMM.fmm_Femur_mus_semimembranosusNode1.F_dist +
  FMM.fmm_Femur_mus_semimembranosusNode2.F_dist +
  FMM.fmm_Femur_mus_quadratus_femorisNode2.F_dist +
  FMM.fmm_Femur_mus_psoas_minor_1Node1.F_dist +
  FMM.fmm_Femur_mus_psoas_minor_1Node2.F_dist +
  FMM.fmm_Femur_mus_psoas_minor_2Node1.F_dist +
  FMM.fmm_Femur_mus_psoas_minor_2Node2.F_dist +
  FMM.fmm_Femur_mus_psoas_minor_3Node1.F_dist +
  FMM.fmm_Femur_mus_psoas_minor_3Node2.F_dist +
  FMM.fmm_Femur_mus_psoas_minor_4Node1.F_dist +
  FMM.fmm_Femur_mus_psoas_minor_4Node2.F_dist +
  FMM.fmm_Femur_mus_psoas_major_1Node1.F_dist +
  FMM.fmm_Femur_mus_psoas_major_1Node2.F_dist +
  FMM.fmm_Femur_mus_psoas_major_2Node1.F_dist +
  FMM.fmm_Femur_mus_psoas_major_2Node2.F_dist +
  FMM.fmm_Femur_mus_psoas_major_3Node1.F_dist +
  FMM.fmm_Femur_mus_psoas_major_3Node2.F_dist +
  FMM.fmm_Femur_mus_psoas_major_4Node1.F_dist +
  FMM.fmm_Femur_mus_psoas_major_4Node2.F_dist +
  FMM.fmm_Femur_mus_pectineusNode1.F_dist +
  FMM.fmm_Femur_mus_obturatorius_internus_1Node2.F_dist +
  FMM.fmm_Femur_mus_obturatorius_internus_2Node2.F_dist +
  FMM.fmm_Femur_mus_obturatorius_externus_1Node2.F_dist +
  FMM.fmm_Femur_mus_obturatorius_externus_2Node2.F_dist +
  FMM.fmm_Femur_mus_extensor_digitorum_brevis_11Node2.F_dist +
  FMM.fmm_Femur_mus_extensor_digitorum_brevis_12Node2.F_dist +
  FMM.fmm_Femur_mus_extensor_digitorum_brevis_13Node2.F_dist +
  FMM.fmm_Femur_mus_extensor_digitorum_brevis_14Node2.F_dist +
  FMM.fmm_Femur_mus_extensor_digitorum_brevis_15Node2.F_dist +
  FMM.fmm_Femur_mus_iliacusNode3.F_dist +
  FMM.fmm_Femur_mus_iliacusNode4.F_dist +
  FMM.fmm_Femur_mus_gracilis_posticusNode2.F_dist +
  FMM.fmm_Femur_mus_gracilis_posticusNode3.F_dist +
  FMM.fmm_Femur_mus_gracilis_posticusNode4.F_dist +
  FMM.fmm_Femur_mus_gracilis_anticusNode2.F_dist +
  FMM.fmm_Femur_mus_gracilis_anticusNode3.F_dist +
  FMM.fmm_Femur_mus_gracilis_anticusNode4.F_dist +
  FMM.fmm_Femur_mus_gluteus_minimus_1Node3.F_dist +
  FMM.fmm_Femur_mus_gluteus_minimus_2Node2.F_dist +
  FMM.fmm_Femur_mus_gluteus_mediusNode3.F_dist +
  FMM.fmm_Femur_mus_gluteus_mediusNode4.F_dist +
  FMM.fmm_Femur_mus_gluteus_maximus_1Node3.F_dist +
  FMM.fmm_Femur_mus_gluteus_maximus_1Node4.F_dist +
  FMM.fmm_Femur_mus_gluteus_maximus_1Node5.F_dist +
  FMM.fmm_Femur_mus_gluteus_maximus_2Node3.F_dist +
  FMM.fmm_Femur_mus_gluteus_maximus_2Node4.F_dist +
  FMM.fmm_Femur_mus_gluteus_maximus_2Node5.F_dist +
  FMM.fmm_Femur_mus_gluteus_maximus_2Node6.F_dist +
  FMM.fmm_Femur_mus_gluteus_maximus_3Node3.F_dist +
  FMM.fmm_Femur_mus_gluteus_maximus_3Node4.F_dist +
  FMM.fmm_Femur_mus_gluteus_maximus_3Node5.F_dist +
  FMM.fmm_Femur_mus_gluteus_maximus_3Node6.F_dist +
  FMM.fmm_Femur_mus_gluteus_maximus_4Node3.F_dist +
  FMM.fmm_Femur_mus_gluteus_maximus_4Node4.F_dist +
  FMM.fmm_Femur_mus_gluteus_maximus_4Node5.F_dist +
  FMM.fmm_Femur_mus_gluteus_maximus_5Node3.F_dist +
  FMM.fmm_Femur_mus_gluteus_maximus_5Node4.F_dist +
  FMM.fmm_Femur_mus_gluteus_maximus_5Node5.F_dist +
  FMM.fmm_Femur_mus_gluteus_maximus_5Node6.F_dist +
  FMM.fmm_Femur_mus_gemellus_inferiorNode2.F_dist +
  FMM.fmm_Femur_mus_gemellus_inferiorNode3.F_dist +
  FMM.fmm_Femur_mus_gemellus_superiorNode3.F_dist +
  FMM.fmm_Femur_mus_gemellus_superiorNode4.F_dist +
  FMM.fmm_Femur_mus_rectus_femoris_1Node1.F_dist +
  FMM.fmm_Femur_mus_rectus_femoris_1Node2.F_dist +
  FMM.fmm_Femur_mus_rectus_femoris_1Node3.F_dist +
  FMM.fmm_Femur_mus_rectus_femoris_2Node1.F_dist +
  FMM.fmm_Femur_mus_rectus_femoris_2Node2.F_dist +
  FMM.fmm_Femur_mus_rectus_femoris_2Node3.F_dist +
  FMM.fmm_Femur_mus_rectus_femoris_3Node1.F_dist +
  FMM.fmm_Femur_mus_rectus_femoris_3Node2.F_dist +
  FMM.fmm_Femur_mus_rectus_femoris_3Node3.F_dist +
  FMM.fmm_Femur_mus_rectus_femoris_4Node1.F_dist +
  FMM.fmm_Femur_mus_rectus_femoris_4Node2.F_dist +
  FMM.fmm_Femur_mus_rectus_femoris_5Node1.F_dist +
  FMM.fmm_Femur_mus_rectus_femoris_5Node2.F_dist +
  FMM.fmm_Femur_mus_vastus_lateralis_1Node0.F_dist +
  FMM.fmm_Femur_mus_vastus_lateralis_1Node1.F_dist +
  FMM.fmm_Femur_mus_vastus_lateralis_2Node0.F_dist +
  FMM.fmm_Femur_mus_vastus_lateralis_2Node1.F_dist +
  FMM.fmm_Femur_mus_vastus_lateralis_2Node2.F_dist +
  FMM.fmm_Femur_mus_vastus_lateralis_3Node0.F_dist +
  FMM.fmm_Femur_mus_vastus_lateralis_3Node1.F_dist +
  FMM.fmm_Femur_mus_vastus_lateralis_3Node2.F_dist +
  FMM.fmm_Femur_mus_vastus_lateralis_4Node0.F_dist +
  FMM.fmm_Femur_mus_vastus_lateralis_4Node1.F_dist +
  FMM.fmm_Femur_mus_vastus_medialisNode0.F_dist +
  FMM.fmm_Femur_mus_vastus_medialisNode1.F_dist +
  FMM.fmm_Femur_mus_vastus_intermediusNode0.F_dist +
  FMM.fmm_Femur_mus_vastus_intermediusNode1.F_dist +
  FMM.fmm_Femur_mus_caudofemoralisNode3.F_dist +
  FMM.fmm_Femur_mus_caudofemoralisNode4.F_dist +
  FMM.fmm_Femur_mus_caudofemoralisNode5.F_dist +
  FMM.fmm_Femur_mus_caudofemoralisNode6.F_dist +
  FMM.fmm_Femur_mus_biceps_femoris_1Node2.F_dist +
  FMM.fmm_Femur_mus_biceps_femoris_1Node3.F_dist +
  FMM.fmm_Femur_mus_biceps_femoris_1Node4.F_dist +
  FMM.fmm_Femur_mus_popliteus_12Node3.F_dist +
  FMM.fmm_Femur_mus_biceps_femoris_3Node2.F_dist +
  FMM.fmm_Femur_mus_adductor_brevis_1Node2.F_dist +
  FMM.fmm_Femur_mus_adductor_brevis_1Node3.F_dist +
  FMM.fmm_Femur_mus_adductor_brevis_1Node4.F_dist +
  FMM.fmm_Femur_mus_adductor_brevis_2Node2.F_dist +
  FMM.fmm_Femur_mus_adductor_brevis_2Node3.F_dist +
  FMM.fmm_Femur_mus_adductor_brevis_2Node4.F_dist +
  FMM.fmm_Femur_mus_adductor_brevis_3Node2.F_dist +
  FMM.fmm_Femur_mus_adductor_brevis_3Node3.F_dist +
  FMM.fmm_Femur_mus_adductor_brevis_4Node2.F_dist +
  FMM.fmm_Femur_mus_adductor_brevis_4Node3.F_dist +
  FMM.fmm_Femur_mus_adductor_brevis_4Node4.F_dist +
  FMM.fmm_Femur_mus_adductor_longus_1Node2.F_dist +
  FMM.fmm_Femur_mus_adductor_longus_1Node3.F_dist +
  FMM.fmm_Femur_mus_adductor_longus_2Node2.F_dist +
  FMM.fmm_Femur_mus_adductor_longus_2Node3.F_dist +
  FMM.fmm_Femur_mus_adductor_longus_3Node2.F_dist +
  FMM.fmm_Femur_mus_adductor_longus_3Node3.F_dist +
  FMM.fmm_Femur_mus_adductor_magnusNode2.F_dist +
  FMM.fmm_Femur_mus_adductor_magnusNode3.F_dist +
  FMM.fmm_Femur_mus_adductor_magnusNode4.F_dist +
  FMM.fmm_Femur_mus_adductor_magnusNode5.F_dist +
  FMM.fmm_Hip.F_dist +
  FMM.fmm_Knee.F_dist +
  FMM.fmm_Pat.F_dist +
  FMM.fmm_COP.F_dist;

  AnyVec3 Mcut_dist =
  FMM.fmm_Femur_mus_extensor_digitorum_longus_1Node0.M_dist +
  FMM.fmm_Femur_mus_extensor_digitorum_longus_2Node0.M_dist +
  FMM.fmm_Femur_mus_extensor_digitorum_longus_3Node0.M_dist +
  FMM.fmm_Femur_mus_extensor_digitorum_longus_4Node0.M_dist +
  FMM.fmm_Femur_mus_popliteus_1Node0.M_dist +
  FMM.fmm_Femur_mus_popliteus_1Node1.M_dist +
  FMM.fmm_Femur_mus_popliteus_2Node0.M_dist +
  FMM.fmm_Femur_mus_popliteus_2Node1.M_dist +
  FMM.fmm_Femur_mus_tibialis_anteriorNode0.M_dist +
  FMM.fmm_Femur_mus_gastrocnemius_soleus_1Node0.M_dist +
  FMM.fmm_Femur_mus_gastrocnemius_soleus_2Node0.M_dist +
  FMM.fmm_Femur_mus_tensor_fasciae_latae_1Node3.M_dist +
  FMM.fmm_Femur_mus_tensor_fasciae_latae_1Node4.M_dist +
  FMM.fmm_Femur_mus_tensor_fasciae_latae_1Node5.M_dist +
  FMM.fmm_Femur_mus_tensor_fasciae_latae_2Node3.M_dist +
  FMM.fmm_Femur_mus_tensor_fasciae_latae_2Node4.M_dist +
  FMM.fmm_Femur_mus_tensor_fasciae_latae_2Node5.M_dist +
  FMM.fmm_Femur_mus_fasciae_latae_3Node3.M_dist +
  FMM.fmm_Femur_mus_fasciae_latae_3Node4.M_dist +
  FMM.fmm_Femur_mus_fasciae_latae_3Node5.M_dist +
  FMM.fmm_Femur_mus_semitendinosusNode1.M_dist +
  FMM.fmm_Femur_mus_semimembranosusNode1.M_dist +
  FMM.fmm_Femur_mus_semimembranosusNode2.M_dist +
  FMM.fmm_Femur_mus_quadratus_femorisNode2.M_dist +
  FMM.fmm_Femur_mus_psoas_minor_1Node1.M_dist +
  FMM.fmm_Femur_mus_psoas_minor_1Node2.M_dist +
  FMM.fmm_Femur_mus_psoas_minor_2Node1.M_dist +
  FMM.fmm_Femur_mus_psoas_minor_2Node2.M_dist +
  FMM.fmm_Femur_mus_psoas_minor_3Node1.M_dist +
  FMM.fmm_Femur_mus_psoas_minor_3Node2.M_dist +
  FMM.fmm_Femur_mus_psoas_minor_4Node1.M_dist +
  FMM.fmm_Femur_mus_psoas_minor_4Node2.M_dist +
  FMM.fmm_Femur_mus_psoas_major_1Node1.M_dist +
  FMM.fmm_Femur_mus_psoas_major_1Node2.M_dist +
  FMM.fmm_Femur_mus_psoas_major_2Node1.M_dist +
  FMM.fmm_Femur_mus_psoas_major_2Node2.M_dist +
  FMM.fmm_Femur_mus_psoas_major_3Node1.M_dist +
  FMM.fmm_Femur_mus_psoas_major_3Node2.M_dist +
  FMM.fmm_Femur_mus_psoas_major_4Node1.M_dist +
  FMM.fmm_Femur_mus_psoas_major_4Node2.M_dist +
  FMM.fmm_Femur_mus_pectineusNode1.M_dist +
  FMM.fmm_Femur_mus_obturatorius_internus_1Node2.M_dist +
  FMM.fmm_Femur_mus_obturatorius_internus_2Node2.M_dist +
  FMM.fmm_Femur_mus_obturatorius_externus_1Node2.M_dist +
  FMM.fmm_Femur_mus_obturatorius_externus_2Node2.M_dist +
  FMM.fmm_Femur_mus_extensor_digitorum_brevis_11Node2.M_dist +
  FMM.fmm_Femur_mus_extensor_digitorum_brevis_12Node2.M_dist +
  FMM.fmm_Femur_mus_extensor_digitorum_brevis_13Node2.M_dist +
  FMM.fmm_Femur_mus_extensor_digitorum_brevis_14Node2.M_dist +
  FMM.fmm_Femur_mus_extensor_digitorum_brevis_15Node2.M_dist +
  FMM.fmm_Femur_mus_iliacusNode3.M_dist +
  FMM.fmm_Femur_mus_iliacusNode4.M_dist +
  FMM.fmm_Femur_mus_gracilis_posticusNode2.M_dist +
  FMM.fmm_Femur_mus_gracilis_posticusNode3.M_dist +
  FMM.fmm_Femur_mus_gracilis_posticusNode4.M_dist +
  FMM.fmm_Femur_mus_gracilis_anticusNode2.M_dist +
  FMM.fmm_Femur_mus_gracilis_anticusNode3.M_dist +
  FMM.fmm_Femur_mus_gracilis_anticusNode4.M_dist +
  FMM.fmm_Femur_mus_gluteus_minimus_1Node3.M_dist +
  FMM.fmm_Femur_mus_gluteus_minimus_2Node2.M_dist +
  FMM.fmm_Femur_mus_gluteus_mediusNode3.M_dist +
  FMM.fmm_Femur_mus_gluteus_mediusNode4.M_dist +
  FMM.fmm_Femur_mus_gluteus_maximus_1Node3.M_dist +
  FMM.fmm_Femur_mus_gluteus_maximus_1Node4.M_dist +
  FMM.fmm_Femur_mus_gluteus_maximus_1Node5.M_dist +
  FMM.fmm_Femur_mus_gluteus_maximus_2Node3.M_dist +
  FMM.fmm_Femur_mus_gluteus_maximus_2Node4.M_dist +
  FMM.fmm_Femur_mus_gluteus_maximus_2Node5.M_dist +
  FMM.fmm_Femur_mus_gluteus_maximus_2Node6.M_dist +
  FMM.fmm_Femur_mus_gluteus_maximus_3Node3.M_dist +
  FMM.fmm_Femur_mus_gluteus_maximus_3Node4.M_dist +
  FMM.fmm_Femur_mus_gluteus_maximus_3Node5.M_dist +
  FMM.fmm_Femur_mus_gluteus_maximus_3Node6.M_dist +
  FMM.fmm_Femur_mus_gluteus_maximus_4Node3.M_dist +
  FMM.fmm_Femur_mus_gluteus_maximus_4Node4.M_dist +
  FMM.fmm_Femur_mus_gluteus_maximus_4Node5.M_dist +
  FMM.fmm_Femur_mus_gluteus_maximus_5Node3.M_dist +
  FMM.fmm_Femur_mus_gluteus_maximus_5Node4.M_dist +
  FMM.fmm_Femur_mus_gluteus_maximus_5Node5.M_dist +
  FMM.fmm_Femur_mus_gluteus_maximus_5Node6.M_dist +
  FMM.fmm_Femur_mus_gemellus_inferiorNode2.M_dist +
  FMM.fmm_Femur_mus_gemellus_inferiorNode3.M_dist +
  FMM.fmm_Femur_mus_gemellus_superiorNode3.M_dist +
  FMM.fmm_Femur_mus_gemellus_superiorNode4.M_dist +
  FMM.fmm_Femur_mus_rectus_femoris_1Node1.M_dist +
  FMM.fmm_Femur_mus_rectus_femoris_1Node2.M_dist +
  FMM.fmm_Femur_mus_rectus_femoris_1Node3.M_dist +
  FMM.fmm_Femur_mus_rectus_femoris_2Node1.M_dist +
  FMM.fmm_Femur_mus_rectus_femoris_2Node2.M_dist +
  FMM.fmm_Femur_mus_rectus_femoris_2Node3.M_dist +
  FMM.fmm_Femur_mus_rectus_femoris_3Node1.M_dist +
  FMM.fmm_Femur_mus_rectus_femoris_3Node2.M_dist +
  FMM.fmm_Femur_mus_rectus_femoris_3Node3.M_dist +
  FMM.fmm_Femur_mus_rectus_femoris_4Node1.M_dist +
  FMM.fmm_Femur_mus_rectus_femoris_4Node2.M_dist +
  FMM.fmm_Femur_mus_rectus_femoris_5Node1.M_dist +
  FMM.fmm_Femur_mus_rectus_femoris_5Node2.M_dist +
  FMM.fmm_Femur_mus_vastus_lateralis_1Node0.M_dist +
  FMM.fmm_Femur_mus_vastus_lateralis_1Node1.M_dist +
  FMM.fmm_Femur_mus_vastus_lateralis_2Node0.M_dist +
  FMM.fmm_Femur_mus_vastus_lateralis_2Node1.M_dist +
  FMM.fmm_Femur_mus_vastus_lateralis_2Node2.M_dist +
  FMM.fmm_Femur_mus_vastus_lateralis_3Node0.M_dist +
  FMM.fmm_Femur_mus_vastus_lateralis_3Node1.M_dist +
  FMM.fmm_Femur_mus_vastus_lateralis_3Node2.M_dist +
  FMM.fmm_Femur_mus_vastus_lateralis_4Node0.M_dist +
  FMM.fmm_Femur_mus_vastus_lateralis_4Node1.M_dist +
  FMM.fmm_Femur_mus_vastus_medialisNode0.M_dist +
  FMM.fmm_Femur_mus_vastus_medialisNode1.M_dist +
  FMM.fmm_Femur_mus_vastus_intermediusNode0.M_dist +
  FMM.fmm_Femur_mus_vastus_intermediusNode1.M_dist +
  FMM.fmm_Femur_mus_caudofemoralisNode3.M_dist +
  FMM.fmm_Femur_mus_caudofemoralisNode4.M_dist +
  FMM.fmm_Femur_mus_caudofemoralisNode5.M_dist +
  FMM.fmm_Femur_mus_caudofemoralisNode6.M_dist +
  FMM.fmm_Femur_mus_biceps_femoris_1Node2.M_dist +
  FMM.fmm_Femur_mus_biceps_femoris_1Node3.M_dist +
  FMM.fmm_Femur_mus_biceps_femoris_1Node4.M_dist +
  FMM.fmm_Femur_mus_popliteus_12Node3.M_dist +
  FMM.fmm_Femur_mus_biceps_femoris_3Node2.M_dist +
  FMM.fmm_Femur_mus_adductor_brevis_1Node2.M_dist +
  FMM.fmm_Femur_mus_adductor_brevis_1Node3.M_dist +
  FMM.fmm_Femur_mus_adductor_brevis_1Node4.M_dist +
  FMM.fmm_Femur_mus_adductor_brevis_2Node2.M_dist +
  FMM.fmm_Femur_mus_adductor_brevis_2Node3.M_dist +
  FMM.fmm_Femur_mus_adductor_brevis_2Node4.M_dist +
  FMM.fmm_Femur_mus_adductor_brevis_3Node2.M_dist +
  FMM.fmm_Femur_mus_adductor_brevis_3Node3.M_dist +
  FMM.fmm_Femur_mus_adductor_brevis_4Node2.M_dist +
  FMM.fmm_Femur_mus_adductor_brevis_4Node3.M_dist +
  FMM.fmm_Femur_mus_adductor_brevis_4Node4.M_dist +
  FMM.fmm_Femur_mus_adductor_longus_1Node2.M_dist +
  FMM.fmm_Femur_mus_adductor_longus_1Node3.M_dist +
  FMM.fmm_Femur_mus_adductor_longus_2Node2.M_dist +
  FMM.fmm_Femur_mus_adductor_longus_2Node3.M_dist +
  FMM.fmm_Femur_mus_adductor_longus_3Node2.M_dist +
  FMM.fmm_Femur_mus_adductor_longus_3Node3.M_dist +
  FMM.fmm_Femur_mus_adductor_magnusNode2.M_dist +
  FMM.fmm_Femur_mus_adductor_magnusNode3.M_dist +
  FMM.fmm_Femur_mus_adductor_magnusNode4.M_dist +
  FMM.fmm_Femur_mus_adductor_magnusNode5.M_dist +
  FMM.fmm_Hip.M_dist +
  FMM.fmm_Knee.M_dist +
  FMM.fmm_Pat.M_dist +
  FMM.fmm_COP.M_dist;

  AnyVec3 Fcut_prox =
  FMM.fmm_Femur_mus_extensor_digitorum_longus_1Node0.F_prox +
  FMM.fmm_Femur_mus_extensor_digitorum_longus_2Node0.F_prox +
  FMM.fmm_Femur_mus_extensor_digitorum_longus_3Node0.F_prox +
  FMM.fmm_Femur_mus_extensor_digitorum_longus_4Node0.F_prox +
  FMM.fmm_Femur_mus_popliteus_1Node0.F_prox +
  FMM.fmm_Femur_mus_popliteus_1Node1.F_prox +
  FMM.fmm_Femur_mus_popliteus_2Node0.F_prox +
  FMM.fmm_Femur_mus_popliteus_2Node1.F_prox +
  FMM.fmm_Femur_mus_tibialis_anteriorNode0.F_prox +
  FMM.fmm_Femur_mus_gastrocnemius_soleus_1Node0.F_prox +
  FMM.fmm_Femur_mus_gastrocnemius_soleus_2Node0.F_prox +
  FMM.fmm_Femur_mus_tensor_fasciae_latae_1Node3.F_prox +
  FMM.fmm_Femur_mus_tensor_fasciae_latae_1Node4.F_prox +
  FMM.fmm_Femur_mus_tensor_fasciae_latae_1Node5.F_prox +
  FMM.fmm_Femur_mus_tensor_fasciae_latae_2Node3.F_prox +
  FMM.fmm_Femur_mus_tensor_fasciae_latae_2Node4.F_prox +
  FMM.fmm_Femur_mus_tensor_fasciae_latae_2Node5.F_prox +
  FMM.fmm_Femur_mus_fasciae_latae_3Node3.F_prox +
  FMM.fmm_Femur_mus_fasciae_latae_3Node4.F_prox +
  FMM.fmm_Femur_mus_fasciae_latae_3Node5.F_prox +
  FMM.fmm_Femur_mus_semitendinosusNode1.F_prox +
  FMM.fmm_Femur_mus_semimembranosusNode1.F_prox +
  FMM.fmm_Femur_mus_semimembranosusNode2.F_prox +
  FMM.fmm_Femur_mus_quadratus_femorisNode2.F_prox +
  FMM.fmm_Femur_mus_psoas_minor_1Node1.F_prox +
  FMM.fmm_Femur_mus_psoas_minor_1Node2.F_prox +
  FMM.fmm_Femur_mus_psoas_minor_2Node1.F_prox +
  FMM.fmm_Femur_mus_psoas_minor_2Node2.F_prox +
  FMM.fmm_Femur_mus_psoas_minor_3Node1.F_prox +
  FMM.fmm_Femur_mus_psoas_minor_3Node2.F_prox +
  FMM.fmm_Femur_mus_psoas_minor_4Node1.F_prox +
  FMM.fmm_Femur_mus_psoas_minor_4Node2.F_prox +
  FMM.fmm_Femur_mus_psoas_major_1Node1.F_prox +
  FMM.fmm_Femur_mus_psoas_major_1Node2.F_prox +
  FMM.fmm_Femur_mus_psoas_major_2Node1.F_prox +
  FMM.fmm_Femur_mus_psoas_major_2Node2.F_prox +
  FMM.fmm_Femur_mus_psoas_major_3Node1.F_prox +
  FMM.fmm_Femur_mus_psoas_major_3Node2.F_prox +
  FMM.fmm_Femur_mus_psoas_major_4Node1.F_prox +
  FMM.fmm_Femur_mus_psoas_major_4Node2.F_prox +
  FMM.fmm_Femur_mus_pectineusNode1.F_prox +
  FMM.fmm_Femur_mus_obturatorius_internus_1Node2.F_prox +
  FMM.fmm_Femur_mus_obturatorius_internus_2Node2.F_prox +
  FMM.fmm_Femur_mus_obturatorius_externus_1Node2.F_prox +
  FMM.fmm_Femur_mus_obturatorius_externus_2Node2.F_prox +
  FMM.fmm_Femur_mus_extensor_digitorum_brevis_11Node2.F_prox +
  FMM.fmm_Femur_mus_extensor_digitorum_brevis_12Node2.F_prox +
  FMM.fmm_Femur_mus_extensor_digitorum_brevis_13Node2.F_prox +
  FMM.fmm_Femur_mus_extensor_digitorum_brevis_14Node2.F_prox +
  FMM.fmm_Femur_mus_extensor_digitorum_brevis_15Node2.F_prox +
  FMM.fmm_Femur_mus_iliacusNode3.F_prox +
  FMM.fmm_Femur_mus_iliacusNode4.F_prox +
  FMM.fmm_Femur_mus_gracilis_posticusNode2.F_prox +
  FMM.fmm_Femur_mus_gracilis_posticusNode3.F_prox +
  FMM.fmm_Femur_mus_gracilis_posticusNode4.F_prox +
  FMM.fmm_Femur_mus_gracilis_anticusNode2.F_prox +
  FMM.fmm_Femur_mus_gracilis_anticusNode3.F_prox +
  FMM.fmm_Femur_mus_gracilis_anticusNode4.F_prox +
  FMM.fmm_Femur_mus_gluteus_minimus_1Node3.F_prox +
  FMM.fmm_Femur_mus_gluteus_minimus_2Node2.F_prox +
  FMM.fmm_Femur_mus_gluteus_mediusNode3.F_prox +
  FMM.fmm_Femur_mus_gluteus_mediusNode4.F_prox +
  FMM.fmm_Femur_mus_gluteus_maximus_1Node3.F_prox +
  FMM.fmm_Femur_mus_gluteus_maximus_1Node4.F_prox +
  FMM.fmm_Femur_mus_gluteus_maximus_1Node5.F_prox +
  FMM.fmm_Femur_mus_gluteus_maximus_2Node3.F_prox +
  FMM.fmm_Femur_mus_gluteus_maximus_2Node4.F_prox +
  FMM.fmm_Femur_mus_gluteus_maximus_2Node5.F_prox +
  FMM.fmm_Femur_mus_gluteus_maximus_2Node6.F_prox +
  FMM.fmm_Femur_mus_gluteus_maximus_3Node3.F_prox +
  FMM.fmm_Femur_mus_gluteus_maximus_3Node4.F_prox +
  FMM.fmm_Femur_mus_gluteus_maximus_3Node5.F_prox +
  FMM.fmm_Femur_mus_gluteus_maximus_3Node6.F_prox +
  FMM.fmm_Femur_mus_gluteus_maximus_4Node3.F_prox +
  FMM.fmm_Femur_mus_gluteus_maximus_4Node4.F_prox +
  FMM.fmm_Femur_mus_gluteus_maximus_4Node5.F_prox +
  FMM.fmm_Femur_mus_gluteus_maximus_5Node3.F_prox +
  FMM.fmm_Femur_mus_gluteus_maximus_5Node4.F_prox +
  FMM.fmm_Femur_mus_gluteus_maximus_5Node5.F_prox +
  FMM.fmm_Femur_mus_gluteus_maximus_5Node6.F_prox +
  FMM.fmm_Femur_mus_gemellus_inferiorNode2.F_prox +
  FMM.fmm_Femur_mus_gemellus_inferiorNode3.F_prox +
  FMM.fmm_Femur_mus_gemellus_superiorNode3.F_prox +
  FMM.fmm_Femur_mus_gemellus_superiorNode4.F_prox +
  FMM.fmm_Femur_mus_rectus_femoris_1Node1.F_prox +
  FMM.fmm_Femur_mus_rectus_femoris_1Node2.F_prox +
  FMM.fmm_Femur_mus_rectus_femoris_1Node3.F_prox +
  FMM.fmm_Femur_mus_rectus_femoris_2Node1.F_prox +
  FMM.fmm_Femur_mus_rectus_femoris_2Node2.F_prox +
  FMM.fmm_Femur_mus_rectus_femoris_2Node3.F_prox +
  FMM.fmm_Femur_mus_rectus_femoris_3Node1.F_prox +
  FMM.fmm_Femur_mus_rectus_femoris_3Node2.F_prox +
  FMM.fmm_Femur_mus_rectus_femoris_3Node3.F_prox +
  FMM.fmm_Femur_mus_rectus_femoris_4Node1.F_prox +
  FMM.fmm_Femur_mus_rectus_femoris_4Node2.F_prox +
  FMM.fmm_Femur_mus_rectus_femoris_5Node1.F_prox +
  FMM.fmm_Femur_mus_rectus_femoris_5Node2.F_prox +
  FMM.fmm_Femur_mus_vastus_lateralis_1Node0.F_prox +
  FMM.fmm_Femur_mus_vastus_lateralis_1Node1.F_prox +
  FMM.fmm_Femur_mus_vastus_lateralis_2Node0.F_prox +
  FMM.fmm_Femur_mus_vastus_lateralis_2Node1.F_prox +
  FMM.fmm_Femur_mus_vastus_lateralis_2Node2.F_prox +
  FMM.fmm_Femur_mus_vastus_lateralis_3Node0.F_prox +
  FMM.fmm_Femur_mus_vastus_lateralis_3Node1.F_prox +
  FMM.fmm_Femur_mus_vastus_lateralis_3Node2.F_prox +
  FMM.fmm_Femur_mus_vastus_lateralis_4Node0.F_prox +
  FMM.fmm_Femur_mus_vastus_lateralis_4Node1.F_prox +
  FMM.fmm_Femur_mus_vastus_medialisNode0.F_prox +
  FMM.fmm_Femur_mus_vastus_medialisNode1.F_prox +
  FMM.fmm_Femur_mus_vastus_intermediusNode0.F_prox +
  FMM.fmm_Femur_mus_vastus_intermediusNode1.F_prox +
  FMM.fmm_Femur_mus_caudofemoralisNode3.F_prox +
  FMM.fmm_Femur_mus_caudofemoralisNode4.F_prox +
  FMM.fmm_Femur_mus_caudofemoralisNode5.F_prox +
  FMM.fmm_Femur_mus_caudofemoralisNode6.F_prox +
  FMM.fmm_Femur_mus_biceps_femoris_1Node2.F_prox +
  FMM.fmm_Femur_mus_biceps_femoris_1Node3.F_prox +
  FMM.fmm_Femur_mus_biceps_femoris_1Node4.F_prox +
  FMM.fmm_Femur_mus_popliteus_12Node3.F_prox +
  FMM.fmm_Femur_mus_biceps_femoris_3Node2.F_prox +
  FMM.fmm_Femur_mus_adductor_brevis_1Node2.F_prox +
  FMM.fmm_Femur_mus_adductor_brevis_1Node3.F_prox +
  FMM.fmm_Femur_mus_adductor_brevis_1Node4.F_prox +
  FMM.fmm_Femur_mus_adductor_brevis_2Node2.F_prox +
  FMM.fmm_Femur_mus_adductor_brevis_2Node3.F_prox +
  FMM.fmm_Femur_mus_adductor_brevis_2Node4.F_prox +
  FMM.fmm_Femur_mus_adductor_brevis_3Node2.F_prox +
  FMM.fmm_Femur_mus_adductor_brevis_3Node3.F_prox +
  FMM.fmm_Femur_mus_adductor_brevis_4Node2.F_prox +
  FMM.fmm_Femur_mus_adductor_brevis_4Node3.F_prox +
  FMM.fmm_Femur_mus_adductor_brevis_4Node4.F_prox +
  FMM.fmm_Femur_mus_adductor_longus_1Node2.F_prox +
  FMM.fmm_Femur_mus_adductor_longus_1Node3.F_prox +
  FMM.fmm_Femur_mus_adductor_longus_2Node2.F_prox +
  FMM.fmm_Femur_mus_adductor_longus_2Node3.F_prox +
  FMM.fmm_Femur_mus_adductor_longus_3Node2.F_prox +
  FMM.fmm_Femur_mus_adductor_longus_3Node3.F_prox +
  FMM.fmm_Femur_mus_adductor_magnusNode2.F_prox +
  FMM.fmm_Femur_mus_adductor_magnusNode3.F_prox +
  FMM.fmm_Femur_mus_adductor_magnusNode4.F_prox +
  FMM.fmm_Femur_mus_adductor_magnusNode5.F_prox +
  FMM.fmm_Hip.F_prox +
  FMM.fmm_Knee.F_prox +
  FMM.fmm_Pat.F_prox +
  FMM.fmm_COP.F_prox;

  AnyVec3 Mcut_prox =
  FMM.fmm_Femur_mus_extensor_digitorum_longus_1Node0.M_prox +
  FMM.fmm_Femur_mus_extensor_digitorum_longus_2Node0.M_prox +
  FMM.fmm_Femur_mus_extensor_digitorum_longus_3Node0.M_prox +
  FMM.fmm_Femur_mus_extensor_digitorum_longus_4Node0.M_prox +
  FMM.fmm_Femur_mus_popliteus_1Node0.M_prox +
  FMM.fmm_Femur_mus_popliteus_1Node1.M_prox +
  FMM.fmm_Femur_mus_popliteus_2Node0.M_prox +
  FMM.fmm_Femur_mus_popliteus_2Node1.M_prox +
  FMM.fmm_Femur_mus_tibialis_anteriorNode0.M_prox +
  FMM.fmm_Femur_mus_gastrocnemius_soleus_1Node0.M_prox +
  FMM.fmm_Femur_mus_gastrocnemius_soleus_2Node0.M_prox +
  FMM.fmm_Femur_mus_tensor_fasciae_latae_1Node3.M_prox +
  FMM.fmm_Femur_mus_tensor_fasciae_latae_1Node4.M_prox +
  FMM.fmm_Femur_mus_tensor_fasciae_latae_1Node5.M_prox +
  FMM.fmm_Femur_mus_tensor_fasciae_latae_2Node3.M_prox +
  FMM.fmm_Femur_mus_tensor_fasciae_latae_2Node4.M_prox +
  FMM.fmm_Femur_mus_tensor_fasciae_latae_2Node5.M_prox +
  FMM.fmm_Femur_mus_fasciae_latae_3Node3.M_prox +
  FMM.fmm_Femur_mus_fasciae_latae_3Node4.M_prox +
  FMM.fmm_Femur_mus_fasciae_latae_3Node5.M_prox +
  FMM.fmm_Femur_mus_semitendinosusNode1.M_prox +
  FMM.fmm_Femur_mus_semimembranosusNode1.M_prox +
  FMM.fmm_Femur_mus_semimembranosusNode2.M_prox +
  FMM.fmm_Femur_mus_quadratus_femorisNode2.M_prox +
  FMM.fmm_Femur_mus_psoas_minor_1Node1.M_prox +
  FMM.fmm_Femur_mus_psoas_minor_1Node2.M_prox +
  FMM.fmm_Femur_mus_psoas_minor_2Node1.M_prox +
  FMM.fmm_Femur_mus_psoas_minor_2Node2.M_prox +
  FMM.fmm_Femur_mus_psoas_minor_3Node1.M_prox +
  FMM.fmm_Femur_mus_psoas_minor_3Node2.M_prox +
  FMM.fmm_Femur_mus_psoas_minor_4Node1.M_prox +
  FMM.fmm_Femur_mus_psoas_minor_4Node2.M_prox +
  FMM.fmm_Femur_mus_psoas_major_1Node1.M_prox +
  FMM.fmm_Femur_mus_psoas_major_1Node2.M_prox +
  FMM.fmm_Femur_mus_psoas_major_2Node1.M_prox +
  FMM.fmm_Femur_mus_psoas_major_2Node2.M_prox +
  FMM.fmm_Femur_mus_psoas_major_3Node1.M_prox +
  FMM.fmm_Femur_mus_psoas_major_3Node2.M_prox +
  FMM.fmm_Femur_mus_psoas_major_4Node1.M_prox +
  FMM.fmm_Femur_mus_psoas_major_4Node2.M_prox +
  FMM.fmm_Femur_mus_pectineusNode1.M_prox +
  FMM.fmm_Femur_mus_obturatorius_internus_1Node2.M_prox +
  FMM.fmm_Femur_mus_obturatorius_internus_2Node2.M_prox +
  FMM.fmm_Femur_mus_obturatorius_externus_1Node2.M_prox +
  FMM.fmm_Femur_mus_obturatorius_externus_2Node2.M_prox +
  FMM.fmm_Femur_mus_extensor_digitorum_brevis_11Node2.M_prox +
  FMM.fmm_Femur_mus_extensor_digitorum_brevis_12Node2.M_prox +
  FMM.fmm_Femur_mus_extensor_digitorum_brevis_13Node2.M_prox +
  FMM.fmm_Femur_mus_extensor_digitorum_brevis_14Node2.M_prox +
  FMM.fmm_Femur_mus_extensor_digitorum_brevis_15Node2.M_prox +
  FMM.fmm_Femur_mus_iliacusNode3.M_prox +
  FMM.fmm_Femur_mus_iliacusNode4.M_prox +
  FMM.fmm_Femur_mus_gracilis_posticusNode2.M_prox +
  FMM.fmm_Femur_mus_gracilis_posticusNode3.M_prox +
  FMM.fmm_Femur_mus_gracilis_posticusNode4.M_prox +
  FMM.fmm_Femur_mus_gracilis_anticusNode2.M_prox +
  FMM.fmm_Femur_mus_gracilis_anticusNode3.M_prox +
  FMM.fmm_Femur_mus_gracilis_anticusNode4.M_prox +
  FMM.fmm_Femur_mus_gluteus_minimus_1Node3.M_prox +
  FMM.fmm_Femur_mus_gluteus_minimus_2Node2.M_prox +
  FMM.fmm_Femur_mus_gluteus_mediusNode3.M_prox +
  FMM.fmm_Femur_mus_gluteus_mediusNode4.M_prox +
  FMM.fmm_Femur_mus_gluteus_maximus_1Node3.M_prox +
  FMM.fmm_Femur_mus_gluteus_maximus_1Node4.M_prox +
  FMM.fmm_Femur_mus_gluteus_maximus_1Node5.M_prox +
  FMM.fmm_Femur_mus_gluteus_maximus_2Node3.M_prox +
  FMM.fmm_Femur_mus_gluteus_maximus_2Node4.M_prox +
  FMM.fmm_Femur_mus_gluteus_maximus_2Node5.M_prox +
  FMM.fmm_Femur_mus_gluteus_maximus_2Node6.M_prox +
  FMM.fmm_Femur_mus_gluteus_maximus_3Node3.M_prox +
  FMM.fmm_Femur_mus_gluteus_maximus_3Node4.M_prox +
  FMM.fmm_Femur_mus_gluteus_maximus_3Node5.M_prox +
  FMM.fmm_Femur_mus_gluteus_maximus_3Node6.M_prox +
  FMM.fmm_Femur_mus_gluteus_maximus_4Node3.M_prox +
  FMM.fmm_Femur_mus_gluteus_maximus_4Node4.M_prox +
  FMM.fmm_Femur_mus_gluteus_maximus_4Node5.M_prox +
  FMM.fmm_Femur_mus_gluteus_maximus_5Node3.M_prox +
  FMM.fmm_Femur_mus_gluteus_maximus_5Node4.M_prox +
  FMM.fmm_Femur_mus_gluteus_maximus_5Node5.M_prox +
  FMM.fmm_Femur_mus_gluteus_maximus_5Node6.M_prox +
  FMM.fmm_Femur_mus_gemellus_inferiorNode2.M_prox +
  FMM.fmm_Femur_mus_gemellus_inferiorNode3.M_prox +
  FMM.fmm_Femur_mus_gemellus_superiorNode3.M_prox +
  FMM.fmm_Femur_mus_gemellus_superiorNode4.M_prox +
  FMM.fmm_Femur_mus_rectus_femoris_1Node1.M_prox +
  FMM.fmm_Femur_mus_rectus_femoris_1Node2.M_prox +
  FMM.fmm_Femur_mus_rectus_femoris_1Node3.M_prox +
  FMM.fmm_Femur_mus_rectus_femoris_2Node1.M_prox +
  FMM.fmm_Femur_mus_rectus_femoris_2Node2.M_prox +
  FMM.fmm_Femur_mus_rectus_femoris_2Node3.M_prox +
  FMM.fmm_Femur_mus_rectus_femoris_3Node1.M_prox +
  FMM.fmm_Femur_mus_rectus_femoris_3Node2.M_prox +
  FMM.fmm_Femur_mus_rectus_femoris_3Node3.M_prox +
  FMM.fmm_Femur_mus_rectus_femoris_4Node1.M_prox +
  FMM.fmm_Femur_mus_rectus_femoris_4Node2.M_prox +
  FMM.fmm_Femur_mus_rectus_femoris_5Node1.M_prox +
  FMM.fmm_Femur_mus_rectus_femoris_5Node2.M_prox +
  FMM.fmm_Femur_mus_vastus_lateralis_1Node0.M_prox +
  FMM.fmm_Femur_mus_vastus_lateralis_1Node1.M_prox +
  FMM.fmm_Femur_mus_vastus_lateralis_2Node0.M_prox +
  FMM.fmm_Femur_mus_vastus_lateralis_2Node1.M_prox +
  FMM.fmm_Femur_mus_vastus_lateralis_2Node2.M_prox +
  FMM.fmm_Femur_mus_vastus_lateralis_3Node0.M_prox +
  FMM.fmm_Femur_mus_vastus_lateralis_3Node1.M_prox +
  FMM.fmm_Femur_mus_vastus_lateralis_3Node2.M_prox +
  FMM.fmm_Femur_mus_vastus_lateralis_4Node0.M_prox +
  FMM.fmm_Femur_mus_vastus_lateralis_4Node1.M_prox +
  FMM.fmm_Femur_mus_vastus_medialisNode0.M_prox +
  FMM.fmm_Femur_mus_vastus_medialisNode1.M_prox +
  FMM.fmm_Femur_mus_vastus_intermediusNode0.M_prox +
  FMM.fmm_Femur_mus_vastus_intermediusNode1.M_prox +
  FMM.fmm_Femur_mus_caudofemoralisNode3.M_prox +
  FMM.fmm_Femur_mus_caudofemoralisNode4.M_prox +
  FMM.fmm_Femur_mus_caudofemoralisNode5.M_prox +
  FMM.fmm_Femur_mus_caudofemoralisNode6.M_prox +
  FMM.fmm_Femur_mus_biceps_femoris_1Node2.M_prox +
  FMM.fmm_Femur_mus_biceps_femoris_1Node3.M_prox +
  FMM.fmm_Femur_mus_biceps_femoris_1Node4.M_prox +
  FMM.fmm_Femur_mus_popliteus_12Node3.M_prox +
  FMM.fmm_Femur_mus_biceps_femoris_3Node2.M_prox +
  FMM.fmm_Femur_mus_adductor_brevis_1Node2.M_prox +
  FMM.fmm_Femur_mus_adductor_brevis_1Node3.M_prox +
  FMM.fmm_Femur_mus_adductor_brevis_1Node4.M_prox +
  FMM.fmm_Femur_mus_adductor_brevis_2Node2.M_prox +
  FMM.fmm_Femur_mus_adductor_brevis_2Node3.M_prox +
  FMM.fmm_Femur_mus_adductor_brevis_2Node4.M_prox +
  FMM.fmm_Femur_mus_adductor_brevis_3Node2.M_prox +
  FMM.fmm_Femur_mus_adductor_brevis_3Node3.M_prox +
  FMM.fmm_Femur_mus_adductor_brevis_4Node2.M_prox +
  FMM.fmm_Femur_mus_adductor_brevis_4Node3.M_prox +
  FMM.fmm_Femur_mus_adductor_brevis_4Node4.M_prox +
  FMM.fmm_Femur_mus_adductor_longus_1Node2.M_prox +
  FMM.fmm_Femur_mus_adductor_longus_1Node3.M_prox +
  FMM.fmm_Femur_mus_adductor_longus_2Node2.M_prox +
  FMM.fmm_Femur_mus_adductor_longus_2Node3.M_prox +
  FMM.fmm_Femur_mus_adductor_longus_3Node2.M_prox +
  FMM.fmm_Femur_mus_adductor_longus_3Node3.M_prox +
  FMM.fmm_Femur_mus_adductor_magnusNode2.M_prox +
  FMM.fmm_Femur_mus_adductor_magnusNode3.M_prox +
  FMM.fmm_Femur_mus_adductor_magnusNode4.M_prox +
  FMM.fmm_Femur_mus_adductor_magnusNode5.M_prox +
  FMM.fmm_Hip.M_prox +
  FMM.fmm_Knee.M_prox +
  FMM.fmm_Pat.M_prox +
  FMM.fmm_COP.M_prox;

  AnyVec3 Fcut_dist_local = Fcut_dist * Main.RatModel.Seg.Femur.Axes;
  AnyVec3 Mcut_dist_local = Mcut_dist * Main.RatModel.Seg.Femur.Axes;
  AnyVec3 Fcut_prox_local = Fcut_prox * Main.RatModel.Seg.Femur.Axes;
  AnyVec3 Mcut_prox_local = Fcut_dist * Main.RatModel.Seg.Femur.Axes;

  AnyFloat Fcut_total = vnorm(Fcut_dist);
  AnyFloat Mcut_total = vnorm(Mcut_dist);

  AnyVec3 F_err = Fcut_dist + Fcut_prox;
  AnyVec3 M_err = Mcut_dist + Mcut_prox;

  AnyForceMomentMeasure2 masseffect = {
    AnyRefFrame &r = Main.RatModel.Seg.Femur.Cut_Node;
    AnySeg &s = Main.RatModel.Seg.Femur;
    IncludeGravity = On;
    IncludeInertiaForces = On;
  };


  AnyFloat mass_effect_F_sum = masseffect.F;
  AnyFloat mass_effect_M_sum = masseffect.M;

};
