  /// --------------------------------------------------------
  /// Driver Positions - distances in meters and angles
  /// in degrees
  /// --------------------------------------------------------
  AnyFolder DrvPos = {
    AnyVar PelvisSeatLinXPos = 0.05;
    AnyVar SeatGlobalLinYPos = 0;
    AnyVar SeatGlobalRotZPos = 0;
    AnyVar BackRestHeadResRotZPos = 0;
    AnyVar GlobalLegRestRotZPos = 0;
    AnyVar GlobalBackRestRotZPos = -10;
    AnyVar LegRestFootRestLinYPos = 0.15;
  }; // DrvPos

  /// --------------------------------------------------------
  /// Driver Velocities - in degrees per second
  /// --------------------------------------------------------
  AnyFolder DrvVel = {
    AnyVar PelvisSeatLinXVel = 0.0/Main.Study.tEnd;
    AnyVar SeatGlobalLinYVel = 0/Main.Study.tEnd;
    AnyVar SeatGlobalRotZVel = 0/Main.Study.tEnd;
    AnyVar SeatInclVel = 0/Main.Study.tEnd;
    AnyVar GlobalBackRestRotZVel = 40/Main.Study.tEnd;
    AnyVar GlobalLegRestRotZVel = 0/Main.Study.tEnd;
    AnyVar LegRestFootRestLinYVel = 0/Main.Study.tEnd;
  }; // DrvVel

  // --------------------------------------------------------
  // Support settings
  // --------------------------------------------------------
  AnyFolder SupportSettings = {

    // Friction coefficients between the human and the chair
    AnyVar StaticFrictionSeat= 0.5;
    AnyVar StaticFrictionBackrest=0.5;
    AnyVar StaticFrictionFootrest=0.5;

    // Strenght of the supports between the human and the chair
    AnyVar SeatSupportStrength=30000;
    AnyVar BackrestSupportStrength=30000;
    AnyVar FootrestSupportStrength=30000;
    AnyVar ArmrestSupportStrength=30000;
  };
