AnyFolder Support={
  AnyComponentDefinition obj = {};
  #include "BackrestSupport.any"
  #include "SeatSupport.any"
  #include "FootrestSupport.any"
  #include "LegrestSupport.any"
  #include "ArmSupport.any"

 // AnyVar Strength=10000;


};
