#include "../libdef.any"

//This is a model of a arm curl
//The human body consist of a fullbody model

//The objective of this example is to adjust the eccentricity of the cable wheel such that the
//arm muscles experience a constant effort throughout the elbow flexion taking the change of
//moment arms of the muscles into account.

//It is not possible to obtain a completely constant muscle effort with only the eccentricity
//as parameter. However, if more parameters were introduced into an actual design optimization,
//then it is likely that an almost completely uniform effort profile could be obtained.

//By chaning between the files "EnvironmentOptimized.any" and "Environment.any" it is possible to
//to see the machine with adjusted eccentricity and the one with zero eccentricity

Main = {

  /**Execute this operation to run the model in the intended operation sequence.
  It is also possible to run operations seperately, by manual selections in the operation tree*/
  AnyOperationSequence RunApplication = {

    /**This operation calibrates the muscles in the model if these are of the type AnyMuscleModel3E.
    This will just be an empty operation if the model is using a muscle type that does not require calibration.*/
    AnyOperation &CalibrationAnal = Main.HumanModel.Calibration.CalibrationSequence;

    ///This operation is the inverse dynamic analysis
    AnyOperation &InvAnal=Main.Study.InverseDynamics;

  };

  #include "DrawSettings.any"
    AnyFolder HumanModel={
       AnyFolder &Mannequin=.Model.Mannequin;

           //This model should be used when playing around with the model in the
      //initial modelling phase since leaving the normal muscles out, makes the
      //model run much faster. The model uses artificial muscles on each dof. in
      //the joints which makes it possible also to run the inverse analysis.
      //#include  "<ANYBODY_PATH_BODY>\BodyModels\FullBodyModel\BodyModel_NoMuscles.any"

      //This model uses the simple constant force muscles
      #include  "BodyPartsSetup.any"
      #include  "<ANYBODY_PATH_BODY>/BodyModels/GenericBodyModel/BodyModel.any"


      //This model uses the simple constant force muscles for shoulder-arm and spine
      //but the 3 element hill type model for the legs
      //Remember to calibrtate the legs before running the inverse anlysis
      //This is done by pressing Main.Bike3D.Model.humanModel.CalibrationSequence in the
      //operationtree(lower left corner of screen)
      //#include  "<ANYBODY_PATH_BODY>/BodyModels/FullBodyModel/BodyModel_Mus3E.any"

      //#include  "<ANYBODY_PATH_BODY>/BodyModels/TrunkRightArm/BodyModel.any"
      AnyFolder StrengthParameters={
        AnyVar SpecificMuscleTensionSpine= 90; //N/cm^2
        AnyVar StrengthIndexLeg= 1;
        AnyVar SpecificMuscleTensionShoulderArm= 90; //N/cm^2
      };

      #include "<ANYBODY_PATH_BODY>/Scaling/ScalingStandard.any"

    };

    AnyFolder Model={
    AnyFolder &HumanModel=.HumanModel.BodyModel;

   #include "EnvironmentOptimized.any"
// #include "Environment.any"
      //The Mannequin values is used both for setting the initial positions of the model
    //and driving the model at analysis time. So you can change the values in the Mannequin
    //file and it will change both initial positions and how it is positioned at analysis time.
    //If you want to run the model into some posture and then dump the momentary joint angles as the
    //initial ones then simply do the following:
    // 1  Double click the folder Main.MannequinValuesFromModel.AnyFolder_Posture and it will dump the joint angles to the message window
    // 2. Copy the dumped text into the Mannequin.any replacing the "Posture" folder
    // 3. Press ctrl+h and search and replace "_" with " "
    // 4. Rename the folder name Main.Model.MannequinValuesFromModel.AnyFolder_Posture to Posture
    // 5. Once the model is reloaded it will start in the position corresponding to the one which was dumped.
    //This file contains joint angles which are used at load time for setting the initial positions
    #include "Mannequin.any"
    AnyFolder ModelEnvironmentConnection = {
      #include "JointsAndDrivers.any"
    };

  };

  AnyBodyStudy Study = {
    AnyFolder &Model = .Model;
    tEnd = 10.0;
    Gravity = {0.0, -9.81, 0.0};
    nStep = 21;
  }; // End of study


}; //Main
