// **********************************************************
//   This folder contains the model of a full body, it is build using the following blocks
//   from the BRep
//      BRep\AAUHuman\TrunkSimpleSpine\Trunk.root.any  root file for the trunk model
//      BRep\AAUHuman\Arm3D\ShoulderArm.root.any"  root file for the shoulder and arm
//      BRep\AAUHuman\Leg3D\LegMus3E.root.any  root file for the leg
//
//    The structure of the file is the following
//
//
//       Trunk =  {
//          Trunk.root.any
//       }
//       Right ={
//          ShoulderArm ={
//            ShoulderArm.root.any
//          }
//          Leg={
//             Leg.root.any
//          }
//       }
//       Left ={
//          ShoulderArm ={
//            ShoulderArm.root.any
//          }
//          Leg={
//             Leg.root.any
//          }
//       }
//
// **********************************************************
  //This folder should eventually contain head torso and spine
  AnyFolder Trunk ={

   //This is a reference to where the colors for the model are located, the leg needs
    //  AnyVec3 Nodes
    //  AnyVec3 Segments
    AnyFolder &ColorRef = Main.Colors;
    #include "..\..\..\Body\AAUHuman\DetailedSpineModel\Trunk.root.any"
  };//Trunk


AnyFolder Right={

  AnyFolder ShoulderArm = {

    //-------------------------------------------------------
    // Interface references that specifies what the arm "Arm3D/ShoulderArm.any" should connect to
    //-------------------------------------------------------

    //This point is used for attachement of the arm to the shoulder
    AnyRefFrame &ShoulderRef = ..Trunk.SegmentsThorax.ThoraxSeg.ij;


    //This is a reference to where the body parameters are located the leg needs
    //  AnyVar BodyMass
    //  AnyVar BodyHeigth
    //  AnyVar Density
    AnyFolder &BodyParRef = Main.BodyParameters;

    //This is a reference to where the colors for the model are located, the leg needs
    //  AnyVec3 Nodes
    //  AnyVec3 Segments
    AnyFolder &ColorRef = Main.Colors;

    // **********************************************************
    // This is a reference to the folder which contains the scaling settings for the segment
    // **********************************************************
    AnyFolder &ScalingShoulderArm = Main.Scaling.ShoulderArm;

    // **********************************************************
    // This is a reference to the folder which contains the scaling settings for the segment
    // **********************************************************
   AnyFolder &ScalingTrunk = Main.Scaling.Trunk;


    //This is a sign variable which indicates that this is the right side
    AnyVar Sign =1;

    #include "..\..\..\Body\AAUHuman\Arm3D\ShoulderArm.root.any"  // Include shoulder muscles
//    #include "..\..\..\Body\AAUHuman\Arm3D\ShoulderArm.nomuscles.root.any"  // No shoulder muscles

  }; //End ShoulderArm

  AnyFolder Leg = {
     //This is a sign variable which indicates that this is the right side
      AnyVar Sign =1;

   //-------------------------------------------------------
    // Interface references that specifies what the leg "Leg3D/Leg.any" should connect to
    //-------------------------------------------------------
    // INPUT

   AnyRefFrame &HipNodeRef= ..Trunk.SegmentsLumbar.PelvisSeg.HipJointRight;
  // **********************************************************
  //  The following references refers to stuff that the Leg3D model will
  //  and which does not differ for rigth and left side
  // **********************************************************

  // **********************************************************
  //  This is a reference to where the body parameters are located
  //  the model will need the following quantities
  //  AnyVar BodyMass
  //  AnyVar BodyHeigth
  //  AnyVar Density
  // **********************************************************
  AnyFolder &BodyParRef = Main.BodyParameters;

  // **********************************************************
  //  This is a reference to where the colors for the model are located
  //  The model will need the following quantities
  //  AnyVec3 Nodes
  //  AnyVec3 Segments
  //  **********************************************************
  AnyFolder &ColorRef = Main.Colors;

  // **********************************************************
  // This is a reference to the folder which contains the drawing settings for the muscles
  // **********************************************************
  AnyFolder &MusDrawRef = Main.DrawSettings.Muscle;

   // **********************************************************
  // This is a reference to the folder which contains the scaling settings for the segment
  // **********************************************************
  AnyFolder &ScalingLeg = Main.Scaling.Leg;

 // **********************************************************
  // This is a reference to the folder which contains the scaling settings for the segment
  // **********************************************************
  AnyFolder &ScalingTrunk = Main.Scaling.Trunk;

//  #include "..\..\..\Body\AAUHuman\Leg3D\LegMus3E.root.any"
  #include "..\..\..\Body\AAUHuman\Leg3D\Leg.root.any"

  };//End Leg
};//Right


AnyFolder Left={


  AnyFolder ShoulderArm = {

    //-------------------------------------------------------
    // Interface references that specifies what the arm "Arm3D/ShoulderArm.any" should connect to
    //-------------------------------------------------------

    //This point is used for attachement of the arm to the shoulder
    AnyRefFrame &ShoulderRef = ..Trunk.SegmentsThorax.ThoraxSeg.iji;

    //This is a reference to where the body parameters are located the leg needs
    //  AnyVar BodyMass
    //  AnyVar BodyHeigth
    //  AnyVar Density
    AnyFolder &BodyParRef = Main.BodyParameters;

    //This is a reference to where the colors for the model are located, the leg needs
    //  AnyVec3 Nodes
    //  AnyVec3 Segments
    AnyFolder &ColorRef = Main.Colors;

    // **********************************************************
   // This is a reference to the folder which contains the scaling settings for the segment
   // **********************************************************
   AnyFolder &ScalingShoulderArm = Main.Scaling.ShoulderArm;

    // **********************************************************
    // This is a reference to the folder which contains the scaling settings for the segment
    // **********************************************************
    AnyFolder &ScalingTrunk = Main.Scaling.Trunk;


    //This is a sign variable which indicates that this is the right side
    AnyVar Sign =-1;

    #include "..\..\..\Body\AAUHuman\Arm3D\ShoulderArm.root.any"  // Include shoulder muscles
//    #include "..\..\..\Body\AAUHuman\Arm3D\ShoulderArm.nomuscles.root.any"  // No shoulder muscles

  }; //End ShoulderArm


  AnyFolder Leg = {

    //-------------------------------------------------------
    // Interface references that specifies what the leg "Leg3D/Leg.any" should connect to
    //-------------------------------------------------------

   AnyRefFrame &HipNodeRef= ..Trunk.SegmentsLumbar.PelvisSeg.HipJointLeft;

    // **********************************************************
    //  The following references refers to stuff that the Leg3D model will
    //  and which does not differ for rigth and left side
    // **********************************************************

    // **********************************************************
    //  This is a reference to where the body parameters are located
    //  the model will need the following quantities
    //  AnyVar BodyMass
    //  AnyVar BodyHeigth
    //  AnyVar Density
    // **********************************************************
    AnyFolder &BodyParRef = Main.BodyParameters;

    // **********************************************************
    //  This is a reference to where the colors for the model are located
    //  The model will need the following quantities
    //  AnyVec3 Nodes
    //  AnyVec3 Segments
    //  **********************************************************
    AnyFolder &ColorRef = Main.Colors;

    // **********************************************************
    // This is a reference to the folder which contains the drawing settings for the muscles
    // **********************************************************
    AnyFolder &MusDrawRef = Main.DrawSettings.Muscle;


    // **********************************************************
    // This is a reference to the folder which contains the scaling settings for the segment
    // **********************************************************
    AnyFolder &ScalingLeg = Main.Scaling.Leg;

    // **********************************************************
    // This is a reference to the folder which contains the scaling settings for the segment
    // **********************************************************
    AnyFolder &ScalingTrunk = Main.Scaling.Trunk;

    //This is a sign variable which indicates that this is the right side
    AnyVar Sign =-1;

//    #include "..\..\..\Body\AAUHuman\Leg3D\LegMus3E.root.any"
    #include "..\..\..\Body\AAUHuman\Leg3D\Leg.root.any"

  }; //End Leg

}; //End Left
