  /**Execute this operation to run the model in the intended operation sequence.
  It is also possible to run operations seperately, by manual selections in the operation tree*/
  AnyOperationSequence RunApplication = {

    /**This operation calibrates the muscles in the model if these are of the type AnyMuscleModel3E.
    This will just be an empty operation if the model is using a muscle type that does not require calibration.*/
    AnyOperation &CalibrationAnal = Main.HumanModel.Calibration.CalibrationSequence;

    ///This operation is the inverse dynamic analysis
    AnyOperation &InvAnal=Main.Study.InverseDynamics;

    #if AutoSaveOption
    /// This operation creates an h5 output file in the Output folder
    AnyOperationMacro save = {
      MacroStr={ "classoperation Main.Study.Output " + strquote("Save data") + " --file="+ "Output/" + ANYBODY_NAME_MAINFILE + ".anydata.h5 " + "--type=Deep"};
    };
    #endif
  };
