AnyFolder Mannequin = {


  AnyFolder Posture =
  {
    AnyVar PelvisPosX = 0.03450802;
    AnyVar PelvisPosY = 0.09853526;
    AnyVar PelvisPosZ = -1.800402e-011;
    AnyVar PelvisRotX = 0;
    AnyVar PelvisRotY = -6.153461e-009;
    AnyVar PelvisRotZ = -36;
    AnyVar PelvisThoraxExtension = -40;
    AnyVar PelvisThoraxLateralBending = 4.423202e-024;
    AnyVar PelvisThoraxRotation = 3.949378e-024;
    AnyVar NeckExtension = 0;
    AnyVar NeckLateralBending = 0;
    AnyVar NeckRotation = 0;
    AnyFolder Right =
    {
      AnyVar SternoClavicularProtraction = -22.91831;
      AnyVar SternoClavicularElevation = 11.45916;
      AnyVar SternoClavicularAxialRotation = -20.05352;
      AnyVar GlenohumeralFlexion = 77.1534;
      AnyVar GlenohumeralAbduction = 19.38513;
      AnyVar GlenohumeralExternalRotation = -10.81002;
      AnyVar ElbowFlexion = 79.91319;
      AnyVar ElbowPronation = 32.8006;
      AnyVar WristFlexion = 2.227093e-007;
      AnyVar WristAbduction = 0;
      AnyVar HipFlexion = 112.2748;
      AnyVar HipAbduction = -0.3628628;
      AnyVar HipExternalRotation = -2.311666;
      AnyVar KneeFlexion = 116.7452;
      AnyVar AnklePlantarFlexion = -17.82905;
        AnyVar SubTalarEversion = 0;
    };
    AnyFolder Left =
    {
      AnyVar SternoClavicularProtraction = -22.91831;
      AnyVar SternoClavicularElevation = 11.45916;
      AnyVar SternoClavicularAxialRotation = -20.05352;
      AnyVar GlenohumeralFlexion = 77.1534;
      AnyVar GlenohumeralAbduction = 19.38513;
      AnyVar GlenohumeralExternalRotation = -10.81002;
      AnyVar ElbowFlexion = 79.91319;
      AnyVar ElbowPronation = 32.8006;
      AnyVar WristFlexion = -7.303597e-008;
      AnyVar WristAbduction = 0;
      AnyVar HipFlexion = 72.89039;
      AnyVar HipAbduction = 0.6847818;
      AnyVar HipExternalRotation = -1.062275;
      AnyVar KneeFlexion = 51.86017;
      AnyVar AnklePlantarFlexion = 5.336125;
       AnyVar SubTalarEversion = 0;
    };
  };
  AnyFolder PostureVel={
    //This controls the position of the pelvi wrt. to the global reference frame
    AnyVar PelvisPosX=0;
    AnyVar PelvisPosY=0;
    AnyVar PelvisPosZ=0;

    //This controls the rotation of the pelvis wrt. to the global reference frame
    AnyVar PelvisRotX=0;
    AnyVar PelvisRotY=0;
    AnyVar PelvisRotZ=0;

    // These variables control the rotation of the thorax wrt the
    // pelvis
    AnyVar PelvisThoraxExtension=0;
    AnyVar PelvisThoraxLateralBending=0;
    AnyVar PelvisThoraxRotation=0;

    AnyVar NeckExtension=0;
    AnyVar NeckLateralBending = 0;
    AnyVar NeckRotation = 0;

    AnyFolder Right = {
      //Arm
      AnyVar SternoClavicularProtraction=0;   //This value is not used for initial position
      AnyVar SternoClavicularElevation=0;    //This value is not used for initial position
      AnyVar SternoClavicularAxialRotation=0; //This value is not used for initial position

      AnyVar GlenohumeralFlexion =0;
      AnyVar GlenohumeralAbduction = 0;
      AnyVar GlenohumeralExternalRotation = 0;

      AnyVar ElbowFlexion = 0.0;
      AnyVar ElbowPronation = 0.0;

      AnyVar WristFlexion =0;
      AnyVar WristAbduction =0;

      AnyVar HipFlexion = 0.0;
      AnyVar HipAbduction = 0.0;
      AnyVar HipExternalRotation = 0.0;

      AnyVar KneeFlexion = 0.0;

      AnyVar AnklePlantarFlexion =0.0;
       AnyVar SubTalarEversion = 0;

    };

    AnyFolder Left = {
      //all values are set to be equal to the right side values
      //feel free to change this!

      //Arm
      AnyVar SternoClavicularProtraction=.Right.SternoClavicularProtraction;
      AnyVar SternoClavicularElevation=.Right.SternoClavicularElevation;
      AnyVar SternoClavicularAxialRotation=.Right.SternoClavicularAxialRotation;

      AnyVar GlenohumeralFlexion = .Right.GlenohumeralFlexion ;
      AnyVar GlenohumeralAbduction =.Right.GlenohumeralAbduction ;
      AnyVar GlenohumeralExternalRotation =.Right.GlenohumeralExternalRotation ;

      AnyVar ElbowFlexion = .Right.ElbowFlexion;
      AnyVar ElbowPronation = .Right.ElbowPronation;
      AnyVar WristFlexion =.Right.WristFlexion;
      AnyVar WristAbduction =.Right.WristAbduction;

      //Leg
      AnyVar HipFlexion =.Right.HipFlexion;
      AnyVar HipAbduction =.Right.HipAbduction;
      AnyVar HipExternalRotation = .Right.HipExternalRotation;
      AnyVar KneeFlexion = .Right.KneeFlexion;
      AnyVar AnklePlantarFlexion = .Right.AnklePlantarFlexion ;
      AnyVar SubTalarEversion =.Right.SubTalarEversion ;

    };
  };

};


//
//AnyFolder Mannequin = {
//
//
//  AnyFolder Posture =
//  {
//    AnyVar PelvisPosX = 0.03450802;
//    AnyVar PelvisPosY = 0.09853526;
//    AnyVar PelvisPosZ = 1;
//    AnyVar PelvisRotX = 0;
//    AnyVar PelvisRotY = -6.153461e-009;
//    AnyVar PelvisRotZ = -36;
//    AnyVar PelvisThoraxExtension = -40;
//    AnyVar PelvisThoraxLateralBending = 4.423202e-024;
//    AnyVar PelvisThoraxRotation = 3.949378e-024;
//    AnyVar NeckExtension = 0;
//    AnyFolder Right =
//    {
//      AnyVar SternoClavicularProtraction = -22.91831;
//      AnyVar SternoClavicularElevation = 11.45916;
//      AnyVar SternoClavicularAxialRotation = -20.05352;
//      AnyVar GlenohumeralFlexion = 77.1534;
//      AnyVar GlenohumeralAbduction = 19.38513;
//      AnyVar GlenohumeralExternalRotation = -10.81002;
//      AnyVar ElbowFlexion = 79.91319;
//      AnyVar ElbowPronation = 32.8006;
//      AnyVar WristFlexion = 2.227093e-007;
//      AnyVar WristAbduction = 0;
//      AnyVar HipFlexion = 112.2748;
//      AnyVar HipAbduction = -0.3628628;
//      AnyVar HipExternalRotation = -2.311666;
//      AnyVar KneeFlexion = 116.7452;
//      AnyVar AnklePlantarFlexion = 17.82905;
//      AnyVar SubTalarEversion = -2.339957;
//    };
//    AnyFolder Left =
//    {
//      AnyVar SternoClavicularProtraction = -22.91831;
//      AnyVar SternoClavicularElevation = 11.45916;
//      AnyVar SternoClavicularAxialRotation = -20.05352;
//      AnyVar GlenohumeralFlexion = 77.1534;
//      AnyVar GlenohumeralAbduction = 19.38513;
//      AnyVar GlenohumeralExternalRotation = -10.81002;
//      AnyVar ElbowFlexion = 79.91319;
//      AnyVar ElbowPronation = 32.8006;
//      AnyVar WristFlexion = -7.303597e-008;
//      AnyVar WristAbduction = 0;
//      AnyVar HipFlexion = 72.89039;
//      AnyVar HipAbduction = 0.6847818;
//      AnyVar HipExternalRotation = -1.062275;
//      AnyVar KneeFlexion = 51.86017;
//      AnyVar AnklePlantarFlexion = -5.336125;
//      AnyVar SubTalarEversion = -1.263844;
//    };
//  };
//  AnyFolder PostureVel={
//    //This controls the position of the pelvi wrt. to the global reference frame
//    AnyVar PelvisPosX=0;
//    AnyVar PelvisPosY=0;
//    AnyVar PelvisPosZ=0;
//
//    //This controls the rotation of the pelvis wrt. to the global reference frame
//    AnyVar PelvisRotX=0;
//    AnyVar PelvisRotY=0;
//    AnyVar PelvisRotZ=0;
//
//    // These variables control the rotation of the thorax wrt the
//    // pelvis
//    AnyVar PelvisThoraxExtension=0;
//    AnyVar PelvisThoraxLateralBending=0;
//    AnyVar PelvisThoraxRotation=0;
//
//    AnyVar NeckExtension=0;
//
//    AnyFolder Right = {
//      //Arm
//      AnyVar SternoClavicularJointProtraction=0;   //This value is not used for initial position
//      AnyVar SternoClavicularJointElevation=0;    //This value is not used for initial position
//      AnyVar SternoClavicularJointAxialRotation=0; //This value is not used for initial position
//
//      AnyVar GlenohumeralFlexion =0;
//      AnyVar GlenohumeralAbduction = 0;
//      AnyVar GlenohumeralExternalRotation = 0;
//
//      AnyVar ElbowFlexion = 0.0;
//      AnyVar ElbowPronation = 0.0;
//
//      AnyVar WristFlexion =0;
//      AnyVar WristAbduction =0;
//
//      AnyVar HipFlexion = 0.0;
//      AnyVar HipAbduction = 0.0;
//      AnyVar HipExternalRotation = 0.0;
//
//      AnyVar KneeFlexion = 0.0;
//
//      AnyVar AnklePlantarFlexion =0.0;
//      AnyVar SubTalarEversion =0.0;
//
//    };
//
//    AnyFolder Left = {
//      //all values are set to be equal to the right side values
//      //feel free to change this!
//
//      //Arm
//      AnyVar SternoClavicularJointProtraction=.Right.SternoClavicularJointProtraction;
//      AnyVar SternoClavicularJointElevation=.Right.SternoClavicularJointElevation;
//      AnyVar SternoClavicularJointAxialRotation=.Right.SternoClavicularJointAxialRotation;
//
//      AnyVar GlenohumeralFlexion = .Right.GlenohumeralFlexion ;
//      AnyVar GlenohumeralAbduction =.Right.GlenohumeralAbduction ;
//      AnyVar GlenohumeralExternalRotation =.Right.GlenohumeralExternalRotation ;
//
//      AnyVar ElbowFlexion = .Right.ElbowFlexion;
//      AnyVar ElbowPronation = .Right.ElbowPronation;
//      AnyVar WristFlexion =.Right.WristFlexion;
//      AnyVar WristAbduction =.Right.WristAbduction;
//
//      //Leg
//      AnyVar HipFlexion =.Right.HipFlexion;
//      AnyVar HipAbduction =.Right.HipAbduction;
//      AnyVar HipExternalRotation = .Right.HipExternalRotation;
//      AnyVar KneeFlexion = .Right.KneeFlexion;
//      AnyVar AnklePlantarFlexion = .Right.AnklePlantarFlexion ;
//      AnyVar SubTalarEversion =.Right.SubTalarEversion;
//
//    };
//  };
//
//};
//
//
//
