/** This folder creates a contact-type of support between the saddle and the pelvis.
The saddle supports the pelvis forward/backward and laterally in both directions,
but it only offers support in the upward direction vertically. This prevents the
model from exploiting a "glued" contact with the seat when driving at high intensity.*/
AnyFolder SeatSupport = {

  AnyVar  Strength=3000;
  AnyVar  FrictionStrength=3000;

  AnyVar Scale=0.005;
  AnyFolder &Pelvis =.HumanModel.Trunk.SegmentsLumbar.PelvisSeg;

  Pelvis={

    AnyRefNode Tuber_ischiadicum1R={
      sRel=.Tuber_ischiadicumR.sRel+{0.085,0.01,0};
      //AnyDrawRefFrame test={ScaleXYZ={.1,.1,.1};};
    };

    AnyRefNode Tuber_ischiadicum1L={
      sRel=.Tuber_ischiadicumL.sRel+{0.085,0.01,0};
      //AnyDrawRefFrame test={ScaleXYZ={.1,.1,.1};};
    };

    AnyRefNode Tuber_ischiadicum2R={
      sRel=.Tuber_ischiadicumR.sRel+{0.065,0.005,0};
      //AnyDrawRefFrame test={ScaleXYZ={.1,.1,.1};};
    };


    AnyRefNode Tuber_ischiadicum2Mid={
      sRel=0.5*(.Tuber_ischiadicum2R.sRel+.Tuber_ischiadicum2L.sRel);
      //AnyDrawRefFrame test={ScaleXYZ={.1,.1,.1};};
    };


    AnyRefNode Tuber_ischiadicum2L={
      sRel=.Tuber_ischiadicumL.sRel+{0.065,0.005,0};
      //AnyDrawRefFrame test={ScaleXYZ={.1,.1,.1};};
    };


    AnyRefNode Tuber_ischiadicum3R={
      sRel=.Tuber_ischiadicumR.sRel+{0.025,0,0};
      //AnyDrawRefFrame test={ScaleXYZ={.1,.1,.1};};
    };

    AnyRefNode Tuber_ischiadicum3L={
      sRel=.Tuber_ischiadicumL.sRel+{0.025,0,0};
      //AnyDrawRefFrame test={ScaleXYZ={.1,.1,.1};};
    };


    AnyRefNode Tuber_ischiadicum4R={
      sRel=.Tuber_ischiadicumR.sRel+{-0.015,0.01,0};
      //AnyDrawRefFrame test={ScaleXYZ={.1,.1,.1};};
    };

    AnyRefNode Tuber_ischiadicum4L={
      sRel=.Tuber_ischiadicumL.sRel+{-0.015,0.01,0};
      //AnyDrawRefFrame test={ScaleXYZ={.1,.1,.1};};
    };
  };


    AnyFolder Tuber_ischiadicum2Mid={
    AnyRefNode &StartNode = Main.Model.BikeModel.BikeFrame.SaddlePos;
    AnyRefFrame &EndNode =..HumanModel.Trunk.SegmentsLumbar.PelvisSeg.Tuber_ischiadicum2Mid;
    AnyVector StrengthOfReactionsLin = {.Strength,.FrictionStrength,.Strength,0,.Strength,.Strength}; //List of strengths for the linear muscles
    AnyFolder &DrawRef=Main.DrawSettings;
    AnyVar ScaleFactor =.1;
    #include "../../../Body/AAUHuman/ToolBox/Reactions/XPush.any"
    #include "../../../Body/AAUHuman/ToolBox/Reactions/XPull.any"
    #include "../../../Body/AAUHuman/ToolBox/Reactions/YPush.any"
    //  #include "../../../Body/AAUHuman/ToolBox/Reactions/YPull.any"
    #include "../../../Body/AAUHuman/ToolBox/Reactions/ZPush.any"
    #include "../../../Body/AAUHuman/ToolBox/Reactions/ZPull.any"
  };

};
