//This folder contains the joints and drivers that connects the lower extremity model with the bikemodel
//Furthermore it holds the defines the postions and orientation of the segments

AnyFolder BikeLegConnection = {

  AnyFolder &ModelFolder=.HumanModel;

  AnyFolder JointsAndDrivers ={
    #include "JointsAndDrivers.any"
  };
};
