/* ----------------------------------------------------------------
Drivers for the model:

-The pelvis is locked to the ground
-The remaining degrees of freedom are controlled by parameters in the mannequin.any file.
-This file is a good way to get an overview of the dof in the full body model
 all the dof in the body model is driven from this file.
-In total

----------------------------------------------------------------  */

AnyFolder Drivers = {

  AnyOperation &Study = Main.InitialPosStudy.InitialConditions;
 AnyFolder &BodyModel =...HumanModel.BodyModel;

  #include "../../../Body/AAUHuman/BodyModels/include/MannequinDriversWidget.any"

  // Aliases for convenient referencing
  AnyFolder &JntPos=..Mannequin.Posture;
  AnyFolder &JntVel=..Mannequin.PostureVel;

  AnyFolder &RefHM = .HumanModel;


};//Drivers
