AnyFolder JointsAndDrivers = {

  // Aliases for convenient referencing
  AnyFolder &JntPos=..Mannequin.Posture;
  AnyFolder &JntVel=..Mannequin.PostureVel;


  AnyKinEqSimpleDriver NeckDrv={
    AnyKinMeasureOrg &ref1= ...HumanModel.Interface.Trunk.NeckJoint;
    DriverPos={0};
    DriverVel={0};
    Reaction.Type={Off};
  };

  AnyKinEqInterPolDriver JntDriverTrunk = {
    FileErrorContinueOnOff = On;
    Type = Bspline;
    BsplineOrder = 4;
     FileName = FilePathCompleteOf(Main.ModelSetup.FileNames.OptimizedMotionTrunk);
    AnyKinMeasureOrg &PelvisPosX = ...HumanModel.Interface.Trunk.PelvisPosX;
    AnyKinMeasureOrg &PelvisPosY = ...HumanModel.Interface.Trunk.PelvisPosY;
    AnyKinMeasureOrg &PelvisPosZ = ...HumanModel.Interface.Trunk.PelvisPosZ;
    AnyKinMeasureOrg &PelvisRotX = ...HumanModel.Interface.Trunk.PelvisRotX;
    AnyKinMeasureOrg &PelvisRotY = ...HumanModel.Interface.Trunk.PelvisRotY;
    AnyKinMeasureOrg &PelvisRotZ = ...HumanModel.Interface.Trunk.PelvisRotZ;
    AnyKinMeasureOrg &PelvisThoraxExtension = ...HumanModel.Interface.Trunk.PelvisThoraxExtension;
    AnyKinMeasureOrg &PelvisThoraxLateralBending = ...HumanModel.Interface.Trunk.PelvisThoraxLateralBending;
    AnyKinMeasureOrg &PelvisThoraxRotation = ...HumanModel.Interface.Trunk.PelvisThoraxRotation;
    Reaction.Type={On,On,On,On,On,On,Off,Off,Off};
  };

  #if LEFT_LEG_TD == 1
  AnyKinEqInterPolDriver JntDriverLeftLegTD = {
    FileErrorContinueOnOff = On;
    Type = Bspline;
    BsplineOrder = 4;
     FileName = FilePathCompleteOf(Main.ModelSetup.FileNames.OptimizedMotionLeftLegTD);
    AnyKinMeasureOrg &HipFlexion = ...HumanModel.Interface.Left.HipFlexion;
    AnyKinMeasureOrg &HipAbduction = ...HumanModel.Interface.Left.HipAbduction;
    AnyKinMeasureOrg &HipExternalRotation = ...HumanModel.Interface.Left.HipExternalRotation;
    AnyKinMeasureOrg &KneeFlexion = ...HumanModel.Interface.Left.KneeFlexion;
    AnyKinMeasureOrg &AnklePlantarFlexion = ...HumanModel.Interface.Left.AnklePlantarFlexion;
    AnyKinMeasureOrg &SubTalarEversion = ...HumanModel.Interface.Left.SubTalarEversion;
    Reaction.Type={Off,Off,Off,Off,Off,Off};
  };
  #endif


  #if RIGHT_LEG_TD == 1
  AnyKinEqInterPolDriver JntDriverRightLegTD =  {
    FileErrorContinueOnOff = On;
    Type = Bspline;
    BsplineOrder = 4;
    FileName = FilePathCompleteOf(Main.ModelSetup.FileNames.OptimizedMotionRightLegTD);
    AnyKinMeasureOrg &HipFlexion = ...HumanModel.Interface.Right.HipFlexion;
    AnyKinMeasureOrg &HipAbduction = ...HumanModel.Interface.Right.HipAbduction;
    AnyKinMeasureOrg &HipExternalRotation = ...HumanModel.Interface.Right.HipExternalRotation;
    AnyKinMeasureOrg &KneeFlexion = ...HumanModel.Interface.Right.KneeFlexion;
    AnyKinMeasureOrg &AnklePlantarFlexion = ...HumanModel.Interface.Right.AnklePlantarFlexion;
    AnyKinMeasureOrg &SubTalarEversion = ...HumanModel.Interface.Right.SubTalarEversion;
    Reaction.Type={Off,Off,Off,Off,Off,Off};
  };
  #endif


  #if LEFT_LEG == 1
  AnyKinEqInterPolDriver JntDriverLeftLeg =
  {
    FileErrorContinueOnOff = On;
    Type = Bspline;
    BsplineOrder = 4;
    FileName = FilePathCompleteOf(Main.ModelSetup.FileNames.OptimizedMotionLeftLeg);
    AnyKinMeasureOrg &HipFlexion = ...HumanModel.Interface.Left.HipFlexion;
    AnyKinMeasureOrg &HipAbduction = ...HumanModel.Interface.Left.HipAbduction;
    AnyKinMeasureOrg &HipExternalRotation = ...HumanModel.Interface.Left.HipExternalRotation;
    AnyKinMeasureOrg &KneeFlexion = ...HumanModel.Interface.Left.KneeFlexion;
    AnyKinMeasureOrg &AnklePlantarFlexion = ...HumanModel.Interface.Left.AnklePlantarFlexion;
    AnyKinMeasureOrg &AnkleEversion = ...HumanModel.Interface.Left.AnkleEversion;
    Reaction.Type={Off,Off,Off,Off,Off,Off};
  };
  #endif


  #if RIGHT_LEG == 1
  AnyKinEqInterPolDriver JntDriverRightLeg =
  {
    FileErrorContinueOnOff = On;
    Type = Bspline;
    BsplineOrder = 4;
    FileName = FilePathCompleteOf(Main.ModelSetup.FileNames.OptimizedMotionRightLeg);
    AnyKinMeasureOrg &HipFlexion = ...HumanModel.Interface.Right.HipFlexion;
    AnyKinMeasureOrg &HipAbduction = ...HumanModel.Interface.Right.HipAbduction;
    AnyKinMeasureOrg &HipExternalRotation = ...HumanModel.Interface.Right.HipExternalRotation;
    AnyKinMeasureOrg &KneeFlexion = ...HumanModel.Interface.Right.KneeFlexion;
    AnyKinMeasureOrg &AnklePlantarFlexion = ...HumanModel.Interface.Right.AnklePlantarFlexion;
    AnyKinMeasureOrg &AnkleEversion = ...HumanModel.Interface.Right.AnkleEversion;
    Reaction.Type={Off,Off,Off,Off,Off,Off};
  };
  #endif


  #if LEFT_ARM == 1

 AnyKinEqInterPolDriver JntDriverLeftArm =
  {
    FileErrorContinueOnOff = On;
    Type = Bspline;
    BsplineOrder = 4;
    FileName = Main.ModelSetup.C3DFileData.NameOfFile+"-output-euler-leftarm.txt";

    AnyKinMeasureOrg &SternoClavicularProtraction=...HumanModel.Interface.Left.SternoClavicularProtraction;
    AnyKinMeasureOrg &SternoClavicularElevation=...HumanModel.Interface.Left.SternoClavicularElevation;
    AnyKinMeasureOrg &SternoClavicularAxialRotation=...HumanModel.Interface.Left.SternoClavicularAxialRotation;
    AnyKinMeasureOrg &GlenohumeralFlexion = ...HumanModel.Interface.Left.GlenohumeralFlexion;
    AnyKinMeasureOrg &GlenohumeralExternalRotation = ...HumanModel.Interface.Left.GlenohumeralExternalRotation;
    AnyKinMeasureOrg &GlenohumeralAbduction = ...HumanModel.Interface.Left.GlenohumeralAbduction;
    AnyKinMeasureOrg &ElbowFlexion = ...HumanModel.Interface.Left.ElbowFlexion;
    AnyKinMeasureOrg &ElbowPronation = ...HumanModel.Interface.Left.ElbowPronation;
    AnyKinMeasureOrg &WristFlexion = ...HumanModel.Interface.Left.WristFlexion;
    AnyKinMeasureOrg &WristAbduction = ...HumanModel.Interface.Left.WristAbduction;
    Reaction.Type={Off,Off,Off,Off,Off,Off,Off,Off,Off,Off};
  };
  #endif


  #if RIGHT_ARM == 1


  AnyKinEqInterPolDriver JntDriverRightArm =
  {
    FileErrorContinueOnOff = On;
    Type = Bspline;
    BsplineOrder = 4;
    FileName = Main.ModelSetup.C3DFileData.NameOfFile+"-output-euler-rightarm.txt";

    AnyKinMeasureOrg &SternoClavicularProtraction=...HumanModel.Interface.Right.SternoClavicularProtraction;
    AnyKinMeasureOrg &SternoClavicularElevation=...HumanModel.Interface.Right.SternoClavicularElevation;
    AnyKinMeasureOrg &SternoClavicularAxialRotation=...HumanModel.Interface.Right.SternoClavicularAxialRotation;

    AnyKinMeasureOrg &GlenohumeralFlexion = ...HumanModel.Interface.Right.GlenohumeralFlexion;
    AnyKinMeasureOrg &GlenohumeralExternalRotation = ...HumanModel.Interface.Right.GlenohumeralExternalRotation;
    AnyKinMeasureOrg &GlenohumeralAbduction = ...HumanModel.Interface.Right.GlenohumeralAbduction;
    AnyKinMeasureOrg &ElbowFlexion = ...HumanModel.Interface.Right.ElbowFlexion;
    AnyKinMeasureOrg &ElbowPronation = ...HumanModel.Interface.Right.ElbowPronation;
    AnyKinMeasureOrg &WristFlexion = ...HumanModel.Interface.Right.WristFlexion;
    AnyKinMeasureOrg &WristAbduction = ...HumanModel.Interface.Right.WristAbduction;
    Reaction.Type={Off,Off,Off,Off,Off,Off,Off,Off,Off,Off};
  };
  #endif


};
