// Global switch:
// - if turned to 1 the drivers will be activated according to their individual statut.
// - if turned to 0 all drivers will desactivated (regardless to their individual statut).
#define GLOBAL_DRIVER_SWITCH 1

// Drivers for attaching the pelvis to the global reference system
#define PELVIS_POS_X_DRIVER 1
#define PELVIS_POS_Y_DRIVER 1
#define PELVIS_POS_Z_DRIVER 1

#define PELVIS_ROT_Z_DRIVER 1
#define PELVIS_ROT_Y_DRIVER 1
#define PELVIS_ROT_X_DRIVER 1


// Drivers for the spine
#define NECK_DRIVER 1

#define PELVIS_THORAX_LATERAL_BENDING_DRIVER 1
#define PELVIS_THORAX_ROTATION_DRIVER 1
#define PELVIS_THORAX_EXTENSION_DRIVER 1


// Drivers for the right arm
#define STERNO_CLAVICULAR_RIGHT_DRIVER 1

#define GLENOHUMERAL_ABDUCTION_RIGHT_DRIVER 1
#define GLENOHUMERAL_FLEXION_RIGHT_DRIVER 1
#define GLENOHUMERAL_EXTERNAL_ROTATION_RIGHT_DRIVER 1

#define ELBOW_FLEXION_RIGHT_DRIVER 1
#define ELBOW_PRONATION_RIGHT_DRIVER 1

#define WRIST_FLEXION_RIGHT_DRIVER 1
#define WRIST_ABDUCTION_RIGHT_DRIVER 1


// Drivers for the left arm
#define STERNO_CLAVICULAR_LEFT_DRIVER 1

#define GLENOHUMERAL_ABDUCTION_LEFT_DRIVER 1
#define GLENOHUMERAL_FLEXION_LEFT_DRIVER 1
#define GLENOHUMERAL_EXTERNAL_ROTATION_LEFT_DRIVER 1

#define ELBOW_FLEXION_LEFT_DRIVER 1
#define ELBOW_PRONATION_LEFT_DRIVER 1

#define WRIST_FLEXION_LEFT_DRIVER 1
#define WRIST_ABDUCTION_LEFT_DRIVER 1


// Drivers for the right leg
#define HIP_FLEXION_RIGHT_DRIVER 1
#define HIP_EXTERNAL_ROTATION_RIGHT_DRIVER 1
#define HIP_ABDUCTION_RIGHT_DRIVER 1

#define KNEE_FLEXION_RIGHT_DRIVER 1

#define ANKLE_FLEXION_RIGHT_DRIVER 1
#define ANKLE_EVERSION_RIGHT_DRIVER 0
#define ANKLE_SUBTALAR_EVERSION_RIGHT_DRIVER 1


// Drivers for the Left leg
#define HIP_FLEXION_LEFT_DRIVER 1
#define HIP_EXTERNAL_ROTATION_LEFT_DRIVER 1
#define HIP_ABDUCTION_LEFT_DRIVER 1

#define KNEE_FLEXION_LEFT_DRIVER 1

#define ANKLE_FLEXION_LEFT_DRIVER 1
#define ANKLE_EVERSION_LEFT_DRIVER 0
#define ANKLE_SUBTALAR_EVERSION_LEFT_DRIVER 1


AnyFolder Mannequin = {

  AnyFolder Posture = {

//    AnyParamFun &RASI = Main.ModelSetup.C3DFileData.Points.Markers.RASI.PosInterpol;
//    AnyParamFun &LASI = Main.ModelSetup.C3DFileData.Points.Markers.LASI.PosInterpol;
//
//    AnyParamFun &RPSI = Main.ModelSetup.C3DFileData.Points.Markers.RPSI.PosInterpol;
//    AnyParamFun &LPSI = Main.ModelSetup.C3DFileData.Points.Markers.LPSI.PosInterpol;
//
//
    //    AnyVar PelvisPosX = 0.25* (RASI(Main.TrialSpecificData.tStart)[0]+LASI(Main.TrialSpecificData.tStart)[0]+RPSI(Main.TrialSpecificData.tStart)[0]+LPSI(Main.TrialSpecificData.tStart)[0]);
    //    AnyVar PelvisPosY =  0.25* (RASI(Main.TrialSpecificData.tStart)[1]+LASI(Main.TrialSpecificData.tStart)[1]+RPSI(Main.TrialSpecificData.tStart)[1]+LPSI(Main.TrialSpecificData.tStart)[1]);
    //    AnyVar PelvisPosZ = 0.25* (RASI(Main.TrialSpecificData.tStart)[2]+LASI(Main.TrialSpecificData.tStart)[2]+RPSI(Main.TrialSpecificData.tStart)[2]+LPSI(Main.TrialSpecificData.tStart)[2]);

    AnyVar PelvisPosZ = Main.WidgetValues.PelvisPosZ[2];
    AnyVar PelvisPosY = Main.WidgetValues.PelvisPosY[1];
    AnyVar PelvisPosX = Main.WidgetValues.PelvisPosX[0];

    AnyVar PelvisRotZ = 0;
    AnyVar PelvisRotY = 0;
    AnyVar PelvisRotX = 0;

    AnyMat33 PelvisRotMatrix = Main.TrialSpecificData.InitialPositionOfBody.PelvisRotMatrix;

    // These variables control the rotation of the thorax wrt the
    // pelvis
    AnyVar PelvisThoraxExtension=0;
    AnyVar PelvisThoraxLateralBending=0;
    AnyVar PelvisThoraxRotation=0;

    AnyVar NeckExtension=0;


    AnyFolder Right =    {
      //Arm
      AnyVar SternoClavicularProtraction=-23;   //This value is not used for initial position
      AnyVar SternoClavicularElevation=11.5;    //This value is not used for initial position
      AnyVar SternoClavicularAxialRotation=-20; //This value is not used for initial position

      AnyVar GlenohumeralFlexion =-10;
      AnyVar GlenohumeralAbduction = 10;
      AnyVar GlenohumeralExternalRotation = 00;

      AnyVar ElbowFlexion = 35;
      AnyVar ElbowPronation = -60.0;

      AnyVar WristFlexion =0;
      AnyVar WristAbduction =0;

      AnyVar HipFlexion = Main.TrialSpecificData.InitialPositionOfBody.Right.HipFlexion;
      AnyVar HipAbduction = Main.TrialSpecificData.InitialPositionOfBody.Right.HipAbduction;
      AnyVar HipExternalRotation = Main.TrialSpecificData.InitialPositionOfBody.Right.HipExternalRotation;
      AnyVar KneeFlexion = Main.TrialSpecificData.InitialPositionOfBody.Right.KneeFlexion;
      AnyVar AnklePlantarFlexion = Main.TrialSpecificData.InitialPositionOfBody.Right.AnklePlantarFlexion;
      AnyVar SubTalarEversion =Main.TrialSpecificData.InitialPositionOfBody.Right.SubTalarEversion;
    };
    AnyFolder Left =
    {

      //Arm
      AnyVar SternoClavicularProtraction=.Right.SternoClavicularProtraction;
      AnyVar SternoClavicularElevation=.Right.SternoClavicularElevation;
      AnyVar SternoClavicularAxialRotation=.Right.SternoClavicularAxialRotation;

      AnyVar GlenohumeralFlexion = .Right.GlenohumeralFlexion;
      AnyVar GlenohumeralAbduction =.Right.GlenohumeralAbduction ;
      AnyVar GlenohumeralExternalRotation =.Right.GlenohumeralExternalRotation ;

      AnyVar ElbowFlexion = .Right.ElbowFlexion ;
      AnyVar ElbowPronation =.Right.ElbowPronation;
      AnyVar WristFlexion =.Right.WristFlexion;
      AnyVar WristAbduction =.Right.WristAbduction;

      AnyVar HipFlexion = Main.TrialSpecificData.InitialPositionOfBody.Left.HipFlexion;
      AnyVar HipAbduction = Main.TrialSpecificData.InitialPositionOfBody.Left.HipAbduction;
      AnyVar HipExternalRotation = Main.TrialSpecificData.InitialPositionOfBody.Left.HipExternalRotation;
      AnyVar KneeFlexion = Main.TrialSpecificData.InitialPositionOfBody.Left.KneeFlexion;
      AnyVar AnklePlantarFlexion = Main.TrialSpecificData.InitialPositionOfBody.Left.AnklePlantarFlexion;
      AnyVar SubTalarEversion =Main.TrialSpecificData.InitialPositionOfBody.Left.SubTalarEversion;
    };


  };

  AnyFolder PostureVel={
    //This controls the position of the pelvi wrt. to the global reference frame
    AnyVar PelvisPosX=0;
    AnyVar PelvisPosY=0;
    AnyVar PelvisPosZ=0;

    //This controls the rotation of the pelvis wrt. to the global reference frame
    AnyVar PelvisRotX=0;
    AnyVar PelvisRotY=0;
    AnyVar PelvisRotZ=0;

    // These variables control the rotation of the thorax wrt the
    // pelvis
    AnyVar PelvisThoraxExtension=0;
    AnyVar PelvisThoraxLateralBending=0;
    AnyVar PelvisThoraxRotation=0;

    AnyVar NeckExtension=0;

    AnyFolder Right = {
      //Arm
      AnyVar SternoClavicularProtraction=0;   //This value is not used for initial position
      AnyVar SternoClavicularElevation=0;    //This value is not used for initial position
      AnyVar SternoClavicularAxialRotation=0; //This value is not used for initial position

      AnyVar GlenohumeralFlexion =0;
      AnyVar GlenohumeralAbduction = 0;
      AnyVar GlenohumeralExternalRotation = 0;

      AnyVar ElbowFlexion = 0.0;
      AnyVar ElbowPronation = 0.0;

      AnyVar WristFlexion =0;
      AnyVar WristAbduction =0;

      AnyVar HipFlexion = 0.0;
      AnyVar HipAbduction = 0.0;
      AnyVar HipExternalRotation = 0.0;

      AnyVar KneeFlexion = 0.0;

      AnyVar AnklePlantarFlexion =0.0;
      AnyVar SubTalarEversion=0.0;

    };

    AnyFolder Left = {
      //all values are set to be equal to the right side values
      //feel free to change this!

      //Arm
      AnyVar SternoClavicularProtraction=.Right.SternoClavicularProtraction;
      AnyVar SternoClavicularElevation=.Right.SternoClavicularElevation;
      AnyVar SternoClavicularAxialRotation=.Right.SternoClavicularAxialRotation;

      AnyVar GlenohumeralFlexion = .Right.GlenohumeralFlexion ;
      AnyVar GlenohumeralAbduction =.Right.GlenohumeralAbduction ;
      AnyVar GlenohumeralExternalRotation =.Right.GlenohumeralExternalRotation ;

      AnyVar ElbowFlexion = .Right.ElbowFlexion;
      AnyVar ElbowPronation = .Right.ElbowPronation;
      AnyVar WristFlexion =.Right.WristFlexion;
      AnyVar WristAbduction =.Right.WristAbduction;


      //Leg
      AnyVar HipFlexion =.Right.HipFlexion;
      AnyVar HipAbduction =.Right.HipAbduction;
      AnyVar HipExternalRotation = .Right.HipExternalRotation;
      AnyVar KneeFlexion = .Right.KneeFlexion;
      AnyVar AnklePlantarFlexion = .Right.AnklePlantarFlexion ;
      AnyVar SubTalarEversion=.Right.SubTalarEversion;


    };
  };
};
