AnyInt MarkerLinkDummy=1;   //just a variable used to open this file from project task description

  // This class creates a marker in each of the two models, additionally it creates marker drivers and design variables to opitmize marker location
  //
  //  CreateMarker MX (    //MX is the folder name for the marker all folder names has to be different so usually use M1....MX
  //  MarkerName=XXX,      //This is the name of you marker it has to be the same name as in the C3D file
  //  MarkerPlacement =Right.Leg.Seg.Thigh,  //this is the segmnt
  //  OptX=On,OptY=Off,OptZ=On,  //this determines if the design variable is going to be optimized or left unchanged in paramter optimization studies
  //
  //
  //  Model1=MotionAndParameterOptimizationModel, Model2= InverseDynamicModel   //always leave this line unchanged
  //  ) = {
  //    sRelOpt ={-0.0717627324329,-0.1724679985805,0.0763244306406};   //coordinates of the marker unscaled
  //  };
  //
  // sRelOpt = {-0.04970743, -0.1556847, 0.08576939}
  //   {-0.07176273, -0.172468, 0.07632443}

  CreateMarkerTDWidget RTHI (
  MarkerName=PrefixDef(RTHI),
  MarkerPlacement =Right.Leg.Seg.Thigh,
  OptX="On",OptY="On",OptZ="On",
  WeightX=1.0,WeightY=1.0,WeightZ=1.0,

  Model1=MotionAndParameterOptimizationModel, Model2= InverseDynamicModel
  )= {
    sRelOpt = {-0.03102465, -0.2669603, 0.1139464};
  };


  CreateMarkerTDWidget RKNE (
  MarkerName=PrefixDef(RKNE),
  MarkerPlacement= Right.Leg.Seg.Thigh,
  OptX="Off",OptY="Off",OptZ="On",
  WeightX=1.0,WeightY=1.0,WeightZ=1.0,


  Model1=MotionAndParameterOptimizationModel, Model2= InverseDynamicModel
  ) = {
    sRelOpt= {0.031, -0.3992649, 0.05};
  };

  CreateMarkerTDWidget LKNE (
  MarkerName=PrefixDef(LKNE) ,
  MarkerPlacement=Left.Leg.Seg.Thigh,
  OptX="Off",OptY="Off",OptZ="On",
  WeightX=1.0,WeightY=1.0,WeightZ=1.0,

  Model1=MotionAndParameterOptimizationModel, Model2= InverseDynamicModel
  ) = {
    sRelOpt ={0.031, -0.4015619, -0.05};
  };


  CreateMarkerTDWidget LPSI (
  MarkerName=PrefixDef(LPSI),
  MarkerPlacement=Trunk.SegmentsLumbar.PelvisSeg,
  OptX="Off", OptY="Off", OptZ="On",
  WeightX=1.0,WeightY=1.0,WeightZ=1.0,


  Model1=MotionAndParameterOptimizationModel, Model2= InverseDynamicModel
  ) = {
    sRelOpt ={-0.06727544, -0.03, -0.045};
  };


  CreateMarkerTDWidget RASI (
  MarkerName=PrefixDef(RASI),
  MarkerPlacement=Trunk.SegmentsLumbar.PelvisSeg,
  OptX="Off",OptY="Off",OptZ="Off",
  WeightX=1.0,WeightY=1.0,WeightZ=1.0,


  Model1=MotionAndParameterOptimizationModel, Model2= InverseDynamicModel
  ) = {

    sRelOpt =  {0.11, -0.03, 0.145};
  };


  //ok
  CreateMarkerTDWidget RTIB (
  MarkerName=PrefixDef(RTIB),
  MarkerPlacement=Right.Leg.Seg.Shank,
  OptX="On",OptY="On",OptZ="On",
  WeightX=1.0,WeightY=1.0,WeightZ=1.0,


  Model1=MotionAndParameterOptimizationModel, Model2= InverseDynamicModel
  ) = {
    sRelOpt = {0.01751226, 0.2039194, 0.1113902};
  };


  CreateMarkerTDWidget RANK (
  MarkerName=PrefixDef(RANK) ,
  MarkerPlacement=Right.Leg.Seg.Shank,
  OptX="On",OptY="Off",OptZ="On",
  WeightX=1.0,WeightY=1.0,WeightZ=1.0,


  Model1=MotionAndParameterOptimizationModel, Model2= InverseDynamicModel
  ) = {
    sRelOpt = {0.00671602, 0.006789666, 0.01542605};

  };


  CreateMarkerTDWidget LTIB (
  MarkerName=PrefixDef(LTIB),
  MarkerPlacement=Left.Leg.Seg.Shank,
  OptX="On",OptY="On",OptZ="On",
  WeightX=1.0,WeightY=1.0,WeightZ=1.0,


  Model1=MotionAndParameterOptimizationModel, Model2= InverseDynamicModel
  ) = {
    sRelOpt=  {0.04017781, 0.1373229, -0.06342093};
  };


  CreateMarkerTDWidget LANK (
  MarkerName=PrefixDef(LANK),
  MarkerPlacement=Left.Leg.Seg.Shank,
  OptX="On",OptY="Off",OptZ="On",
  WeightX=1.0,WeightY=1.0,WeightZ=1.0,
  Model1=MotionAndParameterOptimizationModel, Model2= InverseDynamicModel
  ) = {
    sRelOpt=  {-0.0007183825, 0.008605957, -0.01850573};

  };

  CreateMarkerTDWidget RHEE (
  MarkerName=PrefixDef(RHEE) ,
  MarkerPlacement=Right.Leg.Seg.Foot,
  OptX="Off", OptY="Off", OptZ="Off",
  WeightX=1.0,WeightY=1.0,WeightZ=1.0,
  Model1=MotionAndParameterOptimizationModel, Model2= InverseDynamicModel
  ) = {
    sRelOpt=  {-0.0237318, 0.027787775, 0.01487791};

  };

  CreateMarkerTDWidget LHEE(
  MarkerName=PrefixDef(LHEE),
  MarkerPlacement=Left.Leg.Seg.Foot,
  OptX="Off", OptY="Off", OptZ="Off",
  WeightX=1.0,WeightY=1.0,WeightZ=1.0,
  Model1=MotionAndParameterOptimizationModel, Model2= InverseDynamicModel
  ) = {
    sRelOpt=  {-0.0237318, 0.027787775, -0.01487791};
  };


  CreateMarkerTDWidget RPSI (
  MarkerName=PrefixDef(RPSI),
  MarkerPlacement=Trunk.SegmentsLumbar.PelvisSeg,
  OptX="Off", OptY="Off", OptZ="On",
  WeightX=1.0,WeightY=1.0,WeightZ=1.0,
  Model1=MotionAndParameterOptimizationModel, Model2= InverseDynamicModel
  ) = {
    sRelOpt = {-0.06727544, -0.03, 0.045};

  };

  CreateMarkerTDWidget RTOE (
  MarkerName=PrefixDef(RTOE),
  MarkerPlacement=Right.Leg.Seg.Foot,
  OptX="Off", OptY="Off", OptZ="Off",
  WeightX=1.0,WeightY=1.0,WeightZ=1.0,
  Model1=MotionAndParameterOptimizationModel, Model2= InverseDynamicModel
  ) = {
    sRelOpt=  {0.1931776, 0.02368634, -0.02};
  };


  CreateMarkerTDWidget LTOE (
  MarkerName=PrefixDef(LTOE),
  MarkerPlacement=Left.Leg.Seg.Foot,
  OptX="Off",OptY="Off",OptZ="Off",
  WeightX=1.0,WeightY=1.0,WeightZ=1.0,
  Model1=MotionAndParameterOptimizationModel, Model2= InverseDynamicModel
  ) = {
    sRelOpt=  {0.1931776, 0.02368634, 0.02};
  };


  CreateMarkerTDWidget LMT5 (
  MarkerName=PrefixDef(LMT5),
  MarkerPlacement=Left.Leg.Seg.Foot,
  OptX="Off",OptY="Off",OptZ="Off",
  WeightX=1.0,WeightY=1.0,WeightZ=1.0,

  Model1=MotionAndParameterOptimizationModel, Model2= InverseDynamicModel
  ) = {
    sRelOpt =  {0.186351, 0.015497017, 0.03707195-0.08};
  };


  CreateMarkerTDWidget RMT5 (
  MarkerName=PrefixDef(RMT5),
  MarkerPlacement=Right.Leg.Seg.Foot,
  OptX="Off",OptY="Off",OptZ="Off",
  WeightX=1.0,WeightY=1.0,WeightZ=1.0,

  Model1=MotionAndParameterOptimizationModel, Model2= InverseDynamicModel
  ) = {
    sRelOpt =  {0.186351, 0.015497017, -0.03707195+0.08};
  };


  CreateMarkerTDWidget  LASI (
  MarkerName=PrefixDef(LASI) ,
  MarkerPlacement=Trunk.SegmentsLumbar.PelvisSeg,
  OptX="Off",OptY="Off",OptZ="Off",
  WeightX=1.0,WeightY=1.0,WeightZ=1.0,


  Model1=MotionAndParameterOptimizationModel, Model2= InverseDynamicModel
  ) = {
    sRelOpt =  {0.11, -0.05+0.02, -0.145};
  };

  CreateMarkerTDWidget LTHI (
  MarkerName=PrefixDef(LTHI) ,
  MarkerPlacement=Left.Leg.Seg.Thigh,
  OptX="On",OptY="On",OptZ="On",
  WeightX=1.0,WeightY=1.0,WeightZ=1.0,


  Model1=MotionAndParameterOptimizationModel, Model2= InverseDynamicModel
  ) = {
    sRelOpt=  {-0.007238141, -0.2855959, -0.09793496};
  };


  CreateMarker  RFHD (
  MarkerName=RFHD,
  MarkerPlacement=Trunk.SegmentsThorax.SkullSeg,
  OptX="Off",OptY="Off",OptZ="Off",
  WeightX=1.0,WeightY=1.0,WeightZ=1.0,


  Model1=MotionAndParameterOptimizationModel,Model2= InverseDynamicModel
  ) = {
    sRelOpt = {0.08,0.06,0.07};
  };


  CreateMarker  LFHD (
  MarkerName=LFHD,
  MarkerPlacement=Trunk.SegmentsThorax.SkullSeg,
  OptX="Off",OptY="Off",OptZ="Off",
  WeightX=1.0,WeightY=1.0,WeightZ=1.0,


  Model1=MotionAndParameterOptimizationModel,Model2= InverseDynamicModel
  ) = {
    sRelOpt = {0.08,0.06,-0.07};
  };


  CreateMarker  RBHD (
  MarkerName=RBHD,
  MarkerPlacement=Trunk.SegmentsThorax.SkullSeg,
  OptX="Off",OptY="Off",OptZ="Off",
  WeightX=1.0,WeightY=1.0,WeightZ=1.0,


  Model1=MotionAndParameterOptimizationModel,Model2= InverseDynamicModel
  ) = {
    sRelOpt = {-0.07,0.05,0.08};
  };


  CreateMarker  LBHD (
  MarkerName=LBHD,
  MarkerPlacement=Trunk.SegmentsThorax.SkullSeg,
  OptX="Off",OptY="Off",OptZ="Off",
  WeightX=1.0,WeightY=1.0,WeightZ=1.0,


  Model1=MotionAndParameterOptimizationModel,Model2= InverseDynamicModel
  ) = {
    sRelOpt = {-0.07,0.05,-0.08};
  };


  CreateMarker  T10 (
  MarkerName=T10,
  MarkerPlacement=Trunk.SegmentsThorax.ThoraxSeg,
  OptX="Off",OptY="Off",OptZ="Off",
  WeightX=1.0,WeightY=1.0,WeightZ=1.0,

  Model1=MotionAndParameterOptimizationModel,Model2= InverseDynamicModel
  ) = {
    sRelOpt = {-0.052,0.187,0};
  };


  //CreateMarker  C7 (
  //MarkerName=C7,
  //MarkerPlacement=Trunk.SegmentsThorax.ThoraxSeg,
  //OptX="Off",OptY="On",OptZ="Off",
  //WeightX=1.0,WeightY=1.0,WeightZ=1.0,

  //Model1=MotionAndParameterOptimizationModel,Model2= InverseDynamicModel
  //) = {
  //  sRelOpt = {-0.04,0.47,0};
  //};
  //

  //CreateMarker  RBAK (
  //MarkerName=RBAK,
  //MarkerPlacement=Right.ShoulderArm.Seg.Scapula,
  //OptX="Off",OptY="Off",OptZ="Off",
  //WeightX=1.0,WeightY=1.0,WeightZ=1.0,

  //Model1=MotionAndParameterOptimizationModel,Model2= InverseDynamicModel
  //) = {
  //  sRelOpt = {-0.115,-0.07,0.02};
  //};


  CreateMarker  STRN (
  MarkerName=STRN,
  MarkerPlacement=Trunk.SegmentsThorax.ThoraxSeg,
  OptX="On",OptY="On",OptZ="Off",
  WeightX=1.0,WeightY=1.0,WeightZ=1.0,

  Model1=MotionAndParameterOptimizationModel,Model2= InverseDynamicModel
  ) = {
    sRelOpt = {0.15,0.24,0.0};

  };


  CreateMarker  CLAV (
  MarkerName=CLAV,
  MarkerPlacement=Trunk.SegmentsThorax.ThoraxSeg,
  OptX="On",OptY="On",OptZ="Off",
  WeightX=1.0,WeightY=1.0,WeightZ=1.0,

  Model1=MotionAndParameterOptimizationModel,Model2= InverseDynamicModel
  ) = {
    sRelOpt = {0.085,0.42,0.0};
  };


  //
  //CreateMarker  RSHO (
  //MarkerName=RSHO,
  //MarkerPlacement=Right.ShoulderArm.Seg.Scapula,
  //OptX="On",OptY="On",OptZ="On",
  //WeightX=1.0,WeightY=1.0,WeightZ=1.0,

  //Model1=MotionAndParameterOptimizationModel,Model2= InverseDynamicModel
  //) = {
  //  sRelOpt = {0.03,-0.0,-0.04};
  //
  //};
  //
  //
  //
  //CreateMarker  LSHO (
  //MarkerName=LSHO,
  //MarkerPlacement=Left.ShoulderArm.Seg.Scapula,
  //OptX="On",OptY="On",OptZ="On",
  //WeightX=1.0,WeightY=1.0,WeightZ=1.0,

  //Model1=MotionAndParameterOptimizationModel,Model2= InverseDynamicModel
  //) = {
  //  sRelOpt = {0.03,0.0,-0.04};
  //};
  //
  //
  //
  //
  //CreateMarker  RUPA (
  //MarkerName=RUPA,
  //MarkerPlacement=Right.ShoulderArm.Seg.Humerus,
  //OptX="On",OptY="On",OptZ="On",
  //WeightX=1.0,WeightY=1.0,WeightZ=1.0,

  //Model1=MotionAndParameterOptimizationModel,Model2= InverseDynamicModel
  //) = {
  //  sRelOpt ={0.03,-0.24,0.01};
  //};
  //
  //
  ////rupa
  //
  //CreateMarker  LUPA (
  //MarkerName=LUPA,
  //MarkerPlacement=Left.ShoulderArm.Seg.Humerus,
  //OptX="On",OptY="On",OptZ="On",
  //WeightX=1.0,WeightY=1.0,WeightZ=1.0,

  //Model1=MotionAndParameterOptimizationModel,Model2= InverseDynamicModel
  //) = {
  //  sRelOpt ={-0.03,-0.12,0.01};
  //};
  //
  //
  //
  //
  //CreateMarker  RELB (
  //MarkerName=RELB,
  //MarkerPlacement=Right.ShoulderArm.Seg.Humerus,
  //OptX="Off",OptY="Off",OptZ="Off",
  //WeightX=1.0,WeightY=1.0,WeightZ=1.0,

  //Model1=MotionAndParameterOptimizationModel,Model2= InverseDynamicModel
  //) = {
  //  sRelOpt = {0.0,-0.34,-0.01};
  //};
  //
  //
  //
  //
  //
  //CreateMarker  LELB (
  //MarkerName=LELB,
  //MarkerPlacement=Left.ShoulderArm.Seg.Humerus,
  //OptX="Off",OptY="Off",OptZ="Off",
  //WeightX=1.0,WeightY=1.0,WeightZ=1.0,

  //Model1=MotionAndParameterOptimizationModel,Model2= InverseDynamicModel
  //) = {
  //  sRelOpt = {0.0,-0.34,-0.01};
  //};
  //
  //
  ////LFRA
  //
  //CreateMarker  LFRA (
  //MarkerName=LFRA,
  //MarkerPlacement=Left.ShoulderArm.Seg.Radius,
  //OptX="On",OptY="On",OptZ="On",
  //WeightX=1.0,WeightY=1.0,WeightZ=1.0,

  //Model1=MotionAndParameterOptimizationModel,Model2= InverseDynamicModel
  //) = {
  //  sRelOpt = {-0.09, 0.03, 0.03};
  //};
  //
  //
  //
  //
  //CreateMarker  RFRA (
  //MarkerName=RFRA,
  //MarkerPlacement=Right.ShoulderArm.Seg.Radius,
  //OptX="On",OptY="On",OptZ="On",
  //WeightX=1.0,WeightY=1.0,WeightZ=1.0,

  //Model1=MotionAndParameterOptimizationModel,Model2= InverseDynamicModel
  //) = {
  //  sRelOpt = {-0.16, -0.03, 0.03};
  //};
  //
  //
  //
  //
  //CreateMarker  RWRA (
  //MarkerName=RWRA,
  //MarkerPlacement=Right.ShoulderArm.Seg.Hand,
  //OptX="Off",OptY="Off",OptZ="Off",
  //WeightX=1.0,WeightY=1.0,WeightZ=1.0,

  //Model1=MotionAndParameterOptimizationModel,Model2= InverseDynamicModel
  //) = {
  //  sRelOpt = {-0.0,-0.07,0.01};
  //};
  //
  //
  //
  //
  //CreateMarker  RWRB (
  //MarkerName=RWRB,
  //MarkerPlacement=Right.ShoulderArm.Seg.Hand,
  //OptX="Off",OptY="Off",OptZ="Off",
  //WeightX=1.0,WeightY=1.0,WeightZ=1.0,

  //Model1=MotionAndParameterOptimizationModel,Model2= InverseDynamicModel
  //) = {
  //  sRelOpt = {0.0,0.07,0.01};
  //};
  //
  //
  //
  //
  //CreateMarker  LWRA (
  //MarkerName=LWRA,
  //MarkerPlacement=Left.ShoulderArm.Seg.Hand,
  //OptX="Off",OptY="Off",OptZ="Off",
  //WeightX=1.0,WeightY=1.0,WeightZ=1.0,

  //Model1=MotionAndParameterOptimizationModel,Model2= InverseDynamicModel
  //) = {
  //  sRelOpt = {-0.0,-0.07,0.01};
  //};
  //
  //
  //
  //
  //CreateMarker  LWRB (
  //MarkerName=LWRB,
  //MarkerPlacement=Left.ShoulderArm.Seg.Hand,
  //OptX="Off",OptY="Off",OptZ="Off",
  //WeightX=1.0,WeightY=1.0,WeightZ=1.0,

  //Model1=MotionAndParameterOptimizationModel,Model2= InverseDynamicModel
  //) = {
  //  sRelOpt = {0.0,0.07,0.01};
  //};
  //
  //
  //
  //
  //
  //CreateMarker  RFIN (
  //MarkerName=RFIN,
  //MarkerPlacement=Right.ShoulderArm.Seg.Hand,
  //OptX="Off",OptY="Off",OptZ="Off",
  //WeightX=1.0,WeightY=1.0,WeightZ=1.0,

  //Model1=MotionAndParameterOptimizationModel,Model2= InverseDynamicModel
  //) = {
  //  sRelOpt = {-0.085,-0.035,0.01};
  //};
  //
  //
  //
  //
  //CreateMarker  LFIN (
  //MarkerName=LFIN,
  //MarkerPlacement=Left.ShoulderArm.Seg.Hand,
  //OptX="Off",OptY="Off",OptZ="Off",
  //WeightX=1.0,WeightY=1.0,WeightZ=1.0,

  //Model1=MotionAndParameterOptimizationModel,Model2= InverseDynamicModel
  //) = {
  //  sRelOpt = {-0.085,-0.035,-0.01};
  //};
  //
