//This file contains the marker toplogy of the data set it links free floating markers with the markers on the human

AnyFolder ModelSetup ={

   AnyVec3 Gravity=  {0.0,-9.82,0};


  //This is the input file to the analysis
  AnyInputC3D C3DFileData =   {
    AnyString PrefixStr=""; //if the dataset makes use of a prefix name which goes in front of all markers and processed datanames write it here
    #define PrefixDef(Arg) Arg

    AnyString NameOfFile =Main.TrialSpecificData.NameOfFile; //Write the name of the file here
    FileName = NameOfFile + ".c3d"; //add the extension to the file name here

    MarkerUseAllPointsOnOff = On;
    MarkerUseCamMaskOnOff = Off;
    PointsScaleFactor = 1/1000;

//    MarkerLabels = {"RFHD","LFHD","RBHD","LBHD","CLAV","C7","T10","STRN","RBAK","RSHO","LSHO","RUPA","LUPA","RELB","LELB","RFRA","LFRA","RWRA","LWRA","RWRB","LWRB","RFIN","LFIN","RASI",
//      "LASI","RPSI","LPSI","RTHI","LTHI","RKNE","LKNE","RTIB","LTIB","RANK","LANK","RHEE","LHEE","RTOE","LTOE","RMT5","LMT5"};
//
    MarkerDrawOnOff =On;
    AnalogFilterIndex =1;

    Filter =  {
      N = 2;
      Fc = {5};
      Type = LowPass;
    };


    /// This filter is used for the analog data
    AnyFunButterworthFilter LowPassFilter = {
      FilterForwardBackwardOnOff = On;
      AutomaticInitialConditionOnOff = On;
      N = 2;
      AnyVar CutOffFrequency=12;
      AnyVar SampleFreq=.Header.VideoFrameRate* .Header.NoAnalogSamplesPer3DFrame   ;
      W = {1/(SampleFreq*0.5)*CutOffFrequency};
      Type = LowPass;
    };


    MarkerScaleXYZ = 0.015*{1,1,1};
    MarkerRGB={0,0,1};
  };

  AnyIntVar FirstFrame = C3DFileData.Header.FirstFrameNo;
  AnyIntVar LastFrame = C3DFileData.Header.LastFrameNo;
  AnyIntVar nStep =(LastFrame-FirstFrame);

 AnyFolder FileNames={
    //Definition of file names
    AnyFileVar KinResults = Main.TrialSpecificData.NameOfFile + "-Kinematics.anydata.h5";
    AnyFileVar Results = Main.TrialSpecificData.NameOfFile + ".anydata.h5";
    AnyFileVar OptimizedParameters = Main.TrialSpecificData.NameOfFile + "-OptimizedParameters.txt";
    AnyFileVar OptimizedMotionTrunk = Main.TrialSpecificData.NameOfFile + "-output-euler-trunk.txt";
    AnyFileVar OptimizedMotionLeftLegTD = Main.TrialSpecificData.NameOfFile + "-output-euler-leftlegtd.txt";
    AnyFileVar OptimizedMotionRightLegTD = Main.TrialSpecificData.NameOfFile + "-output-euler-rightlegtd.txt";
    AnyFileVar OptimizedMotionLeftLeg = Main.TrialSpecificData.NameOfFile + "-output-euler-leftleg.txt";
    AnyFileVar OptimizedMotionRightLeg =Main.TrialSpecificData.NameOfFile + "-output-euler-rightleg.txt";
    AnyFileVar OptimizedMotionLeftArm = Main.TrialSpecificData.NameOfFile + "-output-euler-leftarm.txt";
    AnyFileVar OptimizedMotionRightArm =Main.TrialSpecificData.NameOfFile + "-output-euler-rightarm.txt";

    AnyFileVar WidgetValues = Main.TrialSpecificData.NameOfFile + ".anyset";
};


#if HumanModelPresent == 1
   OptimizeAnthropometricsOnOff OptimizeOnOff (
  PelvisWidthOnOff ="On",
  ThighLengthOnOff="On",
  ShankLengthOnOff="On",
  FootLengthOnOff="On",
  HeadHeightOnOff="Off",
  TrunkHeightOnOff="On",
  UpperArmLengthOnOff="Off",
  LowerArmLengthOnOff="Off",
  HandLengthOnOff="Off",
  Model1=MotionAndParameterOptimizationModel, Model2= InverseDynamicModel, Model3=IntialPositionStudy ) ={};

#endif

#if MarkersPresent == 1


  #include "Markers.any"

  //markers adds macros automatically into this folder
  AnyFolder Macros = {  };

#endif


};
