/// This AnyScript Main-file is an automatically generated helper file, which will be overwritten during subsequent exports from SolidWorks.
/// The purpose of this Main-file is to enable the user to easily load the exported SolidWorks model in the AnyBody Modeling System.
/// Before making changes to this file, please save it under a different name to avoid losing your work when the SolidWorks model is re-translated.
///
/// This AnyScript file was automatically generated by the SolidWorks2AnyBody translator add-in.
/// Translation date: Wed Oct 17 14:09:24 2012
/// SolidWorks2AnyBody Version: 1.0.0
Main =
{
  #include "FitnessMachine.any"
};
