AnyFolder EnvironmentModel = {

  /* **********************************************************
  This folder contains the definition of the Environment
  - GlobalRefFrame

  ********************************************************** */

  AnyFixedRefFrame GlobalRef = {
    Origin ={0.0,0.0,0.0};
    #include "drawcoorsystem.any"
    AnyDrawRefFrame drw={ScaleXYZ=0.3*{1,1,1};};

  };//GlobalRef

  AnySeg Weight = {
    Mass ??= 20;
    Jii = Mass*{1,1,0.01}/10;
    r0 = {0.35, 0.8, 0};
    AnyRefNode DrwNode = {
      sRel = {-0.15, -0.15, 0.6};
      ARel = RotMat(pi/2,y);
      AnyDrawSTL drws = {
        FileName = "./Input/weight.stl";
        AnyStyleDrawMaterial1 style =
        {
          EnableCreasing = On;
          CreasingAngle = 0.524;
          SpecularRGB = 0.05*{1,1,1};
        };
      };
    };

    AnyRefNode lhand = {
      sRel = {0, 0, -0.2};
    };
    AnyRefNode rhand = {
      sRel = {0, 0, 0.2};
    };
  };

};
