// Fixes to assure the right wrapping positions of some muscles
// which are produces problems specifically for this model.

Main.HumanModel.BodyModel.Right.ShoulderArm.Mus.subscapularis_1.SPLine.InitWrapPosForEachStepOnOff = On;
Main.HumanModel.BodyModel.Right.ShoulderArm.Mus.subscapularis_2.SPLine.InitWrapPosForEachStepOnOff = On;

Main.HumanModel.BodyModel.Left.ShoulderArm.Mus.subscapularis_1.SPLine.InitWrapPosForEachStepOnOff = On;
Main.HumanModel.BodyModel.Left.ShoulderArm.Mus.subscapularis_2.SPLine.InitWrapPosForEachStepOnOff = On;
