// Objects modeling the environment, i.e. the ground and the
// car.
AnyFolder &ParRef=..EnvironmentParameters;

/// The global reference frame to which all fixed parts of
/// the model can be attached.
AnyFixedRefFrame GlobalRef = {
  Origin ={0,0,0};
  AnyRefNode PelvisGroundLock = {
    sRel = {0.1,-0.13,0.0};
  };

  // AnyBody logo
  AnyRefNode Logo={
    sRel={1.2,0.2,-0.5};
    ARel = RotMat(pi,y)*RotMat(-30*pi/180,x);

    AnyDrawSTL Body = {
      FileName = "<ANYBODY_PATH_MODELUTILS>/DrawObjects/Body-grey.stl";
      RGB = Main.DrawSettings.Colors.AnyBodyGrey;

      Opacity = 1;
      ScaleXYZ={0.01,0.01,0.01}*1.5;
    };

    AnyDrawSTL AnyTechnology = {
      FileName = "<ANYBODY_PATH_MODELUTILS>/DrawObjects/AnyTechnology-red.stl";
      RGB = Main.DrawSettings.Colors.AnyBodyRed;

      Opacity = 1;
      ScaleXYZ={0.01,0.01,0.01}*1.5;
    };
  };
};

AnyVec3 BodyColor=Main.DrawSettings.Colors.AnyBodyBlue;
AnyVec3 FrameColor={0.25,0.25,0.25};
AnyVec3 RimColor={0.5,0.5,0.5};
AnyVar Scale=1.8;

AnyFixedRefFrame GlobalRef1 = {
  Origin ={-3.5,-0.65,0.33};

  AnyDrawSurf DrwSurf1 = {
    FileName = "../Input/floor";
    RGB = {0.3,0.3,0.3};
    ScaleXYZ={..Scale*3,..Scale,..Scale};
    Face=-1;
  };
};

AnyFixedRefFrame GlobalRef2 = {
  Origin ={0.1,-0.7,0.33};
  Axes={{0,-1,0},{0,0,1},{-1,0,0}};

  AnyDrawSurf DrwSurf1 = {
    FileName = "../Input/doors";
    RGB = ..BodyColor;
    ScaleXYZ={..Scale,..Scale,..Scale};
    Face=-1;
  };

  AnyDrawSurf DrwSurf2 = {
    FileName = "../Input/seats1";
    RGB =Main.DrawSettings.Colors.AnyBodyRed;
    ScaleXYZ={..Scale,..Scale,..Scale};
    Face=-1;
  };

  AnyDrawSurf DrwSurf3 = {
    FileName = "../Input/seats2";
    RGB =Main.DrawSettings.Colors.AnyBodyBlue;
    ScaleXYZ={..Scale,..Scale,..Scale};
    Face=-1;
  };

  AnyDrawSurf DrwSurf4 = {
    FileName = "../Input/rims";
    RGB =..RimColor;
    ScaleXYZ={..Scale,..Scale,..Scale};
    Face=-1;
  };

  AnyDrawSurf DrwSurf5 = {
    FileName = "../Input/tires";
    RGB ={0,0,0};
    ScaleXYZ={..Scale,..Scale,..Scale};
    Face=-1;
  };

  AnyDrawSurf DrwSurf6 = {
    FileName = "../Input/plates";
    RGB ={0.9,0.9,0.9};
    ScaleXYZ={..Scale,..Scale,..Scale};
    Face=-1;
  };

  //glass
  AnyDrawSurf DrwSurf7 = {
    FileName = "../Input/clockglass";
    RGB ={0,0,0};
    Face=-1;
    Opacity=0.5;
    ScaleXYZ={..Scale,..Scale,..Scale};
  };

  AnyDrawSurf DrwSurf8 = {
    FileName = "../Input/windows";
    RGB ={0,0,0};
    Opacity=0.2;
    ScaleXYZ={..Scale,..Scale,..Scale};
  };

  AnyDrawSurf DrwSurf9 = {
    FileName = "../Input/interiordetails";
    RGB ={0.5,0.5,0.5};
    Face=-1;
    ScaleXYZ={..Scale,..Scale,..Scale};
  };

  AnyDrawSurf DrwSurf10 = {
    FileName = "../Input/exteriordetails";
    RGB=..FrameColor;
    Face=-1;
    ScaleXYZ={..Scale,..Scale,..Scale};
  };

  AnyDrawSurf DrwSurf11 = {
    FileName = "../Input/sunroofframe";
    RGB =..FrameColor;
    Face=-1;
    ScaleXYZ={..Scale,..Scale,..Scale};
  };

  AnyDrawSurf DrwSurf12 = {
    FileName = "../Input/frontlights";
    RGB ={0.8,0.8,0.8};
    Face=1;
    ScaleXYZ={..Scale,..Scale,..Scale};
  };
  AnyDrawSurf DrwSurf121 = {
    FileName = "../Input/lights2";
    RGB ={0.8,0.1,0.1};
    Face=1;
    ScaleXYZ={..Scale,..Scale,..Scale};
  };

  AnyDrawSurf DrwSurf13 = {
    FileName = "../Input/minorrearlights";
    RGB ={0.8,0.1,0.1};
    Opacity=0.9;
    Face=-1;
    ScaleXYZ={..Scale,..Scale,..Scale};
  };

  AnyDrawSurf DrwSurf14 = {
    FileName = "../Input/steeringwheel";
    RGB ={0.3,0.3,0.3};

    Face=-1;
    ScaleXYZ={..Scale,..Scale,..Scale};
  };

  AnyDrawSurf DrwSurf15 = {
    FileName = "../Input/sheild";
    RGB ={0.6,0.5,0.5};
    Face=-1;
    ScaleXYZ={..Scale,..Scale,..Scale};
  };

  AnyDrawSurf DrwSurf16 = {
    FileName = "../Input/insidepanels";
    RGB ={0.4,0.4,0.4};
    Face=-1;
    ScaleXYZ={..Scale,..Scale,..Scale};
  };

  AnyDrawSurf DrwSurf17 = {
    FileName = "../Input/frontdetail";
    RGB ={0.1,0.1,0.3};
    Face=-1;
    ScaleXYZ={..Scale,..Scale,..Scale};
  };

};//GlobalRef2

AnySeg Handle = {
  Mass =2;
  Jii ={0,0,0};
  r0= {.ParRef.HandleX,.ParRef.HandleY,.ParRef.HandleZ};
  AnyDrawSeg test={};
};

AnyFixedRefFrame HandlePosR = {
  Origin ={.ParRef.HandleX,.ParRef.HandleY,.ParRef.HandleZ};
  #include "drawcoorsystem.any"
  AnyRefNode cc={
    sRel ={0,0,0};
    AnyVar theta=-30*pi/180;
    ARel={{cos(theta),sin(theta),0},{sin(theta),cos(theta),0},{0,0,1}};
  };
};

AnyFolder Right = {
  //-------------------------------------------------------
  // Leg pos definition
  //-------------------------------------------------------
  AnyFixedRefFrame  HeelPos ={
    #include "drawcoorsystem.any"
    Origin ={..ParRef.HeelXR,..ParRef.HeelYR,..ParRef.HeelZR};
  };

  AnyFixedRefFrame KneePos = {
    #include "drawcoorsystem.any"
    Origin ={..ParRef.KneeXR,..ParRef.KneeYR,..ParRef.KneeZR};
  };

  //-------------------------------------------------------
  // Arm frontal pos definition
  //-------------------------------------------------------
  AnyFixedRefFrame ElbowPos = {
    #include "drawcoorsystem.any"
    Origin ={..ParRef.ElbowXR,..ParRef.ElbowYR,..ParRef.ElbowZR};
  };

}; //right

AnyFolder Left = {
  //-------------------------------------------------------
  // Leg pos definition
  //-------------------------------------------------------
  AnyFixedRefFrame  HeelPos ={
    #include "drawcoorsystem.any"
    Origin ={..ParRef.HeelXL,..ParRef.HeelYL,..ParRef.HeelZL};
  };

  AnyFixedRefFrame KneePos= {
    #include "drawcoorsystem.any"
    Origin ={..ParRef.KneeXL,..ParRef.KneeYL,..ParRef.KneeZL};
  };

  //-------------------------------------------------------
  // Arm frontal pos definition
  //-------------------------------------------------------
  AnyFixedRefFrame ElbowPos = {
    #include "drawcoorsystem.any"
    Origin ={..ParRef.ElbowXL,..ParRef.ElbowYL,..ParRef.ElbowZL};
  };
};//left


AnyFixedRefFrame LogoLocation= {
  Origin = {-0.2,1,0.4};
};
