/// Main parameters that define the model
AnyFolder EnvironmentParameters = {
    //Right heel position
    AnyVar HeelXR =   0.8;
    AnyVar HeelYR =  -0.35;
    AnyVar HeelZR =  -0.15;

    //Left heel position
    AnyVar HeelXL =   0.3;
    AnyVar HeelYL =  -0.68;
    AnyVar HeelZL =  -0.5;

    //Right knee position
    AnyVar KneeXR = 0.5;
    AnyVar KneeYR = 0.0;
    AnyVar KneeZR = -0.2;

    //Left knee position
    AnyVar KneeXL = 0.5;
    AnyVar KneeYL = 0.0;
    AnyVar KneeZL = -0.5;

    //Right elbow position
    AnyVar ElbowXR = 0.3;
    AnyVar ElbowYR = 0.4;
    AnyVar ElbowZR = -0.05;

    //Left elbow position
    AnyVar ElbowXL = 0.3;
    AnyVar ElbowYL = 0.4;
    AnyVar ElbowZL = -0.2;

    //Handle position
    AnyVar HandleX = 0.4;
    AnyVar HandleY = 0.6;
    AnyVar HandleZ = -0.3;

    // Determines the position of the handle along the window frame
    // changing the value will move the handle up or down
    AnyVar HandlePos = -0.2;
  };
