Main.HumanModel.BodyModel.Right.ShoulderArm.Mus = {
levator_scapulae_1.FatigueModel	=	&Main.Study.FatigueModel_M;
 levator_scapulae_2.FatigueModel	=	&Main.Study.FatigueModel_M;
 levator_scapulae_3.FatigueModel	=	&Main.Study.FatigueModel_M;
 levator_scapulae_4.FatigueModel	=	&Main.Study.FatigueModel_M;
 trapezius_clavicular_part_1.FatigueModel	=	&Main.Study.FatigueModel_M;
 trapezius_clavicular_part_2.FatigueModel	=	&Main.Study.FatigueModel_M;
 trapezius_clavicular_part_3.FatigueModel	=	&Main.Study.FatigueModel_M;
 trapezius_clavicular_part_4.FatigueModel	=	&Main.Study.FatigueModel_M;
 trapezius_clavicular_part_5.FatigueModel	=	&Main.Study.FatigueModel_M;
 trapezius_clavicular_part_6.FatigueModel	=	&Main.Study.FatigueModel_M;
 Sternocleidomastoid_caput_clavicular.FatigueModel	=	&Main.Study.FatigueModel_M;
 Sternocleidomastoid_caput_Sternum.FatigueModel	=	&Main.Study.FatigueModel_M;
 biceps_brachii_caput_breve.FatigueModel	=	&Main.Study.FatigueModel_M;
 biceps_brachii_caput_longum.FatigueModel	=	&Main.Study.FatigueModel_M;
 coracobrachialis_1.FatigueModel	=	&Main.Study.FatigueModel_M;
 coracobrachialis_2.FatigueModel	=	&Main.Study.FatigueModel_M;
 coracobrachialis_3.FatigueModel	=	&Main.Study.FatigueModel_M;
 coracobrachialis_4.FatigueModel	=	&Main.Study.FatigueModel_M;
 coracobrachialis_5.FatigueModel	=	&Main.Study.FatigueModel_M;
 coracobrachialis_6.FatigueModel	=	&Main.Study.FatigueModel_M;
 deltoideus_posterior_part_1.FatigueModel	=	&Main.Study.FatigueModel_M;
 deltoideus_posterior_part_3.FatigueModel	=	&Main.Study.FatigueModel_M;
 deltoideus_posterior_part_2.FatigueModel	=	&Main.Study.FatigueModel_M;
 deltoideus_posterior_part_4.FatigueModel	=	&Main.Study.FatigueModel_M;
 deltoideus_lateral_part_1.FatigueModel	=	&Main.Study.FatigueModel_M;
 deltoideus_lateral_part_3.FatigueModel	=	&Main.Study.FatigueModel_M;
 deltoideus_lateral_part_2.FatigueModel	=	&Main.Study.FatigueModel_M;
 deltoideus_lateral_part_4.FatigueModel	=	&Main.Study.FatigueModel_M;
 deltoideus_anterior_part_1.FatigueModel	=	&Main.Study.FatigueModel_M;
 deltoideus_anterior_part_2.FatigueModel	=	&Main.Study.FatigueModel_M;
 deltoideus_anterior_part_3.FatigueModel	=	&Main.Study.FatigueModel_M;
 deltoideus_anterior_part_4.FatigueModel	=	&Main.Study.FatigueModel_M;
 infraspinatus_1.FatigueModel	=	&Main.Study.FatigueModel_M;
 infraspinatus_2.FatigueModel	=	&Main.Study.FatigueModel_M;
 infraspinatus_3.FatigueModel	=	&Main.Study.FatigueModel_M;
 infraspinatus_4.FatigueModel	=	&Main.Study.FatigueModel_M;
 infraspinatus_5.FatigueModel	=	&Main.Study.FatigueModel_M;
 infraspinatus_6.FatigueModel	=	&Main.Study.FatigueModel_M;
 latissimus_dorsi_1.FatigueModel	=	&Main.Study.FatigueModel_M;
 latissimus_dorsi_2.FatigueModel	=	&Main.Study.FatigueModel_M;
 latissimus_dorsi_3.FatigueModel	=	&Main.Study.FatigueModel_M;
 latissimus_dorsi_4.FatigueModel	=	&Main.Study.FatigueModel_M;
 latissimus_dorsi_5.FatigueModel	=	&Main.Study.FatigueModel_M;
 latissimus_dorsi_6.FatigueModel	=	&Main.Study.FatigueModel_M;
 latissimus_dorsi_7.FatigueModel	=	&Main.Study.FatigueModel_M;
 latissimus_dorsi_8.FatigueModel	=	&Main.Study.FatigueModel_M;
 latissimus_dorsi_9.FatigueModel	=	&Main.Study.FatigueModel_M;
 latissimus_dorsi_10.FatigueModel	=	&Main.Study.FatigueModel_M;
 latissimus_dorsi_11.FatigueModel	=	&Main.Study.FatigueModel_M;
 pectoralis_major_thoracic_part_1.FatigueModel	=	&Main.Study.FatigueModel_M;
 pectoralis_major_thoracic_part_2.FatigueModel	=	&Main.Study.FatigueModel_M;
 pectoralis_major_thoracic_part_3.FatigueModel	=	&Main.Study.FatigueModel_M;
 pectoralis_major_thoracic_part_4.FatigueModel	=	&Main.Study.FatigueModel_M;
 pectoralis_major_thoracic_part_5.FatigueModel	=	&Main.Study.FatigueModel_M;
 pectoralis_major_thoracic_part_6.FatigueModel	=	&Main.Study.FatigueModel_M;
 pectoralis_major_thoracic_part_7.FatigueModel	=	&Main.Study.FatigueModel_M;
 pectoralis_major_thoracic_part_8.FatigueModel	=	&Main.Study.FatigueModel_M;
 pectoralis_major_thoracic_part_9.FatigueModel	=	&Main.Study.FatigueModel_M;
 pectoralis_major_thoracic_part_10.FatigueModel	=	&Main.Study.FatigueModel_M;
 pectoralis_major_clavicular_part_1.FatigueModel	=	&Main.Study.FatigueModel_M;
 pectoralis_major_clavicular_part_2.FatigueModel	=	&Main.Study.FatigueModel_M;
 pectoralis_major_clavicular_part_3.FatigueModel	=	&Main.Study.FatigueModel_M;
 pectoralis_major_clavicular_part_4.FatigueModel	=	&Main.Study.FatigueModel_M;
 pectoralis_major_clavicular_part_5.FatigueModel	=	&Main.Study.FatigueModel_M;
 pectoralis_minor_1.FatigueModel	=	&Main.Study.FatigueModel_M;
 pectoralis_minor_2.FatigueModel	=	&Main.Study.FatigueModel_M;
 pectoralis_minor_3.FatigueModel	=	&Main.Study.FatigueModel_M;
 rhomboideus_1.FatigueModel	=	&Main.Study.FatigueModel_M;
 rhomboideus_2.FatigueModel	=	&Main.Study.FatigueModel_M;
 rhomboideus_3.FatigueModel	=	&Main.Study.FatigueModel_M;
 serratus_anterior_1.FatigueModel	=	&Main.Study.FatigueModel_M;
 serratus_anterior_2.FatigueModel	=	&Main.Study.FatigueModel_M;
 serratus_anterior_3.FatigueModel	=	&Main.Study.FatigueModel_M;
 serratus_anterior_4.FatigueModel	=	&Main.Study.FatigueModel_M;
 serratus_anterior_5.FatigueModel	=	&Main.Study.FatigueModel_M;
 serratus_anterior_6.FatigueModel	=	&Main.Study.FatigueModel_M;
 subscapularis_1.FatigueModel	=	&Main.Study.FatigueModel_M;
 subscapularis_2.FatigueModel	=	&Main.Study.FatigueModel_M;
 subscapularis_3.FatigueModel	=	&Main.Study.FatigueModel_M;
 subscapularis_4.FatigueModel	=	&Main.Study.FatigueModel_M;
 subscapularis_5.FatigueModel	=	&Main.Study.FatigueModel_M;
 subscapularis_6.FatigueModel	=	&Main.Study.FatigueModel_M;
 supraspinatus_1.FatigueModel	=	&Main.Study.FatigueModel_M;
 supraspinatus_2.FatigueModel	=	&Main.Study.FatigueModel_M;
 supraspinatus_3.FatigueModel	=	&Main.Study.FatigueModel_M;
 supraspinatus_4.FatigueModel	=	&Main.Study.FatigueModel_M;
 supraspinatus_5.FatigueModel	=	&Main.Study.FatigueModel_M;
 supraspinatus_6.FatigueModel	=	&Main.Study.FatigueModel_M;
 teres_major_1.FatigueModel	=	&Main.Study.FatigueModel_M;
 teres_major_2.FatigueModel	=	&Main.Study.FatigueModel_M;
 teres_major_3.FatigueModel	=	&Main.Study.FatigueModel_M;
 teres_major_4.FatigueModel	=	&Main.Study.FatigueModel_M;
 teres_major_5.FatigueModel	=	&Main.Study.FatigueModel_M;
 teres_major_6.FatigueModel	=	&Main.Study.FatigueModel_M;
 teres_minor_1.FatigueModel	=	&Main.Study.FatigueModel_M;
 teres_minor_2.FatigueModel	=	&Main.Study.FatigueModel_M;
 teres_minor_3.FatigueModel	=	&Main.Study.FatigueModel_M;
 teres_minor_4.FatigueModel	=	&Main.Study.FatigueModel_M;
 teres_minor_5.FatigueModel	=	&Main.Study.FatigueModel_M;
 teres_minor_6.FatigueModel	=	&Main.Study.FatigueModel_M;
 trapezius_scapular_part_1.FatigueModel	=	&Main.Study.FatigueModel_M;
 trapezius_scapular_part_2.FatigueModel	=	&Main.Study.FatigueModel_M;
 trapezius_scapular_part_3.FatigueModel	=	&Main.Study.FatigueModel_M;
 trapezius_scapular_part_4.FatigueModel	=	&Main.Study.FatigueModel_M;
 trapezius_scapular_part_5.FatigueModel	=	&Main.Study.FatigueModel_M;
 trapezius_scapular_part_6.FatigueModel	=	&Main.Study.FatigueModel_M;
 Brachialis_1.FatigueModel	=	&Main.Study.FatigueModel_M;
 Brachialis_2.FatigueModel	=	&Main.Study.FatigueModel_M;
 Triceps_LH_1.FatigueModel	=	&Main.Study.FatigueModel_M;
 Triceps_LH_2.FatigueModel	=	&Main.Study.FatigueModel_M;
 Triceps_ME_1.FatigueModel	=	&Main.Study.FatigueModel_M;
 Triceps_ME_2.FatigueModel	=	&Main.Study.FatigueModel_M;
 Triceps_LA_1.FatigueModel	=	&Main.Study.FatigueModel_M;
 Triceps_LA_2.FatigueModel	=	&Main.Study.FatigueModel_M;
 Brach_rad_1.FatigueModel	=	&Main.Study.FatigueModel_M;
 Brach_rad_2.FatigueModel	=	&Main.Study.FatigueModel_M;
 Anconeus_1.FatigueModel	=	&Main.Study.FatigueModel_M;
 Anconeus_2.FatigueModel	=	&Main.Study.FatigueModel_M;
 Pronator_teres_caput_humeral_1.FatigueModel	=	&Main.Study.FatigueModel_M;
 Pronator_teres_caput_humeral_2.FatigueModel	=	&Main.Study.FatigueModel_M;
 Pronator_teres_caput_ulnare_1.FatigueModel	=	&Main.Study.FatigueModel_M;
 Supinator_humerus_part_1.FatigueModel	=	&Main.Study.FatigueModel_M;
 Supinator_humerus_part_2.FatigueModel	=	&Main.Study.FatigueModel_M;
 Supinator_ulna_part_1.FatigueModel	=	&Main.Study.FatigueModel_M;
 Supinator_ulna_part_2.FatigueModel	=	&Main.Study.FatigueModel_M;
 Pron_quadr_1.FatigueModel	=	&Main.Study.FatigueModel_M;
 Pron_quadr_2.FatigueModel	=	&Main.Study.FatigueModel_M;
 Extensor_Indicis.FatigueModel	=	&Main.Study.FatigueModel_M;
 Abductor_Pollicis_Longus.FatigueModel	=	&Main.Study.FatigueModel_M;
 Extensor_Pollicis_Brevis.FatigueModel	=	&Main.Study.FatigueModel_M;
 Extensor_Pollicis_Longus.FatigueModel	=	&Main.Study.FatigueModel_M;
 Extensor_Carpi_Radialis_Longus.FatigueModel	=	&Main.Study.FatigueModel_M;
 Extensor_Carpi_Radialis_Brevis.FatigueModel	=	&Main.Study.FatigueModel_M;
 Extensor_Carpi_Ulnaris.FatigueModel	=	&Main.Study.FatigueModel_M;
 Flexor_Carpi_Ulnaris.FatigueModel	=	&Main.Study.FatigueModel_M;
 Flexor_Carpi_Radialis.FatigueModel	=	&Main.Study.FatigueModel_M;
 Palmaris_Longus.FatigueModel	=	&Main.Study.FatigueModel_M;
 Flexor_Digitorum_Superficialis__Digit5.FatigueModel	=	&Main.Study.FatigueModel_M;
 Flexor_Digitorum_Superficialis__Digit4.FatigueModel	=	&Main.Study.FatigueModel_M;
 Flexor_Digitorum_Superficialis__Digit3.FatigueModel	=	&Main.Study.FatigueModel_M;
 Flexor_Digitorum_Superficialis__Digit2.FatigueModel	=	&Main.Study.FatigueModel_M;
 Flexor_Digitorum_Profundus__Digit5.FatigueModel	=	&Main.Study.FatigueModel_M;
 Flexor_Digitorum_Profundus__Digit4.FatigueModel	=	&Main.Study.FatigueModel_M;
 Flexor_Digitorum_Profundus__Digit3.FatigueModel	=	&Main.Study.FatigueModel_M;
 Flexor_Digitorum_Profundus__Digit2.FatigueModel	=	&Main.Study.FatigueModel_M;
 Extensor_Digitorum__Digit5.FatigueModel	=	&Main.Study.FatigueModel_M;
 Extensor_Digitorum__Digit4.FatigueModel	=	&Main.Study.FatigueModel_M;
 Extensor_Digitorum__Digit3.FatigueModel	=	&Main.Study.FatigueModel_M;
 Extensor_Digitorum__Digit2.FatigueModel	=	&Main.Study.FatigueModel_M;
 Extensor_Digiti_Minimi.FatigueModel	=	&Main.Study.FatigueModel_M;
 Flexor_Pollicis_Longus.FatigueModel	=	&Main.Study.FatigueModel_M;
};

Main.HumanModel.BodyModel.Left.ShoulderArm.Mus = {
levator_scapulae_1.FatigueModel	=	&Main.Study.FatigueModel_M;
 levator_scapulae_2.FatigueModel	=	&Main.Study.FatigueModel_M;
 levator_scapulae_3.FatigueModel	=	&Main.Study.FatigueModel_M;
 levator_scapulae_4.FatigueModel	=	&Main.Study.FatigueModel_M;
 trapezius_clavicular_part_1.FatigueModel	=	&Main.Study.FatigueModel_M;
 trapezius_clavicular_part_2.FatigueModel	=	&Main.Study.FatigueModel_M;
 trapezius_clavicular_part_3.FatigueModel	=	&Main.Study.FatigueModel_M;
 trapezius_clavicular_part_4.FatigueModel	=	&Main.Study.FatigueModel_M;
 trapezius_clavicular_part_5.FatigueModel	=	&Main.Study.FatigueModel_M;
 trapezius_clavicular_part_6.FatigueModel	=	&Main.Study.FatigueModel_M;
 Sternocleidomastoid_caput_clavicular.FatigueModel	=	&Main.Study.FatigueModel_M;
 Sternocleidomastoid_caput_Sternum.FatigueModel	=	&Main.Study.FatigueModel_M;
 biceps_brachii_caput_breve.FatigueModel	=	&Main.Study.FatigueModel_M;
 biceps_brachii_caput_longum.FatigueModel	=	&Main.Study.FatigueModel_M;
 coracobrachialis_1.FatigueModel	=	&Main.Study.FatigueModel_M;
 coracobrachialis_2.FatigueModel	=	&Main.Study.FatigueModel_M;
 coracobrachialis_3.FatigueModel	=	&Main.Study.FatigueModel_M;
 coracobrachialis_4.FatigueModel	=	&Main.Study.FatigueModel_M;
 coracobrachialis_5.FatigueModel	=	&Main.Study.FatigueModel_M;
 coracobrachialis_6.FatigueModel	=	&Main.Study.FatigueModel_M;
 deltoideus_posterior_part_1.FatigueModel	=	&Main.Study.FatigueModel_M;
 deltoideus_posterior_part_3.FatigueModel	=	&Main.Study.FatigueModel_M;
 deltoideus_posterior_part_2.FatigueModel	=	&Main.Study.FatigueModel_M;
 deltoideus_posterior_part_4.FatigueModel	=	&Main.Study.FatigueModel_M;
 deltoideus_lateral_part_1.FatigueModel	=	&Main.Study.FatigueModel_M;
 deltoideus_lateral_part_3.FatigueModel	=	&Main.Study.FatigueModel_M;
 deltoideus_lateral_part_2.FatigueModel	=	&Main.Study.FatigueModel_M;
 deltoideus_lateral_part_4.FatigueModel	=	&Main.Study.FatigueModel_M;
 deltoideus_anterior_part_1.FatigueModel	=	&Main.Study.FatigueModel_M;
 deltoideus_anterior_part_2.FatigueModel	=	&Main.Study.FatigueModel_M;
 deltoideus_anterior_part_3.FatigueModel	=	&Main.Study.FatigueModel_M;
 deltoideus_anterior_part_4.FatigueModel	=	&Main.Study.FatigueModel_M;
 infraspinatus_1.FatigueModel	=	&Main.Study.FatigueModel_M;
 infraspinatus_2.FatigueModel	=	&Main.Study.FatigueModel_M;
 infraspinatus_3.FatigueModel	=	&Main.Study.FatigueModel_M;
 infraspinatus_4.FatigueModel	=	&Main.Study.FatigueModel_M;
 infraspinatus_5.FatigueModel	=	&Main.Study.FatigueModel_M;
 infraspinatus_6.FatigueModel	=	&Main.Study.FatigueModel_M;
 latissimus_dorsi_1.FatigueModel	=	&Main.Study.FatigueModel_M;
 latissimus_dorsi_2.FatigueModel	=	&Main.Study.FatigueModel_M;
 latissimus_dorsi_3.FatigueModel	=	&Main.Study.FatigueModel_M;
 latissimus_dorsi_4.FatigueModel	=	&Main.Study.FatigueModel_M;
 latissimus_dorsi_5.FatigueModel	=	&Main.Study.FatigueModel_M;
 latissimus_dorsi_6.FatigueModel	=	&Main.Study.FatigueModel_M;
 latissimus_dorsi_7.FatigueModel	=	&Main.Study.FatigueModel_M;
 latissimus_dorsi_8.FatigueModel	=	&Main.Study.FatigueModel_M;
 latissimus_dorsi_9.FatigueModel	=	&Main.Study.FatigueModel_M;
 latissimus_dorsi_10.FatigueModel	=	&Main.Study.FatigueModel_M;
 latissimus_dorsi_11.FatigueModel	=	&Main.Study.FatigueModel_M;
 pectoralis_major_thoracic_part_1.FatigueModel	=	&Main.Study.FatigueModel_M;
 pectoralis_major_thoracic_part_2.FatigueModel	=	&Main.Study.FatigueModel_M;
 pectoralis_major_thoracic_part_3.FatigueModel	=	&Main.Study.FatigueModel_M;
 pectoralis_major_thoracic_part_4.FatigueModel	=	&Main.Study.FatigueModel_M;
 pectoralis_major_thoracic_part_5.FatigueModel	=	&Main.Study.FatigueModel_M;
 pectoralis_major_thoracic_part_6.FatigueModel	=	&Main.Study.FatigueModel_M;
 pectoralis_major_thoracic_part_7.FatigueModel	=	&Main.Study.FatigueModel_M;
 pectoralis_major_thoracic_part_8.FatigueModel	=	&Main.Study.FatigueModel_M;
 pectoralis_major_thoracic_part_9.FatigueModel	=	&Main.Study.FatigueModel_M;
 pectoralis_major_thoracic_part_10.FatigueModel	=	&Main.Study.FatigueModel_M;
 pectoralis_major_clavicular_part_1.FatigueModel	=	&Main.Study.FatigueModel_M;
 pectoralis_major_clavicular_part_2.FatigueModel	=	&Main.Study.FatigueModel_M;
 pectoralis_major_clavicular_part_3.FatigueModel	=	&Main.Study.FatigueModel_M;
 pectoralis_major_clavicular_part_4.FatigueModel	=	&Main.Study.FatigueModel_M;
 pectoralis_major_clavicular_part_5.FatigueModel	=	&Main.Study.FatigueModel_M;
 pectoralis_minor_1.FatigueModel	=	&Main.Study.FatigueModel_M;
 pectoralis_minor_2.FatigueModel	=	&Main.Study.FatigueModel_M;
 pectoralis_minor_3.FatigueModel	=	&Main.Study.FatigueModel_M;
 rhomboideus_1.FatigueModel	=	&Main.Study.FatigueModel_M;
 rhomboideus_2.FatigueModel	=	&Main.Study.FatigueModel_M;
 rhomboideus_3.FatigueModel	=	&Main.Study.FatigueModel_M;
 serratus_anterior_1.FatigueModel	=	&Main.Study.FatigueModel_M;
 serratus_anterior_2.FatigueModel	=	&Main.Study.FatigueModel_M;
 serratus_anterior_3.FatigueModel	=	&Main.Study.FatigueModel_M;
 serratus_anterior_4.FatigueModel	=	&Main.Study.FatigueModel_M;
 serratus_anterior_5.FatigueModel	=	&Main.Study.FatigueModel_M;
 serratus_anterior_6.FatigueModel	=	&Main.Study.FatigueModel_M;
 subscapularis_1.FatigueModel	=	&Main.Study.FatigueModel_M;
 subscapularis_2.FatigueModel	=	&Main.Study.FatigueModel_M;
 subscapularis_3.FatigueModel	=	&Main.Study.FatigueModel_M;
 subscapularis_4.FatigueModel	=	&Main.Study.FatigueModel_M;
 subscapularis_5.FatigueModel	=	&Main.Study.FatigueModel_M;
 subscapularis_6.FatigueModel	=	&Main.Study.FatigueModel_M;
 supraspinatus_1.FatigueModel	=	&Main.Study.FatigueModel_M;
 supraspinatus_2.FatigueModel	=	&Main.Study.FatigueModel_M;
 supraspinatus_3.FatigueModel	=	&Main.Study.FatigueModel_M;
 supraspinatus_4.FatigueModel	=	&Main.Study.FatigueModel_M;
 supraspinatus_5.FatigueModel	=	&Main.Study.FatigueModel_M;
 supraspinatus_6.FatigueModel	=	&Main.Study.FatigueModel_M;
 teres_major_1.FatigueModel	=	&Main.Study.FatigueModel_M;
 teres_major_2.FatigueModel	=	&Main.Study.FatigueModel_M;
 teres_major_3.FatigueModel	=	&Main.Study.FatigueModel_M;
 teres_major_4.FatigueModel	=	&Main.Study.FatigueModel_M;
 teres_major_5.FatigueModel	=	&Main.Study.FatigueModel_M;
 teres_major_6.FatigueModel	=	&Main.Study.FatigueModel_M;
 teres_minor_1.FatigueModel	=	&Main.Study.FatigueModel_M;
 teres_minor_2.FatigueModel	=	&Main.Study.FatigueModel_M;
 teres_minor_3.FatigueModel	=	&Main.Study.FatigueModel_M;
 teres_minor_4.FatigueModel	=	&Main.Study.FatigueModel_M;
 teres_minor_5.FatigueModel	=	&Main.Study.FatigueModel_M;
 teres_minor_6.FatigueModel	=	&Main.Study.FatigueModel_M;
 trapezius_scapular_part_1.FatigueModel	=	&Main.Study.FatigueModel_M;
 trapezius_scapular_part_2.FatigueModel	=	&Main.Study.FatigueModel_M;
 trapezius_scapular_part_3.FatigueModel	=	&Main.Study.FatigueModel_M;
 trapezius_scapular_part_4.FatigueModel	=	&Main.Study.FatigueModel_M;
 trapezius_scapular_part_5.FatigueModel	=	&Main.Study.FatigueModel_M;
 trapezius_scapular_part_6.FatigueModel	=	&Main.Study.FatigueModel_M;
 Brachialis_1.FatigueModel	=	&Main.Study.FatigueModel_M;
 Brachialis_2.FatigueModel	=	&Main.Study.FatigueModel_M;
 Triceps_LH_1.FatigueModel	=	&Main.Study.FatigueModel_M;
 Triceps_LH_2.FatigueModel	=	&Main.Study.FatigueModel_M;
 Triceps_ME_1.FatigueModel	=	&Main.Study.FatigueModel_M;
 Triceps_ME_2.FatigueModel	=	&Main.Study.FatigueModel_M;
 Triceps_LA_1.FatigueModel	=	&Main.Study.FatigueModel_M;
 Triceps_LA_2.FatigueModel	=	&Main.Study.FatigueModel_M;
 Brach_rad_1.FatigueModel	=	&Main.Study.FatigueModel_M;
 Brach_rad_2.FatigueModel	=	&Main.Study.FatigueModel_M;
 Anconeus_1.FatigueModel	=	&Main.Study.FatigueModel_M;
 Anconeus_2.FatigueModel	=	&Main.Study.FatigueModel_M;
 Pronator_teres_caput_humeral_1.FatigueModel	=	&Main.Study.FatigueModel_M;
 Pronator_teres_caput_humeral_2.FatigueModel	=	&Main.Study.FatigueModel_M;
 Pronator_teres_caput_ulnare_1.FatigueModel	=	&Main.Study.FatigueModel_M;
 Supinator_humerus_part_1.FatigueModel	=	&Main.Study.FatigueModel_M;
 Supinator_humerus_part_2.FatigueModel	=	&Main.Study.FatigueModel_M;
 Supinator_ulna_part_1.FatigueModel	=	&Main.Study.FatigueModel_M;
 Supinator_ulna_part_2.FatigueModel	=	&Main.Study.FatigueModel_M;
 Pron_quadr_1.FatigueModel	=	&Main.Study.FatigueModel_M;
 Pron_quadr_2.FatigueModel	=	&Main.Study.FatigueModel_M;
 Extensor_Indicis.FatigueModel	=	&Main.Study.FatigueModel_M;
 Abductor_Pollicis_Longus.FatigueModel	=	&Main.Study.FatigueModel_M;
 Extensor_Pollicis_Brevis.FatigueModel	=	&Main.Study.FatigueModel_M;
 Extensor_Pollicis_Longus.FatigueModel	=	&Main.Study.FatigueModel_M;
 Extensor_Carpi_Radialis_Longus.FatigueModel	=	&Main.Study.FatigueModel_M;
 Extensor_Carpi_Radialis_Brevis.FatigueModel	=	&Main.Study.FatigueModel_M;
 Extensor_Carpi_Ulnaris.FatigueModel	=	&Main.Study.FatigueModel_M;
 Flexor_Carpi_Ulnaris.FatigueModel	=	&Main.Study.FatigueModel_M;
 Flexor_Carpi_Radialis.FatigueModel	=	&Main.Study.FatigueModel_M;
 Palmaris_Longus.FatigueModel	=	&Main.Study.FatigueModel_M;
 Flexor_Digitorum_Superficialis__Digit5.FatigueModel	=	&Main.Study.FatigueModel_M;
 Flexor_Digitorum_Superficialis__Digit4.FatigueModel	=	&Main.Study.FatigueModel_M;
 Flexor_Digitorum_Superficialis__Digit3.FatigueModel	=	&Main.Study.FatigueModel_M;
 Flexor_Digitorum_Superficialis__Digit2.FatigueModel	=	&Main.Study.FatigueModel_M;
 Flexor_Digitorum_Profundus__Digit5.FatigueModel	=	&Main.Study.FatigueModel_M;
 Flexor_Digitorum_Profundus__Digit4.FatigueModel	=	&Main.Study.FatigueModel_M;
 Flexor_Digitorum_Profundus__Digit3.FatigueModel	=	&Main.Study.FatigueModel_M;
 Flexor_Digitorum_Profundus__Digit2.FatigueModel	=	&Main.Study.FatigueModel_M;
 Extensor_Digitorum__Digit5.FatigueModel	=	&Main.Study.FatigueModel_M;
 Extensor_Digitorum__Digit4.FatigueModel	=	&Main.Study.FatigueModel_M;
 Extensor_Digitorum__Digit3.FatigueModel	=	&Main.Study.FatigueModel_M;
 Extensor_Digitorum__Digit2.FatigueModel	=	&Main.Study.FatigueModel_M;
 Extensor_Digiti_Minimi.FatigueModel	=	&Main.Study.FatigueModel_M;
 Flexor_Pollicis_Longus.FatigueModel	=	&Main.Study.FatigueModel_M;
};
