// This AnyScript file was automatically generated by the AnyExp4SOLIDWORKS translator add-in.
// Translation date: Mon Sep 25 11:36:49 2017
// AnyExp4SOLIDWORKS Version: 1.1.0

  AnyFolder Drill_Assem =
  {
//    AnyKinEqType _ANY_CTYPE_ = Hard;
//
//    AnyFolder _ANY_INTERFACE_ =
//    {
//      ////LIST OF USER-DEFINED REFERENCE COORDINATE SYSTEMS
//      //AnyRefFrame& ANY_COORDSYS_HAND_RIGHT = .CordlessDrill___1.ANY_COORDSYS_HAND_RIGHT;
//      //AnyRefFrame& ANY_COORDSYS_HAND_LEFT = .CordlessDrill___1.ANY_COORDSYS_HAND_LEFT;
//      //AnyRefFrame& ANY_COORDSYS_HAND_BOTTOM = .CordlessDrill___1.ANY_COORDSYS_HAND_BOTTOM;
//      ////LIST OF USER-DEFINED REFERENCE COORDINATE SYSTEMS
//    };
//
//    AnyFixedRefFrame Origin =
//    {
//      Origin = {0, 0, 0};
//      Axes={ {1, 0, 0}, {0, 1, 0}, {0, 0, 1} };
//      AnyRefNode Drill_Assem_Coincident1 =
//      {
//        sRel={0, 0, 0};
//        ARel={ {1, 0, 0}, {0, 1, 0}, {0, 0, 1} };
//        AnyDrawRefFrame drw_node =
//        {
//          RGB = {0, 0, 0};
//          Opacity = 1;
//          ScaleXYZ = {0.03786053795, 0.03786053795, 0.03786053795};
//          Visible = On;
//        };
//      };
//      AnyRefNode Front__Plane =
//      {
//        sRel={0, 0, 0};
//        ARel={ {1, 0, 0}, {0, 1, 0}, {0, 0, 1} };
//        AnyDrawRefFrame drw_node =
//        {
//          RGB = {0, 0, 0};
//          Opacity = 1;
//          ScaleXYZ = {0.03786053795, 0.03786053795, 0.03786053795};
//          Visible = Off;
//        };
//      };
//      AnyRefNode Origin_Ref =
//      {
//        sRel={0, 0, 0};
//        ARel={ {1, 0, 0}, {0, 1, 0}, {0, 0, 1} };
//        AnyDrawRefFrame drw_node =
//        {
//          RGB = {0, 0, 0};
//          Opacity = 1;
//          ScaleXYZ = {0.01340719104, 0.01340719104, 0.01340719104};
//          Visible = On;
//        };
//      };
//      AnyRefNode Right__Plane =
//      {
//        sRel={0, 0, 0};
//        ARel={ {-0, 0, 1}, {-0, 1, 0}, {-1, 0, 0} };
//        AnyDrawRefFrame drw_node =
//        {
//          RGB = {0, 0, 0};
//          Opacity = 1;
//          ScaleXYZ = {0.03786053795, 0.03786053795, 0.03786053795};
//          Visible = Off;
//        };
//      };
//      AnyRefNode Top__Plane =
//      {
//        sRel={0, 0, 0};
//        ARel={ {1, 0, 0}, {0, 0, 1}, {0, -1, 0} };
//        AnyDrawRefFrame drw_node =
//        {
//          RGB = {0, 0, 0};
//          Opacity = 1;
//          ScaleXYZ = {0.03786053795, 0.03786053795, 0.03786053795};
//          Visible = Off;
//        };
//      };
//    };
//
//    AnyRefNode& Drill_Assem_Coincident1 = Origin.Drill_Assem_Coincident1;
//    AnyRefNode& Front__Plane = Origin.Front__Plane;
//    AnyRefNode& Origin_Ref = Origin.Origin_Ref;
//    AnyRefNode& Right__Plane = Origin.Right__Plane;
//    AnyRefNode& Top__Plane = Origin.Top__Plane;
    AnySeg Drill =
    {
      r0={0.45,1.9,0.1};
      Axes0={ {1, 0, 0}, {0, 1, 0}, {0, 0, 1} }*RotMat(-pi/2, x)*RotMat(pi, z)*RotMat(pi/2, y);//*RotMat(-pi/2, x)*RotMat(pi, z)*RotMat(pi, x);
      Mass = 1;
      Jii = {0.001084048231, 0.001338350502, 0.0005496126546};
      Jij = {-1.407744089e-007, -1.401282925e-006, -0.0002961141202};
      //sCoM = {0.04464003551, -3.350216231e-005, 0.03448203945};
      sCoM = ({0.06939395843, -0.01867623115, 0.09847827848} + {0.06939096483, 0.01867555633, 0.09847284159})/2;
        AnyDrawRefFrame drw_Main =
        {
          RGB = {0,1,0};
          Opacity = 1;
          ScaleXYZ = {0.03786053795, 0.03786053795, 0.03786053795};
          Visible = On;
        };

      AnyRefNode ref_main =
      {
        sRel=.sCoM;
        ARel = RotMat(-pi,z)*RotMat(-pi/2,x)*RotMat(-pi,z)*RotMat(pi,y);//ARel={ {-1, 0, 0}, {0, 0, 1}, {0, 1, 0} };
        AnyDrawRefFrame drw_node =
        {
          RGB = {0.7921568627, 0.8196078431, 0.9333333333};
          Opacity = 1;
          ScaleXYZ = {0.03786053795, 0.03786053795, 0.03786053795};
          Visible = On;
        };
      };
      AnyRefNode CoM_Node =
      {
        sRel = .sCoM;

        AnyDrawRefFrame Drw =
        {
          RGB = {1, 0, 0};
          ScaleXYZ = 0.15*{1,1,1};
        };
      };
      JaboutCoMOnOff = On;
      AnyDrawSurf drw =
      {
        FileName = "Drill_Assem.CordlessDrill_cfg0_9c1185a5c5e9fc546128.stl";
        Opacity = 1;
        RGB = {0, 204, 153}/255;
        AnyStyleDrawMaterial1 style =
        {
          EnableCreasing = On;
          CreasingAngle = 0.524;
        };
      };
      AnyRefNode Origin =
      {
        sRel = {0, 0, 0};
        ARel={ {1, 0, 0}, {0, 1, 0}, {0, 0, 1} };
      };
      AnyRefNode ANY_COORDSYS_HAND_BOTTOM =
      {
        sRel={0.03808151775, -3.469446952e-017, 0.000188647569};
        ARel={ {-1, 0, 0}, {0, 0, 1}, {0, 1, 0} };
        AnyDrawRefFrame drw_node =
        {
          RGB = {0.7921568627, 0.8196078431, 0.9333333333};
          Opacity = 1;
          ScaleXYZ = {0.03786053795, 0.03786053795, 0.03786053795};
          Visible = On;
        };
      };
      AnyRefNode left =
      {
        sRel={0.06939395843, -0.01867623115, 0.09847827848};
        ARel = RotMat(pi,z)*RotMat(pi/2,x)*RotMat(pi,z);//ARel={ {-1, 0, 0}, {0, 0, 1}, {0, 1, 0} };
        AnyDrawRefFrame drw_node =
        {
          RGB = {0.7921568627, 0.8196078431, 0.9333333333};
          Opacity = 1;
          ScaleXYZ = {0.03786053795, 0.03786053795, 0.03786053795};
          Visible = On;
        };
      };
      AnyRefNode right =
      {
        sRel={0.06939096483, 0.01867555633, 0.09847284159};
        ARel = RotMat(pi,z)*RotMat(pi/2,x)*RotMat(pi,z);//ARel={ {-1, 0, 0}, {0, 0, 1}, {0, 1, 0} };
        AnyDrawRefFrame drw_node =
        {
          RGB = {0.7921568627, 0.8196078431, 0.9333333333};
          Opacity = 1;
          ScaleXYZ = {0.03786053795, 0.03786053795, 0.03786053795};
          Visible = On;
        };
      };
      AnyRefNode left2 =
      {
        sRel={0.06939395843, -0.01867623115, 0.09847827848};
        ARel = RotMat(pi/2,x)*RotMat(pi,y);//ARel={ {-1, 0, 0}, {0, 0, 1}, {0, 1, 0} };
        AnyDrawRefFrame drw_node =
        {
          RGB = {0.7921568627, 0.8196078431, 0.9333333333};
          Opacity = 1;
          ScaleXYZ = {0.03786053795, 0.03786053795, 0.03786053795};
          Visible = On;
        };
      };
      AnyRefNode right2 =
      {
        sRel={0.06939096483, 0.01867555633, 0.09847284159};
        ARel = RotMat(pi/2,x)*RotMat(pi,y);//ARel={ {-1, 0, 0}, {0, 0, 1}, {0, 1, 0} };
        AnyDrawRefFrame drw_node =
        {
          RGB = {0.7921568627, 0.8196078431, 0.9333333333};
          Opacity = 1;
          ScaleXYZ = {0.03786053795, 0.03786053795, 0.03786053795};
          Visible = On;
        };
      };
      AnyRefNode ANY_NODE_HAND_BOTTOM =
      {
        sRel={0.03808151775, -3.469446952e-017, 0.000188647569};
        ARel={ {1, 0, 0}, {0, 1, 0}, {0, 0, 1} };
        AnyDrawNode drw_node =
        {
          RGB = {0.7921568627, 0.8196078431, 0.9333333333};
          Opacity = 1;
          ScaleXYZ = {0.003786053795, 0.003786053795, 0.003786053795};
          Visible = On;
        };
      };
      AnyRefNode ANY_NODE_HAND_LEFT =
      {
        sRel={0.06939395843, -0.01867623115, 0.09847827848};
        ARel={ {1, 0, 0}, {0, 1, 0}, {0, 0, 1} };
        AnyDrawNode drw_node =
        {
          RGB = {0.7921568627, 0.8196078431, 0.9333333333};
          Opacity = 1;
          ScaleXYZ = {0.003786053795, 0.003786053795, 0.003786053795};
          Visible = On;
        };
      };
      AnyRefNode ANY_NODE_HAND_RIGHT =
      {
        sRel={0.06939096483, 0.01867555633, 0.09847284159};
        ARel={ {1, 0, 0}, {0, 1, 0}, {0, 0, 1} };
        AnyDrawNode drw_node =
        {
          RGB = {0.7921568627, 0.8196078431, 0.9333333333};
          Opacity = 1;
          ScaleXYZ = {0.003786053795, 0.003786053795, 0.003786053795};
          Visible = On;
        };
      };
//      AnyRefNode Drill_Assem_Coincident1 =
//      {
//        sRel={0, 0, 0};
//        ARel={ {1, 0, 0}, {0, 1, 0}, {0, 0, 1} };
//        AnyDrawRefFrame drw_node =
//        {
//          RGB = {0.7921568627, 0.8196078431, 0.9333333333};
//          Opacity = 1;
//          ScaleXYZ = {0.03786053795, 0.03786053795, 0.03786053795};
//          Visible = On;
//        };
//      };
//      AnyRefNode Front__Plane =
//      {
//        sRel={0, 0, 0};
//        ARel={ {1, 0, 0}, {0, 1, 0}, {0, 0, 1} };
//        AnyDrawRefFrame drw_node =
//        {
//          RGB = {0.7921568627, 0.8196078431, 0.9333333333};
//          Opacity = 1;
//          ScaleXYZ = {0.03786053795, 0.03786053795, 0.03786053795};
//          Visible = Off;
//        };
//      };
//      AnyRefNode Origin_Ref =
//      {
//        sRel={0, 0, 0};
//        ARel={ {1, 0, 0}, {0, 1, 0}, {0, 0, 1} };
//        AnyDrawRefFrame drw_node =
//        {
//          RGB = {0, 0, 0};
//          Opacity = 1;
//          ScaleXYZ = {0.01340719104, 0.01340719104, 0.01340719104};
//          Visible = On;
//        };
//      };
//      AnyRefNode Point1 =
//      {
//        sRel={-0.06270558255, -9.193289295e-007, 0.2219417364};
//        ARel={ {1, 0, 0}, {0, 1, 0}, {0, 0, 1} };
//        AnyDrawNode drw_node =
//        {
//          RGB = {0.7921568627, 0.8196078431, 0.9333333333};
//          Opacity = 1;
//          ScaleXYZ = {0.003786053795, 0.003786053795, 0.003786053795};
//          Visible = On;
//        };
//      };
//      AnyRefNode Point2 =
//      {
//        sRel={-0.07574689694, -9.193289295e-007, 0.2230564561};
//        ARel={ {1, 0, 0}, {0, 1, 0}, {0, 0, 1} };
//        AnyDrawNode drw_node =
//        {
//          RGB = {0.7921568627, 0.8196078431, 0.9333333333};
//          Opacity = 1;
//          ScaleXYZ = {0.003786053795, 0.003786053795, 0.003786053795};
//          Visible = On;
//        };
//      };
//      AnyRefNode Point3 =
//      {
//        sRel={0.06970789584, 0.01265786872, 0.09904834103};
//        ARel={ {1, 0, 0}, {0, 1, 0}, {0, 0, 1} };
//        AnyDrawNode drw_node =
//        {
//          RGB = {0.7921568627, 0.8196078431, 0.9333333333};
//          Opacity = 1;
//          ScaleXYZ = {0.003786053795, 0.003786053795, 0.003786053795};
//          Visible = On;
//        };
//      };
//      AnyRefNode Point4 =
//      {
//        sRel={0.06971079845, -0.01265901655, 0.09905373212};
//        ARel={ {1, 0, 0}, {0, 1, 0}, {0, 0, 1} };
//        AnyDrawNode drw_node =
//        {
//          RGB = {0.7921568627, 0.8196078431, 0.9333333333};
//          Opacity = 1;
//          ScaleXYZ = {0.003786053795, 0.003786053795, 0.003786053795};
//          Visible = On;
//        };
//      };
//      AnyRefNode Point5 =
//      {
//        sRel={0.03808151775, -3.463369357e-017, 0.002268397329};
//        ARel={ {1, 0, 0}, {0, 1, 0}, {0, 0, 1} };
//        AnyDrawNode drw_node =
//        {
//          RGB = {0.7921568627, 0.8196078431, 0.9333333333};
//          Opacity = 1;
//          ScaleXYZ = {0.003786053795, 0.003786053795, 0.003786053795};
//          Visible = On;
//        };
//      };
//      AnyRefNode Right__Plane =
//      {
//        sRel={0, 0, 0};
//        ARel={ {-0, 0, 1}, {-0, 1, 0}, {-1, 0, 0} };
//        AnyDrawRefFrame drw_node =
//        {
//          RGB = {0.7921568627, 0.8196078431, 0.9333333333};
//          Opacity = 1;
//          ScaleXYZ = {0.03786053795, 0.03786053795, 0.03786053795};
//          Visible = Off;
//        };
//      };
//      AnyRefNode Top__Plane =
//      {
//        sRel={0, 0, 0};
//        ARel={ {1, 0, 0}, {0, 0, 1}, {0, -1, 0} };
//        AnyDrawRefFrame drw_node =
//        {
//          RGB = {0.7921568627, 0.8196078431, 0.9333333333};
//          Opacity = 1;
//          ScaleXYZ = {0.03786053795, 0.03786053795, 0.03786053795};
//          Visible = Off;
//        };
//      };
//    };
//
//    AnyFolder Mates =
//    {
//      AnyKinEq Coincident1 =
//      {
//        AnyKinLinear lin =
//        {
//          AnyRefFrame& base = ...Drill.Drill_Assem_Coincident1;
//          AnyRefFrame& target = ....Drill_Assem.Drill_Assem_Coincident1;
//          Ref = 0;
//        };
//        AnyKinRotational rot =
//        {
//          AnyRefFrame& base = ...Drill.Drill_Assem_Coincident1;
//          AnyRefFrame& target = ....Drill_Assem.Drill_Assem_Coincident1;
//          Type = PlanarAngles;
//        };
//        CType = {.._ANY_CTYPE_, .._ANY_CTYPE_, .._ANY_CTYPE_, .._ANY_CTYPE_, .._ANY_CTYPE_, .._ANY_CTYPE_ };
//      };
    };
  };
