// This AnyScript file was automatically generated by the AnyExp4SOLIDWORKS translator add-in.
// Translation date: Thu Apr 11 13:21:16 2024
// AnyExp4SOLIDWORKS Version: 1.3.0

  AnyFolder Exo =
  {
    #if (ANYBODY_V1 > 7)|(ANYBODY_V1 == 7 & ANYBODY_V2 > 1)
    AnyComponentDefinition CompDef =
    {
    };
    #endif

    AnyKinEqType _ANY_CTYPE_ = Soft;

    AnyFixedRefFrame Origin =
    {
      Origin = {0, 0, 0};
      Axes={ {1, 0, 0}, {0, 1, 0}, {0, 0, 1} };
      AnyRefNode Front__Plane =
      {
        sRel={0, 0, 0};
        ARel={ {1, 0, 0}, {0, 1, 0}, {0, 0, 1} };
        AnyDrawRefFrame drw_node =
        {
          RGB = {0, 0, 0};
          Opacity = 1;
          ScaleXYZ = {0.06697999701, 0.06697999701, 0.06697999701};
          Visible = Off;
        };
      };
      AnyRefNode Origin_Ref =
      {
        sRel={0, 0, 0};
        ARel={ {1, 0, 0}, {0, 1, 0}, {0, 0, 1} };
        AnyDrawRefFrame drw_node =
        {
          RGB = {0, 0, 0};
          Opacity = 1;
          ScaleXYZ = {0.0194, 0.0194, 0.0194};
          Visible = On;
        };
      };
      AnyRefNode Right__Plane =
      {
        sRel={0, 0, 0};
        ARel={ {-0, 0, 1}, {-0, 1, 0}, {-1, 0, 0} };
        AnyDrawRefFrame drw_node =
        {
          RGB = {0, 0, 0};
          Opacity = 1;
          ScaleXYZ = {0.06697999701, 0.06697999701, 0.06697999701};
          Visible = Off;
        };
      };
      AnyRefNode Top__Plane =
      {
        sRel={0, 0, 0};
        ARel={ {1, 0, 0}, {0, 0, 1}, {0, -1, 0} };
        AnyDrawRefFrame drw_node =
        {
          RGB = {0, 0, 0};
          Opacity = 1;
          ScaleXYZ = {0.06697999701, 0.06697999701, 0.06697999701};
          Visible = Off;
        };
      };
    };

    AnyRefNode& Front__Plane = Origin.Front__Plane;
    AnyRefNode& Origin_Ref = Origin.Origin_Ref;
    AnyRefNode& Right__Plane = Origin.Right__Plane;
    AnyRefNode& Top__Plane = Origin.Top__Plane;
    AnySeg Part1___1 =
    {
      r0 = Main.HumanModel.BodyModel.Trunk.SegmentsLumbar.PelvisSeg.r0;
      Axes0={ {0, 0, -1}, {0, 1, 0}, {1, 0, 0} };
      Mass = 0.6298247774;
      Jii = {0.0139612224, 0.01285393579, 0.02337938306};
      Jij = {9.85256562e-19, 0.003177983502, -5.640962209e-18};
      sCoM = {9.279608466e-17, 0.128468324, -0.006493873673};
      JaboutCoMOnOff = On;
      AnyDrawSurf drw =
      {
        FileName = "Exo.Part1_cfg0_9c1185a5c5e9fc546128.stl";
        Opacity = 1;
        RGB = {255, 128, 0}/255;
        AnyStyleDrawMaterial1 style =
        {
          EnableCreasing = On;
          CreasingAngle = 0.524;
        };
      };
      AnyRefNode Origin =
      {
        sRel = {0, 0, 0};
        ARel={ {1, 0, 0}, {0, 1, 0}, {0, 0, 1} };
      };
      AnyRefNode Axis1 =
      {
        sRel={0.15, 0, -0.06};
        ARel={ {0, -0, -1}, {0, -1, 0}, {-1, -0, 0} };
        AnyDrawRefFrame drw_node =
        {
          RGB = {0.7921568627, 0.8196078431, 0.9333333333};
          Opacity = 1;
          ScaleXYZ = {0, 0, 0.3};
          Visible = On;
        };
      };
      AnyRefNode Coordinate__System1 =
      {
        sRel={0.085, 0.47, 0.066};
        ARel={ {0, 0, 1}, {0, 1, -0}, {-1, 0, 0} };
        AnyDrawRefFrame drw_node =
        {
          RGB = {0.7921568627, 0.8196078431, 0.9333333333};
          Opacity = 1;
          ScaleXYZ = {0.06697999701, 0.06697999701, 0.06697999701};
          Visible = On;
        };
      };
      AnyRefNode Coordinate__System2 =
      {
        sRel={-0.085, 0.47, 0.066};
        ARel={ {0, 0, 1}, {0, 1, -0}, {-1, 0, 0} };
        AnyDrawRefFrame drw_node =
        {
          RGB = {0.7921568627, 0.8196078431, 0.9333333333};
          Opacity = 1;
          ScaleXYZ = {0.06697999701, 0.06697999701, 0.06697999701};
          Visible = On;
        };
      };
      AnyRefNode Coordinate__System3 =
      {
        sRel={0, 0, -0.06};
        ARel={ {3.469446952e-15, 0, 1}, {-0, 1, -0}, {-1, 0, 3.469446952e-15} };
        AnyDrawRefFrame drw_node =
        {
          RGB = {0.7921568627, 0.8196078431, 0.9333333333};
          Opacity = 1;
          ScaleXYZ = {0.06697999701, 0.06697999701, 0.06697999701};
          Visible = On;
        };
      };
      AnyRefNode Fix_Node =
      {
        sRel={0, 0, 0};
        ARel={ {1, 0, 0}, {0, 1, 0}, {0, 0, 1} };
        AnyDrawRefFrame drw_node =
        {
          RGB = {1, 1, 1};
          Opacity = 1;
          ScaleXYZ = {0, 0, 0};
          Visible = On;
        };
      };
      AnyRefNode Front__Plane =
      {
        sRel={0, 0, 0};
        ARel={ {1, 0, 0}, {0, 1, 0}, {0, 0, 1} };
        AnyDrawRefFrame drw_node =
        {
          RGB = {0.7921568627, 0.8196078431, 0.9333333333};
          Opacity = 1;
          ScaleXYZ = {0.06697999701, 0.06697999701, 0.06697999701};
          Visible = Off;
        };
      };
      AnyRefNode Origin_Ref =
      {
        sRel={0, 0, 0};
        ARel={ {1, 0, 0}, {0, 1, 0}, {0, 0, 1} };
        AnyDrawRefFrame drw_node =
        {
          RGB = {0, 0, 0};
          Opacity = 1;
          ScaleXYZ = {0.0194, 0.0194, 0.0194};
          Visible = On;
        };
      };
      AnyRefNode Point1 =
      {
        sRel={-0.085, 0.47, 0.066};
        ARel={ {1, 0, 0}, {0, 1, 0}, {0, 0, 1} };
        AnyDrawNode drw_node =
        {
          RGB = {0.7921568627, 0.8196078431, 0.9333333333};
          Opacity = 1;
          ScaleXYZ = {0.006697999701, 0.006697999701, 0.006697999701};
          Visible = On;
        };
      };
      AnyRefNode Point2 =
      {
        sRel={0.085, 0.47, 0.066};
        ARel={ {1, 0, 0}, {0, 1, 0}, {0, 0, 1} };
        AnyDrawNode drw_node =
        {
          RGB = {0.7921568627, 0.8196078431, 0.9333333333};
          Opacity = 1;
          ScaleXYZ = {0.006697999701, 0.006697999701, 0.006697999701};
          Visible = On;
        };
      };
      AnyRefNode Point3 =
      {
        sRel={-0.15, 0, -0.06};
        ARel={ {1, 0, 0}, {0, 1, 0}, {0, 0, 1} };
        AnyDrawNode drw_node =
        {
          RGB = {0.7921568627, 0.8196078431, 0.9333333333};
          Opacity = 1;
          ScaleXYZ = {0.006697999701, 0.006697999701, 0.006697999701};
          Visible = On;
        };
      };
      AnyRefNode Point4 =
      {
        sRel={0.15, 0, -0.06};
        ARel={ {1, 0, 0}, {0, 1, 0}, {0, 0, 1} };
        AnyDrawNode drw_node =
        {
          RGB = {0.7921568627, 0.8196078431, 0.9333333333};
          Opacity = 1;
          ScaleXYZ = {0.006697999701, 0.006697999701, 0.006697999701};
          Visible = On;
        };
      };
      AnyRefNode Point5 =
      {
        sRel={0, 0, -0.06};
        ARel={ {1, 0, 0}, {0, 1, 0}, {0, 0, 1} };
        AnyDrawNode drw_node =
        {
          RGB = {0.7921568627, 0.8196078431, 0.9333333333};
          Opacity = 1;
          ScaleXYZ = {0.006697999701, 0.006697999701, 0.006697999701};
          Visible = On;
        };
      };
      AnyRefNode Right__Plane =
      {
        sRel={0, 0, 0};
        ARel={ {-0, 0, 1}, {-0, 1, 0}, {-1, 0, 0} };
        AnyDrawRefFrame drw_node =
        {
          RGB = {0.7921568627, 0.8196078431, 0.9333333333};
          Opacity = 1;
          ScaleXYZ = {0.06697999701, 0.06697999701, 0.06697999701};
          Visible = Off;
        };
      };
      AnyRefNode Top__Plane =
      {
        sRel={0, 0, 0};
        ARel={ {1, 0, 0}, {0, 0, 1}, {0, -1, 0} };
        AnyDrawRefFrame drw_node =
        {
          RGB = {0.7921568627, 0.8196078431, 0.9333333333};
          Opacity = 1;
          ScaleXYZ = {0.06697999701, 0.06697999701, 0.06697999701};
          Visible = Off;
        };
      };
    };

    AnyFolder Mates =
    {
      #if (ANYBODY_V1 > 7)|(ANYBODY_V1 == 7 & ANYBODY_V2 > 1)
      AnyComponentDefinition CompDef =
      {
      };
      #endif

//      AnyKinEq Fix_Part1___1 =
//      {
//        AnyKinLinear lin =
//        {
//          AnyRefFrame& base = ....Exo.Origin_Ref;
//          AnyRefFrame& target = ...Part1___1.Fix_Node;
//          Ref = 0;
//        };
//        AnyKinRotational rot =
//        {
//          AnyRefFrame& base = ....Exo.Origin_Ref;
//          AnyRefFrame& target = ...Part1___1.Fix_Node;
//          Type = PlanarAngles;
//        };
//        CType = {.._ANY_CTYPE_, .._ANY_CTYPE_, .._ANY_CTYPE_, .._ANY_CTYPE_, .._ANY_CTYPE_, .._ANY_CTYPE_ };
//      };
    };
  };
