/* Definition of Driver for the segments in the lumbar spine. From PelvisL5 to T12L1

Mark de Zee
*/

AnyFolder &RefHM = Main.Model.HumanModel;

AnyFolder Joints={
  AnyRevoluteJoint GroundPelvisJnt = {
    Axis = z;
    AnyRefNode &GroundNode = Main.Model.EnvironmentModel.GlobalRef.GroundNode;
    AnyRefNode &PelvisNode = ..RefHM.Trunk.SegmentsLumbar.PelvisSeg.GroundPelvisJntNode;
  };
};


AnyFolder DriversLumbar = {

  AnyKinEqSimpleDriver GroundPelvisJntDriver = {
    AnyRevoluteJoint &GroundPelvisJoint = ..Joints.GroundPelvisJnt;
    DriverPos = {0};
    DriverVel = {0.0};
    Reaction.Type = {On};
  };

  //Thorax pelvis rotation driver
  AnyKinEqSimpleDriver PostureDriver ={
    AnyKinMeasureOrg &Ref2 = ..RefHM.Interface.Trunk.PelvisThoraxLateralBending;
    AnyKinMeasureOrg &Ref3 = ..RefHM.Interface.Trunk.PelvisThoraxRotation;
    AnyKinMeasureOrg &Ref1 = ..RefHM.Interface.Trunk.PelvisThoraxExtension;
    DriverPos = pi/180*{0.0,0.0,5.0};
    DriverVel = pi/180*{0.0,0.0,0.0};
    Reaction.Type = {Off,Off,Off};
  };


  //Neck driver
  AnyKinEqSimpleDriver NeckJntDriver = {
    AnyKinMeasure &lb = ..RefHM.Interface.Trunk.SkullThoraxLateralBending;
    AnyKinMeasure &ar = ..RefHM.Interface.Trunk.SkullThoraxRotation;
    AnyKinMeasure &fe = ..RefHM.Interface.Trunk.SkullThoraxFlexion;
    DriverPos = pi/180*{0,0,0};
    DriverVel = pi/180*{0,0,0};
    Reaction.Type = {Off,Off,Off};
  };

};
