  // ************************************
  // Drivers for the Left leg
  // ************************************

  //Left hip driver
  AnyKinEqSimpleDriver HipDriverLeft={
    AnyKinMeasure& ref1 =...BodyModel.Interface.Left.HipFlexion;
    AnyKinMeasure& ref2 =...BodyModel.Interface.Left.HipExternalRotation;
    AnyKinMeasure& ref3 =...BodyModel.Interface.Left.HipAbduction;
    DriverPos=pi/180*{
      .JntPos.Left.HipFlexion,
      .JntPos.Left.HipExternalRotation,
      .JntPos.Left.HipAbduction
    };
    DriverVel = pi/180*{
      .JntVel.Left.HipFlexion,
      .JntVel.Left.HipExternalRotation,
      .JntVel.Left.HipAbduction
    };
    Reaction.Type={Off,Off,Off};
  };

  //Knee driver
  AnyKinEqSimpleDriver KneeDriverLeft={
    AnyKinMeasure& Knee =...BodyModel.Interface.Left.KneeFlexion;
    DriverPos=pi/180*{      .JntPos.Left.KneeFlexion   };
    DriverVel = pi/180*{      .JntVel.Left.KneeFlexion   };
    Reaction.Type={Off};
  };

  //Ankle driver
  AnyKinEqSimpleDriver AnkleDriverLeft={
    AnyKinMeasure& ref1=...BodyModel.Interface.Left.AnklePlantarFlexion;
    AnyKinMeasure& ref2=...BodyModel.Interface.Left.SubTalarEversion;
    DriverPos = pi/180*{.JntPos.Left.AnklePlantarFlexion,.JntPos.Left.SubTalarEversion};
    DriverVel=pi/180*{.JntVel.Left.AnklePlantarFlexion,.JntVel.Left.SubTalarEversion};
    Reaction.Type={Off,Off};
  };

  // Foot drivers
  #if BM_FOOT_MODEL == _FOOT_MODEL_DETAILED_GM_ | BM_FOOT_MODEL == _FOOT_MODEL_TOE_FLEX_GM_
  #include "LeftFootDrivers.any"
  #endif
