  // ************************************
  // Drivers for the right leg
  // ************************************

   //Hip driver
  AnyKinEqSimpleDriver HipDriverRight={
    AnyKinMeasure& ref1 =...BodyModel.Interface.Right.HipFlexion;
    AnyKinMeasure& ref2 =...BodyModel.Interface.Right.HipExternalRotation;
    AnyKinMeasure& ref3 =...BodyModel.Interface.Right.HipAbduction;
    DriverPos= pi/180*{
      .JntPos.Right.HipFlexion,
      .JntPos.Right.HipExternalRotation,
      .JntPos.Right.HipAbduction
    };
    DriverVel = pi/180*{
      .JntVel.Right.HipFlexion,
      .JntVel.Right.HipExternalRotation,
      .JntVel.Right.HipAbduction
    };
    Reaction.Type={Off,Off,Off};
  };

  //Knee driver
  AnyKinEqSimpleDriver KneeDriverRight={
    AnyKinMeasureOrg  &Knee = ...BodyModel.Interface.Right.KneeFlexion;
    DriverPos=pi/180*{.JntPos.Right.KneeFlexion};
    DriverVel = pi/180*{.JntVel.Right.KneeFlexion};
    Reaction.Type={Off};
  };

  //Ankle driver
  AnyKinEqSimpleDriver AnkleDriverRight={
    AnyKinMeasure& ref1=...BodyModel.Interface.Right.AnklePlantarFlexion;
    AnyKinMeasure& ref2=...BodyModel.Interface.Right.SubTalarEversion;
    DriverPos = pi/180*{.JntPos.Right.AnklePlantarFlexion,.JntPos.Right.SubTalarEversion};
    DriverVel=pi/180*{.JntVel.Right.AnklePlantarFlexion,.JntVel.Right.SubTalarEversion};
    Reaction.Type={Off,Off};
  };

  // Foot drivers
  #if BM_FOOT_MODEL == _FOOT_MODEL_DETAILED_GM_ | BM_FOOT_MODEL == _FOOT_MODEL_TOE_FLEX_GM_
  #include "RightFootDrivers.any"
  #endif
