  // ************************************
  // Drivers for the left arm
  // ************************************


  #if BM_ARM_LEFT & (BM_ARM_SHOULDER_RHYTHM == OFF)
  //Sterno clavicular joint driver
  AnyKinDriver SCDriverLeft ={
    AnyKinMeasure& ref1 =...HumanModel.Interface.Left.SternoClavicularProtraction;
    AnyKinMeasure& ref2 =...HumanModel.Interface.Left.SternoClavicularElevation;
    AnyKinMeasure& ref3 =...HumanModel.Interface.Left.SternoClavicularAxialRotation;

    AnyFunInterpol interp = {
      Data = pi/180*{
        ..JntPos.Right.SternoClavicularProtraction,
        ..JntPos.Right.SternoClavicularElevation,
        ..JntPos.Right.SternoClavicularAxialRotation
      };
      T=..JntPos.Right.SternoClavicularTime;
      Type=Bspline;
    };
   Reaction.Type={Off,Off,Off};
  };
  #endif


  //Glenohumeral joint driver
  AnyKinDriver GHDriverLeft={
    AnyKinMeasure& ref1 =...HumanModel.Interface.Left.GlenohumeralAbduction;
    AnyKinMeasure& ref2 =...HumanModel.Interface.Left.GlenohumeralFlexion;
    AnyKinMeasure& ref3 =...HumanModel.Interface.Left.GlenohumeralExternalRotation;
    AnyFunInterpol interp = {
      Data=pi/180*{
        ..JntPos.Right.GlenohumeralAbductionVec,  //GH joint
        ..JntPos.Right.GlenohumeralFlexionVec,  //GH joint
        ..JntPos.Right.GlenohumeralExternalRotationVec  //GH joint
      };
      T=..JntPos.Right.GlenohumeralTime;
      Type=Bspline;
    };
    Reaction.Type={Off,Off,Off};
  };

  //Elbow flexion driver
  AnyKinDriver ElbowFEDriverLeft={
    AnyKinMeasureOrg  &Elbow =...HumanModel.Interface.Left.ElbowFlexion;
    AnyFunInterpol interp = {
      Data=pi/180*{..JntPos.Right.ElbowFlexionVec};
      T=..JntPos.Right.ElbowFlexionTime;
      Type=Bspline;
    };

    Reaction.Type={Off};
  };

  //Elbow pronation driver
  AnyKinDriver ElbowPSDriverLeft={
    AnyKinMeasure& Elbow =...HumanModel.Interface.Left.ElbowPronation;
    AnyFunInterpol interp = {
      Data = pi/180*{..JntPos.Right.ElbowPronationVec };
      Type=Bspline;
      T=..JntPos.Right.ElbowPronationTime;
    };
    Reaction.Type={Off};
  };


  //Wrist driver
  AnyKinDriver WristDriverLeft ={
    AnyKinMeasure& ref1 =...HumanModel.Interface.Left.WristFlexion;
    AnyKinMeasure& ref2 =...HumanModel.Interface.Left.WristAbduction;

    AnyFunInterpol interp = {
      T=..JntPos.Left.WristTime;
      Data = pi/180*{
          ..JntPos.Left.WristFlexionVec,
          ..JntPos.Left.WristAbductionVec};
      Type=Bspline;
    };
    Reaction.Type={Off,Off};
  };
