  // ************************************
  // Drivers for the Left leg
  // ************************************

  //Left hip driver
  AnyKinEqInterPolDriver HipDriverLeft={
    AnyKinMeasureOrg &ref1 =...HumanModel.Interface.Left.HipFlexion;
    AnyKinMeasureOrg &ref2 =...HumanModel.Interface.Left.HipExternalRotation;
    AnyKinMeasureOrg &ref3 =...HumanModel.Interface.Left.HipAbduction;
   Data= pi/180*{
      .JntPos.Left.HipFlexionVec,
      .JntPos.Left.HipExternalRotationVec,
      .JntPos.Left.HipAbductionVec
    };
 T=.JntPos.Left.HipTime;
    Type=PiecewiseLinear;

    Reaction.Type={Off,Off,Off};
  };

  //Knee driver
  AnyKinEqInterPolDriver KneeDriverLeft={
    AnyKinMeasureOrg &Knee =...HumanModel.Interface.Left.KneeFlexion;
     Data=pi/180*{.JntPos.Left.KneeFlexionVec};
 T=.JntPos.Left.KneeTime;
    Type=PiecewiseLinear;
      Reaction.Type={Off};
    };


//Ankle driver
  AnyKinEqInterPolDriver AnkleDriverLeft={
    AnyKinMeasureOrg &ref1=...HumanModel.Interface.Left.AnklePlantarFlexion;
    AnyKinMeasureOrg &ref2=...HumanModel.Interface.Left.SubTalarEversion;
     Data = pi/180*{.JntPos.Left.AnklePlantarFlexionVec,.JntPos.Left.SubTalarEversionVec};
 T=.JntPos.Left.AnkleTime;
    Type=PiecewiseLinear;
    Reaction.Type={Off,Off};
  };
