/* ----------------------------------------------------------------
Drivers for the model:

-The pelvis is locked to the ground
-The remaining degrees of freedom are controlled by parameters in the mannequin.any file.
-This file is a good way to get an overview of the dof in the full body model
 all the dof in the body model is driven from this file.
-In total

Soeren, March 1, 2006.
----------------------------------------------------------------  */

AnyFolder Drivers = {

  #include "<ANYBODY_PATH_BODY>/BodyModels/include/MannequinDrivers.any"

  // Aliases for convenient referencing
  AnyFolder &JntPos=..Mannequin.Posture;
  AnyFolder &JntVel=..Mannequin.PostureVel;

  AnyFolder &RefHM = Main.Model.HumanModel;

//  AnyFolder &Thorax = .HumanModel.Trunk.SegmentsThorax.ThoraxSeg;
//  AnyFolder &ref=.HumanModel.Trunk;

  // The body parts are included only if there is no unhallowed combination detected
  #ifdef UNHALLOWED_COMBINATION
  #else

  #if BM_TRUNK == ON
  #include "ConstantDrivers/TrunkDrivers.any"
  #else
  #endif


  #if BM_TRUNK_NECK == ON
  #include "ConstantDrivers/TrunkNeckDrivers.any"
  #else
  #endif


  #if BM_ARM_RIGHT == ON
  #include "ConstantDrivers/RightArmDrivers.any"
    #if BM_ARM_DETAIL_HAND_RIGHT == ON
    #include "ConstantDrivers/RightHandDrivers.any"
    #endif
  #else
  #endif


  #if BM_ARM_LEFT == ON
  #include "ConstantDrivers/LeftArmDrivers.any"
    #if BM_ARM_DETAIL_HAND_LEFT == ON
    #include "ConstantDrivers/LeftHandDrivers.any"
    #endif
  #else
  #endif


  #if BM_LEG_RIGHT == CONST_LEG_MODEL_Leg
  #include "ConstantDrivers/RightLegDrivers.any"
  #else
  #endif


  #if BM_LEG_LEFT == CONST_LEG_MODEL_Leg
  #include "ConstantDrivers/LeftLegDrivers.any"
  #else
  #endif


  #if BM_LEG_RIGHT == CONST_LEG_MODEL_TLEM
  #include "ConstantDrivers/RightLegTDDrivers.any"
  #else
  #endif


  #if BM_LEG_LEFT == CONST_LEG_MODEL_TLEM
  #include "ConstantDrivers/LeftLegTDDrivers.any"
  #else
  #endif

  #endif
};//Drivers
