/* ----------------------------------------------------------------
Drivers for the model:

-The pelvis is locked to the ground
-The remaining degrees of freedom are controlled by parameters in the mannequin.any file.
-This file is a good way to get an overview of the dof in the full body model
 all the dof in the body model is driven from this file.
-In total

Soeren, March 1, 2006.
----------------------------------------------------------------  */

AnyFolder Drivers = {

  #include "<ANYBODY_PATH_BODY>/BodyModels/include/MannequinDrivers.any"

  // Aliases for convenient referencing
  AnyFolder &JntPos=..Mannequin.Posture;

  AnyFolder &RefHM = Main.Model.HumanModel;


  // The body parts are included only if there is no unhallowed combination detected
  #ifdef UNHALLOWED_COMBINATION
  #else

  #if BM_TRUNK == 1
  #include "InterpolationDrivers/TrunkDrivers.any"
  #else
  #endif


  #if BM_TRUNK_NECK == 1
  #include "InterpolationDrivers/TrunkNeckDrivers.any"
  #else
  #endif


  #if BM_ARM_RIGHT == 1
  #include "InterpolationDrivers/RightArmDrivers.any"
    #if BM_ARM_DETAIL_HAND_RIGHT == 1
    #include "InterpolationDrivers/RightHandDrivers.any"
    #endif
  #else
  #endif


  #if BM_ARM_LEFT == 1
  #include "InterpolationDrivers/LeftArmDrivers.any"
    #if BM_ARM_DETAIL_HAND_LEFT == 1
    #include "InterpolationDrivers/LeftHandDrivers.any"
    #endif
  #else
  #endif


  #if BM_LEG_RIGHT == CONST_LEG_MODEL_Leg
  #include "InterpolationDrivers/RightLegDrivers.any"
  #else
  #endif


  #if BM_LEG_LEFT == CONST_LEG_MODEL_Leg
  #include "InterpolationDrivers/LeftLegDrivers.any"
  #else
  #endif


  #if BM_LEG_RIGHT == CONST_LEG_MODEL_TLEM
  #include "InterpolationDrivers/RightLegTDDrivers.any"
  #else
  #endif


  #if BM_LEG_LEFT == CONST_LEG_MODEL_TLEM
  #include "InterpolationDrivers/LeftLegTDDrivers.any"
  #else
  #endif

  #endif
};//Drivers
