//************************
//Left foot drivers
//************************

  #if BM_FOOT_MODEL == _FOOT_MODEL_DETAILED_GM_

  //************************************************
  //              DriverIntertarsal
  //************************************************


    AnyKinEqSimpleDriver JntTaloNaviLeft =
    { // 0: Rot, 1: Ad/Ab 2: Df/Pf
      AnyKinMeasure &ref1 = Main.HumanModel.BodyModel.Interface.Left.TaloNavicularEversion;
      AnyKinMeasure &ref2 = Main.HumanModel.BodyModel.Interface.Left.TaloNavicularAbduction;
      AnyKinMeasure &ref3 = Main.HumanModel.BodyModel.Interface.Left.TaloNavicularDorsiFlexion;
//      MeasureOrganizer = {0,2};
      DriverPos = {
      .JntPos.Left.Foot.TaloNavicularEversion,
      .JntPos.Left.Foot.TaloNavicularAbduction,
      .JntPos.Left.Foot.TaloNavicularDorsiFlexion
      }*pi/180;
      DriverVel = {
      .JntVel.Left.Foot.TaloNavicularEversion,
      .JntVel.Left.Foot.TaloNavicularAbduction,
      .JntVel.Left.Foot.TaloNavicularDorsiFlexion
      }*pi/180;
      Reaction.Type = {Off,Off,Off};
    };

     AnyKinEqSimpleDriver JntNaviCuneiMedLeft =
    {  // 0: Rot, 1: Ad/Ab 2: Df/Pf
    //  AnyKinMeasure &ref1 = Main.HumanModel.BodyModel.Interface.Left.NaviculoMedialCuneiformEversion;
      AnyKinMeasure &ref2 = Main.HumanModel.BodyModel.Interface.Left.NaviculoMedialCuneiformAbduction;
      AnyKinMeasure &ref3 = Main.HumanModel.BodyModel.Interface.Left.NaviculoMedialCuneiformDorsiFlexion;
//      MeasureOrganizer = {0};
      DriverPos = {
      //.JntPos.Left.Foot.NaviculoMedialCuneiformEversion,
      .JntPos.Left.Foot.NaviculoMedialCuneiformAbduction,
      .JntPos.Left.Foot.NaviculoMedialCuneiformDorsiFlexion
      }*pi/180;
      DriverVel = {
      //.JntVel.Left.Foot.NaviculoMedialCuneiformEversion,
      .JntVel.Left.Foot.NaviculoMedialCuneiformAbduction,
      .JntVel.Left.Foot.NaviculoMedialCuneiformDorsiFlexion
      }*pi/180;
      //Reaction.Type = {Off,Off,Off};
      Reaction.Type = {Off,Off};

    };

    AnyKinEqSimpleDriver JntNaviCuneiIntLeft =
    { // 0: Ad/Ab 1: Df/Pf
      //AnyKinMeasure &ref1 = Main.HumanModel.BodyModel.Interface.Left.NaviculoIntermediateCuneiformAbduction; //Replaced by intertarsal contact
      AnyKinMeasure &ref2 = Main.HumanModel.BodyModel.Interface.Left.NaviculoIntermediateCuneiformDorsiFlexion;
      DriverPos = {
      //.JntPos.Left.Foot.NaviculoIntermediateCuneiformAbduction,
      .JntPos.Left.Foot.NaviculoIntermediateCuneiformDorsiFlexion
      }*pi/180;
      DriverVel = {
      //.JntVel.Left.Foot.NaviculoIntermediateCuneiformAbduction,
      .JntVel.Left.Foot.NaviculoIntermediateCuneiformDorsiFlexion
      }*pi/180;
      Reaction.Type = {Off};
    };

    AnyKinEqSimpleDriver JntNaviCuneiLatLeft =
    {// 0: Ad/Ab 1: Df/Pf
      //AnyKinMeasure &ref1 = Main.HumanModel.BodyModel.Interface.Left.NaviculoLateralCuneiformAbduction; //Replaced by intertarsal contact
      AnyKinMeasure &ref2 = Main.HumanModel.BodyModel.Interface.Left.NaviculoLateralCuneiformDorsiFlexion;
      DriverPos = {
      //.JntPos.Left.Foot.NaviculoLateralCuneiformAbduction,
      .JntPos.Left.Foot.NaviculoLateralCuneiformDorsiFlexion
      }*pi/180;
      DriverVel = {
      //.JntVel.Left.Foot.NaviculoLateralCuneiformAbduction,
      .JntVel.Left.Foot.NaviculoLateralCuneiformDorsiFlexion
      }*pi/180;
      Reaction.Type = {Off};
};

    AnyKinEqSimpleDriver JntCalCuboidLeft =
    {
      AnyKinMeasure &ref1 = Main.HumanModel.BodyModel.Interface.Left.CalcaneoCuboidEversion;
      //AnyKinMeasure &ref2 = Main.HumanModel.BodyModel.Interface.Left.CalcaneoCuboidAbduction; //Replaced by intertarsal contact
      AnyKinMeasure &ref3 = Main.HumanModel.BodyModel.Interface.Left.CalcaneoCuboidDorsiFlexion;
      DriverPos = {
      .JntPos.Left.Foot.CalcaneoCuboidEversion,
      //.JntPos.Left.Foot.CalcaneoCuboidAbduction,
      .JntPos.Left.Foot.CalcaneoCuboidDorsiFlexion
      }*pi/180;
      DriverVel = {
      .JntVel.Left.Foot.CalcaneoCuboidEversion,
      //.JntVel.Left.Foot.CalcaneoCuboidAbduction,
      .JntVel.Left.Foot.CalcaneoCuboidDorsiFlexion
      }*pi/180;
      Reaction.Type = {Off, Off};
    };


  //************************************************
  //              DriverTarsoMt
  //************************************************


    AnyKinEqSimpleDriver JntTarsoMt1Left =
    { // 0: Rot, 1: Ad/Ab 2: Df/Pf
     // AnyKinMeasure &ref1 = Main.HumanModel.BodyModel.Interface.Left.TarsoMetatarsal1Eversion;
      AnyKinMeasure &ref2 = Main.HumanModel.BodyModel.Interface.Left.TarsoMetatarsal1Abduction;
      AnyKinMeasure &ref3 = Main.HumanModel.BodyModel.Interface.Left.TarsoMetatarsal1DorsiFlexion;
//      MeasureOrganizer = {0};
      DriverPos = {
//      .JntPos.Left.Foot.TarsoMetatarsal1Eversion,
      .JntPos.Left.Foot.TarsoMetatarsal1Abduction,
      .JntPos.Left.Foot.TarsoMetatarsal1DorsiFlexion
      }*pi/180;
      DriverVel = {
  //    .JntVel.Left.Foot.TarsoMetatarsal1Eversion,
      .JntVel.Left.Foot.TarsoMetatarsal1Abduction,
      .JntVel.Left.Foot.TarsoMetatarsal1DorsiFlexion
      }*pi/180;
     // Reaction.Type = {Off,Off,Off};
      Reaction.Type = {Off,Off};

    };


    AnyKinEqSimpleDriver JntTarsoMt2Left =
    {
      //AnyKinMeasure &ref1 = Main.HumanModel.BodyModel.Interface.Left.TarsoMetatarsal2Abduction; //Replaced by metatarsal head contact
      AnyKinMeasure &ref2 = Main.HumanModel.BodyModel.Interface.Left.TarsoMetatarsal2DorsiFlexion;
      DriverPos = {
      //.JntPos.Left.Foot.TarsoMetatarsal2Abduction,
      .JntPos.Left.Foot.TarsoMetatarsal2DorsiFlexion
      }*pi/180;
      DriverVel = {
      //.JntVel.Left.Foot.TarsoMetatarsal2Abduction,
      .JntVel.Left.Foot.TarsoMetatarsal2DorsiFlexion
      }*pi/180;
      Reaction.Type = {Off};
    };


    AnyKinEqSimpleDriver JntTarsoMt3Left =
    {
      //AnyKinMeasure &ref1 = Main.HumanModel.BodyModel.Interface.Left.TarsoMetatarsal3Abduction; //Replaced by metatarsal head contact
      AnyKinMeasure &ref2 = Main.HumanModel.BodyModel.Interface.Left.TarsoMetatarsal3DorsiFlexion;
      DriverPos = {
      //.JntPos.Left.Foot.TarsoMetatarsal3Abduction,
      .JntPos.Left.Foot.TarsoMetatarsal3DorsiFlexion
      }*pi/180;
      DriverVel = {
      //.JntVel.Left.Foot.TarsoMetatarsal3Abduction,
      .JntVel.Left.Foot.TarsoMetatarsal3DorsiFlexion
      }*pi/180;
      Reaction.Type = {Off};
    };


    AnyKinEqSimpleDriver JntTarsoMt4Left =
    {
      //AnyKinMeasure &ref1 = Main.HumanModel.BodyModel.Interface.Left.TarsoMetatarsal4Abduction; //Replaced by metatarsal head contact
      AnyKinMeasure &ref2 = Main.HumanModel.BodyModel.Interface.Left.TarsoMetatarsal4DorsiFlexion;
      DriverPos = {
      //.JntPos.Left.Foot.TarsoMetatarsal4Abduction,
      .JntPos.Left.Foot.TarsoMetatarsal4DorsiFlexion
      }*pi/180;
      DriverVel = {
      //.JntVel.Left.Foot.TarsoMetatarsal4Abduction,
      .JntVel.Left.Foot.TarsoMetatarsal4DorsiFlexion
      }*pi/180;
      Reaction.Type = {Off};
    };


    AnyKinEqSimpleDriver JntTarsoMt5Left =
    {
     // AnyKinMeasure &ref1 = Main.HumanModel.BodyModel.Interface.Left.TarsoMetatarsal5SkewEversion;
      //AnyKinMeasure &ref2 = Main.HumanModel.BodyModel.Interface.Left.TarsoMetatarsal5Abduction; //Replaced by metatarsal head contact
      AnyKinMeasure &ref3 = Main.HumanModel.BodyModel.Interface.Left.TarsoMetatarsal5SkewDorsiFlexion;
      DriverPos = {
      //.JntPos.Left.Foot.TarsoMetatarsal5SkewEversion,
      //.JntPos.Left.Foot.TarsoMetatarsal5Abduction,
      .JntPos.Left.Foot.TarsoMetatarsal5SkewDorsiFlexion
      }*pi/180;
      DriverVel = {
      //.JntVel.Left.Foot.TarsoMetatarsal5SkewEversion,
      //.JntVel.Left.Foot.TarsoMetatarsal5Abduction,
      .JntVel.Left.Foot.TarsoMetatarsal5SkewDorsiFlexion
      }*pi/180;
      //Reaction.Type = {Off, Off};
      Reaction.Type = { Off};

    };


  //************************************************
  //              DriverJntMtPhal
  //************************************************


    AnyKinEqSimpleDriver JntMtPhal1Left =
    {
      AnyKinMeasure &ref1 = Main.HumanModel.BodyModel.Interface.Left.MetatarsoPhalangeal1Abduction;
      AnyKinMeasure &ref2 = Main.HumanModel.BodyModel.Interface.Left.MetatarsoPhalangeal1DorsiFlexion;
      DriverPos = {
      .JntPos.Left.Foot.MetatarsoPhalangeal1Abduction,
      .JntPos.Left.Foot.MetatarsoPhalangeal1DorsiFlexion
      }*pi/180;
      DriverVel = {
      .JntVel.Left.Foot.MetatarsoPhalangeal1Abduction,
      .JntVel.Left.Foot.MetatarsoPhalangeal1DorsiFlexion
      }*pi/180;
      Reaction.Type = {Off, Off};
    };

   #endif

   #if BM_FOOT_MODEL == _FOOT_MODEL_TOE_FLEX_GM_
    AnyKinEqSimpleDriver JntMtPhal1Left =
    {
      AnyKinMeasure &ref2 = Main.HumanModel.BodyModel.Interface.Left.MetatarsoPhalangeal1DorsiFlexion;
      DriverPos = {
      .JntPos.Left.Foot.MetatarsoPhalangeal1DorsiFlexion
      }*pi/180;
      DriverVel = {
      .JntVel.Left.Foot.MetatarsoPhalangeal1DorsiFlexion
      }*pi/180;
      Reaction.Type = {Off};
    };
   #endif

   #if BM_FOOT_MODEL == _FOOT_MODEL_DETAILED_GM_

    AnyKinEqSimpleDriver JntMtPhal2Left =
    {
      AnyKinMeasure &ref1 = Main.HumanModel.BodyModel.Interface.Left.MetatarsoPhalangeal2Abduction;
      AnyKinMeasure &ref2 = Main.HumanModel.BodyModel.Interface.Left.MetatarsoPhalangeal2DorsiFlexion;
      DriverPos = {
      .JntPos.Left.Foot.MetatarsoPhalangeal2Abduction,
      .JntPos.Left.Foot.MetatarsoPhalangeal2DorsiFlexion
      }*pi/180;
      DriverVel = {
      .JntVel.Left.Foot.MetatarsoPhalangeal2Abduction,
      .JntVel.Left.Foot.MetatarsoPhalangeal2DorsiFlexion
      }*pi/180;
      Reaction.Type = {Off, Off};
    };

    AnyKinEqSimpleDriver JntMtPhal3Left =
    {
      AnyKinMeasure &ref1 = Main.HumanModel.BodyModel.Interface.Left.MetatarsoPhalangeal3Abduction;
      AnyKinMeasure &ref2 = Main.HumanModel.BodyModel.Interface.Left.MetatarsoPhalangeal3DorsiFlexion;
      DriverPos = {
      .JntPos.Left.Foot.MetatarsoPhalangeal3Abduction,
      .JntPos.Left.Foot.MetatarsoPhalangeal3DorsiFlexion
      }*pi/180;
      DriverVel = {
      .JntVel.Left.Foot.MetatarsoPhalangeal3Abduction,
      .JntVel.Left.Foot.MetatarsoPhalangeal3DorsiFlexion
      }*pi/180;
      Reaction.Type = {Off, Off};
    };


    AnyKinEqSimpleDriver JntMtPhal4Left =
    {
      AnyKinMeasure &ref1 = Main.HumanModel.BodyModel.Interface.Left.MetatarsoPhalangeal4Abduction;
      AnyKinMeasure &ref2 = Main.HumanModel.BodyModel.Interface.Left.MetatarsoPhalangeal4DorsiFlexion;
      DriverPos = {
      .JntPos.Left.Foot.MetatarsoPhalangeal4Abduction,
      .JntPos.Left.Foot.MetatarsoPhalangeal4DorsiFlexion
      }*pi/180;
      DriverVel = {
      .JntVel.Left.Foot.MetatarsoPhalangeal4Abduction,
      .JntVel.Left.Foot.MetatarsoPhalangeal4DorsiFlexion
      }*pi/180;
      Reaction.Type = {Off, Off};
    };


    AnyKinEqSimpleDriver JntMtPhal5Left =
    {
      AnyKinMeasure &ref1 = Main.HumanModel.BodyModel.Interface.Left.MetatarsoPhalangeal5Abduction;
      AnyKinMeasure &ref2 = Main.HumanModel.BodyModel.Interface.Left.MetatarsoPhalangeal5DorsiFlexion;
      DriverPos = {
      .JntPos.Left.Foot.MetatarsoPhalangeal5Abduction,
      .JntPos.Left.Foot.MetatarsoPhalangeal5DorsiFlexion
      }*pi/180;
      DriverVel = {
      .JntVel.Left.Foot.MetatarsoPhalangeal5Abduction,
      .JntVel.Left.Foot.MetatarsoPhalangeal5DorsiFlexion
      }*pi/180;
      Reaction.Type = {Off, Off};
    };


  //************************************************
  //              DriverJntProxPhal
  //************************************************


    AnyKinEqSimpleDriver JntProxPhal1Left =
    {
      AnyKinMeasure &ref1 = Main.HumanModel.BodyModel.Interface.Left.ProximoDistalPhalange1DorsiFlexion;
      DriverPos = {.JntPos.Left.Foot.ProximoDistalPhalange1DorsiFlexion}*pi/180;
      DriverVel = {.JntVel.Left.Foot.ProximoDistalPhalange1DorsiFlexion}*pi/180;
      Reaction.Type = {Off};
    };


    AnyKinEqSimpleDriver JntProxPhal2Left =
    {
      AnyKinMeasure &ref1 = Main.HumanModel.BodyModel.Interface.Left.ProximoMedialPhalange2DorsiFlexion;
      DriverPos = {.JntPos.Left.Foot.ProximoMedialPhalange2DorsiFlexion}*pi/180;
      DriverVel = {.JntVel.Left.Foot.ProximoMedialPhalange2DorsiFlexion}*pi/180;
      Reaction.Type = {Off};
    };


    AnyKinEqSimpleDriver JntProxPhal3Left =
    {
      AnyKinMeasure &ref1 = Main.HumanModel.BodyModel.Interface.Left.ProximoMedialPhalange3DorsiFlexion;
      DriverPos = {.JntPos.Left.Foot.ProximoMedialPhalange3DorsiFlexion}*pi/180;
      DriverVel = {.JntVel.Left.Foot.ProximoMedialPhalange3DorsiFlexion}*pi/180;
      Reaction.Type = {Off};
    };


    AnyKinEqSimpleDriver JntProxPhal4Left =
    {
      AnyKinMeasure &ref1 = Main.HumanModel.BodyModel.Interface.Left.ProximoMedialPhalange4DorsiFlexion;
      DriverPos = {.JntPos.Left.Foot.ProximoMedialPhalange4DorsiFlexion}*pi/180;
      DriverVel = {.JntVel.Left.Foot.ProximoMedialPhalange4DorsiFlexion}*pi/180;
      Reaction.Type = {Off};
    };


    AnyKinEqSimpleDriver JntProxPhal5Left =
    {
      AnyKinMeasure &ref1 = Main.HumanModel.BodyModel.Interface.Left.ProximoMedialPhalange5DorsiFlexion;
      DriverPos = {.JntPos.Left.Foot.ProximoMedialPhalange5DorsiFlexion}*pi/180;
      DriverVel = {.JntVel.Left.Foot.ProximoMedialPhalange5DorsiFlexion}*pi/180;
      Reaction.Type = {Off};
    };


  //************************************************
  //              DriverJntDistPhal
  //************************************************


    AnyKinEqSimpleDriver JntDistPhal2Left =
    {
      AnyKinMeasure &ref1 = Main.HumanModel.BodyModel.Interface.Left.MedioDistalPhalange2DorsiFlexion;
      DriverPos = {.JntPos.Left.Foot.MedioDistalPhalange2DorsiFlexion}*pi/180;
      DriverVel = {.JntVel.Left.Foot.MedioDistalPhalange2DorsiFlexion}*pi/180;
      Reaction.Type = {Off};
    };


    AnyKinEqSimpleDriver JntDistPhal3Left =
    {
      AnyKinMeasure &ref1 = Main.HumanModel.BodyModel.Interface.Left.MedioDistalPhalange3DorsiFlexion;
      DriverPos = {.JntPos.Left.Foot.MedioDistalPhalange3DorsiFlexion}*pi/180;
      DriverVel = {.JntVel.Left.Foot.MedioDistalPhalange3DorsiFlexion}*pi/180;
      Reaction.Type = {Off};
    };


    AnyKinEqSimpleDriver JntDistPhal4Left =
    {
      AnyKinMeasure &ref1 = Main.HumanModel.BodyModel.Interface.Left.MedioDistalPhalange4DorsiFlexion;
      DriverPos = {.JntPos.Left.Foot.MedioDistalPhalange4DorsiFlexion}*pi/180;
      DriverVel = {.JntVel.Left.Foot.MedioDistalPhalange4DorsiFlexion}*pi/180;
      Reaction.Type = {Off};
    };


    AnyKinEqSimpleDriver JntDistPhal5Left =
    {
      AnyKinMeasure &ref1 = Main.HumanModel.BodyModel.Interface.Left.MedioDistalPhalange5DorsiFlexion;
      DriverPos = {.JntPos.Left.Foot.MedioDistalPhalange5DorsiFlexion}*pi/180;
      DriverVel = {.JntVel.Left.Foot.MedioDistalPhalange5DorsiFlexion}*pi/180;
      Reaction.Type = {Off};
    };

  #endif
