//***************************
//Basic Rhythms (toe flexion)
//***************************


//Toe flexion

  AnyVar LesserToeMedioDistalFlexCoeffRight = 2.2;

  AnyKinEqSimpleDriver Toe2FlexRhytmRight={
    AnyKinMeasureLinComb LinComb = {
      AnyKinMeasure &ref2 = ...HumanModel.Interface.Right.ProximoMedialPhalange2DorsiFlexion;
      AnyKinMeasure &ref3 = ...HumanModel.Interface.Right.MedioDistalPhalange2DorsiFlexion;
      Coef={
        {-1,..LesserToeMedioDistalFlexCoeffRight}
      };
      OutDim = 1;
    };
    DriverPos= {0};
    DriverVel={0};
    Reaction.Type = {Off};
  };


  AnyKinEqSimpleDriver Toe3FlexRhytmRight={
    AnyKinMeasureLinComb LinComb = {
      AnyKinMeasure &ref2 = ...HumanModel.Interface.Right.ProximoMedialPhalange3DorsiFlexion;
      AnyKinMeasure &ref3 = ...HumanModel.Interface.Right.MedioDistalPhalange3DorsiFlexion;
      Coef={
        {-1,..LesserToeMedioDistalFlexCoeffRight}
      };
      OutDim = 1;
    };
    DriverPos= {0};
    DriverVel={0};
    Reaction.Type = {Off};
  };


  AnyKinEqSimpleDriver Toe4FlexRhytmRight={
    AnyKinMeasureLinComb LinComb = {
      AnyKinMeasure &ref2 = ...HumanModel.Interface.Right.ProximoMedialPhalange4DorsiFlexion;
      AnyKinMeasure &ref3 = ...HumanModel.Interface.Right.MedioDistalPhalange4DorsiFlexion;
      Coef={
        {-1,..LesserToeMedioDistalFlexCoeffRight}
      };
      OutDim = 1;
    };
    DriverPos= {0};
    DriverVel={0};
    Reaction.Type = {Off};
  };


  AnyKinEqSimpleDriver Toe5FlexRhytmRight={
    AnyKinMeasureLinComb LinComb = {
      AnyKinMeasure &ref2 = ...HumanModel.Interface.Right.ProximoMedialPhalange5DorsiFlexion;
      AnyKinMeasure &ref3 = ...HumanModel.Interface.Right.MedioDistalPhalange5DorsiFlexion;
      Coef={
        {-1,..LesserToeMedioDistalFlexCoeffRight}
      };
      OutDim = 1;
    };
    DriverPos= {0};
    DriverVel={0};
    Reaction.Type = {Off};
  };


  //MP joints flexion
  AnyKinMeasureLinComb MtPh1MtPh5LinCombRight = {
    AnyKinMeasure &ref1 = Main.HumanModel.BodyModel.Interface.Right.MetatarsoPhalangeal1DorsiFlexion;
    AnyKinMeasure &ref2 = Main.HumanModel.BodyModel.Interface.Right.MetatarsoPhalangeal5DorsiFlexion;
    Coef={
      {1,-1}
    };
  };


  AnyKinEqSimpleDriver MtPh2FlexRhytmRight={
    AnyKinMeasureLinComb LinComb = {
      AnyKinMeasure &ref1 = Main.HumanModel.BodyModel.Interface.Right.MetatarsoPhalangeal2DorsiFlexion;
      AnyKinMeasure &ref2 = Main.HumanModel.BodyModel.Interface.Right.MetatarsoPhalangeal1DorsiFlexion;
      AnyKinMeasure &ref3 = ..MtPh1MtPh5LinCombRight;
      Coef={
        {1,-1,1/4}
      };
      //Const = {-11.25}*pi/180;
    };
    DriverPos= {0};
    DriverVel={0};
    Reaction.Type = {Off};
  };

  AnyKinEqSimpleDriver MtPh3FlexRhytmRight={
    AnyKinMeasureLinComb LinComb = {
      AnyKinMeasure &ref1 = Main.HumanModel.BodyModel.Interface.Right.MetatarsoPhalangeal3DorsiFlexion;
      AnyKinMeasure &ref2 = Main.HumanModel.BodyModel.Interface.Right.MetatarsoPhalangeal1DorsiFlexion;
      AnyKinMeasure &ref3 = ..MtPh1MtPh5LinCombRight;
      Coef={
        {1,-1,2/4}
      };
      //Const = {-7.5}*pi/180;
    };
    DriverPos= {0};
    DriverVel={0};
    Reaction.Type = {Off};
  };

  AnyKinEqSimpleDriver MtPh4FlexRhytmRight={
    AnyKinMeasureLinComb LinComb = {
      AnyKinMeasure &ref1 = Main.HumanModel.BodyModel.Interface.Right.MetatarsoPhalangeal4DorsiFlexion;
      AnyKinMeasure &ref2 = Main.HumanModel.BodyModel.Interface.Right.MetatarsoPhalangeal1DorsiFlexion;
      AnyKinMeasure &ref3 = ..MtPh1MtPh5LinCombRight;
      Coef={
        {1,-1,3/4}
      };
      //Const = {-3.75}*pi/180;
    };
    DriverPos= {0};
    DriverVel={0};
    Reaction.Type = {Off};
  };


  //***************************************************************
  //Tarsal rhythm (from Nester, for stance phase of normal walking).
  //***************************************************************
  // stays in drivers, only for walking.


  AnyKinEqInterPolDriver TaloNavicularRhythmRight =
  {
//    AnyKinMeasure &ref3 = Main.HumanModel.BodyModel.Interface.Right.TaloNavicularDorsiFlexion;
    AnyKinMeasure &ref1 = Main.HumanModel.BodyModel.Interface.Right.TaloNavicularEversion;
    AnyKinMeasure &ref2 = Main.HumanModel.BodyModel.Interface.Right.TaloNavicularAbduction;
    Type = Bspline;
    BsplineOrder = 4;
    T = {Main.Study.tStart,
         Main.Study.tStart+((Main.Study.tEnd-Main.Study.tStart)*1/5),
         Main.Study.tStart+((Main.Study.tEnd-Main.Study.tStart)*2/5),
         Main.Study.tStart+((Main.Study.tEnd-Main.Study.tStart)*3/5),
         Main.Study.tStart+((Main.Study.tEnd-Main.Study.tStart)*4/5),
         Main.Study.tEnd};
//    Data = pi/180*{{1,1,1,1.5,0,-3},{-5,10,10,8,-2,-5},{-5,1,5,5,1,-2}};
//    Data = pi/180*{{-2,1,2,2,1,-2},{-5,10,10,8,-2,-5},{-5,1,5,5,1,-2}}; // estimeted
    Data = pi/180*{{0,0,0,0,0,0},{0,0,0,0,0,0}};
    Reaction.Type = {Off, Off};
  };

//  AnyKinEqInterPolDriver CalcaneoCuboidRhythmRight =
//  {
//    AnyKinMeasure &ref3 = Main.HumanModel.BodyModel.Interface.Right.CalcaneoCuboidDorsiFlexion;
////    AnyKinMeasure &ref1 = Main.HumanModel.BodyModel.Interface.Right.CalcaneoCuboidEversion;
////    AnyKinMeasure &ref2 = Main.HumanModel.BodyModel.Interface.Right.CalcaneoCuboidAbduction;
//    Type = Bspline;
//    BsplineOrder = 4;
//    T = {Main.Study.tStart,
//         Main.Study.tStart+((Main.Study.tEnd-Main.Study.tStart)*1/5),
//         Main.Study.tStart+((Main.Study.tEnd-Main.Study.tStart)*2/5),
//         Main.Study.tStart+((Main.Study.tEnd-Main.Study.tStart)*3/5),
//         Main.Study.tStart+((Main.Study.tEnd-Main.Study.tStart)*4/5),
//         Main.Study.tEnd};
////    Data = pi/180*{{-6,-4.5,-3.5,-2,-2,-3},{-8,-6.5,-5.5,-4,-4,-5},{-5,-2,0,0,-2,-5}};
//    Data = pi/180*{{-2,1,2,2,1,-2}}; //estimated
//  };


  AnyKinEqInterPolDriver MedialCuneoNavicularRhythmRight =
    {
//      AnyKinMeasure &ref3 = Main.HumanModel.BodyModel.Interface.Right.NaviculoMedialCuneiformDorsiFlexion;
      AnyKinMeasure &ref1 = Main.HumanModel.BodyModel.Interface.Right.NaviculoMedialCuneiformEversion;
      AnyKinMeasure &ref2 = Main.HumanModel.BodyModel.Interface.Right.NaviculoMedialCuneiformAbduction;
      Type = Bspline;
      BsplineOrder = 4;
      T = {Main.Study.tStart,
        Main.Study.tStart+((Main.Study.tEnd-Main.Study.tStart)*1/5),
        Main.Study.tStart+((Main.Study.tEnd-Main.Study.tStart)*2/5),
        Main.Study.tStart+((Main.Study.tEnd-Main.Study.tStart)*3/5),
        Main.Study.tStart+((Main.Study.tEnd-Main.Study.tStart)*4/5),
        Main.Study.tEnd};
//      Data = pi/180*{{-5,-2,0,-0.5,-3,-5},{0,-3,-3,-3,-2.5,2},{0,0,0,0,0,0}};
//      Data = pi/180*{{0,-3,-3,-3,-2.5,2},{0,0,0,0,0,0}};
      Data = pi/180*{{0,0,0,0,0,0},{0,0,0,0,0,0}};
      Reaction.Type = {Off, Off};
    };


  //*****************************************************************************
  //Transverse Arch at MP joints (corresponds to tarsometa flexion and abduction)
  //*****************************************************************************


  AnySeg MPJointsArchDummySegRight =
  {
    r0 = ...HumanModel.Right.Leg.Seg.Metatarsal1.r0 + ...HumanModel.Right.Leg.Seg.Metatarsal1.MTHeadPlantarNode.sRel *...HumanModel.Right.Leg.Seg.Metatarsal1.Axes0';
    Axes0 = RotMat(r0, ...HumanModel.Right.Leg.Seg.Metatarsal5.r0 + ...HumanModel.Right.Leg.Seg.Metatarsal5.MTHeadPlantarNode.sRel *...HumanModel.Right.Leg.Seg.Metatarsal5.Axes0', r0+{1,0,0}*...HumanModel.Right.Leg.Seg.Metatarsal1.Axes0')*RotMat(pi/2,y)*RotMat(pi/2,z);
    Mass = 0;
    Jii = {0, 0, 0};
    AnyDrawRefFrame drw = {ScaleXYZ = 0.03*{1,1,1};};
  };

  AnyUniversalJoint MPJointsArchDummySegJointRight =
  {
    Axis1 = x;
    Axis2 = y;
    AnyRefFrame &Metatarsal1 = ...HumanModel.Right.Leg.Seg.Metatarsal1.MTHeadPlantarNode;
    AnyRefFrame &DummySeg = .MPJointsArchDummySegRight;
  };

  AnyKinEq MPJointsArchDummySegDriverRight = {
    AnyKinMeasureOrg MeasureOrg = {
      MeasureOrganizer = {0,1};
      AnyKinLinear Lin =
      {
        Ref = 0;
        AnyRefFrame &DummySeg = ...MPJointsArchDummySegRight;
        AnyRefFrame &MT5 = .....HumanModel.Right.Leg.Seg.Metatarsal5.MTHeadPlantarNode;
      };
    };
    Reaction.Type = {On, On};
  };


  AnyKinEq MPJointsArchRhythmRight = {
    AnyKinMeasureLinComb MPJointsArchLinComb =
    {
      AnyKinMeasureOrg MeasureOrgMT2 = {
        MeasureOrganizer = {0};
        AnyKinLinear Lin =
        {
          Ref = 0;
          AnyRefFrame &DummySeg = ....MPJointsArchDummySegRight;
          AnyRefFrame &MT2 = ......HumanModel.Right.Leg.Seg.Metatarsal2.MTHeadPlantarNode;
        };
      };

      AnyKinMeasureOrg MeasureOrgMT3 = {
        MeasureOrganizer = {0};
        AnyKinLinear Lin =
        {
          Ref = 0;
          AnyRefFrame &DummySeg = ....MPJointsArchDummySegRight;
          AnyRefFrame &MT2 = ......HumanModel.Right.Leg.Seg.Metatarsal3.MTHeadPlantarNode;
        };
      };

      AnyKinMeasureOrg MeasureOrgMT4 = {
        MeasureOrganizer = {0};
        AnyKinLinear Lin =
        {
          Ref = 0;
          AnyRefFrame &DummySeg = ....MPJointsArchDummySegRight;
          AnyRefFrame &MT2 = ......HumanModel.Right.Leg.Seg.Metatarsal4.MTHeadPlantarNode;
        };
      };

//      Coef = {{2/3, -1, 0},{1.5/3, 0, -1}}; //estimated
      Coef = {{-1, 0.5, 0},{0, 0.5, -1}}; //estimated
//      Coef = {{-1, 1.163616288095827, 0},{0, 0.4433358313640103, -1}}; //optimized

    };
    Reaction.Type = {Off, Off};
  };


  AnyKinEqInterPolDriver MPJointsArchDriverRight =
  {
    Type = Bspline;
    BsplineOrder = 4;
    T = {Main.Study.tStart-0.02,
         Main.Study.tStart+((Main.Study.tEnd-Main.Study.tStart)*1/5),
         Main.Study.tStart+((Main.Study.tEnd-Main.Study.tStart)*2/5),
         Main.Study.tStart+((Main.Study.tEnd-Main.Study.tStart)*3/5),
         Main.Study.tStart+((Main.Study.tEnd-Main.Study.tStart)*4/5),
         Main.Study.tEnd+0.02};
    Data = {.MPJointsArchMaxHeightRight * .MPJointsArchFlateningCoefRight};
    AnyKinMeasure &Ref1 = .MPJointsArchRhythmRight.MPJointsArchLinComb.MeasureOrgMT3;
    Reaction.Type = {Off};
  };


  AnyVar MPJointsArchMaxHeightRight = 0.0037; //To be deterimed automatically somehow
  AnyVector MPJointsArchFlateningCoefRight = {1, 1, 1, 1, 1, 1}; //To be optimized


  //***************************************************************************************
  //Transverse Arch at tarso metatarsal joints (replaces cunei flexion and cuboid eversion)
  //***************************************************************************************


  AnySeg TMTJointsArchDummySegRight =
  {
    r0 = ...HumanModel.Right.Leg.Seg.Metatarsal1.r0 + ...HumanModel.Right.Leg.Seg.Metatarsal1.MTBasePlantarNode.sRel *...HumanModel.Right.Leg.Seg.Metatarsal1.Axes0';
    Axes0 = RotMat(r0, ...HumanModel.Right.Leg.Seg.Metatarsal5.r0 + ...HumanModel.Right.Leg.Seg.Metatarsal5.MTBasePlantarNode.sRel *...HumanModel.Right.Leg.Seg.Metatarsal5.Axes0', r0+{1,0,0}*...HumanModel.Right.Leg.Seg.Metatarsal1.Axes0')*RotMat(pi/2,y)*RotMat(pi/2,z);
    Mass = 0;
    Jii = {0, 0, 0};
    AnyDrawRefFrame drw = {ScaleXYZ = 0.03*{1,1,1};};
  };

  AnyUniversalJoint TMTJointsArchDummySegJointRight =
  {
    Axis1 = x;
    Axis2 = y;
    AnyRefFrame &Metatarsal1 = ...HumanModel.Right.Leg.Seg.Metatarsal1.MTBasePlantarNode;
    AnyRefFrame &DummySeg = .TMTJointsArchDummySegRight;
  };

  AnyKinEq TMTJointsArchDummySegDriverRight = {
    AnyKinMeasureOrg MeasureOrg = {
      MeasureOrganizer = {0,1};
      AnyKinLinear Lin =
      {
        Ref = 0;
        AnyRefFrame &DummySeg = ...TMTJointsArchDummySegRight;
        AnyRefFrame &MT5 = .....HumanModel.Right.Leg.Seg.Metatarsal5.MTBasePlantarNode;
      };
    };
    Reaction.Type = {On, On};
  };


  AnyKinEq TMTJointsArchRhythmRight1 = {
    AnyKinMeasureLinComb TMTJointsArchLinComb =
    {
      AnyKinMeasureOrg MeasureOrgMT2 = {
        MeasureOrganizer = {0};
        AnyKinLinear Lin =
        {
          Ref = 0;
          AnyRefFrame &DummySeg = ....TMTJointsArchDummySegRight;
          AnyRefFrame &MT2 = ......HumanModel.Right.Leg.Seg.Metatarsal2.MTBasePlantarNode;
        };
      };

      AnyKinMeasureOrg MeasureOrgMT3 = {
        MeasureOrganizer = {0};
        AnyKinLinear Lin =
        {
          Ref = 0;
          AnyRefFrame &DummySeg = ....TMTJointsArchDummySegRight;
          AnyRefFrame &MT2 = ......HumanModel.Right.Leg.Seg.Metatarsal3.MTBasePlantarNode;
        };
      };

      AnyKinMeasureOrg MeasureOrgMT4 = {
        MeasureOrganizer = {0};
        AnyKinLinear Lin =
        {
          Ref = 0;
          AnyRefFrame &DummySeg = ....TMTJointsArchDummySegRight;
          AnyRefFrame &MT2 = ......HumanModel.Right.Leg.Seg.Metatarsal4.MTBasePlantarNode;
        };
      };

      Coef = {{0, 0.6, -1}};
    };
    Reaction.Type = {Off};
  };


  AnyKinEq TMTJointsArchRhythmRight2 = {
    AnyKinMeasureLinComb TMTJointsArchLinComb =
    {
      AnyKinMeasureOrg &MeasureOrgIntCunei = ....HumanModel.Interface.Right.NaviculoIntermediateCuneiformDorsiFlexion;

      AnyKinMeasureOrg &MeasureOrgLatCunei = ....HumanModel.Interface.Right.NaviculoLateralCuneiformDorsiFlexion;

      AnyKinMeasureOrg &MeasureOrgMeta2 = ....HumanModel.Interface.Right.TarsoMetatarsal2DorsiFlexion;

      AnyKinMeasureOrg &MeasureOrgMeta3 = ....HumanModel.Interface.Right.TarsoMetatarsal3DorsiFlexion;

      Coef = {{1, 0, -1, 0},{0, 1, 0, -1}};
    };
    Reaction.Type = {Off, Off};
  };


  //***************************************************************************************
  //Longitudinal Medial Arch ()
  //***************************************************************************************


  AnySeg LongitudinalMedialArchDummySegRight =
  {
    r0 = ...HumanModel.Right.Leg.Seg.Calcaneus.r0 + ...HumanModel.Right.Leg.Seg.Calcaneus.LongitudinalMedialArchNode.sRel *...HumanModel.Right.Leg.Seg.Calcaneus.Axes0';
    Axes0 = RotMat(r0, ...HumanModel.Right.Leg.Seg.Metatarsal1.r0 + ...HumanModel.Right.Leg.Seg.Metatarsal1.MTHeadPlantarNode.sRel *...HumanModel.Right.Leg.Seg.Metatarsal1.Axes0', r0+{1,0,0}*...HumanModel.Right.Leg.Seg.Calcaneus.Axes0')*RotMat(pi/2,z);
    Mass = 0;
    Jii = {0, 0, 0};
    AnyDrawRefFrame drw = {ScaleXYZ = 0.03*{1,1,1};};
  };

  AnyUniversalJoint LongitudinalMedialArchDummySegJointRight =
  {
    Axis1 = x;
    Axis2 = z;
    AnyRefFrame &Calcaneus = ...HumanModel.Right.Leg.Seg.Calcaneus.LongitudinalMedialArchNode;
    AnyRefFrame &DummySeg = .LongitudinalMedialArchDummySegRight;
  };

  AnyKinEq LongitudinalMedialArchDummySegDriverRight = {
    AnyKinMeasureOrg MeasureOrg = {
      MeasureOrganizer = {0,2};
      AnyKinLinear Lin =
      {
        Ref = 0;
        AnyRefFrame &DummySeg = ...LongitudinalMedialArchDummySegRight;
        AnyRefFrame &MT1 = .....HumanModel.Right.Leg.Seg.Metatarsal1.MTHeadPlantarNode;
      };
    };
    Reaction.Type = {On, On};
  };


  AnyKinEq LongitudinalMedialArchRhythmRight = {
    AnyKinMeasureLinComb LongitudinalMedialArchLinComb =
    {
      AnyKinMeasureOrg &MeasureOrgNavi = ....HumanModel.Interface.Right.TaloNavicularDorsiFlexion;

      AnyKinMeasureOrg &MeasureOrgMedCunei = ....HumanModel.Interface.Right.NaviculoMedialCuneiformDorsiFlexion;

      AnyKinMeasureOrg &MeasureOrgMeta1 = ....HumanModel.Interface.Right.TarsoMetatarsal1DorsiFlexion;

      Coef = {{0.5, -1, 0},{0.5, 0, -1}};
    };
    Reaction.Type = {Off, Off};
  };


  AnyKinEqInterPolDriver LongitudinalMedialArchDriverRight =
  {
    Type = Bspline;
    BsplineOrder = 4;
    T = {Main.Study.tStart-0.0,
         Main.Study.tStart+((Main.Study.tEnd-Main.Study.tStart)*1/5),
         Main.Study.tStart+((Main.Study.tEnd-Main.Study.tStart)*2/5),
         Main.Study.tStart+((Main.Study.tEnd-Main.Study.tStart)*3/5),
         Main.Study.tStart+((Main.Study.tEnd-Main.Study.tStart)*4/5),
         Main.Study.tEnd+0.0};
    Data = {.LongitudinalMedialArchMaxHeightRight * .LongitudinalMedialArchFlateningCoefRight};
    AnyKinMeasureOrg MeasureOrgNavi = {
      MeasureOrganizer = {0};
      AnyKinLinear Lin =
      {
        Ref = 0;
        AnyRefFrame &DummySeg = ...LongitudinalMedialArchDummySegRight;
        AnyRefFrame &Navi = .....HumanModel.Right.Leg.Seg.Navicular.LongitudinalMedialArchNode;
      };
    };
    Reaction.Type = {Off};
  };


  AnyVar LongitudinalMedialArchMaxHeightRight = 0.0350; //To be deterimed automatically somehow
  AnyVector LongitudinalMedialArchFlateningCoefRight = {1, 1, 1, 1, 1, 1}; //To be optimized


  //***************************************************************************************
  //Longitudinal Lateral Arch ()
  //***************************************************************************************


  AnySeg LongitudinalLateralArchDummySegRight =
  {
    r0 = ...HumanModel.Right.Leg.Seg.Calcaneus.r0 + ...HumanModel.Right.Leg.Seg.Calcaneus.LongitudinalLateralArchNode.sRel *...HumanModel.Right.Leg.Seg.Calcaneus.Axes0';
    Axes0 = RotMat(r0, ...HumanModel.Right.Leg.Seg.Metatarsal5.r0 + ...HumanModel.Right.Leg.Seg.Metatarsal5.MTHeadPlantarNode.sRel *...HumanModel.Right.Leg.Seg.Metatarsal5.Axes0', r0+{1,0,0}*...HumanModel.Right.Leg.Seg.Calcaneus.Axes0')*RotMat(pi/2,z);
    Mass = 0;
    Jii = {0, 0, 0};
    AnyDrawRefFrame drw = {ScaleXYZ = 0.03*{1,1,1};};
  };

  AnyUniversalJoint LongitudinalLateralArchDummySegJointRight =
  {
    Axis1 = x;
    Axis2 = z;
    AnyRefFrame &Calcaneus = ...HumanModel.Right.Leg.Seg.Calcaneus.LongitudinalLateralArchNode;
    AnyRefFrame &DummySeg = .LongitudinalLateralArchDummySegRight;
  };

  AnyKinEq LongitudinalLateralArchDummySegDriverRight = {
    AnyKinMeasureOrg MeasureOrg = {
      MeasureOrganizer = {0,2};
      AnyKinLinear Lin =
      {
        Ref = 0;
        AnyRefFrame &DummySeg = ...LongitudinalLateralArchDummySegRight;
        AnyRefFrame &MT5 = .....HumanModel.Right.Leg.Seg.Metatarsal5.MTHeadPlantarNode;
      };
    };
    Reaction.Type = {On, On};
  };


  AnyKinEq LongitudinalLateralArchRhythmRight = {
    AnyKinMeasureLinComb LongitudinalLateralArchLinComb =
    {
      AnyKinMeasureOrg &MeasureOrgCuboid = ....HumanModel.Interface.Right.CalcaneoCuboidDorsiFlexion;

      AnyKinMeasureOrg &MeasureOrgMeta5 = ....HumanModel.Interface.Right.TarsoMetatarsal5SkewDorsiFlexion;

      Coef = {{0.5, -1}};
    };
    Reaction.Type = {Off};
  };


  AnyKinEqInterPolDriver LongitudinalLateralArchDriverRight =
  {
    Type = Bspline;
    BsplineOrder = 4;
    T = {Main.Study.tStart-0.0,
         Main.Study.tStart+((Main.Study.tEnd-Main.Study.tStart)*1/5),
         Main.Study.tStart+((Main.Study.tEnd-Main.Study.tStart)*2/5),
         Main.Study.tStart+((Main.Study.tEnd-Main.Study.tStart)*3/5),
         Main.Study.tStart+((Main.Study.tEnd-Main.Study.tStart)*4/5),
         Main.Study.tEnd+0.0};
    Data = {.LongitudinalLateralArchMaxHeightRight * .LongitudinalLateralArchFlateningCoefRight};
    AnyKinMeasureOrg MeasureOrgCuboid = {
      MeasureOrganizer = {0};
      AnyKinLinear Lin =
      {
        Ref = 0;
        AnyRefFrame &DummySeg = ...LongitudinalLateralArchDummySegRight;
        AnyRefFrame &Navi = .....HumanModel.Right.Leg.Seg.Cuboid.LongitudinalLateralArchNode;
      };
    };
    Reaction.Type = {Off};
  };


  AnyVar LongitudinalLateralArchMaxHeightRight = 0.0140; //To be deterimed automatically somehow
  AnyVector LongitudinalLateralArchFlateningCoefRight = {1, 1, 1, 1, 1, 1}; //To be optimized


  AnyFolder DrawArchesR = {
    AnyKinPLine MetatarsalTranverse = {
      AnyRefNode &node1 = Main.HumanModel.BodyModel.Right.Leg.Seg.Metatarsal1.MTHeadPlantarNode;
      AnyRefNode &node2 = Main.HumanModel.BodyModel.Right.Leg.Seg.Metatarsal2.MTHeadPlantarNode;
      AnyRefNode &node3 = Main.HumanModel.BodyModel.Right.Leg.Seg.Metatarsal3.MTHeadPlantarNode;
      AnyRefNode &node4 = Main.HumanModel.BodyModel.Right.Leg.Seg.Metatarsal4.MTHeadPlantarNode;
      AnyRefNode &node5 = Main.HumanModel.BodyModel.Right.Leg.Seg.Metatarsal5.MTHeadPlantarNode;
      AnyRefNode &node6 = Main.HumanModel.BodyModel.Right.Leg.Seg.Metatarsal1.MTHeadPlantarNode;
      AnyDrawPLine Draw =
      {
        Opacity = 0.6;
        Thickness = 0.002;
        RGB = Main.DrawSettings.Colors.AnyBodyYellow;
      };
    };

    AnyKinPLine TarsalTranverse = {
      AnyRefNode &node1 = Main.HumanModel.BodyModel.Right.Leg.Seg.Metatarsal1.MTBasePlantarNode;
      AnyRefNode &node2 = Main.HumanModel.BodyModel.Right.Leg.Seg.Metatarsal2.MTBasePlantarNode;
      AnyRefNode &node3 = Main.HumanModel.BodyModel.Right.Leg.Seg.Metatarsal3.MTBasePlantarNode;
      AnyRefNode &node4 = Main.HumanModel.BodyModel.Right.Leg.Seg.Metatarsal4.MTBasePlantarNode;
      AnyRefNode &node5 = Main.HumanModel.BodyModel.Right.Leg.Seg.Metatarsal5.MTBasePlantarNode;
      AnyRefNode &node6 = Main.HumanModel.BodyModel.Right.Leg.Seg.Metatarsal1.MTBasePlantarNode;
      AnyDrawPLine Draw =
      {
        Opacity = 0.6;
        Thickness = 0.002;
        RGB = Main.DrawSettings.Colors.AnyBodyYellow;
      };
    };

    AnyKinPLine LongitudinalMedial = {
      AnyRefNode &node1 = Main.HumanModel.BodyModel.Right.Leg.Seg.Calcaneus.LongitudinalMedialArchNode;
      AnyRefNode &node2 = Main.HumanModel.BodyModel.Right.Leg.Seg.Navicular.LongitudinalMedialArchNode;
//      AnyRefNode &node3 = Main.HumanModel.BodyModel.Right.Leg.Seg.MedialCuneiform.LongitudinalMedialArchNode;
//      AnyRefNode &node4 = Main.HumanModel.BodyModel.Right.Leg.Seg.Metatarsal1.MTBasePlantarNode;
      AnyRefNode &node5 = Main.HumanModel.BodyModel.Right.Leg.Seg.Metatarsal1.MTHeadPlantarNode;
      AnyRefNode &node6 = Main.HumanModel.BodyModel.Right.Leg.Seg.Calcaneus.LongitudinalMedialArchNode;
      AnyDrawPLine Draw =
      {
        Opacity = 0.6;
        Thickness = 0.002;
        RGB = Main.DrawSettings.Colors.AnyBodyYellow;
      };
    };

    AnyKinPLine LongitudinalLateral = {
      AnyRefNode &node1 = Main.HumanModel.BodyModel.Right.Leg.Seg.Calcaneus.LongitudinalLateralArchNode;
      AnyRefNode &node2 = Main.HumanModel.BodyModel.Right.Leg.Seg.Cuboid.LongitudinalLateralArchNode;
//      AnyRefNode &node3 = Main.HumanModel.BodyModel.Right.Leg.Seg.Metatarsal5.MTBasePlantarNode;
      AnyRefNode &node4 = Main.HumanModel.BodyModel.Right.Leg.Seg.Metatarsal5.MTHeadPlantarNode;
      AnyRefNode &node5 = Main.HumanModel.BodyModel.Right.Leg.Seg.Calcaneus.LongitudinalLateralArchNode;
      AnyDrawPLine Draw =
      {
        Opacity = 0.6;
        Thickness = 0.002;
        RGB = Main.DrawSettings.Colors.AnyBodyYellow;
      };
    };
  };


  //************************************************
  //              DriverIntertarsal
  //************************************************


//    AnyKinEqSimpleDriver JntTaloNaviRight =
//    { // 0: Rot, 1: Ad/Ab 2: Df/Pf
//      AnyKinMeasure &ref1 = Main.HumanModel.BodyModel.Interface.Right.TaloNavicularEversion;
//      AnyKinMeasure &ref2 = Main.HumanModel.BodyModel.Interface.Right.TaloNavicularAbduction;
//      AnyKinMeasure &ref3 = Main.HumanModel.BodyModel.Interface.Right.TaloNavicularDorsiFlexion;
////      MeasureOrganizer = {0,2};
//      DriverPos = {
//      .JntPos.Right.TaloNavicularEversion,
//      .JntPos.Right.TaloNavicularAbduction,
//      .JntPos.Right.TaloNavicularDorsiFlexion
//      }*pi/180;
//      DriverVel = {
//      .JntVel.Right.TaloNavicularEversion,
//      .JntVel.Right.TaloNavicularAbduction,
//      .JntVel.Right.TaloNavicularDorsiFlexion
//      }*pi/180;
//      Reaction.Type = {On,On,On};
//    };

//     AnyKinEqSimpleDriver JntNaviCuneiMedRight =
//    {  // 0: Rot, 1: Ad/Ab 2: Df/Pf
//      AnyKinMeasure &ref1 = Main.HumanModel.BodyModel.Interface.Right.NaviculoMedialCuneiformEversion;
//      AnyKinMeasure &ref2 = Main.HumanModel.BodyModel.Interface.Right.NaviculoMedialCuneiformAbduction;
//      AnyKinMeasure &ref3 = Main.HumanModel.BodyModel.Interface.Right.NaviculoMedialCuneiformDorsiFlexion;
////      MeasureOrganizer = {0};
//      DriverPos = {
//      .JntPos.Right.NaviculoMedialCuneiformEversion,
//      .JntPos.Right.NaviculoMedialCuneiformAbduction,
//      .JntPos.Right.NaviculoMedialCuneiformDorsiFlexion
//      }*pi/180;
//      DriverVel = {
//      .JntVel.Right.NaviculoMedialCuneiformEversion,
//      .JntVel.Right.NaviculoMedialCuneiformAbduction,
//      .JntVel.Right.NaviculoMedialCuneiformDorsiFlexion
//      }*pi/180;
//      Reaction.Type = {On,On,On};
//    };

//    AnyKinEqSimpleDriver JntNaviCuneiIntRight =
//    { // 0: Ad/Ab 1: Df/Pf
////      AnyKinMeasure &ref1 = Main.HumanModel.BodyModel.Interface.Right.NaviculoIntermediateCuneiformAbduction;
//      AnyKinMeasure &ref2 = Main.HumanModel.BodyModel.Interface.Right.NaviculoIntermediateCuneiformDorsiFlexion;
//      DriverPos = {
////      .JntPos.Right.NaviculoIntermediateCuneiformAbduction,
//      .JntPos.Right.NaviculoIntermediateCuneiformDorsiFlexion
//      }*pi/180;
//      DriverVel = {
////      .JntVel.Right.NaviculoIntermediateCuneiformAbduction,
//      .JntVel.Right.NaviculoIntermediateCuneiformDorsiFlexion
//      }*pi/180;
//      Reaction.Type = {On};
//    };

//    AnyKinEqSimpleDriver JntNaviCuneiLatRight =
//    {// 0: Ad/Ab 1: Df/Pf
////      AnyKinMeasure &ref1 = Main.HumanModel.BodyModel.Interface.Right.NaviculoLateralCuneiformAbduction;
//      AnyKinMeasure &ref2 = Main.HumanModel.BodyModel.Interface.Right.NaviculoLateralCuneiformDorsiFlexion;
//      DriverPos = {
////      .JntPos.Right.NaviculoLateralCuneiformAbduction,
//      .JntPos.Right.NaviculoLateralCuneiformDorsiFlexion
//      }*pi/180;
//      DriverVel = {
////      .JntVel.Right.NaviculoLateralCuneiformAbduction,
//      .JntVel.Right.NaviculoLateralCuneiformDorsiFlexion
//      }*pi/180;
//      Reaction.Type = {On};
//};

//    AnyKinEqSimpleDriver JntCalCuboidRight =
//    {
////      AnyKinMeasure &ref1 = Main.HumanModel.BodyModel.Interface.Right.CalcaneoCuboidEversion;
////      AnyKinMeasure &ref2 = Main.HumanModel.BodyModel.Interface.Right.CalcaneoCuboidAbduction;
//      AnyKinMeasure &ref3 = Main.HumanModel.BodyModel.Interface.Right.CalcaneoCuboidDorsiFlexion;
//      DriverPos = {
////      .JntPos.Right.CalcaneoCuboidEversion,
////      .JntPos.Right.CalcaneoCuboidAbduction,
//      .JntPos.Right.CalcaneoCuboidDorsiFlexion
//      }*pi/180;
//      DriverVel = {
////      .JntVel.Right.CalcaneoCuboidEversion,
////      .JntVel.Right.CalcaneoCuboidAbduction,
//      .JntVel.Right.CalcaneoCuboidDorsiFlexion
//      }*pi/180;
//      Reaction.Type = {On};
//    };


  //************************************************
  //              DriverTarsoMt
  //************************************************


    AnyKinEqSimpleDriver JntTarsoMt1Right =
    { // 0: Rot, 1: Ad/Ab 2: Df/Pf
      AnyKinMeasure &ref1 = Main.HumanModel.BodyModel.Interface.Right.TarsoMetatarsal1Eversion;
      AnyKinMeasure &ref2 = Main.HumanModel.BodyModel.Interface.Right.TarsoMetatarsal1Abduction;
//      AnyKinMeasure &ref3 = Main.HumanModel.BodyModel.Interface.Right.TarsoMetatarsal1DorsiFlexion;
//      MeasureOrganizer = {0};
      DriverPos = {
      .JntPos.Right.TarsoMetatarsal1Eversion,
      .JntPos.Right.TarsoMetatarsal1Abduction
//      .JntPos.Right.TarsoMetatarsal1DorsiFlexion
      }*pi/180;
      DriverVel = {
      .JntVel.Right.TarsoMetatarsal1Eversion,
      .JntVel.Right.TarsoMetatarsal1Abduction
//      .JntVel.Right.TarsoMetatarsal1DorsiFlexion
      }*pi/180;
      Reaction.Type = {Off,Off};
    };


//    AnyKinEqSimpleDriver JntTarsoMt2Right =
//    {
//      AnyKinMeasure &ref1 = Main.HumanModel.BodyModel.Interface.Right.TarsoMetatarsal2Abduction;
//      AnyKinMeasure &ref2 = Main.HumanModel.BodyModel.Interface.Right.TarsoMetatarsal2DorsiFlexion;
//      DriverPos = {
//      .JntPos.Right.TarsoMetatarsal2Abduction,
//      .JntPos.Right.TarsoMetatarsal2DorsiFlexion
//      }*pi/180;
//      DriverVel = {
//      .JntVel.Right.TarsoMetatarsal2Abduction,
//      .JntVel.Right.TarsoMetatarsal2DorsiFlexion
//      }*pi/180;
//      Reaction.Type = {On, Off};
//    };
//
//
//    AnyKinEqSimpleDriver JntTarsoMt3Right =
//    {
//      AnyKinMeasure &ref1 = Main.HumanModel.BodyModel.Interface.Right.TarsoMetatarsal3Abduction;
//      AnyKinMeasure &ref2 = Main.HumanModel.BodyModel.Interface.Right.TarsoMetatarsal3DorsiFlexion;
//      DriverPos = {
//      .JntPos.Right.TarsoMetatarsal3Abduction,
//      .JntPos.Right.TarsoMetatarsal3DorsiFlexion
//      }*pi/180;
//      DriverVel = {
//      .JntVel.Right.TarsoMetatarsal3Abduction,
//      .JntVel.Right.TarsoMetatarsal3DorsiFlexion
//      }*pi/180;
//      Reaction.Type = {On, Off};
//    };
//
//
//    AnyKinEqSimpleDriver JntTarsoMt4Right =
//    {
//      AnyKinMeasure &ref1 = Main.HumanModel.BodyModel.Interface.Right.TarsoMetatarsal4Abduction;
//      AnyKinMeasure &ref2 = Main.HumanModel.BodyModel.Interface.Right.TarsoMetatarsal4DorsiFlexion;
//      DriverPos = {
//      .JntPos.Right.TarsoMetatarsal4Abduction,
//      .JntPos.Right.TarsoMetatarsal4DorsiFlexion
//      }*pi/180;
//      DriverVel = {
//      .JntVel.Right.TarsoMetatarsal4Abduction,
//      .JntVel.Right.TarsoMetatarsal4DorsiFlexion
//      }*pi/180;
//      Reaction.Type = {On, Off};
//    };


    AnyKinEqSimpleDriver JntTarsoMt5Right =
    {
      AnyKinMeasure &ref1 = Main.HumanModel.BodyModel.Interface.Right.TarsoMetatarsal5SkewEversion;
      //AnyKinMeasure &ref2 = Main.HumanModel.BodyModel.Interface.Right.TarsoMetatarsal5Abduction; //Replaced by metatarsal head contact
//      AnyKinMeasure &ref3 = Main.HumanModel.BodyModel.Interface.Right.TarsoMetatarsal5SkewDorsiFlexion;
      DriverPos = {
      .JntPos.Right.TarsoMetatarsal5SkewEversion
      //.JntPos.Right.TarsoMetatarsal5Abduction,
//      .JntPos.Right.TarsoMetatarsal5SkewDorsiFlexion
      }*pi/180;
      DriverVel = {
      .JntVel.Right.TarsoMetatarsal5SkewEversion
      //.JntVel.Right.TarsoMetatarsal5Abduction,
//      .JntVel.Right.TarsoMetatarsal5SkewDorsiFlexion
      }*pi/180;
      Reaction.Type = {Off};
    };


  //************************************************
  //              DriverJntMtPhal
  //************************************************


    AnyKinEqSimpleDriver JntMtPhal1Right =
    {
      AnyKinMeasure &ref1 = Main.HumanModel.BodyModel.Interface.Right.MetatarsoPhalangeal1Abduction;
      AnyKinMeasure &ref2 = Main.HumanModel.BodyModel.Interface.Right.MetatarsoPhalangeal1DorsiFlexion;
      DriverPos = {
      .JntPos.Right.MetatarsoPhalangeal1Abduction,
      .JntPos.Right.MetatarsoPhalangeal1DorsiFlexion
      }*pi/180;
      DriverVel = {
      .JntVel.Right.MetatarsoPhalangeal1Abduction,
      .JntVel.Right.MetatarsoPhalangeal1DorsiFlexion
      }*pi/180;
      Reaction.Type = {Off, Off};
    };


    AnyKinEqSimpleDriver JntMtPhal2Right =
    {
      AnyKinMeasure &ref1 = Main.HumanModel.BodyModel.Interface.Right.MetatarsoPhalangeal2Abduction;
//      AnyKinMeasure &ref2 = Main.HumanModel.BodyModel.Interface.Right.MetatarsoPhalangeal2DorsiFlexion;
      DriverPos = {
      .JntPos.Right.MetatarsoPhalangeal2Abduction
//      .JntPos.Right.MetatarsoPhalangeal2DorsiFlexion
      }*pi/180;
      DriverVel = {
      .JntVel.Right.MetatarsoPhalangeal2Abduction
//      .JntVel.Right.MetatarsoPhalangeal2DorsiFlexion
      }*pi/180;
      Reaction.Type = {Off};
    };

    AnyKinEqSimpleDriver JntMtPhal3Right =
    {
      AnyKinMeasure &ref1 = Main.HumanModel.BodyModel.Interface.Right.MetatarsoPhalangeal3Abduction;
//      AnyKinMeasure &ref2 = Main.HumanModel.BodyModel.Interface.Right.MetatarsoPhalangeal3DorsiFlexion;
      DriverPos = {
      .JntPos.Right.MetatarsoPhalangeal3Abduction
//      .JntPos.Right.MetatarsoPhalangeal3DorsiFlexion
      }*pi/180;
      DriverVel = {
      .JntVel.Right.MetatarsoPhalangeal3Abduction
//      .JntVel.Right.MetatarsoPhalangeal3DorsiFlexion
      }*pi/180;
      Reaction.Type = {Off};
    };


    AnyKinEqSimpleDriver JntMtPhal4Right =
    {
      AnyKinMeasure &ref1 = Main.HumanModel.BodyModel.Interface.Right.MetatarsoPhalangeal4Abduction;
//      AnyKinMeasure &ref2 = Main.HumanModel.BodyModel.Interface.Right.MetatarsoPhalangeal4DorsiFlexion;
      DriverPos = {
      .JntPos.Right.MetatarsoPhalangeal4Abduction
//      .JntPos.Right.MetatarsoPhalangeal4DorsiFlexion
      }*pi/180;
      DriverVel = {
      .JntVel.Right.MetatarsoPhalangeal4Abduction
//      .JntVel.Right.MetatarsoPhalangeal4DorsiFlexion
      }*pi/180;
      Reaction.Type = {Off};
    };


    AnyKinEqSimpleDriver JntMtPhal5Right =
    {
      AnyKinMeasure &ref1 = Main.HumanModel.BodyModel.Interface.Right.MetatarsoPhalangeal5Abduction;
      AnyKinMeasure &ref2 = Main.HumanModel.BodyModel.Interface.Right.MetatarsoPhalangeal5DorsiFlexion;
      DriverPos = {
      .JntPos.Right.MetatarsoPhalangeal5Abduction,
      .JntPos.Right.MetatarsoPhalangeal5DorsiFlexion
      }*pi/180;
      DriverVel = {
      .JntVel.Right.MetatarsoPhalangeal5Abduction,
      .JntVel.Right.MetatarsoPhalangeal5DorsiFlexion
      }*pi/180;
      Reaction.Type = {Off, Off};
    };


  //************************************************
  //              DriverJntProxPhal
  //************************************************


    AnyKinEqSimpleDriver JntProxPhal1Right =
    {
      AnyKinMeasure &ref1 = Main.HumanModel.BodyModel.Interface.Right.ProximoDistalPhalange1DorsiFlexion;
      DriverPos = {.JntPos.Right.ProximoDistalPhalange1DorsiFlexion}*pi/180;
      DriverVel = {.JntVel.Right.ProximoDistalPhalange1DorsiFlexion}*pi/180;
      Reaction.Type = {Off};
    };


    AnyKinEqSimpleDriver JntProxPhal2Right =
    {
      AnyKinMeasure &ref1 = Main.HumanModel.BodyModel.Interface.Right.ProximoMedialPhalange2DorsiFlexion;
      DriverPos = {.JntPos.Right.ProximoMedialPhalange2DorsiFlexion}*pi/180;
      DriverVel = {.JntVel.Right.ProximoMedialPhalange2DorsiFlexion}*pi/180;
      Reaction.Type = {Off};
    };


    AnyKinEqSimpleDriver JntProxPhal3Right =
    {
      AnyKinMeasure &ref1 = Main.HumanModel.BodyModel.Interface.Right.ProximoMedialPhalange3DorsiFlexion;
      DriverPos = {.JntPos.Right.ProximoMedialPhalange3DorsiFlexion}*pi/180;
      DriverVel = {.JntVel.Right.ProximoMedialPhalange3DorsiFlexion}*pi/180;
      Reaction.Type = {Off};
    };


    AnyKinEqSimpleDriver JntProxPhal4Right =
    {
      AnyKinMeasure &ref1 = Main.HumanModel.BodyModel.Interface.Right.ProximoMedialPhalange4DorsiFlexion;
      DriverPos = {.JntPos.Right.ProximoMedialPhalange4DorsiFlexion}*pi/180;
      DriverVel = {.JntVel.Right.ProximoMedialPhalange4DorsiFlexion}*pi/180;
      Reaction.Type = {Off};
    };


    AnyKinEqSimpleDriver JntProxPhal5Right =
    {
      AnyKinMeasure &ref1 = Main.HumanModel.BodyModel.Interface.Right.ProximoMedialPhalange5DorsiFlexion;
      DriverPos = {.JntPos.Right.ProximoMedialPhalange5DorsiFlexion}*pi/180;
      DriverVel = {.JntVel.Right.ProximoMedialPhalange5DorsiFlexion}*pi/180;
      Reaction.Type = {Off};
    };


  //************************************************
  //              DriverJntDistPhal
  //************************************************


//    AnyKinEqSimpleDriver JntDistPhal2Right =
//    {
//      AnyKinMeasure &ref1 = Main.HumanModel.BodyModel.Interface.Right.MedioDistalPhalange2DorsiFlexion;
//      DriverPos = {.JntPos.Right.MedioDistalPhalange2DorsiFlexion}*pi/180;
//      DriverVel = {.JntVel.Right.MedioDistalPhalange2DorsiFlexion}*pi/180;
//      Reaction.Type = {On};
//    };
//
//
//    AnyKinEqSimpleDriver JntDistPhal3Right =
//    {
//      AnyKinMeasure &ref1 = Main.HumanModel.BodyModel.Interface.Right.MedioDistalPhalange3DorsiFlexion;
//      DriverPos = {.JntPos.Right.MedioDistalPhalange3DorsiFlexion}*pi/180;
//      DriverVel = {.JntVel.Right.MedioDistalPhalange3DorsiFlexion}*pi/180;
//      Reaction.Type = {On};
//    };
//
//
//    AnyKinEqSimpleDriver JntDistPhal4Right =
//    {
//      AnyKinMeasure &ref1 = Main.HumanModel.BodyModel.Interface.Right.MedioDistalPhalange4DorsiFlexion;
//      DriverPos = {.JntPos.Right.MedioDistalPhalange4DorsiFlexion}*pi/180;
//      DriverVel = {.JntVel.Right.MedioDistalPhalange4DorsiFlexion}*pi/180;
//      Reaction.Type = {On};
//    };
//
//
//    AnyKinEqSimpleDriver JntDistPhal5Right =
//    {
//      AnyKinMeasure &ref1 = Main.HumanModel.BodyModel.Interface.Right.MedioDistalPhalange5DorsiFlexion;
//      DriverPos = {.JntPos.Right.MedioDistalPhalange5DorsiFlexion}*pi/180;
//      DriverVel = {.JntVel.Right.MedioDistalPhalange5DorsiFlexion}*pi/180;
//      Reaction.Type = {On};
//    };
