AnyFolder Shoe_TLEM22 = {
  //Input : Classic GRF Prediction contact points from MSA

};

AnyFolder Shoe_NoSkin = {};

AnyFolder Shoe_Skin = {};

AnyFolder Shoe_Shoe = {
  AnyFolder Input = { // in ShoeGroundRefFrame system.
    AnyVec3 P1 ??= {0,0,0}; // back of heel
    AnyVec3 P2 ??= {0,0,0}; // bottom of heel
    AnyVec3 P3 ??= {0,0,0}; // bottom of MT1
    AnyVec3 P4 ??= {0,0,0}; // bootom of MT5
  };

  AnyFolder ShoeGroundRefFrame = { // potential class template
    // transformation between ShoeGroundRefFrame and foot segmental frame
    AnyVec3 srel = P2;
    AnyMat33 ARel = eye(3);// Plane defined from P2,P3,P4
  };

  AnyFolder ContactPoints = {
    AnyFolder ContactNodesCreation ={
      AnyFolder &calcaneus = pointer to calcaneus;
      calcaneus = {
        AnyRefNode ContactPoint1 = {
          sRel = {0,0,0}; // sRel of existing contact point projected to ShoeRefFrame.
        };
      };
      AnyFolder &MT1 = pointer to metatarsal1;
      MT1 = {
        AnyRefNode ContactPoint17 = {
          sRel = {0,0,0}; // sRel of existing contact point projected to ShoeRefFrame.
        };
      };
    };

    AnyRefFrame &ContactPoint1 = calcaneus.ContactPoint1;
    AnyRefFrame &ContactPoint17 = calcaneus.ContactPoint17;
  };
};
