#include "../libdef.any"

/** ----------------------------------------------------------------------------
This model uses the full body model, i.e. most of the body parts available
in the AAUHuman part of the Body directory. The model is grounded at the
pelvis and the posture if the model is controlled through a mannequin.any
file by means of joint angles.

This application is a really good starting point for new applications
involving the entire body.
---------------------------------------------------------------------------- */
Main = {

  /**Execute this operation to run the model in the intended operation sequence.
  It is also possible to run operations seperately, by manual selections in the operation tree*/
  AnyOperationSequence RunApplication = {

    /**This operation calibrates the muscles in the model if these are of the type AnyMuscleModel3E.
    This will just be an empty operation if the model is using a muscle type that does not require calibration.*/
    AnyOperation &CalibrationAnal = Main.HumanModel.Calibration.CalibrationSequence;

    ///This operation is the kinematic analysis
    AnyOperation &InvAnal=Main.Study.Kinematics;
  };


  #include "DrawSettings.any"


  AnyFolder HumanModel={
    AnyFolder &Mannequin=.Model.Mannequin;


    // Select the body model:
    // ----------------------
    // This file contains a list of all body parts, select them to create
    // the body model wanted.
    #include  "BodyPartsSetup.any"

    // This file creates the body model from the selected list.
    #include  "<ANYBODY_PATH_BODY>\BodyModels\GenericBodyModel\BodyModel.any"


    AnyFolder StrengthParameters={
      AnyVar SpecificMuscleTensionSpine= 90; //N/cm^2
      AnyVar StrengthIndexLeg= 1;
      AnyVar SpecificMuscleTensionShoulderArm= 90; //N/cm^2
    };

    // This section below offers the choice between two scaling strategies for the
    // human model.

    // ScalingStandard means that all the body parts will have the standard size
    // at which they were originally developed, i.e. with anthropometric
    // data from the anatomical literature. This roughly corresponds to a 50th
    // percentile European male.
    #include "<ANYBODY_PATH_BODY>\Scaling\ScalingStandard.any"

    // ScalingLengthMassFat will scale each segment of the body to anthropometric data
    // specified in the selected AnyFamily include file, attempting to take the
    // fat percentage into account in the assessment of the muscle strength.
    // #include "<ANYBODY_PATH_BODY>\Scaling\ScalingLengthMassFat.any"
    // Scaling = {
    //   #include "<ANYBODY_PATH_BODY>\Scaling\AnyFamily\AnyMan.any"
    // };
  };

  AnyFolder Model={

    AnyFolder &HumanModel=.HumanModel.BodyModel;

    #include "Environment.any"

    // The Mannequin file specifies load-time positions for all the segments
    // in the HumanModel. This is important for the model's ablity to resolve
    // all the kinematic constraints when the model is analyzed.
    // The mannequin file also drives those degrees of freedom of the human
    // model that are not governed by problem-specific drivers at run time.
    #include "Mannequin.any"


    // The include file below, MannequinValuesFromModel, is not strictly
    // necessary but can be helpful when developing new applications
    // based on this application, particularly when the new application
    // involves an environment that somehow governs the kinematics of
    // the human body.

    // When included, MannequinValuesFromModel creates a folder named
    // Main.HumanModel.BodyModel.MannequinValuesFromModel that contains
    // variables with the human model's joint angles as they are defined
    // in the mennequin model. When the model has been loaded and the
    // SetInitialConditions operation has been executed successfully once,
    // you can look up
    // Main.HumanModel.BodyModel.MannequinValuesFromModel in the model
    // tree and dump its values. The output is very similar to the content
    // of the mannequin file, so the output can be saved and edited slightly
    // and then replace the existing mannequin.any file. The new file will
    // cause the model to have the exactly correct load-time positions.
    // #include "MannequinValuesFromModel.any"

    AnyFolder ModelEnvironmentConnection = {
      AnyFolder &HumanModel=.HumanModel;
      #include "JointsAndDrivers.any"
    };
  };

  AnyBodyStudy Study = {
    AnyFolder &Model = .Model;

    tEnd = 1.0;
    Gravity = {0.0, -9.81, 0.0};
    nStep = 1;

  }; // End of study


}; //Main
