  #if OptX =="On"

AnyDrawVector XDir =   {
  Line.RGB={0,1,0};
  AnyVar size=0.1;
  Visible = On;
  Vec = {size,0, 0};
  Line.Style = Line3DStyleFull;
  Line.Thickness=0.1*size;
  Line.End.Thickness =0.3*size;
  Line.End.Length =0.4*size;
  Line.End.Style=Line3DCapStyleArrow        ;
  PointAway = On;
  DrawCoord = Off;
  GlobalCoord=Off;
};
#endif

#if OptY =="On"

AnyDrawVector YDir =   {
  Line.RGB={0,1,0};
  AnyVar size=0.1;
  Visible = On;
  Vec = {0,size, 0};
  Line.Style = Line3DStyleFull;
  Line.Thickness=0.1*size;
  Line.End.Thickness =0.3*size;
  Line.End.Length =0.4*size;
  Line.End.Style=Line3DCapStyleArrow        ;
  PointAway = On;
  DrawCoord = Off;
  GlobalCoord=Off;
};
#endif

#if OptZ =="On"

AnyDrawVector ZDir =   {
  Line.RGB={0,1,0};
  AnyVar size=0.1;
  Visible = On;
  Vec = {0,0,size};
  Line.Style = Line3DStyleFull;
  Line.Thickness=0.1*size;
  Line.End.Thickness =0.3*size;
  Line.End.Length =0.4*size;
  Line.End.Style=Line3DCapStyleArrow        ;
  PointAway = On;
  DrawCoord = Off;
  GlobalCoord=Off;
};
#endif


#if OptX =="Off"

AnyDrawVector XDir =   {
  Line.RGB={1,0,0};
  AnyVar size=0.1;
  Visible = On;
  Vec = {size,0, 0};
  Line.Style = Line3DStyleFull;
  Line.Thickness=0.1*size;
  Line.End.Thickness =0.3*size;
  Line.End.Length =0.4*size;
  Line.End.Style=Line3DCapStyleArrow        ;
  PointAway = On;
  DrawCoord = Off;
  GlobalCoord=Off;
};
#endif

#if OptY =="Off"

AnyDrawVector YDir =   {
  Line.RGB={1,0,0};
  AnyVar size=0.1;
  Visible = On;
  Vec = {0,size, 0};
  Line.Style = Line3DStyleFull;
  Line.Thickness=0.1*size;
  Line.End.Thickness =0.3*size;
  Line.End.Length =0.4*size;
  Line.End.Style=Line3DCapStyleArrow        ;
  PointAway = On;
  DrawCoord = Off;
  GlobalCoord=Off;
};
#endif

#if OptZ =="Off"

AnyDrawVector ZDir =   {
  Line.RGB={1,0,0};
  AnyVar size=0.1;
  Visible = On;
  Vec = {0,0,size};
  Line.Style = Line3DStyleFull;
  Line.Thickness=0.1*size;
  Line.End.Thickness =0.3*size;
  Line.End.Length =0.4*size;
  Line.End.Style=Line3DCapStyleArrow        ;
  PointAway = On;
  DrawCoord = Off;
  GlobalCoord=Off;
};

#endif
