AnyFolder Drivers = {

  // Aliases for convenient referencing
  AnyFolder &JntPos=..Mannequin.Posture;
  AnyFolder &JntVel=..Mannequin.PostureVel;

// AnyKinEqSimpleDriver PelvisThoraxDriver ={
//    AnyKinMeasureOrg &ref1= ...HumanModel.Interface.Trunk.PelvisThoraxExtension;
//    AnyKinMeasureOrg &ref3=     ...HumanModel.Interface.Trunk.PelvisThoraxRotation;
//    DriverPos={0,0};
//    DriverVel={0,0};
//  };
//
//  //This is an etsimation of the upper body motion it will enforce that the head is kept above the pelvis medial/laterally
//  AnyKinEqSimpleDriver LateralBendDriver ={
//    AnyKinLinear lin ={
//      AnySeg &ref1=  ....HumanModel.Trunk.SegmentsLumbar.PelvisSeg;
//      AnySeg &ref2=  ....HumanModel.Trunk.SegmentsThorax.SkullSeg;
//    };
//    DriverPos={0};
//    DriverVel={0};
//    MeasureOrganizer={1};
//  };
//
//  AnyKinEqSimpleDriver NeckDrv={
//    AnyKinMeasureOrg &ref1= ...HumanModel.Interface.Trunk.NeckJoint;
//    DriverPos={0};
//    DriverVel={0};
//    Reaction.Type={Off};
//  };


//  AnyFolder &MT = Main.ParOptModelStudy.ModelOptimizationModel.MarkerTopology;
//  MT.M1 = {
//    #include "MarkerDriver.any"
//  };

//  MT.M2 = {
//    #include "MarkerDriver.any"
//  };
//
//  MT.M3 = {
//    #include "MarkerDriver.any"
//  };
//
//  MT.M4 = {
//    #include "MarkerDriver.any"
//  };
//
//  MT.M5 = {
//    #include "MarkerDriver.any"
//  };
//
//  MT.M6 = {
//    #include "MarkerDriver.any"
//  };
//
//  MT.M7 = {
//    #include "MarkerDriver.any"
//  };
//
//  MT.M8 = {
//    #include "MarkerDriver.any"
//  };
//
//  MT.M9 = {
//    #include "MarkerDriver.any"
//  };
//
//  MT.M10 = {
//    #include "MarkerDriver.any"
//  };
//
//  MT.M11 = {
//    #include "MarkerDriver.any"
//  };
//
//  MT.M12 = {
//    #include "MarkerDriver.any"
//  };
//
//  MT.M13 = {
//    #include "MarkerDriver.any"
//  };
//
//  MT.M14 = {
//    #include "MarkerDriver.any"
//  };
//
//  MT.M15 = {
//    #include "MarkerDriver.any"
//  };
//
//  MT.M16 = {
//    #include "MarkerDriver.any"
//  };


};//Drivers
