AnyFolder Mannequin = {

  AnyFolder Posture =
  {


  AnyParamFun &RASI = Main.ModelSetup.C3DFileData.Points.Markers.RASI.PosInterpol;
 AnyParamFun &LASI = Main.ModelSetup.C3DFileData.Points.Markers.LASI.PosInterpol;

  AnyParamFun &RPSI = Main.ModelSetup.C3DFileData.Points.Markers.RPSI.PosInterpol;
 AnyParamFun &LPSI = Main.ModelSetup.C3DFileData.Points.Markers.LPSI.PosInterpol;


  AnyVar PelvisPosX = 0.25* (RASI(Main.ModelSetup.tStart)[0]+LASI(Main.ModelSetup.tStart)[0]+RPSI(Main.ModelSetup.tStart)[0]+LPSI(Main.ModelSetup.tStart)[0]);
  AnyVar PelvisPosY =  0.25* (RASI(Main.ModelSetup.tStart)[1]+LASI(Main.ModelSetup.tStart)[1]+RPSI(Main.ModelSetup.tStart)[1]+LPSI(Main.ModelSetup.tStart)[1]);
  AnyVar PelvisPosZ = 0.25* (RASI(Main.ModelSetup.tStart)[2]+LASI(Main.ModelSetup.tStart)[2]+RPSI(Main.ModelSetup.tStart)[2]+LPSI(Main.ModelSetup.tStart)[2]);


  AnyVar PelvisRotZ = 0;
  AnyVar PelvisRotY = 0;
  AnyVar PelvisRotX = 0;

    // These variables control the rotation of the thorax wrt the
    // pelvis
    AnyVar PelvisThoraxExtension=0;
    AnyVar PelvisThoraxLateralBending=0;
    AnyVar PelvisThoraxRotation=0;

    AnyVar NeckExtension=0;


//    AnyFolder Right =
//      {
//        AnyVar HipFlexion = 0;
//        AnyVar HipAbduction = 0;
//        AnyVar HipExternalRotation = 0;
//        AnyVar KneeFlexion = 0;
//        AnyVar AnklePlantarFlexion = 0;
//        AnyVar SubTalarEversion =0;
//      };
//    AnyFolder Left =
//      {
//        AnyVar HipFlexion = 0;
//        AnyVar HipAbduction = 0;
//        AnyVar HipExternalRotation = 0;
//        AnyVar KneeFlexion = 0;
//        AnyVar AnklePlantarFlexion = 0;
//        AnyVar SubTalarEversion =0;
//      };
//
       AnyFolder Right =
      {
          //Arm
      AnyVar SternoClavicularProtraction=-23;   //This value is not used for initial position
      AnyVar SternoClavicularElevation=11.5;    //This value is not used for initial position
      AnyVar SternoClavicularAxialRotation=-20; //This value is not used for initial position

      AnyVar GlenohumeralFlexion =-10;
      AnyVar GlenohumeralAbduction = 10;
      AnyVar GlenohumeralExternalRotation = 00;

      AnyVar ElbowFlexion = 35;
      AnyVar ElbowPronation = -60.0;

      AnyVar WristFlexion =0;
      AnyVar WristAbduction =0;

        AnyVar HipFlexion = -20.31705;
        AnyVar HipAbduction = 5.707386;
        AnyVar HipExternalRotation = -3.079478;
        AnyVar KneeFlexion = 6.493074;
        AnyVar AnklePlantarFlexion = 41.576023-30;
        AnyVar SubTalarEversion = 0.229261;
      };
    AnyFolder Left =
      {

          //Arm
      AnyVar SternoClavicularProtraction=.Right.SternoClavicularProtraction;
      AnyVar SternoClavicularElevation=.Right.SternoClavicularElevation;
      AnyVar SternoClavicularAxialRotation=.Right.SternoClavicularAxialRotation;

      AnyVar GlenohumeralFlexion = .Right.GlenohumeralFlexion;
      AnyVar GlenohumeralAbduction =.Right.GlenohumeralAbduction ;
      AnyVar GlenohumeralExternalRotation =.Right.GlenohumeralExternalRotation ;

      AnyVar ElbowFlexion = .Right.ElbowFlexion ;
      AnyVar ElbowPronation =.Right.ElbowPronation;
      AnyVar WristFlexion =.Right.WristFlexion;
      AnyVar WristAbduction =.Right.WristAbduction;

        AnyVar HipFlexion = -20.1819;
        AnyVar HipAbduction = -3.050171;
        AnyVar HipExternalRotation = 0*-16.907892;
        AnyVar KneeFlexion = 7.764009;
        AnyVar AnklePlantarFlexion = 48.790382-30;
        AnyVar SubTalarEversion =0.20658;
      };


    };

  AnyFolder PostureVel={
    //This controls the position of the pelvi wrt. to the global reference frame
    AnyVar PelvisPosX=0;
    AnyVar PelvisPosY=0;
    AnyVar PelvisPosZ=0;

    //This controls the rotation of the pelvis wrt. to the global reference frame
    AnyVar PelvisRotX=0;
    AnyVar PelvisRotY=0;
    AnyVar PelvisRotZ=0;

    // These variables control the rotation of the thorax wrt the
    // pelvis
    AnyVar PelvisThoraxExtension=0;
    AnyVar PelvisThoraxLateralBending=0;
    AnyVar PelvisThoraxRotation=0;

    AnyVar NeckExtension=0;

    AnyFolder Right = {
      //Arm
      AnyVar SternoClavicularProtraction=0;   //This value is not used for initial position
      AnyVar SternoClavicularElevation=0;    //This value is not used for initial position
      AnyVar SternoClavicularAxialRotation=0; //This value is not used for initial position

      AnyVar GlenohumeralFlexion =0;
      AnyVar GlenohumeralAbduction = 0;
      AnyVar GlenohumeralExternalRotation = 0;

      AnyVar ElbowFlexion = 0.0;
      AnyVar ElbowPronation = 0.0;

      AnyVar WristFlexion =0;
      AnyVar WristAbduction =0;

      AnyVar HipFlexion = 0.0;
      AnyVar HipAbduction = 0.0;
      AnyVar HipExternalRotation = 0.0;

      AnyVar KneeFlexion = 0.0;

      AnyVar AnklePlantarFlexion =0.0;
      AnyVar SubTalarEversion=0.0;

    };

    AnyFolder Left = {
      //all values are set to be equal to the right side values
      //feel free to change this!

      //Arm
      AnyVar SternoClavicularProtraction=.Right.SternoClavicularProtraction;
      AnyVar SternoClavicularElevation=.Right.SternoClavicularElevation;
      AnyVar SternoClavicularAxialRotation=.Right.SternoClavicularAxialRotation;

      AnyVar GlenohumeralFlexion = .Right.GlenohumeralFlexion ;
      AnyVar GlenohumeralAbduction =.Right.GlenohumeralAbduction ;
      AnyVar GlenohumeralExternalRotation =.Right.GlenohumeralExternalRotation ;

      AnyVar ElbowFlexion = .Right.ElbowFlexion;
      AnyVar ElbowPronation = .Right.ElbowPronation;
      AnyVar WristFlexion =.Right.WristFlexion;
      AnyVar WristAbduction =.Right.WristAbduction;


      //Leg
      AnyVar HipFlexion =.Right.HipFlexion;
      AnyVar HipAbduction =.Right.HipAbduction;
      AnyVar HipExternalRotation = .Right.HipExternalRotation;
      AnyVar KneeFlexion = .Right.KneeFlexion;
      AnyVar AnklePlantarFlexion = .Right.AnklePlantarFlexion ;
      AnyVar SubTalarEversion=.Right.SubTalarEversion;


    };
  };
};
