AnyFolder TrialSpecificData={

  //Name of the C3D file to be analysed
  AnyString NameOfFile ="GaitNormal0003-processed"; //Write the name of the file here

  //Set the direction of the gravity vector here, it will automatically go into
  //all studies
  AnyVec3 Gravity=  {0.0, -9.81,0};

    //Starting time for the analysis calculated from C3D data but can be changed is needed
  AnyFloatVar  tStart = Main.ModelSetup.C3DFileData.Header.FirstFrameNo/Main.ModelSetup.C3DFileData.Header.VideoFrameRate;
  //End time for the analysis calculated from C3D data but can be changed is needed
  AnyFloatVar  tEnd = Main.ModelSetup.C3DFileData.Header.LastFrameNo/Main.ModelSetup.C3DFileData.Header.VideoFrameRate-0.1;

  //These antrhopometric data will be used as initial guess for the optimization alogorithm the optimization algoritm will allow changes to the
  //segment lengths
  AnyFolder Anthropometrics={
    AnyVar BodyMass=62;  //the mass is automatically distributed to the segments
    AnyVar BodyHeight=1.73;  //height

    AnyVar ThighLength= 0.4234534;  //rigth and left side is mirrored
    AnyVar ShankLength= 0.4120814;
    AnyVar FootLength=0.21;
    AnyVar PelvisWidth=0.16; //distance between hip joints

    AnyVar HeadHeight = 0.14;//height in neutral position from  C1HatNode to top of head
    AnyVar TrunkHeight = 0.620233;//height in neautral position from  C1HatNode to L5SacrumJnt
    AnyVar UpperArmLength = 0.340079;
    AnyVar LowerArmLength =0.2690167;
    AnyVar HandLength = 0.182;
    AnyVar HandBreadth = 0.085;
  };


  //This is the initial position of the body it should only be touched it the kinematics does not work it first timestep
  //then these variable can be used to create a better guess, otherwise leave them unchanged
  AnyFolder InitialPositionOfBody ={

     AnyVar PelvisRotX=0.0;
     AnyVar PelvisRotY=0.0;
     AnyVar PelvisRotZ=0.0;

     AnyVar PelvisPosX=0.0;
     AnyVar PelvisPosY=0.0;
     AnyVar PelvisPosZ=0.0;

    AnyMat33 PelvisRotMatrix=DesignVar(RotMat(PelvisRotZ*pi/180,z)*RotMat(PelvisRotY*pi/180,y)*RotMat(PelvisRotX*pi/180,x));  //Z,Y,X  in degress
    AnyVec3 PelvisPos=DesignVar({PelvisPosX,PelvisPosY,PelvisPosZ});//X,Y,Z


    AnyFolder Right={
      AnyVar HipFlexion = 20.31705;
      AnyVar HipAbduction = 5.707386;
      AnyVar HipExternalRotation = -3.079478;
      AnyVar KneeFlexion = 6.493074;
      AnyVar AnklePlantarFlexion = 41.576023-30;
      AnyVar SubTalarEversion = 0.229261;
    };

    AnyFolder Left ={
      AnyVar HipFlexion = -20.1819;
      AnyVar HipAbduction = -3.050171;
      AnyVar HipExternalRotation = 0*-16.907892;
      AnyVar KneeFlexion = 7.764009;
      AnyVar AnklePlantarFlexion = 48.790382-30;
      AnyVar SubTalarEversion =0.20658;
    };
  };
};
