AnyDrawNode DrawMarkerNode={
  ScaleXYZ=0.005*{1,1,1};
  RGB=.....RGB;
};
//  AnyRefNode NameNode={
//    sRel={0.03,0,0};
//    AnyDrawVector  DrawName = {
//      Vec = {0.0,0,0};  //use zero length
//      Line.Thickness = 0.1; //arbitary value
//      Text = ....Name; //make reference to name
//      Line.RGB={0,0,1};
//    };
//  };
//


//AnyDrawRefFrame drw={};
