//this files contains the initial guess on the marker position it is all in local coordinates of the segment

AnyFolder LocalMarkerCoordinates = {
  AnyVec3 RTHI = {-0.0368297453435,0.0159516577130,0.0852285804212};
  AnyVec3 RKNE = {-0.0441848009040,-0.2372525821672,0.0662050625546};
  AnyVec3 LKNE = {-0.0294127317540,-0.2286222988233,-0.1083740945580};
  AnyVec3 LPSI = {-0.0772754403867,0.0329196298670,-0.0374507107788};
  AnyVec3 RASI = {0.1000000000000,-0.0330000000000,0.1300000000000};
  AnyVec3 RTIB = {-0.0194231600834,0.0823547002866,0.0901472277543};
  AnyVec3 LTIB = {0.0022686805538,-0.1220400834367,-0.1039380171131};
  AnyVec3 RPSI = {-0.0762956029943,0.0350954389208,0.0412823195453};
  AnyVec3 LASI = {0.1000000000000,-0.0330000000000,-0.1300000000000};
  AnyVec3 LTHI = {-0.0146782347833,-0.0996004426919,-0.0798593909006};

//  AnyVec3 RHEE = {0.02,0,0}+{0.0090761847216,0.1207715789411,-0.0190000000000};
//  AnyVec3 RANK = {0,0,0}+{0.0012198002128,-0.2481686772072,0.060226625232};
//  AnyVec3 RTOE = {0.035,0,0}+{0.0200436337426,-0.0615836934644,0.0254381507332};

//   AnyVec3 RHEE = {0.025,0,0.02}+{0.0090761847216,0.1207715789411,-0.0190000000000};
//  AnyVec3 RANK = {0,0,0}+{0.0012198002128,-0.2481686772072,0.060226625232};
//  AnyVec3 RTOE = {0.03,-0.01,0.0}+{0.0200436337426,-0.0615836934644,0.0254381507332};
//
//not so good
//    AnyVec3 RHEE = {0.025,0,0.02}+{0.0090761847216,0.1207715789411,-0.0190000000000};
//  AnyVec3 RANK = {0,0,0}+{0.0012198002128,-0.2481686772072,0.060226625232};
//  AnyVec3 RTOE = {0.02,-0.01,-0.005}+{0.0200436337426,-0.0615836934644,0.0254381507332};
//good guess
//AnyVec3 RHEE = {0.025,0,0.02}+{0.0090761847216,0.1207715789411,-0.0190000000000};
//  AnyVec3 RANK = {0,0,0}+{0.0012198002128,-0.2481686772072,0.060226625232};
//  AnyVec3 RTOE = {0.03,-0.01,0.0}+{0.0200436337426,-0.0615836934644,0.0254381507332};

    AnyVec3 RHEE = {0.025,0,0.02}+{0.0090761847216,0.1207715789411,-0.0190000000000};
  AnyVec3 RANK = {0,0,0}+{0.0012198002128,-0.2481686772072,0.060226625232};
  AnyVec3 RTOE = {0.03,-0.01,0.0}+{0.0200436337426,-0.0615836934644,0.0254381507332};

//good guess
//     AnyVec3 LHEE = {0.04,0,-0.035}+{0.0090761847216,0.1207715789411,0.0190000000000};
//  AnyVec3 LANK = {0,0,-0.01}+{0.0012198002128,-0.2481686772072,-0.060226625232};
//  AnyVec3 LTOE = {0.01,-0.01,0.0}+{0.0200436337426,-0.0615836934644,-0.0254381507332};

    AnyVec3 LHEE = {0.04,0,-0.035}+{0.0090761847216,0.1207715789411,0.0190000000000};
  AnyVec3 LANK = {0,0,-0.01}+{0.0012198002128,-0.2481686772072,-0.060226625232};
  AnyVec3 LTOE = {0.01,-0.01,0.0}+{0.0200436337426,-0.0615836934644,-0.0254381507332};

};

AnyFolder ScalingParameters = {
  AnyVar PELVIS = 0.1598314684245;
  AnyVar THIGH = 0.4414516380140;
  AnyVar SHANK = 0.4129366001078;
  AnyVar FOOT = 0.1998125420306;
};
