AnyFolder Header = {
AnyString FileType = "PC";
AnyString DataType = "REAL";
AnyString DataSign = "UNSIGNED";
AnyInt No3DPoints = 197;
AnyInt TotalNoAnalogPer3DFrame = 840;
AnyInt FirstFrameNo = 323;
AnyInt LastFrameNo = 640;
AnyInt NoAnalogSamplesPer3DFrame = 15;
AnyFloat VideoFrameRate = 120.0000000000;
AnyInt Frames = {323,324,325,326,327,328,329,330,331,332,333,334,335,336,337,338,339,340,341,342,343,344,345,346,347,348,349,350,351,352,
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  640};
AnyFolder Events = {
};};
