//Remark that there are two markers on each foot which are not positioned automatically here one has to adjust the paramters of the "output-par.any"
//manually

AnyMat33 LeftLegKnee_Thigh = Main.MarkerPlacementStudy.HumanModel.BodyModel.Left.Leg.Seg.Thigh.KneeJoint.ARel;
AnyMat33 LeftLegKnee_Shank = Main.MarkerPlacementStudy.HumanModel.BodyModel.Left.Leg.Seg.Shank.KneeJoint.ARel;
AnyMat33 LeftLegAnkle_Shank = Main.MarkerPlacementStudy.HumanModel.BodyModel.Left.Leg.Seg.Shank.AnkleJoint.ARel;
AnyMat33 LeftLegAnkle_Talus = Main.MarkerPlacementStudy.HumanModel.BodyModel.Left.Leg.Seg.Talus.AnkleJoint.ARel;
AnyMat33 LeftLegSub_Talus = Main.MarkerPlacementStudy.HumanModel.BodyModel.Left.Leg.Seg.Talus.SubTalarJoint.ARel;
AnyMat33 LeftLegSub_Foot = Main.MarkerPlacementStudy.HumanModel.BodyModel.Left.Leg.Seg.Foot.SubTalarJoint.ARel;

AnyMat33 RightLegKnee_Thigh = Main.MarkerPlacementStudy.HumanModel.BodyModel.Right.Leg.Seg.Thigh.KneeJoint.ARel;
AnyMat33 RightLegKnee_Shank = Main.MarkerPlacementStudy.HumanModel.BodyModel.Right.Leg.Seg.Shank.KneeJoint.ARel;
AnyMat33 RightLegAnkle_Shank = Main.MarkerPlacementStudy.HumanModel.BodyModel.Right.Leg.Seg.Shank.AnkleJoint.ARel;
AnyMat33 RightLegAnkle_Talus = Main.MarkerPlacementStudy.HumanModel.BodyModel.Right.Leg.Seg.Talus.AnkleJoint.ARel;
AnyMat33 RightLegSub_Talus = Main.MarkerPlacementStudy.HumanModel.BodyModel.Right.Leg.Seg.Talus.SubTalarJoint.ARel;
AnyMat33 RightLegSub_Foot = Main.MarkerPlacementStudy.HumanModel.BodyModel.Right.Leg.Seg.Foot.SubTalarJoint.ARel;

AnyMat33 PelvisScalingRot=  Main.MarkerPlacementStudy.HumanModel.BodyModel.Trunk.SegmentsLumbar.PelvisSeg.ScalingNode.ARel;
AnyMat33 LeftThighScalingRot= Main.MarkerPlacementStudy.HumanModel.BodyModel.Left.Leg.Seg.Thigh.ScalingNode.ARel;
AnyMat33 LeftShankScalingRot= Main.MarkerPlacementStudy.HumanModel.BodyModel.Left.Leg.Seg.Shank.ScalingNode.ARel;
AnyMat33 LeftFootScalingRot= Main.MarkerPlacementStudy.HumanModel.BodyModel.Left.Leg.Seg.Foot.ScalingNode.ARel;
//
AnyMat33 RightThighScalingRot= Main.MarkerPlacementStudy.HumanModel.BodyModel.Right.Leg.Seg.Thigh.ScalingNode.ARel;
AnyMat33 RightShankScalingRot= Main.MarkerPlacementStudy.HumanModel.BodyModel.Right.Leg.Seg.Shank.ScalingNode.ARel;
AnyMat33 RightFootScalingRot= Main.MarkerPlacementStudy.HumanModel.BodyModel.Right.Leg.Seg.Foot.ScalingNode.ARel;
//
AnyString String = {
  "INITPOS" +" "
  + strval(.PelvisLin.Pos[0]) + "  "
  + strval(.PelvisLin.Pos[1]) + "  "
  + strval(.PelvisLin.Pos[2]) + "  "
  + strval(.PelvisRot.Pos[0]) + "  "
  + strval(.PelvisRot.Pos[1]) + "  "
  + strval(.PelvisRot.Pos[2]) + "  "
  + strval(.PelvisRot.Pos[3]) + "  "

  + strval(.ThighLeftLin.Pos[0]) + "  "
  + strval(.ThighLeftLin.Pos[1]) + "  "
  + strval(.ThighLeftLin.Pos[2]) + "  "
  + strval(.ThighLeftRot.Pos[0]) + "  "
  + strval(.ThighLeftRot.Pos[1]) + "  "
  + strval(.ThighLeftRot.Pos[2]) + "  "
  + strval(.ThighLeftRot.Pos[3]) + "  "

  + strval(.ShankLeftLin.Pos[0]) + "  "
  + strval(.ShankLeftLin.Pos[1]) + "  "
  + strval(.ShankLeftLin.Pos[2]) + "  "
  + strval(.ShankLeftRot.Pos[0]) + "  "
  + strval(.ShankLeftRot.Pos[1]) + "  "
  + strval(.ShankLeftRot.Pos[2]) + "  "
  + strval(.ShankLeftRot.Pos[3]) + "  "

  + strval(.TalusLeftLin.Pos[0]) + "  "
  + strval(.TalusLeftLin.Pos[1]) + "  "
  + strval(.TalusLeftLin.Pos[2]) + "  "
  + strval(.TalusLeftRot.Pos[0]) + "  "
  + strval(.TalusLeftRot.Pos[1]) + "  "
  + strval(.TalusLeftRot.Pos[2]) + "  "
  + strval(.TalusLeftRot.Pos[3]) + "  "


  + strval(.FootLeftLin.Pos[0]) + "  "
  + strval(.FootLeftLin.Pos[1]) + "  "
  + strval(.FootLeftLin.Pos[2]) + "  "
  + strval(.FootLeftRot.Pos[0]) + "  "
  + strval(.FootLeftRot.Pos[1]) + "  "
  + strval(.FootLeftRot.Pos[2]) + "  "
  + strval(.FootLeftRot.Pos[3]) + "  "

  + strval(.ThighRightLin.Pos[0]) + "  "
  + strval(.ThighRightLin.Pos[1]) + "  "
  + strval(.ThighRightLin.Pos[2]) + "  "
  + strval(.ThighRightRot.Pos[0]) + "  "
  + strval(.ThighRightRot.Pos[1]) + "  "
  + strval(.ThighRightRot.Pos[2]) + "  "
  + strval(.ThighRightRot.Pos[3]) + "  "

  + strval(.ShankRightLin.Pos[0]) + "  "
  + strval(.ShankRightLin.Pos[1]) + "  "
  + strval(.ShankRightLin.Pos[2]) + "  "
  + strval(.ShankRightRot.Pos[0]) + "  "
  + strval(.ShankRightRot.Pos[1]) + "  "
  + strval(.ShankRightRot.Pos[2]) + "  "
  + strval(.ShankRightRot.Pos[3]) + "  "

  + strval(.TalusRightLin.Pos[0]) + "  "
  + strval(.TalusRightLin.Pos[1]) + "  "
  + strval(.TalusRightLin.Pos[2]) + "  "
  + strval(.TalusRightRot.Pos[0]) + "  "
  + strval(.TalusRightRot.Pos[1]) + "  "
  + strval(.TalusRightRot.Pos[2]) + "  "
  + strval(.TalusRightRot.Pos[3]) + "  "

  + strval(.FootRightLin.Pos[0]) + "  "
  + strval(.FootRightLin.Pos[1]) + "  "
  + strval(.FootRightLin.Pos[2]) + "  "
  + strval(.FootRightRot.Pos[0]) + "  "
  + strval(.FootRightRot.Pos[1]) + "  "
  + strval(.FootRightRot.Pos[2]) + "  "
  + strval(.FootRightRot.Pos[3]) + "  ",

  "EULERANGLE" +" "
  + strval(..Mannequin.Posture.PelvisRotX/180*pi) + "  "
  + strval(..Mannequin.Posture.PelvisRotY/180*pi) + "  "
  + strval(..Mannequin.Posture.PelvisRotZ/180*pi) + "  "
  + strval(..Mannequin.Posture.Left.HipFlexion/180*pi) + "  "
  + strval(..Mannequin.Posture.Left.HipAbduction/180*pi) + "  "
  + strval(..Mannequin.Posture.Left.HipExternalRotation/180*pi) + "  "
  + strval(..Mannequin.Posture.Left.KneeFlexion/180*pi) + "  "
  + strval(..Mannequin.Posture.Left.AnklePlantarFlexion/180*pi) + "  "
  + strval(..Mannequin.Posture.Left.SubTalarEversion/180*pi) + "  "
  + strval(..Mannequin.Posture.Right.HipFlexion/180*pi) + "  "
  + strval(..Mannequin.Posture.Right.HipAbduction/180*pi) + "  "
  + strval(..Mannequin.Posture.Right.HipExternalRotation/180*pi) + "  "
  + strval(..Mannequin.Posture.Right.KneeFlexion/180*pi) + "  "
  + strval(..Mannequin.Posture.Right.AnklePlantarFlexion/180*pi) + "  "
  + strval(..Mannequin.Posture.Right.SubTalarEversion/180*pi) + "  ",


  // Specify the scaling law
  "SCALINGLAW UNIFORMSCALING ",
//  "SCALINGLAW LENGTHMASSSCALING",

 // // Include the standard parameters
  "STANDARDPELVISWIDTH " + strval(...HumanModel.Scaling.StandardParameters.Pelvis.Width) ,
  "STANDARDTHIGHLENGTH " + strval(...HumanModel.Scaling.StandardParameters.Right.Thigh.Length) ,
  "STANDARDSHANKLENGTH " + strval(...HumanModel.Scaling.StandardParameters.Right.Shank.Length) ,
  "STANDARDTALUSLENGTH "  + strval(...HumanModel.Scaling.StandardParameters.Right.Talus.Length) ,
  "STANDARDFOOTLENGTH "  + strval(...HumanModel.Scaling.StandardParameters.Right.Foot.Length) ,

  "STANDARDPELVISMASS " + strval(...HumanModel.Scaling.StandardParameters.Pelvis.Mass),
  "STANDARDTHIGHMASS " + strval(...HumanModel.Scaling.StandardParameters.Right.Thigh.Mass),
  "STANDARDSHANKMASS " + strval(...HumanModel.Scaling.StandardParameters.Right.Shank.Mass),
  "STANDARDTALUSMASS "  + strval(...HumanModel.Scaling.StandardParameters.Right.Talus.Mass),
  "STANDARDFOOTMASS "  + strval(...HumanModel.Scaling.StandardParameters.Right.Foot.Mass),


 // // Include the current mass parameters. These parameters are only used when a MASSLENGTH scaling is performed.
  "ANTROPELVIS " + strval(...HumanModel.Scaling.AnthroData.pelvis),
  "ANTROTHIGH " + strval(...HumanModel.Scaling.AnthroData.Right.thigh),
  "ANTROLOWERLEG " + strval(...HumanModel.Scaling.AnthroData.Right.lower_leg),
  "ANTROTALUS "  + strval(...HumanModel.Scaling.AnthroData.Right.talus),

  "ANTROFOOT "  + strval(...HumanModel.Scaling.AnthroData.Right.foot),
  "ANTROBALL "  + strval(...HumanModel.Scaling.AnthroData.Right.ball),


  //Unscaled coordinates for joints these numbers should only change if there are modifications in the Body
  // Left hip pelvis

  "LEFTHIPPELVIS 0.035  -0.115 -0.088",
    // Left hip thigh
  "LEFTHIPTHIGH 0.0 0.0 0.0",
  // Left knee thigh
  "LEFTKNEETHIGH 0.0384 -0.4078 -0.0138",
  // Left knee shank
  "LEFTKNEESHANK 0.0384 -0.4078 -0.0138",
  // Left ankle shank
  "LEFTANKLESHANK 0.0733 -0.8136 -0.0214",
  //left ankle talus
  "LEFTANKLETALUS 0.0733 -0.8136 -0.0214",
  // Left subtalar talus
  "LEFTSUBTALUS 0.07 -0.851 -0.015",
  // Left subtalar foot
  "LEFTSUBFOOT 0.07 -0.851 -0.015",


   // Right hip pelvis
  "RIGHTHIPPELVIS 0.035 -0.115 0.088 ",
  // Right hip thigh
  "RIGHTHIPTHIGH 0.0 0.0 0",
  // Right knee thigh
  "RIGHTKNEETHIGH 0.0384 -0.4078 0.0138",
  // Right knee shank
  "RIGHTKNEESHANK 0.0384 -0.4078 0.0138",
  // Right ankle shank
  "RIGHTANKLESHANK 0.0733 -0.8136 0.0214",
  //Right ankle talus
  "RIGHTANKLETALUS 0.0733 -0.8136 0.0214",
  // Right subtalar talus
  "RIGHTSUBTALUS 0.07 -0.851 0.015",
  // Right subtalar foot
  "RIGHTSUBFOOT 0.07 -0.851 0.015",


"AREL_LEFTKNEE_THIGH" +" "+  strval(LeftLegKnee_Thigh[0][0]) +" "+  strval(LeftLegKnee_Thigh[0][1]) +" "+  strval(LeftLegKnee_Thigh[0][2]) +" "+ strval(LeftLegKnee_Thigh[1][0]) +" "+ strval(LeftLegKnee_Thigh[1][1]) +" "+ strval(LeftLegKnee_Thigh[1][2]) +" "+ strval(LeftLegKnee_Thigh[2][0]) +" "+ strval(LeftLegKnee_Thigh[2][1]) +" "+ strval(LeftLegKnee_Thigh[2][2]),
"AREL_LEFTKNEE_SHANK" +" "+  strval(LeftLegKnee_Shank[0][0]) +" "+ strval(LeftLegKnee_Shank[0][1]) +" "+ strval(LeftLegKnee_Shank[0][2]) +" "+ strval(LeftLegKnee_Shank[1][0]) +" "+ strval(LeftLegKnee_Shank[1][1]) +" "+ strval(LeftLegKnee_Shank[1][2]) +" "+ strval(LeftLegKnee_Shank[2][0]) +" "+ strval(LeftLegKnee_Shank[2][1]) +" "+ strval(LeftLegKnee_Shank[2][2]),
"AREL_LEFTANKLE_SHANK" +" "+ strval(LeftLegAnkle_Shank[0][0]) +" "+ strval(LeftLegAnkle_Shank[0][1]) +" "+ strval(LeftLegAnkle_Shank[0][2]) +" "+ strval(LeftLegAnkle_Shank[1][0]) +" "+ strval(LeftLegAnkle_Shank[1][1]) +" "+ strval(LeftLegAnkle_Shank[1][2]) +" "+ strval(LeftLegAnkle_Shank[2][0]) +" "+ strval(LeftLegAnkle_Shank[2][1]) +" "+ strval(LeftLegAnkle_Shank[2][2]),
"AREL_LEFTANKLE_TALUS" +" "+ strval(LeftLegAnkle_Talus[0][0]) +" "+ strval(LeftLegAnkle_Talus[0][1]) +" "+ strval(LeftLegAnkle_Talus[0][2]) +" "+ strval(LeftLegAnkle_Talus[1][0]) +" "+ strval(LeftLegAnkle_Talus[1][1]) +" "+ strval(LeftLegAnkle_Talus[1][2]) +" "+ strval(LeftLegAnkle_Talus[2][0]) +" "+ strval(LeftLegAnkle_Talus[2][1]) +" "+ strval(LeftLegAnkle_Talus[2][2]),
"AREL_LEFTSUB_TALUS" +" "+ strval(LeftLegSub_Talus[0][0]) +" "+ strval(LeftLegSub_Talus[0][1])+" "+  strval(LeftLegSub_Talus[0][2])+" "+  strval(LeftLegSub_Talus[1][0])+" "+  strval(LeftLegSub_Talus[1][1])+" "+  strval(LeftLegSub_Talus[1][2])+" "+  strval(LeftLegSub_Talus[2][0])+" "+  strval(LeftLegSub_Talus[2][1])+" "+  strval(LeftLegSub_Talus[2][2]),
"AREL_LEFTSUB_FOOT" +" "+ strval(LeftLegSub_Foot[0][0])+" "+  strval(LeftLegSub_Foot[0][1])+" "+  strval(LeftLegSub_Foot[0][2])+" "+  strval(LeftLegSub_Foot[1][0])+" "+  strval(LeftLegSub_Foot[1][1])+" "+  strval(LeftLegSub_Foot[1][2])+" "+  strval(LeftLegSub_Foot[2][0])+" "+  strval(LeftLegSub_Foot[2][1]) +" "+ strval(LeftLegSub_Foot[2][2]),

"AREL_RIGHTKNEE_THIGH" +" "+ strval(RightLegKnee_Thigh[0][0]) +" "+ strval(RightLegKnee_Thigh[0][1]) +" "+strval(RightLegKnee_Thigh[0][2])+" "+  strval(RightLegKnee_Thigh[1][0]) +" "+strval(RightLegKnee_Thigh[1][1])+ " "+strval(RightLegKnee_Thigh[1][2])+" "+  strval(RightLegKnee_Thigh[2][0])+" "+  strval(RightLegKnee_Thigh[2][1])+" "+  strval(RightLegKnee_Thigh[2][2]),
"AREL_RIGHTKNEE_SHANK" +" "+ strval(RightLegKnee_Shank[0][0]) +" "+ strval(RightLegKnee_Shank[0][1])+" "+ " "+ strval(RightLegKnee_Shank[0][2]) +" "+ strval(RightLegKnee_Shank[1][0]) +" "+strval(RightLegKnee_Shank[1][1]) +" "+strval(RightLegKnee_Shank[1][2])+" "+  strval(RightLegKnee_Shank[2][0])+" "+  strval(RightLegKnee_Shank[2][1])+" "+  strval(RightLegKnee_Shank[2][2]),
"AREL_RIGHTANKLE_SHANK" +" "+strval(RightLegAnkle_Shank[0][0]) +" "+strval(RightLegAnkle_Shank[0][1]) +" "+strval(RightLegAnkle_Shank[0][2])+" "+  strval(RightLegAnkle_Shank[1][0]) +" "+strval(RightLegAnkle_Shank[1][1]) +" "+strval(RightLegAnkle_Shank[1][2])+" "+  strval(RightLegAnkle_Shank[2][0])+" "+  strval(RightLegAnkle_Shank[2][1])+" "+  strval(RightLegAnkle_Shank[2][2]),
"AREL_RIGHTANKLE_TALUS" +" "+strval(RightLegAnkle_Talus[0][0]) +" "+strval(RightLegAnkle_Talus[0][1]) +" "+strval(RightLegAnkle_Talus[0][2]) +" "+strval(RightLegAnkle_Talus[1][0]) +" "+strval(RightLegAnkle_Talus[1][1]) +" "+strval(RightLegAnkle_Talus[1][2])+" "+  strval(RightLegAnkle_Talus[2][0])+" "+  strval(RightLegAnkle_Talus[2][1])+" "+  strval(RightLegAnkle_Talus[2][2]),
"AREL_RIGHTSUB_TALUS" +" "+strval(RightLegSub_Talus[0][0]) +" "+strval(RightLegSub_Talus[0][1]) +" "+strval(RightLegSub_Talus[0][2]) +" "+strval(RightLegSub_Talus[1][0]) +" "+strval(RightLegSub_Talus[1][1]) +" "+strval(RightLegSub_Talus[1][2]) +" "+strval(RightLegSub_Talus[2][0])+" "+  strval(RightLegSub_Talus[2][1])+" "+  strval(RightLegSub_Talus[2][2]),
"AREL_RIGHTSUB_FOOT" +" "+strval(RightLegSub_Foot[0][0]) +" "+strval(RightLegSub_Foot[0][1]) +" "+strval(RightLegSub_Foot[0][2]) +" "+strval(RightLegSub_Foot[1][0]) +" "+strval(RightLegSub_Foot[1][1]) +" "+strval(RightLegSub_Foot[1][2]) +" "+strval(RightLegSub_Foot[2][0])+" "+  strval(RightLegSub_Foot[2][1])+" "+  strval(RightLegSub_Foot[2][2]),


"SCALING_ROT_PELVIS "+  strval(PelvisScalingRot[0][0]) +" "+  strval(PelvisScalingRot[0][1]) +" "+  strval(PelvisScalingRot[0][2]) +" "+ strval(PelvisScalingRot[1][0]) +" "+ strval(PelvisScalingRot[1][1]) +" "+ strval(PelvisScalingRot[1][2]) +" "+ strval(PelvisScalingRot[2][0]) +" "+ strval(PelvisScalingRot[2][1]) +" "+ strval(PelvisScalingRot[2][2]),
"SCALING_ROT_LEFT_THIGH "+  strval(LeftThighScalingRot[0][0]) +" "+  strval(LeftThighScalingRot[0][1]) +" "+  strval(LeftThighScalingRot[0][2]) +" "+ strval(LeftThighScalingRot[1][0]) +" "+ strval(LeftThighScalingRot[1][1]) +" "+ strval(LeftThighScalingRot[1][2]) +" "+ strval(LeftThighScalingRot[2][0]) +" "+ strval(LeftThighScalingRot[2][1]) +" "+ strval(LeftThighScalingRot[2][2]),
"SCALING_ROT_LEFT_SHANK "+  strval(LeftShankScalingRot[0][0]) +" "+  strval(LeftShankScalingRot[0][1]) +" "+  strval(LeftShankScalingRot[0][2]) +" "+ strval(LeftShankScalingRot[1][0]) +" "+ strval(LeftShankScalingRot[1][1]) +" "+ strval(LeftShankScalingRot[1][2]) +" "+ strval(LeftShankScalingRot[2][0]) +" "+ strval(LeftShankScalingRot[2][1]) +" "+ strval(LeftShankScalingRot[2][2]),
"SCALING_ROT_LEFT_FOOT "+  strval(LeftFootScalingRot[0][0]) +" "+  strval(LeftFootScalingRot[0][1]) +" "+  strval(LeftFootScalingRot[0][2]) +" "+ strval(LeftFootScalingRot[1][0]) +" "+ strval(LeftFootScalingRot[1][1]) +" "+ strval(LeftFootScalingRot[1][2]) +" "+ strval(LeftFootScalingRot[2][0]) +" "+ strval(LeftFootScalingRot[2][1]) +" "+ strval(LeftFootScalingRot[2][2]),
"SCALING_ROT_RIGHT_THIGH "+  strval(RightThighScalingRot[0][0]) +" "+  strval(RightThighScalingRot[0][1]) +" "+  strval(RightThighScalingRot[0][2]) +" "+ strval(RightThighScalingRot[1][0]) +" "+ strval(RightThighScalingRot[1][1]) +" "+ strval(RightThighScalingRot[1][2]) +" "+ strval(RightThighScalingRot[2][0]) +" "+ strval(RightThighScalingRot[2][1]) +" "+ strval(RightThighScalingRot[2][2]),
"SCALING_ROT_RIGHT_SHANK "+  strval(RightShankScalingRot[0][0]) +" "+  strval(RightShankScalingRot[0][1]) +" "+  strval(RightShankScalingRot[0][2]) +" "+ strval(RightShankScalingRot[1][0]) +" "+ strval(RightShankScalingRot[1][1]) +" "+ strval(RightShankScalingRot[1][2]) +" "+ strval(RightShankScalingRot[2][0]) +" "+ strval(RightShankScalingRot[2][1]) +" "+ strval(RightShankScalingRot[2][2]),
"SCALING_ROT_RIGHT_FOOT "+  strval(RightFootScalingRot[0][0]) +" "+  strval(RightFootScalingRot[0][1]) +" "+  strval(RightFootScalingRot[0][2]) +" "+ strval(RightFootScalingRot[1][0]) +" "+ strval(RightFootScalingRot[1][1]) +" "+ strval(RightFootScalingRot[1][2]) +" "+ strval(RightFootScalingRot[2][0]) +" "+ strval(RightFootScalingRot[2][1]) +" "+ strval(RightFootScalingRot[2][2]),


  "MARKER " + .MarkerTopology.M1.Name  + .MarkerTopology.M1.SegNr + strval(.MarkerTopology.M1.NodePos[0]) +" "+ strval(.MarkerTopology.M1.NodePos[1])+ " "+ strval(.MarkerTopology.M1.NodePos[2])+ " weightdummy.txt " +  .MarkerTopology.M1.Name+ ".txt dummy.txt  dummy.txt " + OptSetting,
  "MARKER " + .MarkerTopology.M2.Name  + .MarkerTopology.M2.SegNr + strval(.MarkerTopology.M2.NodePos[0]) +" "+ strval(.MarkerTopology.M2.NodePos[1])+ " "+ strval(.MarkerTopology.M2.NodePos[2])+ " weightdummy.txt " +  .MarkerTopology.M2.Name+ ".txt dummy.txt  dummy.txt " + OptSetting,
  "MARKER " + .MarkerTopology.M3.Name  + .MarkerTopology.M3.SegNr + strval(.MarkerTopology.M3.NodePos[0]) +" "+ strval(.MarkerTopology.M3.NodePos[1])+ " "+ strval(.MarkerTopology.M3.NodePos[2])+  " weightdummy.txt " +  .MarkerTopology.M3.Name+ ".txt dummy.txt  dummy.txt "+ OptSetting,
  "MARKER " + .MarkerTopology.M4.Name  + .MarkerTopology.M4.SegNr + strval(.MarkerTopology.M4.NodePos[0]) +" "+ strval(.MarkerTopology.M4.NodePos[1])+ " "+ strval(.MarkerTopology.M4.NodePos[2])+ " weightdummy.txt " +  .MarkerTopology.M4.Name+ ".txt dummy.txt  dummy.txt " + " off off off ",
  "MARKER " + .MarkerTopology.M5.Name  + .MarkerTopology.M5.SegNr + strval(.MarkerTopology.M5.NodePos[0]) +" "+ strval(.MarkerTopology.M5.NodePos[1])+ " "+ strval(.MarkerTopology.M5.NodePos[2])+ " weightdummy.txt " +  .MarkerTopology.M5.Name+ ".txt dummy.txt  dummy.txt " + OptSetting,
  "MARKER " + .MarkerTopology.M6.Name  + .MarkerTopology.M6.SegNr + strval(.MarkerTopology.M6.NodePos[0]) +" "+ strval(.MarkerTopology.M6.NodePos[1])+ " "+ strval(.MarkerTopology.M6.NodePos[2])+ " weightdummy.txt " +  .MarkerTopology.M6.Name+ ".txt dummy.txt  dummy.txt " + OptSetting,
  "MARKER " + .MarkerTopology.M7.Name  + .MarkerTopology.M7.SegNr + strval(.MarkerTopology.M7.NodePos[0]) +" "+ strval(.MarkerTopology.M7.NodePos[1])+ " "+ strval(.MarkerTopology.M7.NodePos[2])+ " weightdummy.txt " +  .MarkerTopology.M7.Name+ ".txt dummy.txt  dummy.txt " + OptSetting,
  "MARKER " + .MarkerTopology.M8.Name  + .MarkerTopology.M8.SegNr + strval(.MarkerTopology.M8.NodePos[0]) +" "+ strval(.MarkerTopology.M8.NodePos[1])+ " "+ strval(.MarkerTopology.M8.NodePos[2])+ " weightdummy.txt " +  .MarkerTopology.M8.Name+ ".txt dummy.txt  dummy.txt " + " off off off ",
  "MARKER " + .MarkerTopology.M9.Name  + .MarkerTopology.M9.SegNr + strval(.MarkerTopology.M9.NodePos[0]) +" "+ strval(.MarkerTopology.M9.NodePos[1])+ " "+ strval(.MarkerTopology.M9.NodePos[2])+ " weightdummy.txt " +  .MarkerTopology.M9.Name+ ".txt dummy.txt  dummy.txt " + OptSetting,
  "MARKER " + .MarkerTopology.M10.Name  + .MarkerTopology.M10.SegNr + strval(.MarkerTopology.M10.NodePos[0]) +" "+ strval(.MarkerTopology.M10.NodePos[1])+ " "+ strval(.MarkerTopology.M10.NodePos[2])+ " weightdummy.txt " +  .MarkerTopology.M10.Name+ ".txt dummy.txt  dummy.txt " + OptSetting ,
  "MARKER " + .MarkerTopology.M11.Name  + .MarkerTopology.M11.SegNr + strval(.MarkerTopology.M11.NodePos[0]) +" "+ strval(.MarkerTopology.M11.NodePos[1])+ " "+ strval(.MarkerTopology.M11.NodePos[2])+ " weightdummy.txt " +  .MarkerTopology.M11.Name+ ".txt dummy.txt  dummy.txt " + " off off off",
  "MARKER " + .MarkerTopology.M12.Name  + .MarkerTopology.M12.SegNr + strval(.MarkerTopology.M12.NodePos[0]) +" "+ strval(.MarkerTopology.M12.NodePos[1])+ " "+ strval(.MarkerTopology.M12.NodePos[2])+ " weightdummy.txt " +  .MarkerTopology.M12.Name+ ".txt dummy.txt  dummy.txt " + " off off off ",
  "MARKER " + .MarkerTopology.M13.Name  + .MarkerTopology.M13.SegNr + strval(.MarkerTopology.M13.NodePos[0]) +" "+ strval(.MarkerTopology.M13.NodePos[1])+ " "+ strval(.MarkerTopology.M13.NodePos[2])+ " weightdummy.txt " +  .MarkerTopology.M13.Name+ ".txt dummy.txt  dummy.txt " + " off off off ",


  "MARKER " + .MarkerTopology.M14.Name  + .MarkerTopology.M14.SegNr + strval(.MarkerTopology.M14.NodePos[0]) +" "+ strval(.MarkerTopology.M14.NodePos[1])+ " "+ strval(.MarkerTopology.M14.NodePos[2])+ " weightdummy.txt " +  .MarkerTopology.M14.Name+ ".txt dummy.txt  dummy.txt " + " off off off ",
  "MARKER " + .MarkerTopology.M15.Name  + .MarkerTopology.M15.SegNr + strval(.MarkerTopology.M15.NodePos[0]) +" "+ strval(.MarkerTopology.M15.NodePos[1])+ " "+ strval(.MarkerTopology.M15.NodePos[2])+ " weightdummy.txt " +  .MarkerTopology.M15.Name+ ".txt dummy.txt  dummy.txt " + OptSetting,
  "MARKER " + .MarkerTopology.M16.Name  + .MarkerTopology.M16.SegNr + strval(.MarkerTopology.M16.NodePos[0]) +" "+ strval(.MarkerTopology.M16.NodePos[1])+ " "+ strval(.MarkerTopology.M16.NodePos[2])+ " weightdummy.txt " +  .MarkerTopology.M16.Name+ ".txt dummy.txt  dummy.txt " + OptSetting,

  //    "MARKER " + .MarkerTopology.M17.Name  + .MarkerTopology.M17.SegNr + strval(.MarkerTopology.M17.NodePos[0]) +" "+ strval(.MarkerTopology.M17.NodePos[1])+ " "+ strval(.MarkerTopology.M17.NodePos[2])+ " weightdummy.txt " +  .MarkerTopology.M17.Name+ ".txt dummy.txt  dummy.txt " + " off off off ",
  //    "MARKER " + .MarkerTopology.M18.Name  + .MarkerTopology.M18.SegNr + strval(.MarkerTopology.M18.NodePos[0]) +" "+ strval(.MarkerTopology.M18.NodePos[1])+ " "+ strval(.MarkerTopology.M18.NodePos[2])+ " weightdummy.txt " +  .MarkerTopology.M18.Name+ ".txt dummy.txt  dummy.txt " + " off off off ",
  //    "MARKER " + .MarkerTopology.M19.Name  + .MarkerTopology.M19.SegNr + strval(.MarkerTopology.M19.NodePos[0]) +" "+ strval(.MarkerTopology.M19.NodePos[1])+ " "+ strval(.MarkerTopology.M19.NodePos[2])+ " weightdummy.txt " +  .MarkerTopology.M19.Name+ ".txt dummy.txt  dummy.txt " + OptSetting,
  //    "MARKER " + .MarkerTopology.M20.Name  + .MarkerTopology.M20.SegNr + strval(.MarkerTopology.M20.NodePos[0]) +" "+ strval(.MarkerTopology.M20.NodePos[1])+ " "+ strval(.MarkerTopology.M20.NodePos[2])+ " weightdummy.txt " +  .MarkerTopology.M20.Name+ ".txt dummy.txt  dummy.txt " + OptSetting,
  //    "MARKER " + .MarkerTopology.M21.Name  + .MarkerTopology.M21.SegNr + strval(.MarkerTopology.M21.NodePos[0]) +" "+ strval(.MarkerTopology.M21.NodePos[1])+ " "+ strval(.MarkerTopology.M21.NodePos[2])+ " weightdummy.txt " +  .MarkerTopology.M21.Name+ ".txt dummy.txt  dummy.txt "   + " off off off ",
  //    "MARKER " + .MarkerTopology.M22.Name  + .MarkerTopology.M22.SegNr + strval(.MarkerTopology.M22.NodePos[0]) +" "+ strval(.MarkerTopology.M22.NodePos[1])+ " "+ strval(.MarkerTopology.M22.NodePos[2])+ " weightdummy.txt " +  .MarkerTopology.M22.Name+ ".txt dummy.txt  dummy.txt " + OptSetting,
  //    "MARKER " + .MarkerTopology.M23.Name  + .MarkerTopology.M23.SegNr + strval(.MarkerTopology.M23.NodePos[0]) +" "+ strval(.MarkerTopology.M23.NodePos[1])+ " "+ strval(.MarkerTopology.M23.NodePos[2])+ " weightdummy.txt " +  .MarkerTopology.M23.Name+ ".txt dummy.txt  dummy.txt " + OptSetting,
  //    "MARKER " + .MarkerTopology.M24.Name  + .MarkerTopology.M24.SegNr + strval(.MarkerTopology.M24.NodePos[0]) +" "+ strval(.MarkerTopology.M24.NodePos[1])+ " "+ strval(.MarkerTopology.M24.NodePos[2])+ " weightdummy.txt " +  .MarkerTopology.M24.Name+ ".txt dummy.txt  dummy.txt "   + " off off off ",
  //    "MARKER " + .MarkerTopology.M25.Name  + .MarkerTopology.M25.SegNr + strval(.MarkerTopology.M25.NodePos[0]) +" "+ strval(.MarkerTopology.M25.NodePos[1])+ " "+ strval(.MarkerTopology.M25.NodePos[2])+ " weightdummy.txt " +  .MarkerTopology.M25.Name+ ".txt dummy.txt  dummy.txt " + OptSetting,
  //    "MARKER " + .MarkerTopology.M26.Name  + .MarkerTopology.M26.SegNr + strval(.MarkerTopology.M26.NodePos[0]) +" "+ strval(.MarkerTopology.M26.NodePos[1])+ " "+ strval(.MarkerTopology.M26.NodePos[2])+ " weightdummy.txt " +  .MarkerTopology.M26.Name+ ".txt dummy.txt  dummy.txt " + OptSetting,
  //    "MARKER " + .MarkerTopology.M27.Name  + .MarkerTopology.M27.SegNr + strval(.MarkerTopology.M27.NodePos[0]) +" "+ strval(.MarkerTopology.M27.NodePos[1])+ " "+ strval(.MarkerTopology.M27.NodePos[2])+ " weightdummy.txt " +  .MarkerTopology.M27.Name+ ".txt dummy.txt  dummy.txt " + OptSetting,
  //    "MARKER " + .MarkerTopology.M28.Name  + .MarkerTopology.M28.SegNr + strval(.MarkerTopology.M28.NodePos[0]) +" "+ strval(.MarkerTopology.M28.NodePos[1])+ " "+ strval(.MarkerTopology.M28.NodePos[2])+ " weightdummy.txt " +  .MarkerTopology.M28.Name+ ".txt dummy.txt  dummy.txt " + OptSetting,

  "SCALEMAN PELVIS" + " " +strval(.sp.PELVIS)  + " off",
  "SCALEMAN THIGH"  + " " +strval(.sp.THIGH) + " on",
  "SCALEMAN SHANK"  + " " +strval(.sp.SHANK) + " on",
  "SCALEMAN FOOT"   + " " +strval(.sp.FOOT) + " off"
};
