//This file creates the environment around the human
//It creates the force plates and add the measure load to them

AnyFixedRefFrame GlobalRef ={
  Origin={0,0,0};
  //AnyDrawRefFrame drw={ScaleXYZ=0.4*{1,1,1};};
};


AnyFixedRefFrame Corners={
  Axes=....Orientation;

  AnyFloat corners=Main.C3DFileData.Groups.FORCE_PLATFORM.CORNERS.Data;

  AnyRefNode c01={
    AnyInt i=0;
    AnyInt plnr=0;
    sRel=0.001*{.corners[plnr][i][0],.corners[plnr][i][1],.corners[plnr][i][2]};
    //AnyDrawRefFrame drw={ScaleXYZ=0.0001*{1,1,1};RGB={1,0,0};};
  };
  AnyRefNode c02={
    AnyInt i=1;
    AnyInt plnr=0;
    sRel=0.001*{.corners[plnr][i][0],.corners[plnr][i][1],.corners[plnr][i][2]};
    //AnyDrawRefFrame drw={ScaleXYZ=0.1*{1,1,1};RGB={1,0,0};};
  };
  AnyRefNode c03={
    AnyInt i=2;
    AnyInt plnr=0;
    sRel=0.001*{.corners[plnr][i][0],.corners[plnr][i][1],.corners[plnr][i][2]};
    //AnyDrawRefFrame drw={ScaleXYZ=0.1*{1,1,1};RGB={1,0,0};};
  };

  AnyRefNode c04={
    AnyInt i=3;
    AnyInt plnr=0;
    sRel=0.001*{.corners[plnr][i][0],.corners[plnr][i][1],.corners[plnr][i][2]};
    //AnyDrawRefFrame drw={ScaleXYZ=0.1*{1,1,1};RGB={1,0,0};};
  };

  //plate B
  AnyRefNode c0center={
    sRel=0.25*(.c01.sRel+.c02.sRel+.c03.sRel+.c04.sRel);
    ARel=RotMat(pi,x)*RotMat(-0.5*pi,z);
    //AnyDrawRefFrame drw={ScaleXYZ=0.3*{1,1,1};RGB={0,1,0};};

  };


  AnyRefNode c11={
    AnyInt i=0;
    AnyInt plnr=1;
    sRel=0.001*{.corners[plnr][i][0],.corners[plnr][i][1],.corners[plnr][i][2]};
    //AnyDrawRefFrame drw={ScaleXYZ=0.1*{1,1,1};RGB={0,1,0};};
  };
  AnyRefNode c12={
    AnyInt i=1;
    AnyInt plnr=1;
    sRel=0.001*{.corners[plnr][i][0],.corners[plnr][i][1],.corners[plnr][i][2]};
//    AnyDrawRefFrame drw={ScaleXYZ=0.1*{1,1,1};RGB={0,1,0};};
  };
  AnyRefNode c13={
    AnyInt i=2;
    AnyInt plnr=1;
    sRel=0.001*{.corners[plnr][i][0],.corners[plnr][i][1],.corners[plnr][i][2]};
//    AnyDrawRefFrame drw={ScaleXYZ=0.1*{1,1,1};RGB={0,1,0};};
  };

  AnyRefNode c14={
    AnyInt i=3;
    AnyInt plnr=1;
    sRel=0.001*{.corners[plnr][i][0],.corners[plnr][i][1],.corners[plnr][i][2]};
//    AnyDrawRefFrame drw={ScaleXYZ=0.1*{1,1,1};RGB={0,1,0};};
  };

  //Plate A
  AnyRefNode c1center={
    sRel=0.25*(.c11.sRel+.c12.sRel+.c13.sRel+.c14.sRel);
    ARel=RotMat(pi,x)*RotMat(0.5*pi,z); //this one is orientated differently
//   AnyDrawRefFrame drw={ScaleXYZ=0.3*{1,1,1};RGB={0,1,0};};
    };


  AnyRefNode c21={
    AnyInt i=0;
    AnyInt plnr=2;
    sRel=0.001*{.corners[plnr][i][0],.corners[plnr][i][1],.corners[plnr][i][2]};
//      AnyDrawRefFrame drw={ScaleXYZ=0.1*{1,1,1};RGB={0,0,1};};
  };
  AnyRefNode c22={
    AnyInt i=1;
    AnyInt plnr=2;
    sRel=0.001*{.corners[plnr][i][0],.corners[plnr][i][1],.corners[plnr][i][2]};
//    AnyDrawRefFrame drw={ScaleXYZ=0.1*{1,1,1};RGB={0,0,1};};
  };
  AnyRefNode c23={
    AnyInt i=2;
    AnyInt plnr=2;
    sRel=0.001*{.corners[plnr][i][0],.corners[plnr][i][1],.corners[plnr][i][2]};
//    AnyDrawRefFrame drw={ScaleXYZ=0.1*{1,1,1};RGB={0,0,1};};
  };

  AnyRefNode c24={
    AnyInt i=3;
    AnyInt plnr=2;
    sRel=0.001*{.corners[plnr][i][0],.corners[plnr][i][1],.corners[plnr][i][2]};
//    AnyDrawRefFrame drw={ScaleXYZ=0.1*{1,1,1};RGB={0,0,1};};
   };
  //plate C
  AnyRefNode c2center={
    sRel=0.25*(.c21.sRel+.c22.sRel+.c23.sRel+.c24.sRel);
    ARel=RotMat(pi,x)*RotMat(0.5*pi,z);  //orienatated differently
//      AnyDrawRefFrame drw={ScaleXYZ=0.3*{1,1,1};RGB={0,0,1};};
    };


  AnyRefNode c31={
    AnyInt i=0;
    AnyInt plnr=3;
    sRel=0.001*{.corners[plnr][i][0],.corners[plnr][i][1],.corners[plnr][i][2]};
//    AnyDrawRefFrame drw={ScaleXYZ=0.1*{1,1,1};RGB={1,0,1};};
  };

  AnyRefNode c32={
    AnyInt i=1;
    AnyInt plnr=3;
    sRel=0.001*{.corners[plnr][i][0],.corners[plnr][i][1],.corners[plnr][i][2]};
//    AnyDrawRefFrame drw={ScaleXYZ=0.1*{1,1,1};RGB={1,0,1};};
  };

  AnyRefNode c33={
    AnyInt i=2;
    AnyInt plnr=3;
    sRel=0.001*{.corners[plnr][i][0],.corners[plnr][i][1],.corners[plnr][i][2]};
//    AnyDrawRefFrame drw={ScaleXYZ=0.1*{1,1,1};RGB={1,0,1};};
  };

  AnyRefNode c34={
    AnyInt i=3;
    AnyInt plnr=3;
    sRel=0.001*{.corners[plnr][i][0],.corners[plnr][i][1],.corners[plnr][i][2]};
//    AnyDrawRefFrame drw={ScaleXYZ=0.1*{1,1,1};RGB={1,0,1};};
  };
  //plate D
  AnyRefNode c3center={
    sRel=0.25*(.c31.sRel+.c32.sRel+.c33.sRel+.c34.sRel);
    ARel=RotMat(pi,x)*RotMat(-0.5*pi,z);
//    AnyDrawRefFrame drw={ScaleXYZ=0.3*{1,1,1};RGB={1,0,1};};

  };
};
//setup time array for analog data

//  StartFrame*1/(Main.C3DFileData.Header.VideoFrameRate).
//Og herefter follows all samples with  a frquency on
//Main.C3DFileData.Header.VideoFrameRate*
//Main.C3DFileData.Header.NoAnalogSamplesPer3DFrame
//So:
//analog sample 1: StartFrame*1/(Main.C3DFileData.Header.VideoFrameRate).
//Analog sample 2: StartFrame*1/(Main.C3DFileData.Header.VideoFrameRate) +
//1/(Main.C3DFileData.Header.VideoFrameRate*
//Main.C3DFileData.Header.NoAnalogSamplesPer3DFrame)
//and so on.
AnyInt   StartFrame = Main.C3DFileData.Header.FirstFrameNo;
AnyInt   EndFrame =Main.C3DFileData.Header.FirstFrameNo-1+(Main.C3DFileData.Header.LastFrameNo-Main.C3DFileData.Header.FirstFrameNo)* Main.C3DFileData.Header.NoAnalogSamplesPer3DFrame;
AnyFloat Time=((StartFrame*Main.C3DFileData.Header.NoAnalogSamplesPer3DFrame)+iarr(0,EndFrame-StartFrame))*(1/(Main.C3DFileData.Header.VideoFrameRate*Main.C3DFileData.Header.NoAnalogSamplesPer3DFrame));


/// A lowpass butterworth filter
AnyFunButterworthFilter LowPassFilter =
{
  FilterForwardBackwardOnOff = On;
  AutomaticInitialConditionOnOff = On;
  N = 2;
  AnyVar CutOffFrequency=15;
  AnyVar SampleFreq=Main.C3DFileData.Header.VideoFrameRate* Main.C3DFileData.Header.NoAnalogSamplesPer3DFrame   ;
  W = {1/(SampleFreq*0.5)*CutOffFrequency};
  Type = LowPass;
};


AnyFolder PlateB={
  AnySeg ForcePlate={
    Mass=0.0;
    Jii={0,0,0};
    r0=..Corners.c0center.sRel;
    Axes0 =RotMat(pi,z)*RotMat(pi,x)*RotMat(-0.5*pi,z);


    AnyRefNode PlateGraphics ={
      sRel={0,0,0.05};
//      AnyDrawRefFrame drw={
//        ScaleXYZ=0.25*{1,1,1};
//        RGB=.Color;
//      };
      AnyVec3 Color=0.45*{1,1,1};
      AnyVec3 Size={vnorm(...Corners.c01.sRel-...Corners.c02.sRel,2),vnorm(...Corners.c02.sRel-...Corners.c03.sRel,2),0.1};
      AnyVar Transparency =0.4;
  #include "../../../Body/AAUHuman/Toolbox/DrawObjects/Box.any"
    };

    AnyFloat Origins= Main.C3DFileData.Groups.FORCE_PLATFORM.ORIGIN.Data;
    AnyVar ydist=Origins[0][0]; //distance from y axis on transducer to y axis of center of plate
    AnyVar xdist=Origins[0][1];//distance from x axis on transducer to x axis of center of plate
    AnyVar zdist=Origins[0][2];//distance from z axis on transducer to z surface of plate

    AnyRefNode P1={
      sRel=0.001*{.ydist,.xdist,.zdist};
     AnyDrawNode drw={ScaleXYZ = 0.02*{1,1,0.1}; RGB={1,0,0};};
    };
    AnyRefNode P2={
      sRel=0.001*{-.ydist,.xdist,.zdist};
      AnyDrawNode drw={ScaleXYZ = 0.02*{1,1,0.1}; RGB={1,0,0};};
    };
    AnyRefNode P3={
      sRel=0.001*{-.ydist,-.xdist,.zdist};
      AnyDrawNode drw={ScaleXYZ = 0.02*{1,1,0.1}; RGB={1,0,0};};
    };
    AnyRefNode P4={
      sRel=0.001*{.ydist,-.xdist,.zdist};
      AnyDrawNode drw={ScaleXYZ = 0.02*{1,1,0.1}; RGB={1,0,0};};
    };
    AnyRefNode P1P2={
      sRel=0.5*(.P1.sRel+.P2.sRel);
      AnyDrawNode drw={ScaleXYZ = 0.02*{1,1,0.1}; RGB={1,0,0};};
    };
    AnyRefNode P3P4={
      sRel=0.5*(.P3.sRel+.P4.sRel);
      AnyDrawNode drw={ScaleXYZ = 0.02*{1,1,0.1}; RGB={1,0,0};};
    };
    AnyRefNode P1P4={
      sRel=0.5*(.P1.sRel+.P4.sRel);
      AnyDrawNode drw={ScaleXYZ = 0.02*{1,1,0.1}; RGB={1,0,0};};
    };
    AnyRefNode P2P3={
      sRel=0.5*(.P2.sRel+.P3.sRel);
      AnyDrawNode drw={ScaleXYZ = 0.02*{1,1,0.1}; RGB={1,0,0};};
    };


  };

  AnyKinEqSimpleDriver ForcePlateDriver ={
    AnyKinLinear ForcePlateLin={
      AnyRefNode &ref1=...Corners.c0center;
      AnySeg &ref2=..ForcePlate;
      Ref=0;
    };

    AnyKinRotational ForcePlateRot={
      AnyRefNode &ref1=...Corners.c0center;
      AnySeg &ref2=..ForcePlate;
      Type=RotAxesAngles;
    };
    DriverPos={0,0,0,0,0,0};
    DriverVel={0,0,0,0,0,0};
    Reaction.Type = {Off,Off,Off,Off,Off,Off};
  };


  AnyReacForce PlateFootReaction={

    AnyKinLinear Lin={
      Ref=0;
      AnySeg &ref2=..ForcePlate;
      AnySeg &ref1=....HumanModel.Right.Leg.Seg.Foot;
    };

    AnyKinRotational Rot={
      AnySeg &ref2=..ForcePlate;
      AnySeg &ref1=....HumanModel.Right.Leg.Seg.Foot;
      Type=RotAxesAngles;
    };
  };

  //This particular data set has a problem with force offsets in the analog data there is a correction vector for each of the four plates
  AnyVector OffsetCorrection={2.4,-6.2,-6.2,-6.8,-25,-25,-25,-27};


  AnyForce3D Fx1_2 ={

    AnyFunInterpol f ={
      Type=PiecewiseLinear;
      T=...Time;
      Data={Main.C3DFileData.Analog.Data.FPBFx1_2}+..OffsetCorrection[0] ;
    };
    // filter the data
    AnyVector FilteredForce = ..LowPassFilter(f.Data[0]);

    AnyFunInterpol force ={
      Type=PiecewiseLinear;
      T=...Time;
      Data={.FilteredForce };
    };


    AnyRefNode &ref1=.ForcePlate.P1P2;
    Flocal=.OnOff*{force(t)[0],0,0};

    AnyDrawVector DrawSupport2 = {
      AnyRefFrame &ref = .ref1;
      Vec = 0.0005*.Flocal*.ref1.Axes';
      PointAway = Off;
      DrawCoord = Off;
      Line.RGB = {0,0,1};
      Line.Thickness =0.0075;
      Line.End.Thickness = 2*0.0075;
      Line.End.Length = 4*0.0075;
    };

  };

  AnyForce3D Fx3_4 ={
    AnyFunInterpol f ={
      Type=PiecewiseLinear;
      T=...Time;
      Data={Main.C3DFileData.Analog.Data.FPBFx3_4}+..OffsetCorrection[1] ;
    };

    // filter the data
    AnyVector FilteredForce = ..LowPassFilter(f.Data[0]);

    AnyFunInterpol force ={
      Type=PiecewiseLinear;
      T=...Time;
      Data={.FilteredForce };
    };


    AnyRefNode &ref1=.ForcePlate.P3P4;

    Flocal=.OnOff*{force(t)[0],0,0};

     #include "DrawSupport.any"
  };


  AnyForce3D Fy1_4 ={
    AnyFunInterpol f ={
      Type=PiecewiseLinear;
      T=...Time;
      Data={Main.C3DFileData.Analog.Data.FPBFy1_4}+..OffsetCorrection[2] ;
    };
     // filter the data
    AnyVector FilteredForce = ..LowPassFilter(f.Data[0]);

    AnyFunInterpol force ={
      Type=PiecewiseLinear;
      T=...Time;
      Data={.FilteredForce };
    };


    AnyRefNode &ref1=.ForcePlate.P1P4;
    Flocal=.OnOff*{0,force(t)[0],0};

     #include "DrawSupport.any"
  };


  AnyForce3D Fy2_3 ={
    AnyFunInterpol f ={
      Type=PiecewiseLinear;
      T=...Time;
      Data={Main.C3DFileData.Analog.Data.FPBFy2_3}+..OffsetCorrection[3] ;
    };
     // filter the data
    AnyVector FilteredForce = ..LowPassFilter(f.Data[0]);

    AnyFunInterpol force ={
      Type=PiecewiseLinear;
      T=...Time;
      Data={.FilteredForce };
    };


    AnyRefNode &ref1=.ForcePlate.P2P3;
    Flocal=.OnOff*{0,force(t)[0],0};

    #include "DrawSupport.any"
};


  AnyForce3D Fz1 ={
    AnyFunInterpol f ={
      Type=PiecewiseLinear;
      T=...Time;
      Data={Main.C3DFileData.Analog.Data.FPBFz1}+..OffsetCorrection[4] ;
    };
     // filter the data
    AnyVector FilteredForce = ..LowPassFilter(f.Data[0]);

    AnyFunInterpol force ={
      Type=PiecewiseLinear;
      T=...Time;
      Data={.FilteredForce };
    };


    AnyRefNode &ref1=.ForcePlate.P1;
    Flocal=.OnOff*{0,0,force(t)[0]};

    #include "DrawSupport.any"
  };


  AnyForce3D Fz2 ={
    AnyFunInterpol f ={
      Type=PiecewiseLinear;
      T=...Time;
      Data={Main.C3DFileData.Analog.Data.FPBFz2}+..OffsetCorrection[5] ;
    };
     // filter the data
    AnyVector FilteredForce = ..LowPassFilter(f.Data[0]);

    AnyFunInterpol force ={
      Type=PiecewiseLinear;
      T=...Time;
      Data={.FilteredForce };
    };


    AnyRefNode &ref1=.ForcePlate.P2;
    Flocal=.OnOff*{0,0,force(t)[0]};
    #include "DrawSupport.any"
  };

  AnyForce3D Fz3 ={
    AnyFunInterpol f ={
      Type=PiecewiseLinear;
      T=...Time;
      Data={Main.C3DFileData.Analog.Data.FPBFz3}+..OffsetCorrection[6] ;
    };
     // filter the data
    AnyVector FilteredForce = ..LowPassFilter(f.Data[0]);

    AnyFunInterpol force ={
      Type=PiecewiseLinear;
      T=...Time;
      Data={.FilteredForce };
    };


    AnyRefNode &ref1=.ForcePlate.P3;
    Flocal=.OnOff*{0,0,force(t)[0]};

    #include "DrawSupport.any"
  };


  AnyForce3D Fz4 ={
    AnyFunInterpol f ={
      Type=PiecewiseLinear;
      T=...Time;
      Data={Main.C3DFileData.Analog.Data.FPBFz4}+..OffsetCorrection[7] ;
    };
     // filter the data
    AnyVector FilteredForce = ..LowPassFilter(f.Data[0]);

    AnyFunInterpol force ={
      Type=PiecewiseLinear;
      T=...Time;
      Data={.FilteredForce };
    };


    AnyRefNode &ref1=.ForcePlate.P4;
    Flocal=.OnOff*{0,0,force(t)[0]};

    #include "DrawSupport.any"
  };

  AnyVar FzTotal=Fz1.force(ForcePlate.t)[0]+Fz2.force(ForcePlate.t)[0]+Fz3.force(ForcePlate.t)[0]+Fz4.force(ForcePlate.t)[0];
  AnyVar OnOff=iffun(gtfun(-FzTotal,50.0),1.0,0.0);


  #include "CenterOfPressureVisualization.any"


}; //plateB


AnyFolder PlateA={
  AnySeg ForcePlate={
    Mass=0.0;
    Jii={0,0,0};
    r0=..Corners.c1center.sRel;
    Axes0 = RotMat(pi,z)*RotMat(pi,x)*RotMat(0.5*pi,z);  //remark this plate is differently orientated!!!!

    AnyFloat Origins= Main.C3DFileData.Groups.FORCE_PLATFORM.ORIGIN.Data;
    AnyVar ydist=Origins[1][0]; //distance from y axis on transducer to y axis of center of plate
    AnyVar xdist=Origins[1][1];//distance from x axis on transducer to x axis of center of plate
    AnyVar zdist=Origins[1][2];//distance from z axis on transducer to z surface of plate

   AnyRefNode PlateGraphics ={
       sRel={0,0,0.05};

//       AnyDrawRefFrame drw={
//        ScaleXYZ=0.25*{1,1,1};
//        RGB=.Color;
//      };
      AnyVec3 Color=0.55*{1,1,1};
      AnyVec3 Size={vnorm(...Corners.c11.sRel-...Corners.c12.sRel,2),vnorm(...Corners.c12.sRel-...Corners.c13.sRel,2),0.1};
      AnyVar Transparency =0.4;
  #include "../../../Body/AAUHuman/Toolbox/DrawObjects/Box.any"
    };
    AnyRefNode P1={
      sRel=0.001*{.ydist,.xdist,.zdist};
      AnyDrawNode drw={ScaleXYZ = 0.02*{1,1,0.1}; RGB={1,0,0};};

    };
    AnyRefNode P2={
      sRel=0.001*{-.ydist,.xdist,.zdist};
      AnyDrawNode drw={ScaleXYZ = 0.02*{1,1,0.1}; RGB={1,0,0};};
    };
    AnyRefNode P3={
      sRel=0.001*{-.ydist,-.xdist,.zdist};
      AnyDrawNode drw={ScaleXYZ = 0.02*{1,1,0.1}; RGB={1,0,0};};
    };
    AnyRefNode P4={
      sRel=0.001*{.ydist,-.xdist,.zdist};
      AnyDrawNode drw={ScaleXYZ = 0.02*{1,1,0.1}; RGB={1,0,0};};
    };
    AnyRefNode P1P2={
      sRel=0.5*(.P1.sRel+.P2.sRel);
      AnyDrawNode drw={ScaleXYZ = 0.02*{1,1,0.1}; RGB={1,0,0};};
    };
    AnyRefNode P3P4={
      sRel=0.5*(.P3.sRel+.P4.sRel);
      AnyDrawNode drw={ScaleXYZ = 0.02*{1,1,0.1}; RGB={1,0,0};};
    };
    AnyRefNode P1P4={
      sRel=0.5*(.P1.sRel+.P4.sRel);
      AnyDrawNode drw={ScaleXYZ = 0.02*{1,1,0.1}; RGB={1,0,0};};
    };
    AnyRefNode P2P3={
      sRel=0.5*(.P2.sRel+.P3.sRel);
      AnyDrawNode drw={ScaleXYZ = 0.02*{1,1,0.1}; RGB={1,0,0};};
    };

  };

  AnyKinEqSimpleDriver ForcePlateDriver ={
    AnyKinLinear ForcePlateLin={
      AnyRefNode &ref1=...Corners.c1center;
      AnySeg &ref2=..ForcePlate;
      Ref=0;
    };
    AnyKinRotational ForcePlateRot={
      AnyRefNode &ref1=...Corners.c1center;
      AnySeg &ref2=..ForcePlate;
      Type=RotAxesAngles;
    };
    DriverPos={0,0,0,0,0,0};
    DriverVel={0,0,0,0,0,0};
    Reaction.Type = {Off,Off,Off,Off,Off,Off};
  };


  AnyReacForce PlateFootReaction={
    AnyKinLinear Lin={
      Ref=0;
      AnySeg &ref2=..ForcePlate;
      AnySeg &ref1=....HumanModel.Left.Leg.Seg.Foot;
    };
    AnyKinRotational Rot={
      AnySeg &ref2=..ForcePlate;
      AnySeg &ref1=....HumanModel.Left.Leg.Seg.Foot;
      Type=RotAxesAngles;
    };
  };


  AnyVector OffsetCorrection={-0.25,-0.38,-0.38,-0.51,-6.34,-6.37,-6.3,-6.3};


  AnyForce3D Fx1_2 ={
    AnyFunInterpol f ={
      Type=PiecewiseLinear;
      T=...Time;
      Data={Main.C3DFileData.Analog.Data.FPAFx1_2}+..OffsetCorrection[0];
    };
     // filter the data
    AnyVector FilteredForce = ..LowPassFilter(f.Data[0]);

    AnyFunInterpol force ={
      Type=PiecewiseLinear;
      T=...Time;
      Data={.FilteredForce };
    };


    AnyRefNode &ref1=.ForcePlate.P1P2;
    Flocal=.OnOff*{force(t)[0],0,0};

    #include "DrawSupport.any"

  };

  AnyForce3D Fx3_4 ={
    AnyFunInterpol f={
      Type=PiecewiseLinear;
      T=...Time;
      Data={Main.C3DFileData.Analog.Data.FPAFx3_4}+..OffsetCorrection[1];
    };
     // filter the data
    AnyVector FilteredForce = ..LowPassFilter(f.Data[0]);

    AnyFunInterpol force ={
      Type=PiecewiseLinear;
      T=...Time;
      Data={.FilteredForce };
    };


    AnyRefNode &ref1=.ForcePlate.P3P4;

    Flocal=.OnOff*{force(t)[0],0,0};

    #include "DrawSupport.any"
  };


  AnyForce3D Fy1_4 ={
    AnyFunInterpol f ={
      Type=PiecewiseLinear;
      T=...Time;
      Data={Main.C3DFileData.Analog.Data.FPAY1_4}+..OffsetCorrection[2];
    };
     // filter the data
    AnyVector FilteredForce = ..LowPassFilter(f.Data[0]);

    AnyFunInterpol force ={
      Type=PiecewiseLinear;
      T=...Time;
      Data={.FilteredForce };
    };


    AnyRefNode &ref1=.ForcePlate.P1P4;
    Flocal=.OnOff*{0,force(t)[0],0};

   #include "DrawSupport.any"

  };


  AnyForce3D Fy2_3 ={
    AnyFunInterpol f ={
      Type=PiecewiseLinear;
      T=...Time;
      Data={Main.C3DFileData.Analog.Data.FPAY2_3}+..OffsetCorrection[3];
    };
     // filter the data
    AnyVector FilteredForce = ..LowPassFilter(f.Data[0]);

    AnyFunInterpol force ={
      Type=PiecewiseLinear;
      T=...Time;
      Data={.FilteredForce };
    };


    AnyRefNode &ref1=.ForcePlate.P2P3;
    Flocal=.OnOff*{0,force(t)[0],0};

     #include "DrawSupport.any"

  };


  AnyForce3D Fz1 ={
    AnyFunInterpol f ={
      Type=PiecewiseLinear;
      T=...Time;
      Data={Main.C3DFileData.Analog.Data.FPAZ1}+..OffsetCorrection[4];
    };
     // filter the data
    AnyVector FilteredForce = ..LowPassFilter(f.Data[0]);

    AnyFunInterpol force ={
      Type=PiecewiseLinear;
      T=...Time;
      Data={.FilteredForce };
    };


    AnyRefNode &ref1=.ForcePlate.P1;
    Flocal=.OnOff*{0,0,force(t)[0]};

     #include "DrawSupport.any"

  };


  AnyForce3D Fz2 ={
    AnyFunInterpol f ={
      Type=PiecewiseLinear;
      T=...Time;
      Data={Main.C3DFileData.Analog.Data.FPAZ2}+..OffsetCorrection[5];
    };
     // filter the data
    AnyVector FilteredForce = ..LowPassFilter(f.Data[0]);

    AnyFunInterpol force ={
      Type=PiecewiseLinear;
      T=...Time;
      Data={.FilteredForce };
    };


    AnyRefNode &ref1=.ForcePlate.P2;
    Flocal=.OnOff*{0,0,force(t)[0]};

    #include "DrawSupport.any"

  };

  AnyForce3D Fz3 ={
    AnyFunInterpol f={
      Type=PiecewiseLinear;
      T=...Time;
      Data={Main.C3DFileData.Analog.Data.FPAZ3}+..OffsetCorrection[6];
    };
 // filter the data
    AnyVector FilteredForce = ..LowPassFilter(f.Data[0]);

    AnyFunInterpol force ={
      Type=PiecewiseLinear;
      T=...Time;
      Data={.FilteredForce };
    };


    AnyRefNode &ref1=.ForcePlate.P3;
    Flocal=.OnOff*{0,0,force(t)[0]};

   #include "DrawSupport.any"
  };


  AnyForce3D Fz4 ={
    AnyFunInterpol f ={
      Type=PiecewiseLinear;
      T=...Time;
      Data={Main.C3DFileData.Analog.Data.FPAZ4}+..OffsetCorrection[7];
    };
     // filter the data
    AnyVector FilteredForce = ..LowPassFilter(f.Data[0]);

    AnyFunInterpol force ={
      Type=PiecewiseLinear;
      T=...Time;
      Data={.FilteredForce };
    };


    AnyRefNode &ref1=.ForcePlate.P4;
    Flocal=.OnOff*{0,0,force(t)[0]};

     #include "DrawSupport.any"

  };
  AnyVar FzTotal=Fz1.force(ForcePlate.t)[0]+Fz2.force(ForcePlate.t)[0]+Fz3.force(ForcePlate.t)[0]+Fz4.force(ForcePlate.t)[0];
  AnyVar OnOff=iffun(gtfun(-FzTotal,15.0),1.0,0.0);


  #include "CenterOfPressureVisualization.any"
};//PlateA


AnyFolder PlateC={
  AnySeg ForcePlate={
    Mass=0.0;
    Jii={0,0,0};
    r0=..Corners.c2center.sRel;
    Axes0 = RotMat(pi,z)*RotMat(pi,x)*RotMat(0.5*pi,z);

    AnyFloat Origins= Main.C3DFileData.Groups.FORCE_PLATFORM.ORIGIN.Data;
    AnyVar ydist=Origins[2][0]; //distance from y axis on transducer to y axis of center of plate
    AnyVar xdist=Origins[2][1];//distance from x axis on transducer to x axis of center of plate
    AnyVar zdist=Origins[2][2];//distance from z axis on transducer to z surface of plate

     AnyRefNode PlateGraphics ={
         sRel={0,0,0.05};

//    AnyDrawRefFrame drw={
//        ScaleXYZ=0.25*{1,1,1};
//        RGB=.Color;
//    };
//
    AnyVec3 Color=0.65*{1,1,1};
      AnyVec3 Size={vnorm(...Corners.c21.sRel-...Corners.c22.sRel,2),vnorm(...Corners.c22.sRel-...Corners.c23.sRel,2),0.1};
      AnyVar Transparency =0.4;
  #include "../../../Body/AAUHuman/Toolbox/DrawObjects/Box.any"
    };

    AnyRefNode P1={
      sRel=0.001*{.ydist,.xdist,.zdist};
      AnyDrawNode drw={ScaleXYZ = 0.02*{1,1,0.1}; RGB={1,0,0};};
    };
    AnyRefNode P2={
      sRel=0.001*{-.ydist,.xdist,.zdist};
      AnyDrawNode drw={ScaleXYZ = 0.02*{1,1,0.1}; RGB={1,0,0};};
    };
    AnyRefNode P3={
      sRel=0.001*{-.ydist,-.xdist,.zdist};
      AnyDrawNode drw={ScaleXYZ = 0.02*{1,1,0.1}; RGB={1,0,0};};
    };
    AnyRefNode P4={
      sRel=0.001*{.ydist,-.xdist,.zdist};
      AnyDrawNode drw={ScaleXYZ = 0.02*{1,1,0.1}; RGB={1,0,0};};
    };
    AnyRefNode P1P2={
      sRel=0.5*(.P1.sRel+.P2.sRel);
      AnyDrawNode drw={ScaleXYZ = 0.02*{1,1,0.1}; RGB={1,0,0};};
    };
    AnyRefNode P3P4={
      sRel=0.5*(.P3.sRel+.P4.sRel);
      AnyDrawNode drw={ScaleXYZ = 0.02*{1,1,0.1}; RGB={1,0,0};};
    };
    AnyRefNode P1P4={
      sRel=0.5*(.P1.sRel+.P4.sRel);
      AnyDrawNode drw={ScaleXYZ = 0.02*{1,1,0.1}; RGB={1,0,0};};
    };
    AnyRefNode P2P3={
      sRel=0.5*(.P2.sRel+.P3.sRel);
      AnyDrawNode drw={ScaleXYZ = 0.02*{1,1,0.1}; RGB={1,0,0};};
    };


  };

  AnyKinEqSimpleDriver ForcePlateDriver ={
    AnyKinLinear ForcePlateLin={
      AnyRefNode &ref1=...Corners.c2center;
      AnySeg &ref2=..ForcePlate;
      Ref=0;
    };

    AnyKinRotational ForcePlateRot={
      AnyRefNode &ref1=...Corners.c2center;
      AnySeg &ref2=..ForcePlate;
      Type=RotAxesAngles;
    };
    DriverPos={0,0,0,0,0,0};
    DriverVel={0,0,0,0,0,0};
    Reaction.Type = {Off,Off,Off,Off,Off,Off};
  };


  AnyReacForce PlateFootReaction={

    AnyKinLinear Lin={
      Ref=0;
      AnySeg &ref2=..ForcePlate;
      AnySeg &ref1=....HumanModel.Left.Leg.Seg.Foot;
    };

    AnyKinRotational Rot={
      AnySeg &ref2=..ForcePlate;
      AnySeg &ref1=....HumanModel.Left.Leg.Seg.Foot;
      Type=RotAxesAngles;
    };
  };

  AnyVector OffsetCorrection={-0.5,-0.75,0.128,-2,-1.2,-1.2,13,-5};


  AnyForce3D Fx1_2 ={

    AnyFunInterpol f ={
      Type=PiecewiseLinear;
      T=...Time;
      Data={Main.C3DFileData.Analog.Data.FPCFx1_2}+..OffsetCorrection[0];
    };
     // filter the data
    AnyVector FilteredForce = ..LowPassFilter(f.Data[0]);

    AnyFunInterpol force ={
      Type=PiecewiseLinear;
      T=...Time;
      Data={.FilteredForce };
    };


    AnyRefNode &ref1=.ForcePlate.P1P2;
    Flocal=.OnOff*{force(t)[0],0,0};
    #include "DrawSupport.any"
  };

  AnyForce3D Fx3_4 ={
    AnyFunInterpol f ={
      Type=PiecewiseLinear;
      T=...Time;
      Data={Main.C3DFileData.Analog.Data.FPCFx3_4}+..OffsetCorrection[1];
    };
     // filter the data
    AnyVector FilteredForce = ..LowPassFilter(f.Data[0]);

    AnyFunInterpol force ={
      Type=PiecewiseLinear;
      T=...Time;
      Data={.FilteredForce };
    };


    AnyRefNode &ref1=.ForcePlate.P3P4;

    Flocal=.OnOff*{force(t)[0],0,0};

 #include "DrawSupport.any"

  };


  AnyForce3D Fy1_4 ={
    AnyFunInterpol f ={
      Type=PiecewiseLinear;
      T=...Time;
      Data={Main.C3DFileData.Analog.Data.FPCY1_4}+..OffsetCorrection[2];
    };
     // filter the data
    AnyVector FilteredForce = ..LowPassFilter(f.Data[0]);

    AnyFunInterpol force ={
      Type=PiecewiseLinear;
      T=...Time;
      Data={.FilteredForce };
    };


    AnyRefNode &ref1=.ForcePlate.P1P4;
    Flocal=.OnOff*{0,force(t)[0],0};

    #include "DrawSupport.any"
  };


  AnyForce3D Fy2_3 ={
    AnyFunInterpol f ={
      Type=PiecewiseLinear;
      T=...Time;
      Data={Main.C3DFileData.Analog.Data.FPCY2_3}+..OffsetCorrection[3];
    };
     // filter the data
    AnyVector FilteredForce = ..LowPassFilter(f.Data[0]);

    AnyFunInterpol force ={
      Type=PiecewiseLinear;
      T=...Time;
      Data={.FilteredForce };
    };


    AnyRefNode &ref1=.ForcePlate.P2P3;
    Flocal=.OnOff*{0,force(t)[0],0};

    #include "DrawSupport.any"
  };


  AnyForce3D Fz1 ={
    AnyFunInterpol f ={
      Type=PiecewiseLinear;
      T=...Time;
      Data={Main.C3DFileData.Analog.Data.FPCZ1}+..OffsetCorrection[4];
    };
     // filter the data
    AnyVector FilteredForce = ..LowPassFilter(f.Data[0]);

    AnyFunInterpol force ={
      Type=PiecewiseLinear;
      T=...Time;
      Data={.FilteredForce };
    };


    AnyRefNode &ref1=.ForcePlate.P1;
    Flocal=.OnOff*{0,0,force(t)[0]};

    #include "DrawSupport.any"
  };


  AnyForce3D Fz2 ={
    AnyFunInterpol f ={
      Type=PiecewiseLinear;
      T=...Time;
      Data={Main.C3DFileData.Analog.Data.FPCZ2}+..OffsetCorrection[5];
    };
     // filter the data
    AnyVector FilteredForce = ..LowPassFilter(f.Data[0]);

    AnyFunInterpol force ={
      Type=PiecewiseLinear;
      T=...Time;
      Data={.FilteredForce };
    };


    AnyRefNode &ref1=.ForcePlate.P2;
    Flocal=.OnOff*{0,0,force(t)[0]};

    #include "DrawSupport.any"
  };

  AnyForce3D Fz3 ={
    AnyFunInterpol f={
      Type=PiecewiseLinear;
      T=...Time;
      Data={Main.C3DFileData.Analog.Data.FPCZ3}+..OffsetCorrection[6];
    };
     // filter the data
    AnyVector FilteredForce = ..LowPassFilter(f.Data[0]);

    AnyFunInterpol force ={
      Type=PiecewiseLinear;
      T=...Time;
      Data={.FilteredForce };
    };


    AnyRefNode &ref1=.ForcePlate.P3;
    Flocal=.OnOff*{0,0,force(t)[0]};

    #include "DrawSupport.any"
  };


  AnyForce3D Fz4 ={
    AnyFunInterpol f ={
      Type=PiecewiseLinear;
      T=...Time;
      Data={Main.C3DFileData.Analog.Data.FPCZ4}+..OffsetCorrection[7];
    };
     // filter the data
    AnyVector FilteredForce = ..LowPassFilter(f.Data[0]);

    AnyFunInterpol force ={
      Type=PiecewiseLinear;
      T=...Time;
      Data={.FilteredForce };
    };


    AnyRefNode &ref1=.ForcePlate.P4;
    Flocal=.OnOff*{0,0,force(t)[0]};

    #include "DrawSupport.any"
  };
  AnyVar FzTotal=Fz1.force(ForcePlate.t)[0]+Fz2.force(ForcePlate.t)[0]+Fz3.force(ForcePlate.t)[0]+Fz4.force(ForcePlate.t)[0];
  AnyVar OnOff=iffun(gtfun(-FzTotal,15.0),1.0,0.0);


  #include "CenterOfPressureVisualization.any"
};//PlateC


AnyFolder PlateD={
  AnySeg ForcePlate={
    Mass=0.0;
    Jii={0,0,0};
    r0=..Corners.c3center.sRel;
    Axes0 = RotMat(pi,z)*RotMat(pi,x)*RotMat(-0.5*pi,z);

    AnyFloat Origins= Main.C3DFileData.Groups.FORCE_PLATFORM.ORIGIN.Data;
    AnyVar ydist=Origins[3][0]; //distance from y axis on transducer to y axis of center of plate
    AnyVar xdist=Origins[3][1];//distance from x axis on transducer to x axis of center of plate
    AnyVar zdist=Origins[3][2];//distance from z axis on transducer to z surface of plate

    AnyRefNode PlateGraphics ={
  sRel={0,0,0.05};

//      AnyDrawRefFrame drw={
//        ScaleXYZ=0.25*{1,1,1};
//        RGB=.Color;
//      };
 AnyVec3 Color=0.75*{1,1,1};
      AnyVec3 Size={vnorm(...Corners.c31.sRel-...Corners.c32.sRel,2),vnorm(...Corners.c32.sRel-...Corners.c33.sRel,2),0.1};
      AnyVar Transparency =0.4;
  #include "../../../Body/AAUHuman/Toolbox/DrawObjects/Box.any"
    };

    AnyRefNode P1={
      sRel=0.001*{.ydist,.xdist,.zdist};
      AnyDrawNode drw={ScaleXYZ = 0.02*{1,1,0.1}; RGB={1,0,0};};
    };
      AnyRefNode P2={
        sRel=0.001*{-.ydist,.xdist,.zdist};

        AnyDrawNode drw={ScaleXYZ = 0.02*{1,1,0.1}; RGB={1,0,0};};
      };
      AnyRefNode P3={
        sRel=0.001*{-.ydist,-.xdist,.zdist};
        AnyDrawNode drw={ScaleXYZ = 0.02*{1,1,0.1}; RGB={1,0,0};};
      };
      AnyRefNode P4={
        sRel=0.001*{.ydist,-.xdist,.zdist};
        AnyDrawNode drw={ScaleXYZ = 0.02*{1,1,0.1}; RGB={1,0,0};};
      };
      AnyRefNode P1P2={
        sRel=0.5*(.P1.sRel+.P2.sRel);
        AnyDrawNode drw={ScaleXYZ = 0.02*{1,1,0.1}; RGB={1,0,0};};
    };
    AnyRefNode P3P4={
      sRel=0.5*(.P3.sRel+.P4.sRel);
      AnyDrawNode drw={ScaleXYZ = 0.02*{1,1,0.1}; RGB={1,0,0};};
    };
    AnyRefNode P1P4={
      sRel=0.5*(.P1.sRel+.P4.sRel);
      AnyDrawNode drw={ScaleXYZ = 0.02*{1,1,0.1}; RGB={1,0,0};};
    };
    AnyRefNode P2P3={
      sRel=0.5*(.P2.sRel+.P3.sRel);
      AnyDrawNode drw={ScaleXYZ = 0.02*{1,1,0.1}; RGB={1,0,0};};
    };

  };

  AnyKinEqSimpleDriver ForcePlateDriver ={
    AnyKinLinear ForcePlateLin={
      AnyRefNode &ref1=...Corners.c3center;
      AnySeg &ref2=..ForcePlate;
      Ref=0;
    };

    AnyKinRotational ForcePlateRot={
      AnyRefNode &ref1=...Corners.c3center;
      AnySeg &ref2=..ForcePlate;
      Type=RotAxesAngles;
    };
    DriverPos={0,0,0,0,0,0};
    DriverVel={0,0,0,0,0,0};
    Reaction.Type = {Off,Off,Off,Off,Off,Off};
  };


  AnyReacForce PlateFootReaction={

    AnyKinLinear Lin={
      Ref=0;
      AnySeg &ref2=..ForcePlate;
      AnySeg &ref1=....HumanModel.Right.Leg.Seg.Foot;
    };

    AnyKinRotational Rot={
      AnySeg &ref2=..ForcePlate;
      AnySeg &ref1=....HumanModel.Right.Leg.Seg.Foot;
      Type=RotAxesAngles;
    };
  };

  AnyVector OffsetCorrection={0,-0.3,-0.7,-0.4,-5,-5,-9,-5};

  AnyForce3D Fx1_2 ={

    AnyFunInterpol f ={
      Type=PiecewiseLinear;
      T=...Time;
      Data={Main.C3DFileData.Analog.Data.FPDFx1_2}+..OffsetCorrection[0];
    };
    // filter the data
    AnyVector FilteredForce = ..LowPassFilter(f.Data[0]);

    AnyFunInterpol force ={
      Type=PiecewiseLinear;
      T=...Time;
      Data={.FilteredForce };
    };


    AnyRefNode &ref1=.ForcePlate.P1P2;
    Flocal=.OnOff*{force(t)[0],0,0};

  #include "DrawSupport.any"

  };

  AnyForce3D Fx3_4 ={
    AnyFunInterpol f ={
      Type=PiecewiseLinear;
      T=...Time;
      Data={Main.C3DFileData.Analog.Data.FPDFx3_4}+..OffsetCorrection[1] ;
    };
     // filter the data
    AnyVector FilteredForce = ..LowPassFilter(f.Data[0]);

    AnyFunInterpol force ={
      Type=PiecewiseLinear;
      T=...Time;
      Data={.FilteredForce };
    };


    AnyRefNode &ref1=.ForcePlate.P3P4;

    Flocal=.OnOff*{force(t)[0],0,0};

    #include "DrawSupport.any"
  };


  AnyForce3D Fy1_4 ={
    AnyFunInterpol f ={
      Type=PiecewiseLinear;
      T=...Time;
      Data={Main.C3DFileData.Analog.Data.FPDY1_4}+..OffsetCorrection[2] ;
    };
     // filter the data
    AnyVector FilteredForce = ..LowPassFilter(f.Data[0]);

    AnyFunInterpol force ={
      Type=PiecewiseLinear;
      T=...Time;
      Data={.FilteredForce };
    };


    AnyRefNode &ref1=.ForcePlate.P1P4;
    Flocal=.OnOff*{0,force(t)[0],0};

    #include "DrawSupport.any"
  };


  AnyForce3D Fy2_3 ={
    AnyFunInterpol f ={
      Type=PiecewiseLinear;
      T=...Time;
      Data={Main.C3DFileData.Analog.Data.FPDY2_3}+..OffsetCorrection[3] ;
    };
     // filter the data
    AnyVector FilteredForce = ..LowPassFilter(f.Data[0]);

    AnyFunInterpol force ={
      Type=PiecewiseLinear;
      T=...Time;
      Data={.FilteredForce };
    };


    AnyRefNode &ref1=.ForcePlate.P2P3;
    Flocal=.OnOff*{0,force(t)[0],0};

    #include "DrawSupport.any"
  };


  AnyForce3D Fz1 ={
    AnyFunInterpol f ={
      Type=PiecewiseLinear;
      T=...Time;
      Data={Main.C3DFileData.Analog.Data.FPDZ1}+..OffsetCorrection[4] ;
    };
     // filter the data
    AnyVector FilteredForce = ..LowPassFilter(f.Data[0]);

    AnyFunInterpol force ={
      Type=PiecewiseLinear;
      T=...Time;
      Data={.FilteredForce };
    };


    AnyRefNode &ref1=.ForcePlate.P1;
    Flocal=.OnOff*{0,0,force(t)[0]};

    #include "DrawSupport.any"
  };


  AnyForce3D Fz2 ={
    AnyFunInterpol f ={
      Type=PiecewiseLinear;
      T=...Time;
      Data={Main.C3DFileData.Analog.Data.FPDZ2}+..OffsetCorrection[5];
    };
     // filter the data
    AnyVector FilteredForce = ..LowPassFilter(f.Data[0]);

    AnyFunInterpol force ={
      Type=PiecewiseLinear;
      T=...Time;
      Data={.FilteredForce };
    };


    AnyRefNode &ref1=.ForcePlate.P2;
    Flocal=.OnOff*{0,0,force(t)[0]};

    #include "DrawSupport.any"
  };

  AnyForce3D Fz3 ={
    AnyFunInterpol f ={
      Type=PiecewiseLinear;
      T=...Time;
      Data={Main.C3DFileData.Analog.Data.FPDZ3}+..OffsetCorrection[6] ;
    };
     // filter the data
    AnyVector FilteredForce = ..LowPassFilter(f.Data[0]);

    AnyFunInterpol force ={
      Type=PiecewiseLinear;
      T=...Time;
      Data={.FilteredForce };
    };


    AnyRefNode &ref1=.ForcePlate.P3;
    Flocal=.OnOff*{0,0,force(t)[0]};

   #include "DrawSupport.any"
  };


  AnyForce3D Fz4 ={
    AnyFunInterpol f={
      Type=PiecewiseLinear;
      T=...Time;
      Data={Main.C3DFileData.Analog.Data.FPDZ4}+..OffsetCorrection[7];
    };
     // filter the data
    AnyVector FilteredForce = ..LowPassFilter(f.Data[0]);

    AnyFunInterpol force ={
      Type=PiecewiseLinear;
      T=...Time;
      Data={.FilteredForce };
    };


    AnyRefNode &ref1=.ForcePlate.P4;
    Flocal=.OnOff*{0,0,force(t)[0]};

    #include "DrawSupport.any"
  };
  AnyVar FzTotal=Fz1.force(ForcePlate.t)[0]+Fz2.force(ForcePlate.t)[0]+Fz3.force(ForcePlate.t)[0]+Fz4.force(ForcePlate.t)[0];
  AnyVar OnOff=iffun(gtfun(-FzTotal,15.0),1.0,0.0);

  #include "CenterOfPressureVisualization.any"

};//PlateD


//
//AnyFixedRefFrame Corners={
//  Axes=....Orientation;
//
//  AnyFloat corners=Main.C3DFileData.Groups.FORCE_PLATFORM.CORNERS.Data;
//
//  AnyRefNode c01={
//    AnyInt i=0;
//    AnyInt plnr=0;
//    sRel=0.001*{.corners[plnr][i][0],.corners[plnr][i][1],.corners[plnr][i][2]};
//    //AnyDrawRefFrame drw={ScaleXYZ=0.0001*{1,1,1};RGB={1,0,0};};
//  };
//  AnyRefNode c02={
//    AnyInt i=1;
//    AnyInt plnr=0;
//    sRel=0.001*{.corners[plnr][i][0],.corners[plnr][i][1],.corners[plnr][i][2]};
//    //AnyDrawRefFrame drw={ScaleXYZ=0.1*{1,1,1};RGB={1,0,0};};
//  };
//  AnyRefNode c03={
//    AnyInt i=2;
//    AnyInt plnr=0;
//    sRel=0.001*{.corners[plnr][i][0],.corners[plnr][i][1],.corners[plnr][i][2]};
//    //AnyDrawRefFrame drw={ScaleXYZ=0.1*{1,1,1};RGB={1,0,0};};
//  };
//
//  AnyRefNode c04={
//    AnyInt i=3;
//    AnyInt plnr=0;
//    sRel=0.001*{.corners[plnr][i][0],.corners[plnr][i][1],.corners[plnr][i][2]};
//    //AnyDrawRefFrame drw={ScaleXYZ=0.1*{1,1,1};RGB={1,0,0};};
//  };
//
//  //plate B
//  AnyRefNode c0center={
//    sRel=0.25*(.c01.sRel+.c02.sRel+.c03.sRel+.c04.sRel);
//    ARel=RotMat(pi,x)*RotMat(-0.5*pi,z);
//    //AnyDrawRefFrame drw={ScaleXYZ=0.3*{1,1,1};RGB={0,1,0};};
//
//  };
//
//
//  AnyRefNode c11={
//    AnyInt i=0;
//    AnyInt plnr=1;
//    sRel=0.001*{.corners[plnr][i][0],.corners[plnr][i][1],.corners[plnr][i][2]};
//    //AnyDrawRefFrame drw={ScaleXYZ=0.1*{1,1,1};RGB={0,1,0};};
//  };
//  AnyRefNode c12={
//    AnyInt i=1;
//    AnyInt plnr=1;
//    sRel=0.001*{.corners[plnr][i][0],.corners[plnr][i][1],.corners[plnr][i][2]};
////    AnyDrawRefFrame drw={ScaleXYZ=0.1*{1,1,1};RGB={0,1,0};};
//  };
//  AnyRefNode c13={
//    AnyInt i=2;
//    AnyInt plnr=1;
//    sRel=0.001*{.corners[plnr][i][0],.corners[plnr][i][1],.corners[plnr][i][2]};
////    AnyDrawRefFrame drw={ScaleXYZ=0.1*{1,1,1};RGB={0,1,0};};
//  };
//
//  AnyRefNode c14={
//    AnyInt i=3;
//    AnyInt plnr=1;
//    sRel=0.001*{.corners[plnr][i][0],.corners[plnr][i][1],.corners[plnr][i][2]};
////    AnyDrawRefFrame drw={ScaleXYZ=0.1*{1,1,1};RGB={0,1,0};};
//  };
//
//  //Plate A
//  AnyRefNode c1center={
//    sRel=0.25*(.c11.sRel+.c12.sRel+.c13.sRel+.c14.sRel);
//    ARel=RotMat(pi,x)*RotMat(0.5*pi,z); //this one is orientated differently
////   AnyDrawRefFrame drw={ScaleXYZ=0.3*{1,1,1};RGB={0,1,0};};
//    };
//
//
//
//  AnyRefNode c21={
//    AnyInt i=0;
//    AnyInt plnr=2;
//    sRel=0.001*{.corners[plnr][i][0],.corners[plnr][i][1],.corners[plnr][i][2]};
////      AnyDrawRefFrame drw={ScaleXYZ=0.1*{1,1,1};RGB={0,0,1};};
//  };
//  AnyRefNode c22={
//    AnyInt i=1;
//    AnyInt plnr=2;
//    sRel=0.001*{.corners[plnr][i][0],.corners[plnr][i][1],.corners[plnr][i][2]};
////    AnyDrawRefFrame drw={ScaleXYZ=0.1*{1,1,1};RGB={0,0,1};};
//  };
//  AnyRefNode c23={
//    AnyInt i=2;
//    AnyInt plnr=2;
//    sRel=0.001*{.corners[plnr][i][0],.corners[plnr][i][1],.corners[plnr][i][2]};
////    AnyDrawRefFrame drw={ScaleXYZ=0.1*{1,1,1};RGB={0,0,1};};
//  };
//
//  AnyRefNode c24={
//    AnyInt i=3;
//    AnyInt plnr=2;
//    sRel=0.001*{.corners[plnr][i][0],.corners[plnr][i][1],.corners[plnr][i][2]};
////    AnyDrawRefFrame drw={ScaleXYZ=0.1*{1,1,1};RGB={0,0,1};};
//   };
//  //plate C
//  AnyRefNode c2center={
//    sRel=0.25*(.c21.sRel+.c22.sRel+.c23.sRel+.c24.sRel);
//    ARel=RotMat(pi,x)*RotMat(0.5*pi,z);  //orienatated differently
////      AnyDrawRefFrame drw={ScaleXYZ=0.3*{1,1,1};RGB={0,0,1};};
//    };
//
//
//
//  AnyRefNode c31={
//    AnyInt i=0;
//    AnyInt plnr=3;
//    sRel=0.001*{.corners[plnr][i][0],.corners[plnr][i][1],.corners[plnr][i][2]};
////    AnyDrawRefFrame drw={ScaleXYZ=0.1*{1,1,1};RGB={1,0,1};};
//  };
//
//  AnyRefNode c32={
//    AnyInt i=1;
//    AnyInt plnr=3;
//    sRel=0.001*{.corners[plnr][i][0],.corners[plnr][i][1],.corners[plnr][i][2]};
////    AnyDrawRefFrame drw={ScaleXYZ=0.1*{1,1,1};RGB={1,0,1};};
//  };
//
//  AnyRefNode c33={
//    AnyInt i=2;
//    AnyInt plnr=3;
//    sRel=0.001*{.corners[plnr][i][0],.corners[plnr][i][1],.corners[plnr][i][2]};
////    AnyDrawRefFrame drw={ScaleXYZ=0.1*{1,1,1};RGB={1,0,1};};
//  };
//
//  AnyRefNode c34={
//    AnyInt i=3;
//    AnyInt plnr=3;
//    sRel=0.001*{.corners[plnr][i][0],.corners[plnr][i][1],.corners[plnr][i][2]};
////    AnyDrawRefFrame drw={ScaleXYZ=0.1*{1,1,1};RGB={1,0,1};};
//  };
//  //plate D
//  AnyRefNode c3center={
//    sRel=0.25*(.c31.sRel+.c32.sRel+.c33.sRel+.c34.sRel);
//    ARel=RotMat(pi,x)*RotMat(-0.5*pi,z);
////    AnyDrawRefFrame drw={ScaleXYZ=0.3*{1,1,1};RGB={1,0,1};};
//
//  };
//};
////setup time array for analog data
//
////  StartFrame*1/(Main.C3DFileData.Header.VideoFrameRate).
////Og herefter follows all samples with  a frquency on
////Main.C3DFileData.Header.VideoFrameRate*
////Main.C3DFileData.Header.NoAnalogSamplesPer3DFrame
////So:
////analog sample 1: StartFrame*1/(Main.C3DFileData.Header.VideoFrameRate).
////Analog sample 2: StartFrame*1/(Main.C3DFileData.Header.VideoFrameRate) +
////1/(Main.C3DFileData.Header.VideoFrameRate*
////Main.C3DFileData.Header.NoAnalogSamplesPer3DFrame)
////and so on.
//AnyInt   StartFrame = Main.C3DFileData.Header.FirstFrameNo;
//AnyInt   EndFrame =Main.C3DFileData.Header.FirstFrameNo-1+(Main.C3DFileData.Header.LastFrameNo-Main.C3DFileData.Header.FirstFrameNo)* Main.C3DFileData.Header.NoAnalogSamplesPer3DFrame;
//AnyFloat Time=((StartFrame*Main.C3DFileData.Header.NoAnalogSamplesPer3DFrame)+iarr(0,EndFrame-StartFrame))*(1/(Main.C3DFileData.Header.VideoFrameRate*Main.C3DFileData.Header.NoAnalogSamplesPer3DFrame));
//
//
//
//
//
//AnyFolder PlateB={
//  AnySeg ForcePlate={
//    Mass=0.0;
//    Jii={0,0,0};
//    r0=..Corners.c0center.sRel;
//    Axes0 =RotMat(pi,z)*RotMat(pi,x)*RotMat(-0.5*pi,z);
//
//
//    AnyRefNode PlateGraphics ={
//      sRel={0,0,0.05};
//      AnyDrawRefFrame drw={
//        ScaleXYZ=0.25*{1,1,1};
//        RGB=.Color;
//      };
//      AnyVec3 Color=0.45*{1,1,1};
//      AnyVec3 Size={vnorm(...Corners.c01.sRel-...Corners.c02.sRel,2),vnorm(...Corners.c02.sRel-...Corners.c03.sRel,2),0.1};
//      AnyVar Transparency =0.4;
//      #include "../../Body/AAUHuman/Toolbox/DrawObjects/Box.any"
//    };
//
//    AnyFloat Origins= Main.C3DFileData.Groups.FORCE_PLATFORM.ORIGIN.Data;
//    AnyVar ydist=Origins[0][0]; //distance from y axis on transducer to y axis of center of plate
//    AnyVar xdist=Origins[0][1];//distance from x axis on transducer to x axis of center of plate
//    AnyVar zdist=Origins[0][2];//distance from z axis on transducer to z surface of plate
//
//    AnyRefNode P1={
//      sRel=0.001*{.ydist,.xdist,.zdist};
//     AnyDrawNode drw={ScaleXYZ = 0.02*{1,1,0.1}; RGB={1,0,0};};
//    };
//    AnyRefNode P2={
//      sRel=0.001*{-.ydist,.xdist,.zdist};
//      AnyDrawNode drw={ScaleXYZ = 0.02*{1,1,0.1}; RGB={1,0,0};};
//    };
//    AnyRefNode P3={
//      sRel=0.001*{-.ydist,-.xdist,.zdist};
//      AnyDrawNode drw={ScaleXYZ = 0.02*{1,1,0.1}; RGB={1,0,0};};
//    };
//    AnyRefNode P4={
//      sRel=0.001*{.ydist,-.xdist,.zdist};
//      AnyDrawNode drw={ScaleXYZ = 0.02*{1,1,0.1}; RGB={1,0,0};};
//    };
//    AnyRefNode P1P2={
//      sRel=0.5*(.P1.sRel+.P2.sRel);
//      AnyDrawNode drw={ScaleXYZ = 0.02*{1,1,0.1}; RGB={1,0,0};};
//    };
//    AnyRefNode P3P4={
//      sRel=0.5*(.P3.sRel+.P4.sRel);
//      AnyDrawNode drw={ScaleXYZ = 0.02*{1,1,0.1}; RGB={1,0,0};};
//    };
//    AnyRefNode P1P4={
//      sRel=0.5*(.P1.sRel+.P4.sRel);
//      AnyDrawNode drw={ScaleXYZ = 0.02*{1,1,0.1}; RGB={1,0,0};};
//    };
//    AnyRefNode P2P3={
//      sRel=0.5*(.P2.sRel+.P3.sRel);
//      AnyDrawNode drw={ScaleXYZ = 0.02*{1,1,0.1}; RGB={1,0,0};};
//    };
//
//
//
//  };
//
//  AnyKinEqSimpleDriver ForcePlateDriver ={
//    AnyKinLinear ForcePlateLin={
//      AnyRefNode &ref1=...Corners.c0center;
//      AnySeg &ref2=..ForcePlate;
//      Ref=0;
//    };
//
//    AnyKinRotational ForcePlateRot={
//      AnyRefNode &ref1=...Corners.c0center;
//      AnySeg &ref2=..ForcePlate;
//      Type=RotAxesAngles;
//    };
//    DriverPos={0,0,0,0,0,0};
//    DriverVel={0,0,0,0,0,0};
//    Reaction.Type = {Off,Off,Off,Off,Off,Off};
//  };
//
//
//  AnyReacForce PlateFootReaction={
//
//    AnyKinLinear Lin={
//      Ref=0;
//
//      AnySeg &ref2=..ForcePlate;
//      AnySeg &ref1=....HumanModel.Right.Leg.Seg.Foot;
//    };
//
//    AnyKinRotational Rot={
//      AnySeg &ref2=..ForcePlate;
//      AnySeg &ref1=....HumanModel.Right.Leg.Seg.Foot;
//      Type=RotAxesAngles;
//    };
//  };
//
//  //This particular data set has a problem with force offsets in the analog data there is a correction vector for each of the four plates
//  AnyVector OffsetCorrection={2.4,-6.2,-6.2,-6.8,-25,-25,-25,-27};
//
//
//  AnyForce3D Fx1_2 ={
//
//    AnyFunInterpol force ={
//     Type=Bspline; BsplineOrder =8;
//      T=...Time;
//      Data={Main.C3DFileData.Analog.Data.FPBFx1_2}+..OffsetCorrection[0] ;
//    };
//
//    AnyRefNode &ref1=.ForcePlate.P1P2;
//    Flocal=.OnOff*{force(t)[0],0,0};
//
//    AnyDrawVector DrawSupport2 = {
//      AnyRefFrame &ref = .ref1;
//      Vec = 0.0005*.Flocal*.ref1.Axes';
//      PointAway = Off;
//      DrawCoord = Off;
//      Line.RGB = {0,0,1};
//      Line.Thickness =0.0075;
//      Line.End.Thickness = 2*0.0075;
//      Line.End.Length = 4*0.0075;
//    };
//
//  };
//
//  AnyForce3D Fx3_4 ={
//    AnyFunInterpol force ={
//     Type=Bspline; BsplineOrder =8;
//      T=...Time;
//      Data={Main.C3DFileData.Analog.Data.FPBFx3_4}+..OffsetCorrection[1] ;
//    };
//    AnyRefNode &ref1=.ForcePlate.P3P4;
//
//    Flocal=.OnOff*{force(t)[0],0,0};
//
//     #include "DrawSupport.any"
//  };
//
//
//  AnyForce3D Fy1_4 ={
//    AnyFunInterpol force ={
//     Type=Bspline; BsplineOrder =8;
//      T=...Time;
//      Data={Main.C3DFileData.Analog.Data.FPBFy1_4}+..OffsetCorrection[2] ;
//    };
//    AnyRefNode &ref1=.ForcePlate.P1P4;
//    Flocal=.OnOff*{0,force(t)[0],0};
//
//     #include "DrawSupport.any"
//  };
//
//
//
//
//  AnyForce3D Fy2_3 ={
//    AnyFunInterpol force ={
//     Type=Bspline; BsplineOrder =8;
//      T=...Time;
//      Data={Main.C3DFileData.Analog.Data.FPBFy2_3}+..OffsetCorrection[3] ;
//    };
//    AnyRefNode &ref1=.ForcePlate.P2P3;
//    Flocal=.OnOff*{0,force(t)[0],0};
//
//    #include "DrawSupport.any"
//};
//
//
//
//  AnyForce3D Fz1 ={
//    AnyFunInterpol force ={
//     Type=Bspline; BsplineOrder =8;
//      T=...Time;
//      Data={Main.C3DFileData.Analog.Data.FPBFz1}+..OffsetCorrection[4] ;
//    };
//    AnyRefNode &ref1=.ForcePlate.P1;
//    Flocal=.OnOff*{0,0,force(t)[0]};
//
//    #include "DrawSupport.any"
//  };
//
//
//
//  AnyForce3D Fz2 ={
//    AnyFunInterpol force ={
//     Type=Bspline; BsplineOrder =8;
//      T=...Time;
//      Data={Main.C3DFileData.Analog.Data.FPBFz2}+..OffsetCorrection[5] ;
//    };
//    AnyRefNode &ref1=.ForcePlate.P2;
//    Flocal=.OnOff*{0,0,force(t)[0]};
//    #include "DrawSupport.any"
//  };
//
//  AnyForce3D Fz3 ={
//    AnyFunInterpol force ={
//     Type=Bspline; BsplineOrder =8;
//      T=...Time;
//      Data={Main.C3DFileData.Analog.Data.FPBFz3}+..OffsetCorrection[6] ;
//    };
//    AnyRefNode &ref1=.ForcePlate.P3;
//    Flocal=.OnOff*{0,0,force(t)[0]};
//
//    #include "DrawSupport.any"
//  };
//
//
//  AnyForce3D Fz4 ={
//    AnyFunInterpol force ={
//     Type=Bspline; BsplineOrder =8;
//      T=...Time;
//      Data={Main.C3DFileData.Analog.Data.FPBFz4}+..OffsetCorrection[7] ;
//    };
//    AnyRefNode &ref1=.ForcePlate.P4;
//    Flocal=.OnOff*{0,0,force(t)[0]};
//
//    #include "DrawSupport.any"
//  };
//
//  AnyVar FzTotal=Fz1.force(ForcePlate.t)[0]+Fz2.force(ForcePlate.t)[0]+Fz3.force(ForcePlate.t)[0]+Fz4.force(ForcePlate.t)[0];
//  AnyVar OnOff=iffun(gtfun(-FzTotal,20.0),1.0,0.0);
//
//
//  #include "CenterOfPressureVisualization.any"
//
//
//
//
//}; //plateB
//
//
//
//AnyFolder PlateA={
//  AnySeg ForcePlate={
//    Mass=0.0;
//    Jii={0,0,0};
//    r0=..Corners.c1center.sRel;
//    Axes0 = RotMat(pi,z)*RotMat(pi,x)*RotMat(0.5*pi,z);  //remark this plate is differently orientated!!!!
//
//    AnyFloat Origins= Main.C3DFileData.Groups.FORCE_PLATFORM.ORIGIN.Data;
//    AnyVar ydist=Origins[1][0]; //distance from y axis on transducer to y axis of center of plate
//    AnyVar xdist=Origins[1][1];//distance from x axis on transducer to x axis of center of plate
//    AnyVar zdist=Origins[1][2];//distance from z axis on transducer to z surface of plate
//
//   AnyRefNode PlateGraphics ={
//       sRel={0,0,0.05};
//
//       AnyDrawRefFrame drw={
//        ScaleXYZ=0.25*{1,1,1};
//        RGB=.Color;
//      };
//      AnyVec3 Color=0.55*{1,1,1};
//      AnyVec3 Size={vnorm(...Corners.c11.sRel-...Corners.c12.sRel,2),vnorm(...Corners.c12.sRel-...Corners.c13.sRel,2),0.1};
//      AnyVar Transparency =0.4;
//      #include "../../Body/AAUHuman/Toolbox/DrawObjects/Box.any"
//    };
//    AnyRefNode P1={
//      sRel=0.001*{.ydist,.xdist,.zdist};
//      AnyDrawNode drw={ScaleXYZ = 0.02*{1,1,0.1}; RGB={1,0,0};};
//
//    };
//    AnyRefNode P2={
//      sRel=0.001*{-.ydist,.xdist,.zdist};
//      AnyDrawNode drw={ScaleXYZ = 0.02*{1,1,0.1}; RGB={1,0,0};};
//    };
//    AnyRefNode P3={
//      sRel=0.001*{-.ydist,-.xdist,.zdist};
//      AnyDrawNode drw={ScaleXYZ = 0.02*{1,1,0.1}; RGB={1,0,0};};
//    };
//    AnyRefNode P4={
//      sRel=0.001*{.ydist,-.xdist,.zdist};
//      AnyDrawNode drw={ScaleXYZ = 0.02*{1,1,0.1}; RGB={1,0,0};};
//    };
//    AnyRefNode P1P2={
//      sRel=0.5*(.P1.sRel+.P2.sRel);
//      AnyDrawNode drw={ScaleXYZ = 0.02*{1,1,0.1}; RGB={1,0,0};};
//    };
//    AnyRefNode P3P4={
//      sRel=0.5*(.P3.sRel+.P4.sRel);
//      AnyDrawNode drw={ScaleXYZ = 0.02*{1,1,0.1}; RGB={1,0,0};};
//    };
//    AnyRefNode P1P4={
//      sRel=0.5*(.P1.sRel+.P4.sRel);
//      AnyDrawNode drw={ScaleXYZ = 0.02*{1,1,0.1}; RGB={1,0,0};};
//    };
//    AnyRefNode P2P3={
//      sRel=0.5*(.P2.sRel+.P3.sRel);
//      AnyDrawNode drw={ScaleXYZ = 0.02*{1,1,0.1}; RGB={1,0,0};};
//    };
//
//  };
//
//  AnyKinEqSimpleDriver ForcePlateDriver ={
//    AnyKinLinear ForcePlateLin={
//      AnyRefNode &ref1=...Corners.c1center;
//      AnySeg &ref2=..ForcePlate;
//      Ref=0;
//    };
//    AnyKinRotational ForcePlateRot={
//      AnyRefNode &ref1=...Corners.c1center;
//      AnySeg &ref2=..ForcePlate;
//      Type=RotAxesAngles;
//    };
//    DriverPos={0,0,0,0,0,0};
//    DriverVel={0,0,0,0,0,0};
//    Reaction.Type = {Off,Off,Off,Off,Off,Off};
//  };
//
//
//  AnyReacForce PlateFootReaction={
//    AnyKinLinear Lin={
//      Ref=0;
//      AnySeg &ref2=..ForcePlate;
//      AnySeg &ref1=....HumanModel.Left.Leg.Seg.Foot;
//    };
//    AnyKinRotational Rot={
//      AnySeg &ref2=..ForcePlate;
//      AnySeg &ref1=....HumanModel.Left.Leg.Seg.Foot;
//      Type=RotAxesAngles;
//    };
//  };
//
//
//  AnyVector OffsetCorrection={-0.25,-0.38,-0.38,-0.51,-6.34,-6.37,-6.3,-6.3};
//
//
//  AnyForce3D Fx1_2 ={
//    AnyFunInterpol force ={
//     Type=Bspline; BsplineOrder =8;
//      T=...Time;
//      Data={Main.C3DFileData.Analog.Data.FPAFx1_2}+..OffsetCorrection[0];
//    };
//
//    AnyRefNode &ref1=.ForcePlate.P1P2;
//    Flocal=.OnOff*{force(t)[0],0,0};
//
//    #include "DrawSupport.any"
//
//  };
//
//  AnyForce3D Fx3_4 ={
//    AnyFunInterpol force ={
//     Type=Bspline; BsplineOrder =8;
//      T=...Time;
//      Data={Main.C3DFileData.Analog.Data.FPAFx3_4}+..OffsetCorrection[1];
//    };
//    AnyRefNode &ref1=.ForcePlate.P3P4;
//
//    Flocal=.OnOff*{force(t)[0],0,0};
//
//    #include "DrawSupport.any"
//  };
//
//
//  AnyForce3D Fy1_4 ={
//    AnyFunInterpol force ={
//     Type=Bspline; BsplineOrder =8;
//      T=...Time;
//      Data={Main.C3DFileData.Analog.Data.FPAY1_4}+..OffsetCorrection[2];
//    };
//    AnyRefNode &ref1=.ForcePlate.P1P4;
//    Flocal=.OnOff*{0,force(t)[0],0};
//
//   #include "DrawSupport.any"
//
//  };
//
//
//
//
//  AnyForce3D Fy2_3 ={
//    AnyFunInterpol force ={
//     Type=Bspline; BsplineOrder =8;
//      T=...Time;
//      Data={Main.C3DFileData.Analog.Data.FPAY2_3}+..OffsetCorrection[3];
//    };
//    AnyRefNode &ref1=.ForcePlate.P2P3;
//    Flocal=.OnOff*{0,force(t)[0],0};
//
//     #include "DrawSupport.any"
//
//  };
//
//
//
//  AnyForce3D Fz1 ={
//    AnyFunInterpol force ={
//     Type=Bspline; BsplineOrder =8;
//      T=...Time;
//      Data={Main.C3DFileData.Analog.Data.FPAZ1}+..OffsetCorrection[4];
//    };
//    AnyRefNode &ref1=.ForcePlate.P1;
//    Flocal=.OnOff*{0,0,force(t)[0]};
//
//     #include "DrawSupport.any"
//
//  };
//
//
//
//  AnyForce3D Fz2 ={
//    AnyFunInterpol force ={
//     Type=Bspline; BsplineOrder =8;
//      T=...Time;
//      Data={Main.C3DFileData.Analog.Data.FPAZ2}+..OffsetCorrection[5];
//    };
//    AnyRefNode &ref1=.ForcePlate.P2;
//    Flocal=.OnOff*{0,0,force(t)[0]};
//
//    #include "DrawSupport.any"
//
//  };
//
//  AnyForce3D Fz3 ={
//    AnyFunInterpol force ={
//     Type=Bspline; BsplineOrder =8;
//      T=...Time;
//      Data={Main.C3DFileData.Analog.Data.FPAZ3}+..OffsetCorrection[6];
//    };
//    AnyRefNode &ref1=.ForcePlate.P3;
//    Flocal=.OnOff*{0,0,force(t)[0]};
//
//   #include "DrawSupport.any"
//  };
//
//
//  AnyForce3D Fz4 ={
//    AnyFunInterpol force ={
//     Type=Bspline; BsplineOrder =8;
//      T=...Time;
//      Data={Main.C3DFileData.Analog.Data.FPAZ4}+..OffsetCorrection[7];
//    };
//    AnyRefNode &ref1=.ForcePlate.P4;
//    Flocal=.OnOff*{0,0,force(t)[0]};
//
//     #include "DrawSupport.any"
//
//  };
//  AnyVar FzTotal=Fz1.force(ForcePlate.t)[0]+Fz2.force(ForcePlate.t)[0]+Fz3.force(ForcePlate.t)[0]+Fz4.force(ForcePlate.t)[0];
//  AnyVar OnOff=iffun(gtfun(-FzTotal,20.0),1.0,0.0);
//
//
//  #include "CenterOfPressureVisualization.any"
//};//PlateA
//
//
//
//
//
//AnyFolder PlateC={
//  AnySeg ForcePlate={
//    Mass=0.0;
//    Jii={0,0,0};
//    r0=..Corners.c2center.sRel;
//    Axes0 = RotMat(pi,z)*RotMat(pi,x)*RotMat(0.5*pi,z);
//
//    AnyFloat Origins= Main.C3DFileData.Groups.FORCE_PLATFORM.ORIGIN.Data;
//    AnyVar ydist=Origins[2][0]; //distance from y axis on transducer to y axis of center of plate
//    AnyVar xdist=Origins[2][1];//distance from x axis on transducer to x axis of center of plate
//    AnyVar zdist=Origins[2][2];//distance from z axis on transducer to z surface of plate
//
//     AnyRefNode PlateGraphics ={
//         sRel={0,0,0.05};
//
//    AnyDrawRefFrame drw={
//        ScaleXYZ=0.25*{1,1,1};
//        RGB=.Color;
//    };
//
//    AnyVec3 Color=0.65*{1,1,1};
//      AnyVec3 Size={vnorm(...Corners.c21.sRel-...Corners.c22.sRel,2),vnorm(...Corners.c22.sRel-...Corners.c23.sRel,2),0.1};
//      AnyVar Transparency =0.4;
//      #include "../../Body/AAUHuman/Toolbox/DrawObjects/Box.any"
//    };
//
//    AnyRefNode P1={
//      sRel=0.001*{.ydist,.xdist,.zdist};
//      AnyDrawNode drw={ScaleXYZ = 0.02*{1,1,0.1}; RGB={1,0,0};};
//    };
//    AnyRefNode P2={
//      sRel=0.001*{-.ydist,.xdist,.zdist};
//      AnyDrawNode drw={ScaleXYZ = 0.02*{1,1,0.1}; RGB={1,0,0};};
//    };
//    AnyRefNode P3={
//      sRel=0.001*{-.ydist,-.xdist,.zdist};
//      AnyDrawNode drw={ScaleXYZ = 0.02*{1,1,0.1}; RGB={1,0,0};};
//    };
//    AnyRefNode P4={
//      sRel=0.001*{.ydist,-.xdist,.zdist};
//      AnyDrawNode drw={ScaleXYZ = 0.02*{1,1,0.1}; RGB={1,0,0};};
//    };
//    AnyRefNode P1P2={
//      sRel=0.5*(.P1.sRel+.P2.sRel);
//      AnyDrawNode drw={ScaleXYZ = 0.02*{1,1,0.1}; RGB={1,0,0};};
//    };
//    AnyRefNode P3P4={
//      sRel=0.5*(.P3.sRel+.P4.sRel);
//      AnyDrawNode drw={ScaleXYZ = 0.02*{1,1,0.1}; RGB={1,0,0};};
//    };
//    AnyRefNode P1P4={
//      sRel=0.5*(.P1.sRel+.P4.sRel);
//      AnyDrawNode drw={ScaleXYZ = 0.02*{1,1,0.1}; RGB={1,0,0};};
//    };
//    AnyRefNode P2P3={
//      sRel=0.5*(.P2.sRel+.P3.sRel);
//      AnyDrawNode drw={ScaleXYZ = 0.02*{1,1,0.1}; RGB={1,0,0};};
//    };
//
//
//  };
//
//  AnyKinEqSimpleDriver ForcePlateDriver ={
//    AnyKinLinear ForcePlateLin={
//      AnyRefNode &ref1=...Corners.c2center;
//      AnySeg &ref2=..ForcePlate;
//      Ref=0;
//    };
//
//    AnyKinRotational ForcePlateRot={
//      AnyRefNode &ref1=...Corners.c2center;
//      AnySeg &ref2=..ForcePlate;
//      Type=RotAxesAngles;
//    };
//    DriverPos={0,0,0,0,0,0};
//    DriverVel={0,0,0,0,0,0};
//    Reaction.Type = {Off,Off,Off,Off,Off,Off};
//  };
//
//
//  AnyReacForce PlateFootReaction={
//
//    AnyKinLinear Lin={
//      Ref=0;
//      AnySeg &ref2=..ForcePlate;
//      AnySeg &ref1=....HumanModel.Left.Leg.Seg.Foot;
//    };
//
//    AnyKinRotational Rot={
//      AnySeg &ref2=..ForcePlate;
//      AnySeg &ref1=....HumanModel.Left.Leg.Seg.Foot;
//      Type=RotAxesAngles;
//    };
//  };
//
//  AnyVector OffsetCorrection={-0.5,-0.75,0.128,-2,-1.2,-1.2,13,-5};
//
//
//
//  AnyForce3D Fx1_2 ={
//
//    AnyFunInterpol force ={
//     Type=Bspline; BsplineOrder =8;
//      T=...Time;
//      Data={Main.C3DFileData.Analog.Data.FPCFx1_2}+..OffsetCorrection[0];
//    };
//
//    AnyRefNode &ref1=.ForcePlate.P1P2;
//    Flocal=.OnOff*{force(t)[0],0,0};
//    #include "DrawSupport.any"
//  };
//
//  AnyForce3D Fx3_4 ={
//    AnyFunInterpol force ={
//     Type=Bspline; BsplineOrder =8;
//      T=...Time;
//      Data={Main.C3DFileData.Analog.Data.FPCFx3_4}+..OffsetCorrection[1];
//    };
//    AnyRefNode &ref1=.ForcePlate.P3P4;
//
//    Flocal=.OnOff*{force(t)[0],0,0};
//
// #include "DrawSupport.any"
//
//  };
//
//
//  AnyForce3D Fy1_4 ={
//    AnyFunInterpol force ={
//     Type=Bspline; BsplineOrder =8;
//      T=...Time;
//      Data={Main.C3DFileData.Analog.Data.FPCY1_4}+..OffsetCorrection[2];
//    };
//    AnyRefNode &ref1=.ForcePlate.P1P4;
//    Flocal=.OnOff*{0,force(t)[0],0};
//
//    #include "DrawSupport.any"
//  };
//
//
//
//
//  AnyForce3D Fy2_3 ={
//    AnyFunInterpol force ={
//     Type=Bspline; BsplineOrder =8;
//      T=...Time;
//      Data={Main.C3DFileData.Analog.Data.FPCY2_3}+..OffsetCorrection[3];
//    };
//    AnyRefNode &ref1=.ForcePlate.P2P3;
//    Flocal=.OnOff*{0,force(t)[0],0};
//
//    #include "DrawSupport.any"
//  };
//
//
//
//  AnyForce3D Fz1 ={
//    AnyFunInterpol force ={
//     Type=Bspline; BsplineOrder =8;
//      T=...Time;
//      Data={Main.C3DFileData.Analog.Data.FPCZ1}+..OffsetCorrection[4];
//    };
//    AnyRefNode &ref1=.ForcePlate.P1;
//    Flocal=.OnOff*{0,0,force(t)[0]};
//
//    #include "DrawSupport.any"
//  };
//
//
//
//  AnyForce3D Fz2 ={
//    AnyFunInterpol force ={
//     Type=Bspline; BsplineOrder =8;
//      T=...Time;
//      Data={Main.C3DFileData.Analog.Data.FPCZ2}+..OffsetCorrection[5];
//    };
//    AnyRefNode &ref1=.ForcePlate.P2;
//    Flocal=.OnOff*{0,0,force(t)[0]};
//
//    #include "DrawSupport.any"
//  };
//
//  AnyForce3D Fz3 ={
//    AnyFunInterpol force ={
//     Type=Bspline; BsplineOrder =8;
//      T=...Time;
//      Data={Main.C3DFileData.Analog.Data.FPCZ3}+..OffsetCorrection[6];
//    };
//    AnyRefNode &ref1=.ForcePlate.P3;
//    Flocal=.OnOff*{0,0,force(t)[0]};
//
//    #include "DrawSupport.any"
//  };
//
//
//  AnyForce3D Fz4 ={
//    AnyFunInterpol force ={
//     Type=Bspline; BsplineOrder =8;
//      T=...Time;
//      Data={Main.C3DFileData.Analog.Data.FPCZ4}+..OffsetCorrection[7];
//    };
//    AnyRefNode &ref1=.ForcePlate.P4;
//    Flocal=.OnOff*{0,0,force(t)[0]};
//
//    #include "DrawSupport.any"
//  };
//  AnyVar FzTotal=Fz1.force(ForcePlate.t)[0]+Fz2.force(ForcePlate.t)[0]+Fz3.force(ForcePlate.t)[0]+Fz4.force(ForcePlate.t)[0];
//  AnyVar OnOff=iffun(gtfun(-FzTotal,20),1.0,0.0);
//
//
//  #include "CenterOfPressureVisualization.any"
//};//PlateC
//
//
//
//AnyFolder PlateD={
//  AnySeg ForcePlate={
//    Mass=0.0;
//    Jii={0,0,0};
//    r0=..Corners.c3center.sRel;
//    Axes0 = RotMat(pi,z)*RotMat(pi,x)*RotMat(-0.5*pi,z);
//
//    AnyFloat Origins= Main.C3DFileData.Groups.FORCE_PLATFORM.ORIGIN.Data;
//    AnyVar ydist=Origins[3][0]; //distance from y axis on transducer to y axis of center of plate
//    AnyVar xdist=Origins[3][1];//distance from x axis on transducer to x axis of center of plate
//    AnyVar zdist=Origins[3][2];//distance from z axis on transducer to z surface of plate
//
//    AnyRefNode PlateGraphics ={
//  sRel={0,0,0.05};
//
//      AnyDrawRefFrame drw={
//        ScaleXYZ=0.25*{1,1,1};
//        RGB=.Color;
//      };
// AnyVec3 Color=0.75*{1,1,1};
//      AnyVec3 Size={vnorm(...Corners.c31.sRel-...Corners.c32.sRel,2),vnorm(...Corners.c32.sRel-...Corners.c33.sRel,2),0.1};
//      AnyVar Transparency =0.4;
//      #include "../../Body/AAUHuman/Toolbox/DrawObjects/Box.any"
//    };
//
//    AnyRefNode P1={
//      sRel=0.001*{.ydist,.xdist,.zdist};
//      AnyDrawNode drw={ScaleXYZ = 0.02*{1,1,0.1}; RGB={1,0,0};};
//    };
//      AnyRefNode P2={
//        sRel=0.001*{-.ydist,.xdist,.zdist};
//
//        AnyDrawNode drw={ScaleXYZ = 0.02*{1,1,0.1}; RGB={1,0,0};};
//      };
//      AnyRefNode P3={
//        sRel=0.001*{-.ydist,-.xdist,.zdist};
//        AnyDrawNode drw={ScaleXYZ = 0.02*{1,1,0.1}; RGB={1,0,0};};
//      };
//      AnyRefNode P4={
//        sRel=0.001*{.ydist,-.xdist,.zdist};
//        AnyDrawNode drw={ScaleXYZ = 0.02*{1,1,0.1}; RGB={1,0,0};};
//      };
//      AnyRefNode P1P2={
//        sRel=0.5*(.P1.sRel+.P2.sRel);
//        AnyDrawNode drw={ScaleXYZ = 0.02*{1,1,0.1}; RGB={1,0,0};};
//    };
//    AnyRefNode P3P4={
//      sRel=0.5*(.P3.sRel+.P4.sRel);
//      AnyDrawNode drw={ScaleXYZ = 0.02*{1,1,0.1}; RGB={1,0,0};};
//    };
//    AnyRefNode P1P4={
//      sRel=0.5*(.P1.sRel+.P4.sRel);
//      AnyDrawNode drw={ScaleXYZ = 0.02*{1,1,0.1}; RGB={1,0,0};};
//    };
//    AnyRefNode P2P3={
//      sRel=0.5*(.P2.sRel+.P3.sRel);
//      AnyDrawNode drw={ScaleXYZ = 0.02*{1,1,0.1}; RGB={1,0,0};};
//    };
//
//  };
//
//  AnyKinEqSimpleDriver ForcePlateDriver ={
//    AnyKinLinear ForcePlateLin={
//      AnyRefNode &ref1=...Corners.c3center;
//      AnySeg &ref2=..ForcePlate;
//      Ref=0;
//    };
//
//    AnyKinRotational ForcePlateRot={
//      AnyRefNode &ref1=...Corners.c3center;
//      AnySeg &ref2=..ForcePlate;
//      Type=RotAxesAngles;
//    };
//    DriverPos={0,0,0,0,0,0};
//    DriverVel={0,0,0,0,0,0};
//    Reaction.Type = {Off,Off,Off,Off,Off,Off};
//  };
//
//
//  AnyReacForce PlateFootReaction={
//
//    AnyKinLinear Lin={
//      Ref=0;
//        ref2={AnyDrawRefFrame drw={RGB={0,1,0};ScaleXYZ={1,1,1};};};
//
//      AnySeg &ref2=..ForcePlate;
//      AnySeg &ref1=....HumanModel.Right.Leg.Seg.Foot;
//    };
//
//    AnyKinRotational Rot={
//      AnySeg &ref2=..ForcePlate;
//      AnySeg &ref1=....HumanModel.Right.Leg.Seg.Foot;
//      Type=RotAxesAngles;
//    };
//  };
//
//  AnyVector OffsetCorrection={0,-0.3,-0.7,-0.4,-5,-5,-9,-5};
//
//  AnyForce3D Fx1_2 ={
//
//    AnyFunInterpol force ={
//     Type=Bspline; BsplineOrder =8;
//      T=...Time;
//      Data={Main.C3DFileData.Analog.Data.FPDFx1_2}+..OffsetCorrection[0];
//    };
//
//    AnyRefNode &ref1=.ForcePlate.P1P2;
//    Flocal=.OnOff*{force(t)[0],0,0};
//
//  #include "DrawSupport.any"
//
//  };
//
//  AnyForce3D Fx3_4 ={
//    AnyFunInterpol force ={
//     Type=Bspline; BsplineOrder =8;
//      T=...Time;
//      Data={Main.C3DFileData.Analog.Data.FPDFx3_4}+..OffsetCorrection[1] ;
//    };
//    AnyRefNode &ref1=.ForcePlate.P3P4;
//
//    Flocal=.OnOff*{force(t)[0],0,0};
//
//    #include "DrawSupport.any"
//  };
//
//
//  AnyForce3D Fy1_4 ={
//    AnyFunInterpol force ={
//     Type=Bspline; BsplineOrder =8;
//      T=...Time;
//      Data={Main.C3DFileData.Analog.Data.FPDY1_4}+..OffsetCorrection[2] ;
//    };
//    AnyRefNode &ref1=.ForcePlate.P1P4;
//    Flocal=.OnOff*{0,force(t)[0],0};
//
//    #include "DrawSupport.any"
//  };
//
//
//
//
//  AnyForce3D Fy2_3 ={
//    AnyFunInterpol force ={
//     Type=Bspline; BsplineOrder =8;
//      T=...Time;
//      Data={Main.C3DFileData.Analog.Data.FPDY2_3}+..OffsetCorrection[3] ;
//    };
//    AnyRefNode &ref1=.ForcePlate.P2P3;
//    Flocal=.OnOff*{0,force(t)[0],0};
//
//    #include "DrawSupport.any"
//  };
//
//
//
//  AnyForce3D Fz1 ={
//    AnyFunInterpol force ={
//     Type=Bspline; BsplineOrder =8;
//      T=...Time;
//      Data={Main.C3DFileData.Analog.Data.FPDZ1}+..OffsetCorrection[4] ;
//    };
//    AnyRefNode &ref1=.ForcePlate.P1;
//    Flocal=.OnOff*{0,0,force(t)[0]};
//
//    #include "DrawSupport.any"
//  };
//
//
//
//  AnyForce3D Fz2 ={
//    AnyFunInterpol force ={
//     Type=Bspline; BsplineOrder =8;
//      T=...Time;
//      Data={Main.C3DFileData.Analog.Data.FPDZ2}+..OffsetCorrection[5];
//    };
//    AnyRefNode &ref1=.ForcePlate.P2;
//    Flocal=.OnOff*{0,0,force(t)[0]};
//
//    #include "DrawSupport.any"
//  };
//
//  AnyForce3D Fz3 ={
//    AnyFunInterpol force ={
//     Type=Bspline; BsplineOrder =8;
//      T=...Time;
//      Data={Main.C3DFileData.Analog.Data.FPDZ3}+..OffsetCorrection[6] ;
//    };
//    AnyRefNode &ref1=.ForcePlate.P3;
//    Flocal=.OnOff*{0,0,force(t)[0]};
//
//   #include "DrawSupport.any"
//  };
//
//
//  AnyForce3D Fz4 ={
//    AnyFunInterpol force ={
//     Type=Bspline; BsplineOrder =8;
//      T=...Time;
//      Data={Main.C3DFileData.Analog.Data.FPDZ4}+..OffsetCorrection[7];
//    };
//    AnyRefNode &ref1=.ForcePlate.P4;
//    Flocal=.OnOff*{0,0,force(t)[0]};
//
//    #include "DrawSupport.any"
//  };
//  AnyVar FzTotal=Fz1.force(ForcePlate.t)[0]+Fz2.force(ForcePlate.t)[0]+Fz3.force(ForcePlate.t)[0]+Fz4.force(ForcePlate.t)[0];
//  AnyVar OnOff=iffun(gtfun(-FzTotal,20.0),1.0,0.0);
//
//  #include "CenterOfPressureVisualization.any"
//
//};//PlateD
//
//
