//This file creates the environment around the human
//It creates the force plates and add the measure load to them
#define HumanModelPresent 1
AnyFixedRefFrame GlobalRef ={
  Origin={0,0,0};
  AnyDrawRefFrame drw={ScaleXYZ=0.4*{1,1,1};};
};

//ForcePlateType4AutoDetection Plate1 (
//PlateName = Plate1,
//Folder =Main.ModelSetup.C3DFileData,
//Limb1=  .HumanModelRef.Right.Leg.Seg.Foot,
//Limb2=  .HumanModelRef.Left.Leg.Seg.Foot,
//No=0,
//VerticalDirection ="Y",
//HeightTolerance=0.07,
//VelThreshold=2.2,
//Fx=Main.ModelSetup.C3DFileData.Analog.DataFiltered.Fx1,
//Fy=Main.ModelSetup.C3DFileData.Analog.DataFiltered.Fy1,
//Fz=Main.ModelSetup.C3DFileData.Analog.DataFiltered.Fz1,
//Mx=Main.ModelSetup.C3DFileData.Analog.DataFiltered.Mx1,
//My=Main.ModelSetup.C3DFileData.Analog.DataFiltered.My1,
//Mz=Main.ModelSetup.C3DFileData.Analog.DataFiltered.Mz1,
//FootPresent=HumanModelPresent)
//={
//  Cal=Main.ModelSetup.C3DFileData.Groups.FORCE_PLATFORM.CAL_MATRIX.Data[0];
//};
//
//
//ForcePlateType4AutoDetection Plate2 (
//PlateName = Plate2,
//Folder =Main.ModelSetup.C3DFileData,
//Limb1=  .HumanModelRef.Right.Leg.Seg.Foot,
//Limb2=  .HumanModelRef.Left.Leg.Seg.Foot,
//No=1,
//VerticalDirection ="Y",
//HeightTolerance=0.07,
//VelThreshold=2.2,
//Fx=Main.ModelSetup.C3DFileData.Analog.DataFiltered.Fx2,
//Fy=Main.ModelSetup.C3DFileData.Analog.DataFiltered.Fy2,
//Fz=Main.ModelSetup.C3DFileData.Analog.DataFiltered.Fz2,
//Mx=Main.ModelSetup.C3DFileData.Analog.DataFiltered.Mx2,
//My=Main.ModelSetup.C3DFileData.Analog.DataFiltered.My2,
//Mz=Main.ModelSetup.C3DFileData.Analog.DataFiltered.Mz2,
//FootPresent=HumanModelPresent)
//={
//  Cal=Main.ModelSetup.C3DFileData.Groups.FORCE_PLATFORM.CAL_MATRIX.Data[1];
//};
//
//ForcePlateType4AutoDetection Plate3 (
//PlateName = Plate3,
//Folder =Main.ModelSetup.C3DFileData,
//Limb1=  .HumanModelRef.Right.Leg.Seg.Foot,
//Limb2=  .HumanModelRef.Left.Leg.Seg.Foot,
//No=2,
//VerticalDirection ="Y",
//HeightTolerance=0.07,
//VelThreshold=2.2,
//Fx=Main.ModelSetup.C3DFileData.Analog.DataFiltered.Fx3,
//Fy=Main.ModelSetup.C3DFileData.Analog.DataFiltered.Fy3,
//Fz=Main.ModelSetup.C3DFileData.Analog.DataFiltered.Fz3,
//Mx=Main.ModelSetup.C3DFileData.Analog.DataFiltered.Mx3,
//My=Main.ModelSetup.C3DFileData.Analog.DataFiltered.My3,
//Mz=Main.ModelSetup.C3DFileData.Analog.DataFiltered.Mz3,
//FootPresent=HumanModelPresent)
//={
//  Cal=Main.ModelSetup.C3DFileData.Groups.FORCE_PLATFORM.CAL_MATRIX.Data[2];
//};


ForcePlateType3AutoDetection PlateB (
PlateName = PlateB,
Folder =Main.ModelSetup.C3DFileData,
Limb1 = .HumanModelRef.Right.Leg.Seg.Foot,
Limb2 = .HumanModelRef.Left.Leg.Seg.Foot,
No=0,
VerticalDirection ="Z",
HeightTolerance=0.07,
VelThreshold=2.2,
Fx_12=Main.ModelSetup.C3DFileData.Analog.DataFiltered.FPBFx1_43_2,
Fx_34=Main.ModelSetup.C3DFileData.Analog.DataFiltered.FPBFx3_43_4,
Fy_14=Main.ModelSetup.C3DFileData.Analog.DataFiltered.FPBFy1_43_4,
Fy_23=Main.ModelSetup.C3DFileData.Analog.DataFiltered.FPBFy2_43_3,
Fz_1=Main.ModelSetup.C3DFileData.Analog.DataFiltered.FPBFz1,
Fz_2=Main.ModelSetup.C3DFileData.Analog.DataFiltered.FPBFz2,
Fz_3=Main.ModelSetup.C3DFileData.Analog.DataFiltered.FPBFz3,
Fz_4=Main.ModelSetup.C3DFileData.Analog.DataFiltered.FPBFz4,
FootPresent=HumanModelPresent)
={};


ForcePlateType3AutoDetection PlateA (
PlateName = PlateA,
Folder =Main.ModelSetup.C3DFileData,
Limb1 = .HumanModelRef.Right.Leg.Seg.Foot,
Limb2 = .HumanModelRef.Left.Leg.Seg.Foot,
No=1,
VerticalDirection ="Z",
HeightTolerance=0.07,
VelThreshold=2.2,
Fx_12=Main.ModelSetup.C3DFileData.Analog.DataFiltered.FPAFx1_43_2,
Fx_34=Main.ModelSetup.C3DFileData.Analog.DataFiltered.FPAFx3_43_4,
Fy_14=Main.ModelSetup.C3DFileData.Analog.DataFiltered.FPAY1_43_4,
Fy_23=Main.ModelSetup.C3DFileData.Analog.DataFiltered.FPAY2_43_3,
Fz_1=Main.ModelSetup.C3DFileData.Analog.DataFiltered.FPAZ1,
Fz_2=Main.ModelSetup.C3DFileData.Analog.DataFiltered.FPAZ2,
Fz_3=Main.ModelSetup.C3DFileData.Analog.DataFiltered.FPAZ3,
Fz_4=Main.ModelSetup.C3DFileData.Analog.DataFiltered.FPAZ4,
FootPresent=HumanModelPresent)
={};


ForcePlateType3AutoDetection PlateC (
PlateName = PlateC,
Folder =Main.ModelSetup.C3DFileData,
Limb1 = .HumanModelRef.Right.Leg.Seg.Foot,
Limb2 = .HumanModelRef.Left.Leg.Seg.Foot,
No=2,
VerticalDirection ="Z",
HeightTolerance=0.07,
VelThreshold=2.2,
Fx_12=Main.ModelSetup.C3DFileData.Analog.DataFiltered.FPCFx1_43_2,
Fx_34=Main.ModelSetup.C3DFileData.Analog.DataFiltered.FPCFx3_43_4,
Fy_14=Main.ModelSetup.C3DFileData.Analog.DataFiltered.FPCY1_43_4,
Fy_23=Main.ModelSetup.C3DFileData.Analog.DataFiltered.FPCY2_43_3,
Fz_1=Main.ModelSetup.C3DFileData.Analog.DataFiltered.FPCZ1,
Fz_2=Main.ModelSetup.C3DFileData.Analog.DataFiltered.FPCZ2,
Fz_3=Main.ModelSetup.C3DFileData.Analog.DataFiltered.FPCZ3,
Fz_4=Main.ModelSetup.C3DFileData.Analog.DataFiltered.FPCZ4,
FootPresent=HumanModelPresent)
={};


ForcePlateType3AutoDetection PlateD (
PlateName = PlateD,
Folder =Main.ModelSetup.C3DFileData,
Limb1 = .HumanModelRef.Right.Leg.Seg.Foot,
Limb2 = .HumanModelRef.Left.Leg.Seg.Foot,
No=3,
VerticalDirection ="Z",
HeightTolerance=0.07,
VelThreshold=2.2,
Fx_12=Main.ModelSetup.C3DFileData.Analog.DataFiltered.FPDFx1_43_2,
Fx_34=Main.ModelSetup.C3DFileData.Analog.DataFiltered.FPDFx3_43_4,
Fy_14=Main.ModelSetup.C3DFileData.Analog.DataFiltered.FPDY1_43_4,
Fy_23=Main.ModelSetup.C3DFileData.Analog.DataFiltered.FPDY2_43_3,
Fz_1=Main.ModelSetup.C3DFileData.Analog.DataFiltered.FPDZ1,
Fz_2=Main.ModelSetup.C3DFileData.Analog.DataFiltered.FPDZ2,
Fz_3=Main.ModelSetup.C3DFileData.Analog.DataFiltered.FPDZ3,
Fz_4=Main.ModelSetup.C3DFileData.Analog.DataFiltered.FPDZ4,
FootPresent=HumanModelPresent)
={};


#undef HumanModelPresent
