  // Todo: Write a small description of your model here

Main = {

  // The actual body model goes in this folder
  AnyFolder MyModel = {

    // Global Reference Frame
    AnyFixedRefFrame GlobalRef = {

      // Todo: Add points for grounding of the model here

    };  // Global reference frame


    AnyInputC3D C3DFileData =   {
//      WriteMarkerDataToFilesOnOff = On;

      ConstructChartOnOff=Off;

      FileName = "Trial13.c3d";
      ConstructModelOnOff = On;
      MarkerUseAllPointsOnOff = Off;
      MarkerUseCamMaskOnOff = Off;
      PointsScaleFactor = 1/1000;

    MarkerLabels = {"Ziad_58_RFHD","Ziad_58_LFHD","Ziad_58_RBHD","Ziad_58_LBHD","Ziad_58_CLAV","Ziad_58_C7","Ziad_58_T10","Ziad_58_STRN","Ziad_58_RBAK",
      "Ziad_58_RSHO","Ziad_58_LSHO","Ziad_58_RUPA","Ziad_58_LUPA","Ziad_58_RELB","Ziad_58_LELB",
      "Ziad_58_RFRA","Ziad_58_LFRA","Ziad_58_RWRA","Ziad_58_LWRA","Ziad_58_RWRB","Ziad_58_LWRB","Ziad_58_RFIN","Ziad_58_LFIN","Ziad_58_RASI",
      "Ziad_58_LASI","Ziad_58_RPSI","Ziad_58_LPSI","Ziad_58_RTHI","Ziad_58_LTHI","Ziad_58_RKNE","Ziad_58_LKNE","Ziad_58_RTIB","Ziad_58_LTIB","Ziad_58_RANK",
      "Ziad_58_LANK","Ziad_58_RHEE","Ziad_58_LHEE","Ziad_58_RTOE","Ziad_58_LTOE","Ziad_58_RMT5","Ziad_58_LMT5"};


      AnalogFilterIndex =1;

      Filter =  {
        N = 2;
        Fc = {5};
        Type = LowPass;
      };

      /// This filter is used for the analog data
      AnyFunButterworthFilter LowPassFilter = {
        FilterForwardBackwardOnOff = On;
        AutomaticInitialConditionOnOff = On;
        N = 2;
        AnyVar CutOffFrequency=12;
        AnyVar SampleFreq=.Header.VideoFrameRate* .Header.NoAnalogSamplesPer3DFrame   ;
        W = {1/(SampleFreq*0.5)*CutOffFrequency};
        Type = LowPass;
      };


      MarkerScaleXYZ = 0.015*{1,1,1};
      MarkerRGB={0,0,1};
    };


      //Starting time for the analysis calculated from C3D data but can be changed is needed
  AnyFloatVar  tStart = C3DFileData.Header.FirstFrameNo/C3DFileData.Header.VideoFrameRate;
  //End time for the analysis calculated from C3D data but can be changed is needed
  AnyFloatVar  tEnd = C3DFileData.Header.LastFrameNo/C3DFileData.Header.VideoFrameRate;


  }; // MyModel

  // The study: Operations to be performed on the model
  AnyBodyStudy MyStudy = {
    AnyFolder &Model = .MyModel;
    Gravity = {0.0, -9.81, 0.0};

    tStart = Main.MyModel.tStart;
    tEnd = Main.MyModel.tEnd;
  };

};  // Main
