//This file contains the marker toplogy of the data set it links free floating markers with the markers on the human

AnyFolder ModelSetup ={

  AnyString SaveMacroOperation=  "classoperation Main.Studies.ParameterIdentification " + strformat("\x22")+ "Save design" + strformat("\x22")+ " --file="+ strformat("\x22")+ C3DFileData.NameOfFile +"-"+"OptimizedParameters.txt" + strformat("\x22");
  AnyString LoadMacroOperation=  "classoperation Main.Studies.LoadParametersOptimizationResults " + strformat("\x22")+ "Load design" + strformat("\x22")+ " --file="+ strformat("\x22")+ C3DFileData.NameOfFile +"-"+"OptimizedParameters.txt" + strformat("\x22");


  AnyFolder C3DFileData =   {
    AnyString PrefixStr=""; //if the dataset makes use of a prefix name which goes in front of all markers and processed datanames write it here
    #define PrefixDef(Arg) Arg

    AnyString NameOfFile =Main.TrialSpecificData.NameOfFile; //Write the name of the file here

    /// This filter is used for the analog data
    AnyFunButterworthFilter LowPassFilterAnalog = {
      FilterForwardBackwardOnOff = On;
      AutomaticInitialConditionOnOff = On;
      N = 2;
      AnyVar CutOffFrequency=12;
      AnyVar SampleFreq=.Header.VideoFrameRate* .Header.NoAnalogSamplesPer3DFrame   ;
      W = {1/(SampleFreq*0.5)*CutOffFrequency};
      Type = LowPass;
    };

    /// This filter is used for the marker data
    AnyFunButterworthFilter LowPassFilterMarker = {
      N = 2;
      Fc = {5};
      Fs = .Header.VideoFrameRate;
      Type = LowPass;
    };


    #include "C3Ddata/C3DData.Header.any"
    #include "C3Ddata/C3DData.Groups.any"
    #include "C3Ddata/C3DData.Analog.any"
    Analog = {#include "C3DData/C3Ddata.Analog.DataFiltered.any" };
    AnyFolder Points = {
      #include "C3DData/C3Ddata.Points.Markers.any"
      //#include "C3DData/C3Ddata.Points.Processed.any" //Not needed, makes loading faster
    };

  };


  AnyIntVar FirstFrame = C3DFileData.Header.FirstFrameNo;
  AnyIntVar LastFrame = C3DFileData.Header.LastFrameNo;
  AnyIntVar nStep =(LastFrame-FirstFrame);


  OptimizeAnthropometricsOnOff OptimizeOnOff (
  PelvisWidthOnOff ="On",
  ThighLengthOnOff="On",
  ShankLengthOnOff="On",
  FootLengthOnOff="On",
  HeadHeightOnOff="Off",
  TrunkHeightOnOff="On",
  UpperArmLengthOnOff="Off",
  LowerArmLengthOnOff="Off",
  Model1=MotionAndParameterOptimizationModel, Model2= InverseDynamicModel
  ) ={};

  AnyFolder Macros={};

  //
  // This class creates a marker in each of the two models, additionally it creates marker drivers and design variables to opitmize marker location
  //
  //  CreateMarker MX (    //MX is the folder name for the marker all foldr names has to be different so usually use M1....MX
  //  MarkerName=XXX,      //This is the name of you marker it has to be the same name as in the C3D file
  //  MarkerPlacement =Right.Leg.Seg.Thigh,  //this is the segmnt
  //  OptX=On,OptY=Off,OptZ=On,  //this determines if the design variable is going to be optimized or left unchanged in paramter optimization studies
  //
  //
  //  Model1=MotionAndParameterOptimizationModel, Model2= InverseDynamicModel   //always leave this line unchanged
  //  ) = {
  //    sRelOpt ={-0.0717627324329,-0.1724679985805,0.0763244306406};   //coordinates of the marker unscaled
  //  };
  //
  // sRelOpt = {-0.04970743, -0.1556847, 0.08576939}
  //   {-0.07176273, -0.172468, 0.07632443}


  CreateMarkerTD RTHI (
  MarkerName=PrefixDef(RTHI),
  MarkerPlacement =Right.Leg.Seg.Thigh,
  OptX="On",OptY="On",OptZ="On",
  WeightX=1.0,WeightY=1.0,WeightZ=1.0,

  Model1=MotionAndParameterOptimizationModel, Model2= InverseDynamicModel
  )= {
    sRelOpt = {-0.03102465, -0.2669603, 0.1139464};
  };


  CreateMarkerTD RKNE (
  MarkerName=PrefixDef(RKNE),
  MarkerPlacement= Right.Leg.Seg.Thigh,
  OptX="Off",OptY="Off",OptZ="Off",
  WeightX=1.0,WeightY=1.0,WeightZ=1.0,


  Model1=MotionAndParameterOptimizationModel, Model2= InverseDynamicModel
  ) = {
    sRelOpt= {-0.02, -0.3792649, 0.05};
  };

  CreateMarkerTD LKNE (
  MarkerName=PrefixDef(LKNE) ,
  MarkerPlacement=Left.Leg.Seg.Thigh,
  OptX="Off",OptY="Off",OptZ="Off",
  WeightX=1.0,WeightY=1.0,WeightZ=1.0,

  Model1=MotionAndParameterOptimizationModel, Model2= InverseDynamicModel
  ) = {
    sRelOpt ={-0.02, -0.3792649, -0.05};
  };


  CreateMarkerTD LPSI (
  MarkerName=PrefixDef(LPSI),
  MarkerPlacement=Trunk.SegmentsLumbar.PelvisSeg,
  OptX="Off", OptY="Off", OptZ="On",
  WeightX=1.0,WeightY=1.0,WeightZ=1.0,


  Model1=MotionAndParameterOptimizationModel, Model2= InverseDynamicModel
  ) = {
    sRelOpt ={-0.077, -0.007, -0.037};
  };


  CreateMarkerTD RASI (
  MarkerName=PrefixDef(RASI),
  MarkerPlacement=Trunk.SegmentsLumbar.PelvisSeg,
  OptX="Off",OptY="Off",OptZ="Off",
  WeightX=1.0,WeightY=1.0,WeightZ=1.0,


  Model1=MotionAndParameterOptimizationModel, Model2= InverseDynamicModel
  ) = {

    sRelOpt =  {0.11, -0.065, 0.145};
  };


  //ok
  CreateMarkerTD RTIB (
  MarkerName=PrefixDef(RTIB),
  MarkerPlacement=Right.Leg.Seg.Shank,
  OptX="On",OptY="On",OptZ="On",
  WeightX=1.0,WeightY=1.0,WeightZ=1.0,


  Model1=MotionAndParameterOptimizationModel, Model2= InverseDynamicModel
  ) = {
    sRelOpt = {0.01751226, 0.2039194, 0.1113902};
  };

  CreateMarkerTD RANK (
  MarkerName=PrefixDef(RANK) ,
  MarkerPlacement=Right.Leg.Seg.Shank,
  OptX="On",OptY="Off",OptZ="On",
  WeightX=1.0,WeightY=1.0,WeightZ=1.0,


  Model1=MotionAndParameterOptimizationModel, Model2= InverseDynamicModel
  ) = {
    sRelOpt = {0.00671602, -0.01, 0.01542605};

  };


  CreateMarkerTD LTIB (
  MarkerName=PrefixDef(LTIB),
  MarkerPlacement=Left.Leg.Seg.Shank,
  OptX="On",OptY="On",OptZ="On",
  WeightX=1.0,WeightY=1.0,WeightZ=1.0,


  Model1=MotionAndParameterOptimizationModel, Model2= InverseDynamicModel
  ) = {
    sRelOpt=  {0.04017781, 0.1373229, -0.06342093};
  };

  CreateMarkerTD LANK (
  MarkerName=PrefixDef(LANK),
  MarkerPlacement=Left.Leg.Seg.Shank,
  OptX="On",OptY="Off",OptZ="On",
  WeightX=1.0,WeightY=1.0,WeightZ=1.0,


  Model1=MotionAndParameterOptimizationModel, Model2= InverseDynamicModel
  ) = {
    sRelOpt=  {-0.0007183825, -0.01, -0.01850573};

  };

  CreateMarkerTD RHEE (
  MarkerName=PrefixDef(RHEE) ,
  MarkerPlacement=Right.Leg.Seg.Foot,
  OptX="Off", OptY="Off", OptZ="Off",
  WeightX=1.0,WeightY=1.0,WeightZ=1.0,

  Model1=MotionAndParameterOptimizationModel, Model2= InverseDynamicModel
  ) = {
    sRelOpt=  {-0.0237318, 0.007787775, 0.01487791};

  };

  CreateMarkerTD LHEE(
  MarkerName=PrefixDef(LHEE),
  MarkerPlacement=Left.Leg.Seg.Foot,
  OptX="Off", OptY="Off", OptZ="Off",
  WeightX=1.0,WeightY=1.0,WeightZ=1.0,


  Model1=MotionAndParameterOptimizationModel, Model2= InverseDynamicModel
  ) = {
    sRelOpt=  {-0.0237318, 0.007787775, -0.01487791};
  };


  CreateMarkerTD RPSI (
  MarkerName=PrefixDef(RPSI),
  MarkerPlacement=Trunk.SegmentsLumbar.PelvisSeg,
  OptX="Off", OptY="Off", OptZ="On",
  WeightX=1.0,WeightY=1.0,WeightZ=1.0,


  Model1=MotionAndParameterOptimizationModel, Model2= InverseDynamicModel
  ) = {
    sRelOpt ={-0.077, -0.007, 0.037};

  };

  CreateMarkerTD RTOE (
  MarkerName=PrefixDef(RTOE),
  MarkerPlacement=Right.Leg.Seg.Foot,
  OptX="Off", OptY="Off", OptZ="Off",
  WeightX=1.0,WeightY=1.0,WeightZ=1.0,


  Model1=MotionAndParameterOptimizationModel, Model2= InverseDynamicModel
  ) = {
    sRelOpt=  {0.21, 0.02268634, 0.035};
  };


  CreateMarkerTD LTOE (
  MarkerName=PrefixDef(LTOE),
  MarkerPlacement=Left.Leg.Seg.Foot,
  OptX="Off",OptY="Off",OptZ="Off",
  WeightX=1.0,WeightY=1.0,WeightZ=1.0,


  Model1=MotionAndParameterOptimizationModel, Model2= InverseDynamicModel
  ) = {
    sRelOpt=  {0.21, 0.02268634, -0.035};

  };


//  CreateMarkerTD LMT5 (
//  MarkerName=PrefixDef(LMT5),
//  MarkerPlacement=Left.Leg.Seg.Foot,
//  OptX="Off",OptY="Off",OptZ="Off",
//  WeightX=1.0,WeightY=1.0,WeightZ=1.0,
//
//  Model1=MotionAndParameterOptimizationModel, Model2= InverseDynamicModel
//  ) = {
//    sRelOpt =  {0.186351, 0.015497017, 0.03707195-0.08};
//  };
//
//
//
//  CreateMarkerTD RMT5 (
//  MarkerName=PrefixDef(RMT5),
//  MarkerPlacement=Right.Leg.Seg.Foot,
//  OptX="Off",OptY="Off",OptZ="Off",
//  WeightX=1.0,WeightY=1.0,WeightZ=1.0,
//
//  Model1=MotionAndParameterOptimizationModel, Model2= InverseDynamicModel
//  ) = {
//    sRelOpt =  {0.186351, 0.015497017, -0.03707195+0.08};
//  };


  CreateMarkerTD LASI (
  MarkerName=PrefixDef(LASI) ,
  MarkerPlacement=Trunk.SegmentsLumbar.PelvisSeg,
  OptX="Off",OptY="Off",OptZ="Off",
  WeightX=1.0,WeightY=1.0,WeightZ=1.0,


  Model1=MotionAndParameterOptimizationModel, Model2= InverseDynamicModel
  ) = {
    sRelOpt =  {0.11, -0.065, -0.145};
  };

  CreateMarkerTD LTHI (
  MarkerName=PrefixDef(LTHI) ,
  MarkerPlacement=Left.Leg.Seg.Thigh,
  OptX="On",OptY="On",OptZ="On",
  WeightX=1.0,WeightY=1.0,WeightZ=1.0,


  Model1=MotionAndParameterOptimizationModel, Model2= InverseDynamicModel
  ) = {
    sRelOpt=  {-0.007238141, -0.2855959, -0.09793496};
  };


  CreateMarker  RFHD (
  MarkerName=RFHD,
  MarkerPlacement=Trunk.SegmentsThorax.SkullSeg,
  OptX="Off",OptY="Off",OptZ="Off",
  WeightX=1.0,WeightY=1.0,WeightZ=1.0,


  Model1=MotionAndParameterOptimizationModel,Model2= InverseDynamicModel
  ) = {
    sRelOpt = {0.08,0.06,0.07};
  };


  CreateMarker  LFHD (
  MarkerName=LFHD,
  MarkerPlacement=Trunk.SegmentsThorax.SkullSeg,
  OptX="Off",OptY="Off",OptZ="Off",
  WeightX=1.0,WeightY=1.0,WeightZ=1.0,


  Model1=MotionAndParameterOptimizationModel,Model2= InverseDynamicModel
  ) = {
    sRelOpt = {0.08,0.06,-0.07};
  };


  CreateMarker  RBHD (
  MarkerName=RBHD,
  MarkerPlacement=Trunk.SegmentsThorax.SkullSeg,
  OptX="Off",OptY="Off",OptZ="Off",
  WeightX=1.0,WeightY=1.0,WeightZ=1.0,


  Model1=MotionAndParameterOptimizationModel,Model2= InverseDynamicModel
  ) = {
    sRelOpt = {-0.07,0.05,0.08};
  };


  CreateMarker  LBHD (
  MarkerName=LBHD,
  MarkerPlacement=Trunk.SegmentsThorax.SkullSeg,
  OptX="Off",OptY="Off",OptZ="Off",
  WeightX=1.0,WeightY=1.0,WeightZ=1.0,


  Model1=MotionAndParameterOptimizationModel,Model2= InverseDynamicModel
  ) = {
    sRelOpt = {-0.07,0.05,-0.08};
  };


  CreateMarker  T10 (
  MarkerName=T10,
  MarkerPlacement=Trunk.SegmentsThorax.ThoraxSeg,
  OptX="Off",OptY="Off",OptZ="Off",
  WeightX=1.0,WeightY=1.0,WeightZ=1.0,

  Model1=MotionAndParameterOptimizationModel,Model2= InverseDynamicModel
  ) = {
    sRelOpt = {-0.052,0.187,0};
  };


  //CreateMarker  C7 (
  //MarkerName=C7,
  //MarkerPlacement=Trunk.SegmentsThorax.ThoraxSeg,
  //OptX="Off",OptY="On",OptZ="Off",
  //WeightX=1.0,WeightY=1.0,WeightZ=1.0,

  //Model1=MotionAndParameterOptimizationModel,Model2= InverseDynamicModel
  //) = {
  //  sRelOpt = {-0.04,0.47,0};
  //};
  //

  //CreateMarker  RBAK (
  //MarkerName=RBAK,
  //MarkerPlacement=Right.ShoulderArm.Seg.Scapula,
  //OptX="Off",OptY="Off",OptZ="Off",
  //WeightX=1.0,WeightY=1.0,WeightZ=1.0,

  //Model1=MotionAndParameterOptimizationModel,Model2= InverseDynamicModel
  //) = {
  //  sRelOpt = {-0.115,-0.07,0.02};
  //};


  CreateMarker  STRN (
  MarkerName=STRN,
  MarkerPlacement=Trunk.SegmentsThorax.ThoraxSeg,
  OptX="On",OptY="On",OptZ="Off",
  WeightX=1.0,WeightY=1.0,WeightZ=1.0,

  Model1=MotionAndParameterOptimizationModel,Model2= InverseDynamicModel
  ) = {
    sRelOpt = {0.15,0.24,0.0};

  };


  CreateMarker  CLAV (
  MarkerName=CLAV,
  MarkerPlacement=Trunk.SegmentsThorax.ThoraxSeg,
  OptX="On",OptY="On",OptZ="Off",
  WeightX=1.0,WeightY=1.0,WeightZ=1.0,

  Model1=MotionAndParameterOptimizationModel,Model2= InverseDynamicModel
  ) = {
    sRelOpt = {0.085,0.42,0.0};
  };


  //
  //CreateMarker  RSHO (
  //MarkerName=RSHO,
  //MarkerPlacement=Right.ShoulderArm.Seg.Scapula,
  //OptX="On",OptY="On",OptZ="On",
  //WeightX=1.0,WeightY=1.0,WeightZ=1.0,

  //Model1=MotionAndParameterOptimizationModel,Model2= InverseDynamicModel
  //) = {
  //  sRelOpt = {0.03,-0.0,-0.04};
  //
  //};
  //
  //
  //
  //CreateMarker  LSHO (
  //MarkerName=LSHO,
  //MarkerPlacement=Left.ShoulderArm.Seg.Scapula,
  //OptX="On",OptY="On",OptZ="On",
  //WeightX=1.0,WeightY=1.0,WeightZ=1.0,

  //Model1=MotionAndParameterOptimizationModel,Model2= InverseDynamicModel
  //) = {
  //  sRelOpt = {0.03,0.0,-0.04};
  //};
  //
  //
  //
  //
  //CreateMarker  RUPA (
  //MarkerName=RUPA,
  //MarkerPlacement=Right.ShoulderArm.Seg.Humerus,
  //OptX="On",OptY="On",OptZ="On",
  //WeightX=1.0,WeightY=1.0,WeightZ=1.0,

  //Model1=MotionAndParameterOptimizationModel,Model2= InverseDynamicModel
  //) = {
  //  sRelOpt ={0.03,-0.24,0.01};
  //};
  //
  //
  ////rupa
  //
  //CreateMarker  LUPA (
  //MarkerName=LUPA,
  //MarkerPlacement=Left.ShoulderArm.Seg.Humerus,
  //OptX="On",OptY="On",OptZ="On",
  //WeightX=1.0,WeightY=1.0,WeightZ=1.0,

  //Model1=MotionAndParameterOptimizationModel,Model2= InverseDynamicModel
  //) = {
  //  sRelOpt ={-0.03,-0.12,0.01};
  //};
  //
  //
  //
  //
  //CreateMarker  RELB (
  //MarkerName=RELB,
  //MarkerPlacement=Right.ShoulderArm.Seg.Humerus,
  //OptX="Off",OptY="Off",OptZ="Off",
  //WeightX=1.0,WeightY=1.0,WeightZ=1.0,

  //Model1=MotionAndParameterOptimizationModel,Model2= InverseDynamicModel
  //) = {
  //  sRelOpt = {0.0,-0.34,-0.01};
  //};
  //
  //
  //
  //
  //
  //CreateMarker  LELB (
  //MarkerName=LELB,
  //MarkerPlacement=Left.ShoulderArm.Seg.Humerus,
  //OptX="Off",OptY="Off",OptZ="Off",
  //WeightX=1.0,WeightY=1.0,WeightZ=1.0,

  //Model1=MotionAndParameterOptimizationModel,Model2= InverseDynamicModel
  //) = {
  //  sRelOpt = {0.0,-0.34,-0.01};
  //};
  //
  //
  ////LFRA
  //
  //CreateMarker  LFRA (
  //MarkerName=LFRA,
  //MarkerPlacement=Left.ShoulderArm.Seg.Radius,
  //OptX="On",OptY="On",OptZ="On",
  //WeightX=1.0,WeightY=1.0,WeightZ=1.0,

  //Model1=MotionAndParameterOptimizationModel,Model2= InverseDynamicModel
  //) = {
  //  sRelOpt = {-0.09, 0.03, 0.03};
  //};
  //
  //
  //
  //
  //CreateMarker  RFRA (
  //MarkerName=RFRA,
  //MarkerPlacement=Right.ShoulderArm.Seg.Radius,
  //OptX="On",OptY="On",OptZ="On",
  //WeightX=1.0,WeightY=1.0,WeightZ=1.0,

  //Model1=MotionAndParameterOptimizationModel,Model2= InverseDynamicModel
  //) = {
  //  sRelOpt = {-0.16, -0.03, 0.03};
  //};
  //
  //
  //
  //
  //CreateMarker  RWRA (
  //MarkerName=RWRA,
  //MarkerPlacement=Right.ShoulderArm.Seg.Hand,
  //OptX="Off",OptY="Off",OptZ="Off",
  //WeightX=1.0,WeightY=1.0,WeightZ=1.0,

  //Model1=MotionAndParameterOptimizationModel,Model2= InverseDynamicModel
  //) = {
  //  sRelOpt = {-0.0,-0.07,0.01};
  //};
  //
  //
  //
  //
  //CreateMarker  RWRB (
  //MarkerName=RWRB,
  //MarkerPlacement=Right.ShoulderArm.Seg.Hand,
  //OptX="Off",OptY="Off",OptZ="Off",
  //WeightX=1.0,WeightY=1.0,WeightZ=1.0,

  //Model1=MotionAndParameterOptimizationModel,Model2= InverseDynamicModel
  //) = {
  //  sRelOpt = {0.0,0.07,0.01};
  //};
  //
  //
  //
  //
  //CreateMarker  LWRA (
  //MarkerName=LWRA,
  //MarkerPlacement=Left.ShoulderArm.Seg.Hand,
  //OptX="Off",OptY="Off",OptZ="Off",
  //WeightX=1.0,WeightY=1.0,WeightZ=1.0,

  //Model1=MotionAndParameterOptimizationModel,Model2= InverseDynamicModel
  //) = {
  //  sRelOpt = {-0.0,-0.07,0.01};
  //};
  //
  //
  //
  //
  //CreateMarker  LWRB (
  //MarkerName=LWRB,
  //MarkerPlacement=Left.ShoulderArm.Seg.Hand,
  //OptX="Off",OptY="Off",OptZ="Off",
  //WeightX=1.0,WeightY=1.0,WeightZ=1.0,

  //Model1=MotionAndParameterOptimizationModel,Model2= InverseDynamicModel
  //) = {
  //  sRelOpt = {0.0,0.07,0.01};
  //};
  //
  //
  //
  //
  //
  //CreateMarker  RFIN (
  //MarkerName=RFIN,
  //MarkerPlacement=Right.ShoulderArm.Seg.Hand,
  //OptX="Off",OptY="Off",OptZ="Off",
  //WeightX=1.0,WeightY=1.0,WeightZ=1.0,

  //Model1=MotionAndParameterOptimizationModel,Model2= InverseDynamicModel
  //) = {
  //  sRelOpt = {-0.085,-0.035,0.01};
  //};
  //
  //
  //
  //
  //CreateMarker  LFIN (
  //MarkerName=LFIN,
  //MarkerPlacement=Left.ShoulderArm.Seg.Hand,
  //OptX="Off",OptY="Off",OptZ="Off",
  //WeightX=1.0,WeightY=1.0,WeightZ=1.0,

  //Model1=MotionAndParameterOptimizationModel,Model2= InverseDynamicModel
  //) = {
  //  sRelOpt = {-0.085,-0.035,-0.01};
  //};
  //


};
