AnyFixedRefFrame Chart1Ref ={

  Origin = -{2,2,2};
  AnyChart Chart1 =
  {

    Style = {
      Sizes = {4,4,4};
      Axes = {
        Style = 0;
      };
    };

    Series =   {
      AnyVar Thickness = 3.0;
      AnyVec3 Color={0,0,1};

      AnyChartSerie M1 =     {
        Lines.RGB = .Color;
        Abscissa = "Main.OptStudy.Output.OptModel.OptimizedMarkers.MarkerTopology.M1.Node.r[0]";
        Abscissa2 = "Main.OptStudy.Output.OptModel.OptimizedMarkers.MarkerTopology.M1.Node.r[1]";
        Value = "Main.OptStudy.Output.OptModel.OptimizedMarkers.MarkerTopology.M1.Node.r[2]";
        Lines = { Thickness = ..Thickness;};
      };

      AnyChartSerie M2 =     {
        Lines.RGB = .Color;
        Abscissa = "Main.OptStudy.Output.OptModel.OptimizedMarkers.MarkerTopology.M2.Node.r[0]";
        Abscissa2 = "Main.OptStudy.Output.OptModel.OptimizedMarkers.MarkerTopology.M2.Node.r[1]";
        Value = "Main.OptStudy.Output.OptModel.OptimizedMarkers.MarkerTopology.M2.Node.r[2]";
        Lines = { Thickness = ..Thickness;};
      };

      AnyChartSerie M3 =     {
        Lines.RGB = .Color;
        Abscissa = "Main.OptStudy.Output.OptModel.OptimizedMarkers.MarkerTopology.M3.Node.r[0]";
        Abscissa2 = "Main.OptStudy.Output.OptModel.OptimizedMarkers.MarkerTopology.M3.Node.r[1]";
        Value = "Main.OptStudy.Output.OptModel.OptimizedMarkers.MarkerTopology.M3.Node.r[2]";
        Lines = { Thickness = ..Thickness;};
      };

      AnyChartSerie M4 =     {
        Lines.RGB = .Color;
        Abscissa = "Main.OptStudy.Output.OptModel.OptimizedMarkers.MarkerTopology.M4.Node.r[0]";
        Abscissa2 = "Main.OptStudy.Output.OptModel.OptimizedMarkers.MarkerTopology.M4.Node.r[1]";
        Value = "Main.OptStudy.Output.OptModel.OptimizedMarkers.MarkerTopology.M4.Node.r[2]";
        Lines = { Thickness = ..Thickness;};
      };

      AnyChartSerie M5 =     {
        Lines.RGB = .Color;
        Abscissa = "Main.OptStudy.Output.OptModel.OptimizedMarkers.MarkerTopology.M5.Node.r[0]";
        Abscissa2 = "Main.OptStudy.Output.OptModel.OptimizedMarkers.MarkerTopology.M5.Node.r[1]";
        Value = "Main.OptStudy.Output.OptModel.OptimizedMarkers.MarkerTopology.M5.Node.r[2]";
        Lines = { Thickness = ..Thickness;};
      };

      AnyChartSerie M6 =     {
        Lines.RGB = .Color;
        Abscissa = "Main.OptStudy.Output.OptModel.OptimizedMarkers.MarkerTopology.M6.Node.r[0]";
        Abscissa2 = "Main.OptStudy.Output.OptModel.OptimizedMarkers.MarkerTopology.M6.Node.r[1]";
        Value = "Main.OptStudy.Output.OptModel.OptimizedMarkers.MarkerTopology.M6.Node.r[2]";
        Lines = { Thickness = ..Thickness;};
      };

      AnyChartSerie M7 =     {
        Lines.RGB = .Color;
        Abscissa = "Main.OptStudy.Output.OptModel.OptimizedMarkers.MarkerTopology.M7.Node.r[0]";
        Abscissa2 = "Main.OptStudy.Output.OptModel.OptimizedMarkers.MarkerTopology.M7.Node.r[1]";
        Value = "Main.OptStudy.Output.OptModel.OptimizedMarkers.MarkerTopology.M7.Node.r[2]";
        Lines = { Thickness = ..Thickness;};
      };

      AnyChartSerie M8 =     {
        Lines.RGB = .Color;
        Abscissa = "Main.OptStudy.Output.OptModel.OptimizedMarkers.MarkerTopology.M8.Node.r[0]";
        Abscissa2 = "Main.OptStudy.Output.OptModel.OptimizedMarkers.MarkerTopology.M8.Node.r[1]";
        Value = "Main.OptStudy.Output.OptModel.OptimizedMarkers.MarkerTopology.M8.Node.r[2]";
        Lines = { Thickness = ..Thickness;};
      };

      AnyChartSerie M9 =     {
        Lines.RGB = .Color;
        Abscissa = "Main.OptStudy.Output.OptModel.OptimizedMarkers.MarkerTopology.M9.Node.r[0]";
        Abscissa2 = "Main.OptStudy.Output.OptModel.OptimizedMarkers.MarkerTopology.M9.Node.r[1]";
        Value = "Main.OptStudy.Output.OptModel.OptimizedMarkers.MarkerTopology.M9.Node.r[2]";
        Lines = { Thickness = ..Thickness;};
      };

      AnyChartSerie M10 =     {
        Lines.RGB = .Color;
        Abscissa = "Main.OptStudy.Output.OptModel.OptimizedMarkers.MarkerTopology.M10.Node.r[0]";
        Abscissa2 = "Main.OptStudy.Output.OptModel.OptimizedMarkers.MarkerTopology.M10.Node.r[1]";
        Value = "Main.OptStudy.Output.OptModel.OptimizedMarkers.MarkerTopology.M10.Node.r[2]";
        Lines = { Thickness = ..Thickness;};
      };

      AnyChartSerie M11 =     {
        Lines.RGB = .Color;
        Abscissa = "Main.OptStudy.Output.OptModel.OptimizedMarkers.MarkerTopology.M11.Node.r[0]";
        Abscissa2 = "Main.OptStudy.Output.OptModel.OptimizedMarkers.MarkerTopology.M11.Node.r[1]";
        Value = "Main.OptStudy.Output.OptModel.OptimizedMarkers.MarkerTopology.M11.Node.r[2]";
        Lines = { Thickness = ..Thickness;};
      };
      AnyChartSerie M12 =     {
        Lines.RGB = .Color;
        Abscissa = "Main.OptStudy.Output.OptModel.OptimizedMarkers.MarkerTopology.M12.Node.r[0]";
        Abscissa2 = "Main.OptStudy.Output.OptModel.OptimizedMarkers.MarkerTopology.M12.Node.r[1]";
        Value = "Main.OptStudy.Output.OptModel.OptimizedMarkers.MarkerTopology.M12.Node.r[2]";
        Lines = { Thickness = ..Thickness;};
      };

      AnyChartSerie M13 =     {
        Lines.RGB = .Color;
        Abscissa = "Main.OptStudy.Output.OptModel.OptimizedMarkers.MarkerTopology.M13.Node.r[0]";
        Abscissa2 = "Main.OptStudy.Output.OptModel.OptimizedMarkers.MarkerTopology.M13.Node.r[1]";
        Value = "Main.OptStudy.Output.OptModel.OptimizedMarkers.MarkerTopology.M13.Node.r[2]";
        Lines = { Thickness = ..Thickness;};
      };
      AnyChartSerie M14 =     {
        Lines.RGB = .Color;
        Abscissa = "Main.OptStudy.Output.OptModel.OptimizedMarkers.MarkerTopology.M14.Node.r[0]";
        Abscissa2 = "Main.OptStudy.Output.OptModel.OptimizedMarkers.MarkerTopology.M14.Node.r[1]";
        Value = "Main.OptStudy.Output.OptModel.OptimizedMarkers.MarkerTopology.M14.Node.r[2]";
        Lines = { Thickness = ..Thickness;};
      };
      AnyChartSerie M15 =     {
        Lines.RGB = .Color;
        Abscissa = "Main.OptStudy.Output.OptModel.OptimizedMarkers.MarkerTopology.M15.Node.r[0]";
        Abscissa2 = "Main.OptStudy.Output.OptModel.OptimizedMarkers.MarkerTopology.M15.Node.r[1]";
        Value = "Main.OptStudy.Output.OptModel.OptimizedMarkers.MarkerTopology.M15.Node.r[2]";
        Lines = { Thickness = ..Thickness;};
      };
      AnyChartSerie M16 =     {
        Lines.RGB = .Color;
        Abscissa = "Main.OptStudy.Output.OptModel.OptimizedMarkers.MarkerTopology.M16.Node.r[0]";
        Abscissa2 = "Main.OptStudy.Output.OptModel.OptimizedMarkers.MarkerTopology.M16.Node.r[1]";
        Value = "Main.OptStudy.Output.OptModel.OptimizedMarkers.MarkerTopology.M16.Node.r[2]";
        Lines = { Thickness = ..Thickness;};
      };


      AnyVec3 Color2={1,0,0};


      AnyChartSerie MM1 =     {
        Lines.RGB = .Color2;
        Abscissa = "Main.OptStudy.Output.OptModel.OptimizedMarkers.MarkerTopology.M1.FreeMarker.r[0]";
        Abscissa2 = "Main.OptStudy.Output.OptModel.OptimizedMarkers.MarkerTopology.M1.FreeMarker.r[1]";
        Value = "Main.OptStudy.Output.OptModel.OptimizedMarkers.MarkerTopology.M1.FreeMarker.r[2]";
        Lines = { Thickness = ..Thickness;};
      };

      AnyChartSerie MM2 =     {
        Lines.RGB = .Color2;
        Abscissa = "Main.OptStudy.Output.OptModel.OptimizedMarkers.MarkerTopology.M2.FreeMarker.r[0]";
        Abscissa2 = "Main.OptStudy.Output.OptModel.OptimizedMarkers.MarkerTopology.M2.FreeMarker.r[1]";
        Value = "Main.OptStudy.Output.OptModel.OptimizedMarkers.MarkerTopology.M2.FreeMarker.r[2]";
        Lines = { Thickness = ..Thickness;};
      };

      AnyChartSerie MM3 =     {
        Lines.RGB = .Color2;
        Abscissa = "Main.OptStudy.Output.OptModel.OptimizedMarkers.MarkerTopology.M3.FreeMarker.r[0]";
        Abscissa2 = "Main.OptStudy.Output.OptModel.OptimizedMarkers.MarkerTopology.M3.FreeMarker.r[1]";
        Value = "Main.OptStudy.Output.OptModel.OptimizedMarkers.MarkerTopology.M3.FreeMarker.r[2]";
        Lines = { Thickness = ..Thickness;};
      };

      AnyChartSerie MM4 =     {
        Lines.RGB = .Color2;
        Abscissa = "Main.OptStudy.Output.OptModel.OptimizedMarkers.MarkerTopology.M4.FreeMarker.r[0]";
        Abscissa2 = "Main.OptStudy.Output.OptModel.OptimizedMarkers.MarkerTopology.M4.FreeMarker.r[1]";
        Value = "Main.OptStudy.Output.OptModel.OptimizedMarkers.MarkerTopology.M4.FreeMarker.r[2]";
        Lines = { Thickness = ..Thickness;};
      };

      AnyChartSerie MM5 =     {
        Lines.RGB = .Color2;
        Abscissa = "Main.OptStudy.Output.OptModel.OptimizedMarkers.MarkerTopology.M5.FreeMarker.r[0]";
        Abscissa2 = "Main.OptStudy.Output.OptModel.OptimizedMarkers.MarkerTopology.M5.FreeMarker.r[1]";
        Value = "Main.OptStudy.Output.OptModel.OptimizedMarkers.MarkerTopology.M5.FreeMarker.r[2]";
        Lines = { Thickness = ..Thickness;};
      };

      AnyChartSerie MM6 =     {
        Lines.RGB = .Color2;
        Abscissa = "Main.OptStudy.Output.OptModel.OptimizedMarkers.MarkerTopology.M6.FreeMarker.r[0]";
        Abscissa2 = "Main.OptStudy.Output.OptModel.OptimizedMarkers.MarkerTopology.M6.FreeMarker.r[1]";
        Value = "Main.OptStudy.Output.OptModel.OptimizedMarkers.MarkerTopology.M6.FreeMarker.r[2]";
        Lines = { Thickness = ..Thickness;};
      };

      AnyChartSerie MM7 =     {
        Lines.RGB = .Color2;
        Abscissa = "Main.OptStudy.Output.OptModel.OptimizedMarkers.MarkerTopology.M7.FreeMarker.r[0]";
        Abscissa2 = "Main.OptStudy.Output.OptModel.OptimizedMarkers.MarkerTopology.M7.FreeMarker.r[1]";
        Value = "Main.OptStudy.Output.OptModel.OptimizedMarkers.MarkerTopology.M7.FreeMarker.r[2]";
        Lines = { Thickness = ..Thickness;};
      };

      AnyChartSerie MM8 =     {
        Lines.RGB = .Color2;
        Abscissa = "Main.OptStudy.Output.OptModel.OptimizedMarkers.MarkerTopology.M8.FreeMarker.r[0]";
        Abscissa2 = "Main.OptStudy.Output.OptModel.OptimizedMarkers.MarkerTopology.M8.FreeMarker.r[1]";
        Value = "Main.OptStudy.Output.OptModel.OptimizedMarkers.MarkerTopology.M8.FreeMarker.r[2]";
        Lines = { Thickness = ..Thickness;};
      };

      AnyChartSerie MM9 =     {
        Lines.RGB = .Color2;
        Abscissa = "Main.OptStudy.Output.OptModel.OptimizedMarkers.MarkerTopology.M9.FreeMarker.r[0]";
        Abscissa2 = "Main.OptStudy.Output.OptModel.OptimizedMarkers.MarkerTopology.M9.FreeMarker.r[1]";
        Value = "Main.OptStudy.Output.OptModel.OptimizedMarkers.MarkerTopology.M9.FreeMarker.r[2]";
        Lines = { Thickness = ..Thickness;};
      };

      AnyChartSerie MM10 =     {
        Lines.RGB = .Color2;
        Abscissa = "Main.OptStudy.Output.OptModel.OptimizedMarkers.MarkerTopology.M10.FreeMarker.r[0]";
        Abscissa2 = "Main.OptStudy.Output.OptModel.OptimizedMarkers.MarkerTopology.M10.FreeMarker.r[1]";
        Value = "Main.OptStudy.Output.OptModel.OptimizedMarkers.MarkerTopology.M10.FreeMarker.r[2]";
        Lines = { Thickness = ..Thickness;};
      };

      AnyChartSerie MM11 =     {
        Lines.RGB = .Color2;
        Abscissa = "Main.OptStudy.Output.OptModel.OptimizedMarkers.MarkerTopology.M11.FreeMarker.r[0]";
        Abscissa2 = "Main.OptStudy.Output.OptModel.OptimizedMarkers.MarkerTopology.M11.FreeMarker.r[1]";
        Value = "Main.OptStudy.Output.OptModel.OptimizedMarkers.MarkerTopology.M11.FreeMarker.r[2]";
        Lines = { Thickness = ..Thickness;};
      };
      AnyChartSerie MM12 =     {
        Lines.RGB = .Color2;
        Abscissa = "Main.OptStudy.Output.OptModel.OptimizedMarkers.MarkerTopology.M12.FreeMarker.r[0]";
        Abscissa2 = "Main.OptStudy.Output.OptModel.OptimizedMarkers.MarkerTopology.M12.FreeMarker.r[1]";
        Value = "Main.OptStudy.Output.OptModel.OptimizedMarkers.MarkerTopology.M12.FreeMarker.r[2]";
        Lines = { Thickness = ..Thickness;};
      };

      AnyChartSerie MM13 =     {
        Lines.RGB = .Color2;
        Abscissa = "Main.OptStudy.Output.OptModel.OptimizedMarkers.MarkerTopology.M13.FreeMarker.r[0]";
        Abscissa2 = "Main.OptStudy.Output.OptModel.OptimizedMarkers.MarkerTopology.M13.FreeMarker.r[1]";
        Value = "Main.OptStudy.Output.OptModel.OptimizedMarkers.MarkerTopology.M13.FreeMarker.r[2]";
        Lines = { Thickness = ..Thickness;};
      };
      AnyChartSerie MM14 =     {
        Lines.RGB = .Color2;
        Abscissa = "Main.OptStudy.Output.OptModel.OptimizedMarkers.MarkerTopology.M14.FreeMarker.r[0]";
        Abscissa2 = "Main.OptStudy.Output.OptModel.OptimizedMarkers.MarkerTopology.M14.FreeMarker.r[1]";
        Value = "Main.OptStudy.Output.OptModel.OptimizedMarkers.MarkerTopology.M14.FreeMarker.r[2]";
        Lines = { Thickness = ..Thickness;};
      };
      AnyChartSerie MM15 =     {
        Lines.RGB = .Color2;
        Abscissa = "Main.OptStudy.Output.OptModel.OptimizedMarkers.MarkerTopology.M15.FreeMarker.r[0]";
        Abscissa2 = "Main.OptStudy.Output.OptModel.OptimizedMarkers.MarkerTopology.M15.FreeMarker.r[1]";
        Value = "Main.OptStudy.Output.OptModel.OptimizedMarkers.MarkerTopology.M15.FreeMarker.r[2]";
        Lines = { Thickness = ..Thickness;};
      };
      AnyChartSerie MM16 =     {
        Lines.RGB = .Color2;
        Abscissa = "Main.OptStudy.Output.OptModel.OptimizedMarkers.MarkerTopology.M16.FreeMarker.r[0]";
        Abscissa2 = "Main.OptStudy.Output.OptModel.OptimizedMarkers.MarkerTopology.M16.FreeMarker.r[1]";
        Value = "Main.OptStudy.Output.OptModel.OptimizedMarkers.MarkerTopology.M16.FreeMarker.r[2]";
        Lines = { Thickness = ..Thickness;};
      };


    };


  AbsAxis = {
    Visible = Off;
    Min = -2;
    Max = 2;
    AutoMin = Off;
    AutoMax = Off;

    Unit1 = {
      Unit = 50;
    };
  };

  AbsAxis2 =
  {
    Visible = Off;
    Min = -2;
    Max = 2;
    AutoMin = Off;
    AutoMax = Off;

    Unit1 = {
      Unit = 50;
    };


  };

  ValueAxis =
  {
    Visible = Off;
    Min = -2;
    Max = 2;
    AutoMin = Off;
    AutoMax = Off;

    Unit1 = {
      Unit = 50;
    };
  };
};
//
};
