AnyFolder Markers = {
  AnyVar ScaleFactor = 0.001000;


  AnyFixedRefFrame GlobalRef= {
    Axes=....Orientation;
//    AnyDrawRefFrame drw={
//      ScaleXYZ={0.1,0.1,0.1};
//      RGB={0,0,1};
//    };
  };

//  AnyFolder LWRA = {
//    AnyString Label =  "LWRA";
//    AnyFolder &HeaderFolder =Main.C3DFileData.Header;
//    AnyFolder &DataFolder=Main.C3DFileData.Markers.LWRA;
//    #include "MarkerMover.any "
//  };
//  AnyFolder RFIN = {
//    AnyString Label =  "RFIN";
//    AnyFolder &HeaderFolder =Main.C3DFileData.Header;
//    AnyFolder &DataFolder=Main.C3DFileData.Markers.RFIN;
//    #include "MarkerMover.any "
//  };
  AnyFolder LASI = {
    AnyString Label =  "LASI";
    AnyFolder &HeaderFolder =Main.C3DFileData.Header;
    AnyFolder &DataFolder=Main.C3DFileData.Markers.LASI;
    #include "MarkerMover.any "
  };
//  AnyFolder LFIN = {
//    AnyString Label =  "LFIN";
//    AnyFolder &HeaderFolder =Main.C3DFileData.Header;
//    AnyFolder &DataFolder=Main.C3DFileData.Markers.LFIN;
//    #include "MarkerMover.any "
//  };
//  AnyFolder LFRA = {
//    AnyString Label =  "LFRA";
//
//    AnyFolder &HeaderFolder =Main.C3DFileData.Header;
//    AnyFolder &DataFolder=Main.C3DFileData.Markers.LFRA;
//    #include "MarkerMover.any "
//  };
  AnyFolder RKNE = {
    AnyString Label =  "RKNE";

    AnyFolder &HeaderFolder =Main.C3DFileData.Header;
    AnyFolder &DataFolder=Main.C3DFileData.Markers.RKNE;
    #include "MarkerMover.any "
  };
  AnyFolder RTOE = {
    AnyString Label =  "RTOE";

    AnyFolder &HeaderFolder =Main.C3DFileData.Header;
    AnyFolder &DataFolder=Main.C3DFileData.Markers.RTOE;
    #include "MarkerMover.any "
  };
  AnyFolder RASI = {
    AnyString Label =  "RASI";

    AnyFolder &HeaderFolder =Main.C3DFileData.Header;
    AnyFolder &DataFolder=Main.C3DFileData.Markers.RASI;
    #include "MarkerMover.any "
  };
//  AnyFolder RFRA = {
//    AnyString Label =  "RFRA";
//
//    AnyFolder &HeaderFolder =Main.C3DFileData.Header;
//    AnyFolder &DataFolder=Main.C3DFileData.Markers.RFRA;
//    #include "MarkerMover.any "
//  };
//  AnyFolder RUPA = {
//    AnyString Label =  "RUPA";
//
//    AnyFolder &HeaderFolder =Main.C3DFileData.Header;
//    AnyFolder &DataFolder=Main.C3DFileData.Markers.RUPA;
//    #include "MarkerMover.any "
//  };
//  AnyFolder LSHO = {
//
//    AnyString Label =  "LSHO";
//
//    AnyFolder &HeaderFolder =Main.C3DFileData.Header;
//    AnyFolder &DataFolder=Main.C3DFileData.Markers.LSHO;
//    #include "MarkerMover.any "
//  };
//  AnyFolder RWRA = {
//    AnyString Label =  "RWRA";
//
//    AnyFolder &HeaderFolder =Main.C3DFileData.Header;
//    AnyFolder &DataFolder=Main.C3DFileData.Markers.RWRA;
//    #include "MarkerMover.any "
//  };
//  AnyFolder LWRB = {
//    AnyString Label =  "LWRB";
//
//    AnyFolder &HeaderFolder =Main.C3DFileData.Header;
//    AnyFolder &DataFolder=Main.C3DFileData.Markers.LWRB;
//    #include "MarkerMover.any "
//  };
//  AnyFolder RFHD = {
//    AnyString Label =  "RFHD";
//
//    AnyFolder &HeaderFolder =Main.C3DFileData.Header;
//    AnyFolder &DataFolder=Main.C3DFileData.Markers.RFHD;
//    #include "MarkerMover.any "
//  };
//  AnyFolder RWRB = {
//    AnyString Label =  "RWRB";
//
//    AnyFolder &HeaderFolder =Main.C3DFileData.Header;
//    AnyFolder &DataFolder=Main.C3DFileData.Markers.RWRB;
//    #include "MarkerMover.any "
//  };
//  AnyFolder RSHO = {
//    AnyString Label =  "RSHO";
//
//    AnyFolder &HeaderFolder =Main.C3DFileData.Header;
//    AnyFolder &DataFolder=Main.C3DFileData.Markers.RSHO;
//    #include "MarkerMover.any "
//  };
//  AnyFolder LUPA = {
//    AnyString Label =  "LUPA";
//
//    AnyFolder &HeaderFolder =Main.C3DFileData.Header;
//    AnyFolder &DataFolder=Main.C3DFileData.Markers.LUPA;
//    #include "MarkerMover.any "
//  };
//  AnyFolder CLAV = {
//
//    AnyString Label =  "CLAV";
//
//    AnyFolder &HeaderFolder =Main.C3DFileData.Header;
//    AnyFolder &DataFolder=Main.C3DFileData.Markers.CLAV;
//    #include "MarkerMover.any "
//  };
//  AnyFolder STRN = {
//    AnyString Label =  "STRN";
//
//    AnyFolder &HeaderFolder =Main.C3DFileData.Header;
//    AnyFolder &DataFolder=Main.C3DFileData.Markers.STRN;
//    #include "MarkerMover.any "
//  };
  AnyFolder RTIB = {
    AnyString Label =  "RTIB";

    AnyFolder &HeaderFolder =Main.C3DFileData.Header;
    AnyFolder &DataFolder=Main.C3DFileData.Markers.RTIB;
    #include "MarkerMover.any "
  };
//  AnyFolder LFHD = {
//    AnyString Label =  "LFHD";
//
//    AnyFolder &HeaderFolder =Main.C3DFileData.Header;
//    AnyFolder &DataFolder=Main.C3DFileData.Markers.LFHD;
//    #include "MarkerMover.any "
//  };
//  AnyFolder RELB = {
//    AnyString Label =  "RELB";
//
//    AnyFolder &HeaderFolder =Main.C3DFileData.Header;
//    AnyFolder &DataFolder=Main.C3DFileData.Markers.RELB;
//    #include "MarkerMover.any "
//  };
  AnyFolder LKNE = {
    AnyString Label =  "LKNE";

    AnyFolder &HeaderFolder =Main.C3DFileData.Header;
    AnyFolder &DataFolder=Main.C3DFileData.Markers.LKNE;
    #include "MarkerMover.any "
  };
  AnyFolder LTHI = {
    AnyString Label =  "LTHI";

    AnyFolder &HeaderFolder =Main.C3DFileData.Header;
    AnyFolder &DataFolder=Main.C3DFileData.Markers.LTHI;
    #include "MarkerMover.any "
  };
  AnyFolder LTOE = {
    AnyString Label =  "LTOE";

    AnyFolder &HeaderFolder =Main.C3DFileData.Header;
    AnyFolder &DataFolder=Main.C3DFileData.Markers.LTOE;
    #include "MarkerMover.any "
  };
//  AnyFolder RBHD = {
//
//    AnyString Label =  "RBHD";
//
//    AnyFolder &HeaderFolder =Main.C3DFileData.Header;
//    AnyFolder &DataFolder=Main.C3DFileData.Markers.RBHD;
//    #include "MarkerMover.any "
//  };
  AnyFolder LANK = {
    AnyString Label =  "LANK";

    AnyFolder &HeaderFolder =Main.C3DFileData.Header;
    AnyFolder &DataFolder=Main.C3DFileData.Markers.LANK;
    #include "MarkerMover.any "
  };
//  AnyFolder LBHD = {
//    AnyString Label =  "LBHD";
//
//    AnyFolder &HeaderFolder =Main.C3DFileData.Header;
//    AnyFolder &DataFolder=Main.C3DFileData.Markers.LBHD;
//    #include "MarkerMover.any "
//  };
//  AnyFolder LELB = {
//    AnyString Label =  "LELB";
//
//    AnyFolder &HeaderFolder =Main.C3DFileData.Header;
//    AnyFolder &DataFolder=Main.C3DFileData.Markers.LELB;
//    #include "MarkerMover.any "
//  };
//  AnyFolder C7 = {
//    AnyString Label =  "C7";
//
//    AnyFolder &HeaderFolder =Main.C3DFileData.Header;
//    AnyFolder &DataFolder=Main.C3DFileData.Markers.C7;
//    #include "MarkerMover.any "
//  };
  AnyFolder LTIB = {
    AnyString Label =  "LTIB";

    AnyFolder &HeaderFolder =Main.C3DFileData.Header;
    AnyFolder &DataFolder=Main.C3DFileData.Markers.LTIB;
    #include "MarkerMover.any "
  };
//  AnyFolder RBAK = {
//    AnyString Label =  "RBAK";
//
//    AnyFolder &HeaderFolder =Main.C3DFileData.Header;
//    AnyFolder &DataFolder=Main.C3DFileData.Markers.RBAK;
//    #include "MarkerMover.any "
//  };
  AnyFolder LHEE = {
    AnyString Label =  "LHEE";

    AnyFolder &HeaderFolder =Main.C3DFileData.Header;
    AnyFolder &DataFolder=Main.C3DFileData.Markers.LHEE;
    #include "MarkerMover.any "
  };
  AnyFolder LPSI = {
    AnyString Label =  "LPSI";

    AnyFolder &HeaderFolder =Main.C3DFileData.Header;
    AnyFolder &DataFolder=Main.C3DFileData.Markers.LPSI;
    #include "MarkerMover.any "
  };
  AnyFolder RPSI = {
    AnyString Label =  "RPSI";

    AnyFolder &HeaderFolder =Main.C3DFileData.Header;
    AnyFolder &DataFolder=Main.C3DFileData.Markers.RPSI;
    #include "MarkerMover.any "
  };
//  AnyFolder T10 = {
//    AnyString Label =  "T10";
//
//    AnyFolder &HeaderFolder =Main.C3DFileData.Header;
//    AnyFolder &DataFolder=Main.C3DFileData.Markers.T10;
//    #include "MarkerMover.any "
//  };
  AnyFolder RHEE = {
    AnyString Label =  "RHEE";

    AnyFolder &HeaderFolder =Main.C3DFileData.Header;
    AnyFolder &DataFolder=Main.C3DFileData.Markers.RHEE;
    #include "MarkerMover.any "
  };
  AnyFolder RANK = {
    AnyString Label =  "RANK";

    AnyFolder &HeaderFolder =Main.C3DFileData.Header;
    AnyFolder &DataFolder=Main.C3DFileData.Markers.RANK;
    #include "MarkerMover.any "
  };
  AnyFolder RTHI = {
    AnyString Label =  "RTHI";

    AnyFolder &HeaderFolder =Main.C3DFileData.Header;
    AnyFolder &DataFolder=Main.C3DFileData.Markers.RTHI;
    #include "MarkerMover.any "
  };
};
