  AnyVar StepSize=(Main.OptStudy.tEnd-Main.MarkerModelStudy.tStart)/(Main.OptStudy.nStep-1);
  AnyVar IndexTemp =(Main.PostStudy.t-Main.PostStudy.tStart)/StepSize;
  AnyInt IndexTemp1=floor(IndexTemp);

  AnyInt Index = iffun(ltfun(IndexTemp1,0),0,IndexTemp1);


AnyChart Chart1 = {
    Style = {
      Sizes = {1,1,1}*0.2;
      Axes = {
        Thickness = 0.01;
      };
    };

    Series = {

      AnyFloat EMG = Main.OptStudy.EMGComparison.BicepsFemorisCaputLongum1.ModelFun()[..Index]/(max(Main.Main.OptStudy.EMGComparison.BicepsFemorisCaputLongum1.ModelFun())+0.000001);


      AnyChartSerie Serie1 = {
        Lines.RGB = {0,0,1};
        Abscissa  = Main.OptStudy.Output.Abscissa.t;
        Value     = .EMG;
        Lines = {
          Thickness = 0.01;
        };
      };

    };


    AbsAxis = {
      AutoMin = Off;
      AutoMax = Off;
      Min = 0.0;
      Max = 10;
      Title = {
        Text = "Time [s]";
        Font = {
          Height = 20;
          Width = 8;
          Bold = On;
        };
      };
      Unit1 = {
        Unit = 2.5;
        TextFont = {
          //FontName = "Courier";
          FontName = "Times New Roman";
          Height = 20;
          Width = 8;
        };
        TextSpace = 0.01;
        NumberFormat = {
          Digits = 2;
        };
      };
    };

    AbsAxis2 = {
      Visible = Off;
      Unit1 = {
        Visible = Off;
      };
    };

    ValueAxis = {

      AutoMin = Off;
      AutoMax = Off;
      Min = 0.0;
      Max = 400;
      Title = {
        Text = "Joint Reaction Force [N]";
        Font = {
          Height = 20;
          Width = 8;
          Bold = On;
        };
      };
      Unit1 = {
        Unit = 50;
        TextFont = {
          Height = 20;
          Width = 8;
        };
        TextSpace = 0.01;
        NumberFormat = {
          Digits = 2;
        };
      };
    };

  }; // My Chart
