  Main = {
 AnyFolder C3DFileData ={
#include "trial13.Header.any"
#include "trial13.Groups.any"
#include "trial13.Analog.any"
#include "trial13.PointsMarkers.any"
#include "trial13.PointsProcessed.any"
 };
 AnyFolder Model ={
#include "trial13.MarkerListMover.any"
 };
 AnyBodyStudy Study = {
  AnyFolder &Model = .Model;
 RecruitmentSolver = MinMaxNRSimplex;
  nStep=317;
  Gravity = {0.0000, 0.00000,-9.81};
 tStart=2.6916666666667;
 tEnd= 5.3333333333333;
 };
  };
