AnyFolder Groups = {
  AnyFolder TRIAL = {
    AnyInt ID = -1;
    AnyString locked = "UNLOCKED";
    AnyString Description = "";
    AnyFolder ACTUAL_START_FIELD = {
      AnyInt ID = 1;
      AnyString locked = "UNLOCKED";
      AnyString Description = "";
      AnyInt Data = {323, 0};
    };
    AnyFolder ACTUAL_END_FIELD = {
      AnyInt ID = 1;
      AnyString locked = "UNLOCKED";
      AnyString Description = "";
      AnyInt Data = {640, 0};
    };
    AnyFolder CAMERA_RATE = {
      AnyInt ID = 1;
      AnyString locked = "UNLOCKED";
      AnyString Description = "";
      AnyFloat Data = 120.0000000000;
    };
    AnyFolder VIDEO_RATE_DIVIDER = {
      AnyInt ID = 1;
      AnyString locked = "UNLOCKED";
      AnyString Description = "";
      AnyInt Data = 1;
    };
  };

  AnyFolder POINT = {
    AnyInt ID = -3;
    AnyString locked = "UNLOCKED";
    AnyString Description = "";
    AnyFolder USED = {
      AnyInt ID = 3;
      AnyString locked = "UNLOCKED";
      AnyString Description = "";
      AnyInt Data = 197;
    };
    AnyFolder FRAMES = {
      AnyInt ID = 3;
      AnyString locked = "UNLOCKED";
      AnyString Description = "";
      AnyInt Data = 318;
    };
    AnyFolder DATA_START = {
      AnyInt ID = 3;
      AnyString locked = "UNLOCKED";
      AnyString Description = "";
      AnyInt Data = 67;
    };
    AnyFolder SCALE = {
      AnyInt ID = 3;
      AnyString locked = "UNLOCKED";
      AnyString Description = "";
      AnyFloat Data = -0.1000000015;
    };
    AnyFolder RATE = {
      AnyInt ID = 3;
      AnyString locked = "UNLOCKED";
      AnyString Description = "";
      AnyFloat Data = 120.0000000000;
    };
    AnyFolder MOVIE_DELAY = {
      AnyInt ID = 3;
      AnyString locked = "UNLOCKED";
      AnyString Description = "";
      AnyFloat Data = -0.2166669965;
    };
    AnyFolder X_SCREEN = {
      AnyInt ID = 3;
      AnyString locked = "UNLOCKED";
      AnyString Description = "";
      AnyString Data = {"+", "X"};
    };
    AnyFolder Y_SCREEN = {
      AnyInt ID = 3;
      AnyString locked = "UNLOCKED";
      AnyString Description = "";
      AnyString Data = {"+", "Z"};
    };
    AnyFolder UNITS = {
      AnyInt ID = 3;
      AnyString locked = "UNLOCKED";
      AnyString Description = "";
      AnyString Data = {"m", "m"};
    };
    AnyFolder ANGLE_UNITS = {
      AnyInt ID = 3;
      AnyString locked = "UNLOCKED";
      AnyString Description = "";
      AnyString Data = {"d", "e", "g"};
    };
    AnyFolder FORCE_UNITS = {
      AnyInt ID = 3;
      AnyString locked = "UNLOCKED";
      AnyString Description = "";
      AnyString Data = {"N"};
    };
    AnyFolder MOMENT_UNITS = {
      AnyInt ID = 3;
      AnyString locked = "UNLOCKED";
      AnyString Description = "";
      AnyString Data = {"N", "m", "m"};
    };
    AnyFolder POWER_UNITS = {
      AnyInt ID = 3;
      AnyString locked = "UNLOCKED";
      AnyString Description = "";
      AnyString Data = {"W"};
    };
    AnyFolder SCALAR_UNITS = {
      AnyInt ID = 3;
      AnyString locked = "UNLOCKED";
      AnyString Description = "";
      AnyString Data = {"m", "m"};
    };
    AnyFolder LABELS = {
      AnyInt ID = 3;
      AnyString locked = "UNLOCKED";
      AnyString Description = "";
      AnyString Data = {{  "L", "W", "R", "A", " ", " ", " ", " ", " ", " ", " ", " ", " ", " ", " ", " ", " ", " ", " ", " ", " ", " ", " ", " ", " "}, {  "R", "F", "I", "N", " ", " ", " ", " ", " ", " ", " ", " ", " ", " ", " ", " ", " ", " ", " ", " ", " ", " ", " ", " ", " "}, {  "L", "A", "S", "I", " ", " ", " ", " ", " ", " ", " ", " ", " ", " ", " ", " ", " ", " ", " ", " ", " ", " ", " ", " ", " "}, {  "L", "F", "I", "N", " ", " ", " ", " ", " ", " ", " ", " ", " ", " ", " ", " ", " ", " ", " ", " ", " ", " ", " ", " ", " "}, {  "L", "F", "R", "A", " ", " ", " ", " ", " ", " ", " ", " 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
    };
    AnyFolder DESCRIPTIONS = {
      AnyInt ID = 3;
      AnyString locked = "UNLOCKED";
      AnyString Description = "";
      AnyString Data = {{"L", "e", "f", "t", " ", "w", "r", "i", "s", "t", " ", "b", "a", "r", " ", "t", "h", "u", "m", "b", " ", "s", "i", "d", "e", " ", "(", "a", "l", "t", "e", "r", "n", "a", "t", "i", "v", "e", " ", "p", "a", "i", "r", " ", "1", ")", " ", " ", " ", " "}, {"R", "i", "g", "h", "t", " ", "f", "i", "n", "g", "e", "r", " ", " ", " ", " ", " ", " ", " ", " ", " ", " ", " ", " ", " ", " ", " ", " ", " ", " ", " ", " ", " ", " ", " ", " ", " ", " ", " ", " ", " ", " ", " ", " ", " ", " ", " ", " ", " ", " "}, {"L", "e", "f", "t", " ", "A", "S", "I", "S", " ", " ", " ", " ", " ", "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
    };
    AnyFolder TYPE_GROUPS = {
      AnyInt ID = 3;
      AnyString locked = "UNLOCKED";
      AnyString Description = "";
      AnyString Data = {{{"A", "N", "G", "L", "E", "S", " ", " ", " ", " ", " ", " ", " ", " ", " ", " ", " ", " ", " ", " "}, {"A", "N", "G", "L", "E", " ", " ", " ", " ", " ", " ", " ", " ", " ", " ", " ", " ", " ", " ", " "}}, {{"F", "O", "R", "C", "E", "S", " ", " ", " ", " ", " ", " ", " ", " ", " ", " ", " ", " ", " ", " "}, {"F", "O", "R", "C", "E", " ", " ", " ", " ", " ", " ", " ", " ", " ", " ", " ", " ", " ", " ", " "}}, {{"M", "O", "M", "E", "N", "T", "S", " ", " ", " ", " ", " ", " ", " ", " ", " ", " ", " ", " ", " "}, {"M", "O", "M", "E", "N", "T", " ", " ", " ", " ", " ", " ", " ", " ", " ", " ", " ", " ", " ", " "}}, {{"P", "O", "W", "E", "R", "S", " ", " ", " ", " ", " ", " ", " ", " ", " ", " ", " ", " ", " ", " "}, {"P", "O", "W", "E", "R", " ", " ", " ", " ", " ", " ", " ", " ", " ", " ", " ", " ", " ", " ", " "}}};
    };
    AnyFolder ANGLES = {
      AnyInt ID = 3;
      AnyString locked = "UNLOCKED";
      AnyString Description = "";
      AnyString Data = {{  "L", "H", "i", "p", "A", "n", "g", "l", "e", "s", " ", " ", " ", " ", " ", " ", " ", " ", " ", " ", " ", " ", " ", " ", " "}, {  "L", "K", "n", "e", "e", "A", "n", "g", "l", "e", "s", " ", " ", " ", " ", " ", " ", " ", " ", " ", " ", " ", " ", " ", " "}, {  "L", "A", "n", "k", "l", "e", "A", "n", "g", "l", "e", "s", " ", " ", " ", " ", " ", " ", " ", " ", " ", " ", " ", " ", " "}, {  "L", "A", "b", "s", "A", "n", "k", "l", "e", "A", "n", "g", "l", "e", " ", " ", " ", " ", " ", " ", " ", " ", " ", " ", " "}, {  "R", "H", "i", "p", "A", "n", "g", "l", "e", "s", " ", " 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
    };
    AnyFolder FORCES = {
      AnyInt ID = 3;
      AnyString locked = "UNLOCKED";
      AnyString Description = "";
      AnyString Data = {{  "L", "G", "r", "o", "u", "n", "d", "R", "e", "a", "c", "t", "i", "o", "n", "F", "o", "r", "c", "e", " ", " ", " ", " ", " "}, {  "R", "G", "r", "o", "u", "n", "d", "R", "e", "a", "c", "t", "i", "o", "n", "F", "o", "r", "c", "e", " ", " ", " ", " ", " "}, {  "L", "N", "o", "r", "m", "a", "l", "i", "s", "e", "d", "G", "R", "F", " ", " ", " ", " ", " ", " ", " ", " ", " ", " ", " "}, {  "R", "N", "o", "r", "m", "a", "l", "i", "s", "e", "d", "G", "R", "F", " ", " ", " ", " ", " ", " ", " ", " ", " ", " ", " "}, {  "L", "A", "n", "k", "l", "e", "F", "o", "r", "c", "e", " ", " ", " ", " ", " ", " ", " ", " ", " ", " ", " ", " ", " ", " "}, {  "R", "A", "n", "k", "l", "e", "F", "o", "r", "c", "e", " ", " ", " ", " ", " ", " ", " ", " ", " ", " ", " ", " ", " ", " "}, {  "L", "K", "n", "e", "e", "F", "o", "r", "c", "e", " ", " ", " ", " ", " ", " ", " ", " ", " ", " ", " ", " ", " ", " ", " "}, {  "R", "K", "n", "e", "e", "F", "o", "r", "c", "e", " ", " ", " ", " ", " ", " ", " ", " ", " ", " ", " ", " ", " ", " ", " "}, {  "L", "H", "i", "p", "F", "o", "r", "c", "e", " ", " ", " ", " ", " ", " ", " ", " ", " ", " ", " ", " ", " ", " ", " ", " "}, {  "R", "H", "i", "p", "F", "o", "r", "c", "e", " ", " ", " ", " ", " ", " ", " ", " ", " ", " ", " ", " ", " ", " ", " ", " "}, {  "L", "W", "a", "i", "s", "t", "F", "o", "r", "c", "e", " ", " ", " ", " ", " ", " ", " ", " ", " ", " ", " ", " ", " ", " "}, {  "R", "W", "a", "i", "s", "t", "F", "o", "r", "c", "e", " ", " ", " ", " ", " ", " ", " ", " ", " ", " ", " ", " ", " ", " "}, {  "L", "N", "e", "c", "k", "F", "o", "r", "c", "e", " ", " ", " ", " ", " ", " ", " ", " ", " ", " ", " ", " ", " ", " ", " "}, {  "R", "N", "e", "c", "k", "F", "o", "r", "c", "e", " ", " ", " ", " ", " ", " ", " ", " ", " ", " ", " ", " ", " ", " ", " "}, {  "L", "S", "h", "o", "u", "l", "d", "e", "r", "F", "o", "r", "c", "e", " ", " ", " ", " ", " ", " ", " ", " ", " ", " ", " "}, {  "R", "S", "h", "o", "u", "l", "d", "e", "r", "F", "o", "r", "c", "e", " ", " ", " ", " ", " ", " ", " ", " ", " ", " ", " "}, {  "L", "E", "l", "b", "o", "w", "F", "o", "r", "c", "e", " ", " ", " ", " ", " ", " ", " ", " ", " ", " ", " ", " ", " ", " "}, {  "R", "E", "l", "b", "o", "w", "F", "o", "r", "c", "e", " ", " ", " ", " ", " ", " ", " ", " ", " ", " ", " ", " ", " ", " "}, {  "L", "W", "r", "i", "s", "t", "F", "o", "r", "c", "e", " ", " ", " ", " ", " ", " ", " ", " ", " ", " ", " ", " ", " ", " "}, {  "R", "W", "r", "i", "s", "t", "F", "o", "r", "c", "e", " ", " ", " ", " ", " ", " ", " ", " ", " ", " ", " ", " ", " ", " "}};
    };
    AnyFolder MOMENTS = {
      AnyInt ID = 3;
      AnyString locked = "UNLOCKED";
      AnyString Description = "";
      AnyString Data = {{  "L", "G", "r", "o", "u", "n", "d", "R", "e", "a", "c", "t", "i", "o", "n", "M", "o", "m", "e", "n", "t", " ", " ", " ", " "}, {  "R", "G", "r", "o", "u", "n", "d", "R", "e", "a", "c", "t", "i", "o", "n", "M", "o", "m", "e", "n", "t", " ", " ", " ", " "}, {  "L", "A", "n", "k", "l", "e", "M", "o", "m", "e", "n", "t", " ", " ", " ", " ", " ", " ", " ", " ", " ", " ", " ", " ", " "}, {  "R", "A", "n", "k", "l", "e", "M", "o", "m", "e", "n", "t", " ", " ", " ", " ", " ", " ", " ", " ", " ", " ", " ", " ", " "}, {  "L", "K", "n", "e", "e", "M", "o", "m", "e", "n", "t", " ", " ", " ", " ", " ", " ", " ", " ", " ", " ", " ", " ", " ", " "}, {  "R", "K", "n", "e", "e", "M", "o", "m", "e", "n", "t", " ", " ", " ", " ", " ", " ", " ", " ", " ", " ", " ", " ", " ", " "}, {  "L", "H", "i", "p", "M", "o", "m", "e", "n", "t", " ", " ", " ", " ", " ", " ", " ", " ", " ", " ", " ", " ", " ", " ", " "}, {  "R", "H", "i", "p", "M", "o", "m", "e", "n", "t", " ", " ", " ", " ", " ", " ", " ", " ", " ", " ", " ", " ", " ", " ", " "}, {  "L", "W", "a", "i", "s", "t", "M", "o", "m", "e", "n", "t", " ", " ", " ", " ", " ", " ", " ", " ", " ", " ", " ", " ", " "}, {  "R", "W", "a", "i", "s", "t", "M", "o", "m", "e", "n", "t", " ", " ", " ", " ", " ", " ", " ", " ", " ", " ", " ", " ", " "}, {  "L", "N", "e", "c", "k", "M", "o", "m", "e", "n", "t", " ", " ", " ", " ", " ", " ", " ", " ", " ", " ", " ", " ", " ", " "}, {  "R", "N", "e", "c", "k", "M", "o", "m", "e", "n", "t", " ", " ", " ", " ", " ", " ", " ", " ", " ", " ", " ", " ", " ", " "}, {  "L", "S", "h", "o", "u", "l", "d", "e", "r", "M", "o", "m", "e", "n", "t", " ", " ", " ", " ", " ", " ", " ", " ", " ", " "}, {  "R", "S", "h", "o", "u", "l", "d", "e", "r", "M", "o", "m", "e", "n", "t", " ", " ", " ", " ", " ", " ", " ", " ", " ", " "}, {  "L", "E", "l", "b", "o", "w", "M", "o", "m", "e", "n", "t", " ", " ", " ", " ", " ", " ", " ", " ", " ", " ", " ", " ", " "}, {  "R", "E", "l", "b", "o", "w", "M", "o", "m", "e", "n", "t", " ", " ", " ", " ", " ", " ", " ", " ", " ", " ", " ", " ", " "}, {  "L", "W", "r", "i", "s", "t", "M", "o", "m", "e", "n", "t", " ", " ", " ", " ", " ", " ", " ", " ", " ", " ", " ", " ", " "}, {  "R", "W", "r", "i", "s", "t", "M", "o", "m", "e", "n", "t", " ", " ", " ", " ", " ", " ", " ", " ", " ", " ", " ", " ", " "}};
    };
    AnyFolder POWERS = {
      AnyInt ID = 3;
      AnyString locked = "UNLOCKED";
      AnyString Description = "";
      AnyString Data = {{  "L", "A", "n", "k", "l", "e", "P", "o", "w", "e", "r", " ", " ", " ", " ", " ", " ", " ", " ", " ", " ", " ", " ", " ", " "}, {  "R", "A", "n", "k", "l", "e", "P", "o", "w", "e", "r", " ", " ", " ", " ", " ", " ", " ", " ", " ", " ", " ", " ", " ", " "}, {  "L", "K", "n", "e", "e", "P", "o", "w", "e", "r", " ", " ", " ", " ", " ", " ", " ", " ", " ", " ", " ", " ", " ", " ", " "}, {  "R", "K", "n", "e", "e", "P", "o", "w", "e", "r", " ", " ", " ", " ", " ", " ", " ", " ", " ", " ", " ", " ", " ", " ", " "}, {  "L", "H", "i", "p", "P", "o", "w", "e", "r", " ", " ", " ", " ", " ", " ", " ", " ", " ", " ", " ", " ", " ", " ", " ", " "}, {  "R", "H", "i", "p", "P", "o", "w", "e", "r", " ", " ", " ", " ", " ", " ", " ", " ", " ", " ", " ", " ", " ", " ", " ", " "}, {  "L", "W", "a", "i", "s", "t", "P", "o", "w", "e", "r", " ", " ", " ", " ", " ", " ", " ", " ", " ", " ", " ", " ", " ", " "}, {  "R", "W", "a", "i", "s", "t", "P", "o", "w", "e", "r", " ", " ", " ", " ", " ", " ", " ", " ", " ", " ", " ", " ", " ", " "}, {  "L", "N", "e", "c", "k", "P", "o", "w", "e", "r", " ", " ", " ", " ", " ", " ", " ", " ", " ", " ", " ", " ", " ", " ", " "}, {  "R", "N", "e", "c", "k", "P", "o", "w", "e", "r", " ", " ", " ", " ", " ", " ", " ", " ", " ", " ", " ", " ", " ", " ", " "}, {  "L", "S", "h", "o", "u", "l", "d", "e", "r", "P", "o", "w", "e", "r", " ", " ", " ", " ", " ", " ", " ", " ", " ", " ", " "}, {  "R", "S", "h", "o", "u", "l", "d", "e", "r", "P", "o", "w", "e", "r", " ", " ", " ", " ", " ", " ", " ", " ", " ", " ", " "}, {  "L", "E", "l", "b", "o", "w", "P", "o", "w", "e", "r", " ", " ", " ", " ", " ", " ", " ", " ", " ", " ", " ", " ", " ", " "}, {  "R", "E", "l", "b", "o", "w", "P", "o", "w", "e", "r", " ", " ", " ", " ", " ", " ", " ", " ", " ", " ", " ", " ", " ", " "}, {  "L", "W", "r", "i", "s", "t", "P", "o", "w", "e", "r", " ", " ", " ", " ", " ", " ", " ", " ", " ", " ", " ", " ", " ", " "}, {  "R", "W", "r", "i", "s", "t", "P", "o", "w", "e", "r", " ", " ", " ", " ", " ", " ", " ", " ", " ", " ", " ", " ", " ", " "}};
    };
  };
  AnyFolder ANALOG = {
    AnyInt ID = -4;
    AnyString locked = "UNLOCKED";
    AnyString Description = "";
    AnyFolder FORMAT = {
      AnyInt ID = 4;
      AnyString locked = "UNLOCKED";
      AnyString Description = "";
      AnyString Data = {"U", "N", "S", "I", "G", "N", "E", "D"};
    };
    AnyFolder BITS = {
      AnyInt ID = 4;
      AnyString locked = "UNLOCKED";
      AnyString Description = "";
      AnyInt Data = 12;
    };
    AnyFolder GEN_SCALE = {
      AnyInt ID = 4;
      AnyString locked = "UNLOCKED";
      AnyString Description = "";
      AnyFloat Data = 1.0000000000;
    };
    AnyFolder RATE = {
      AnyInt ID = 4;
      AnyString locked = "UNLOCKED";
      AnyString Description = "";
      AnyFloat Data = 1800.0000000000;
    };
    AnyFolder USED = {
      AnyInt ID = 4;
      AnyString locked = "UNLOCKED";
      AnyString Description = "";
      AnyInt Data = 56;
    };
    AnyFolder GAIN = {
      AnyInt ID = 4;
      AnyString locked = "UNLOCKED";
      AnyString Description = "";
      AnyInt Data = {1, 1, 1, 1, 1, 1, 1, 1, 2, 2, 2, 2, 2, 2, 2, 2, 2, 2, 2, 2, 2, 2, 2, 2, 2, 2, 2, 2, 2, 2, 2, 2, 2, 2, 2, 2, 2, 2, 2, 2, 2, 2, 2, 2, 2, 2, 2, 2, 2, 2, 2, 2, 2, 2, 2, 2};
    };
    AnyFolder SCALE = {
      AnyInt ID = 4;
      AnyString locked = "UNLOCKED";
      AnyString Description = "";
      AnyFloat Data = {-0.6168000102, -0.6168000102, -0.6236000061, -0.6236000061, -2.5234000683, -2.5234000683, -2.5234000683, -2.5234000683, -0.1295000017, -0.1289999932, -0.1292999983, -0.1290999949, -1.2683000565, -1.2728999853, -1.2689000368, -1.2755999565, -0.1299999952, -0.1282999963, -0.1280000061, -0.1290999949, -1.2604000568, -1.2709000111, -1.2637000084, -1.2494000196, -0.1290999949, -0.1289999932, -0.1294000000, -0.1289000064, -1.2572000027, -1.2611000538, -1.2546000481, -1.2611000538, 1.0000000000, 1.0000000000, 1.0000000000, 1.0000000000, 1.0000000000, 1.0000000000, 1.0000000000, 1.0000000000, 1.0000000000, 1.0000000000, 1.0000000000, 1.0000000000, 1.0000000000, 1.0000000000, 1.0000000000, 1.0000000000, 1.0000000000, 1.0000000000, 1.0000000000, 1.0000000000, 1.0000000000, 1.0000000000, 1.0000000000, 1.0000000000};
    };
    AnyFolder OFFSET = {
      AnyInt ID = 4;
      AnyString locked = "UNLOCKED";
      AnyString Description = "";
      AnyInt Data = {2048, 2048, 2048, 2048, 2048, 2048, 2048, 2048, 2048, 2048, 2048, 2048, 2048, 2048, 2048, 2048, 2048, 2048, 2048, 2048, 2048, 2048, 2048, 2048, 2048, 2048, 2048, 2048, 2048, 2048, 2048, 2048, 2048, 2048, 2048, 2048, 2048, 2048, 2048, 2048, 2048, 2048, 2048, 2048, 2048, 2048, 2048, 2048, 2048, 2048, 2048, 2048, 2048, 2048, 2048, 2048};
    };
    AnyFolder UNITS = {
      AnyInt ID = 4;
      AnyString locked = "UNLOCKED";
      AnyString Description = "";
      AnyString Data = {{"N", " ", " ", " ", " ", " ", " ", " "}, {"N", " ", " ", " ", " ", " ", " ", " "}, {"N", " ", " ", " ", " ", " ", " ", " "}, {"N", " ", " ", " ", " ", " ", " ", " "}, {"N", " ", " ", " ", " ", " ", " ", " "}, {"N", " ", " ", " ", " ", " ", " ", " "}, {"N", " ", " ", " ", " ", " ", " ", " "}, {"N", " ", " ", " ", " ", " ", " ", " "}, {"N", " ", " ", " ", " ", " ", " ", " "}, {"N", " ", " ", " ", " ", " ", " ", " "}, {"N", " ", " ", " ", " ", " ", " ", " "}, {"N", " ", " ", " ", " ", " ", " ", " "}, {"N", " ", " ", " ", " ", " ", " ", " "}, {"N", " ", " ", " ", " ", " ", " ", " "}, {"N", " ", " ", " ", " ", " ", " ", " "}, {"N", " ", " ", " ", " ", " ", " ", " "}, {"N", " ", " ", " ", " ", " ", " ", " "}, {"N", " ", " ", " ", " ", " ", " ", " "}, {"N", " ", " ", " ", " ", " ", " ", " "}, {"N", " ", " ", " ", " ", " ", " ", " "}, {"N", " ", " ", " ", " ", " ", " ", " "}, {"N", " ", " ", " ", " ", " ", " ", " "}, {"N", " ", " ", " ", " ", " ", " ", " "}, {"N", " ", " ", " ", " ", " ", " ", " "}, {"N", " ", " ", " ", " ", " ", " ", " "}, {"N", " ", " ", " ", " ", " ", " ", " "}, {"N", " ", " ", " ", " ", " ", " ", " "}, {"N", " ", " ", " ", " ", " ", " ", " "}, {"N", " ", " ", " ", " ", " ", " ", " "}, {"N", " ", " ", " ", " ", " ", " ", " "}, {"N", " ", " ", " ", " ", " ", " ", " "}, {"N", " ", " ", " ", " ", " ", " ", " "}, {"V", " ", " ", " ", " ", " ", " ", " "}, {"V", " ", " ", " ", " ", " ", " ", " "}, {"V", " ", " ", " ", " ", " ", " ", " "}, {"V", " ", " ", " ", " ", " ", " ", " "}, {"V", " ", " ", " ", " ", " ", " ", " "}, {"V", " ", " ", " ", " ", " ", " ", " "}, {"V", " ", " ", " ", " ", " ", " ", " "}, {"V", " ", " ", " ", " ", " ", " ", " "}, {"V", " ", " ", " ", " ", " ", " ", " "}, {"V", " ", " ", " ", " ", " ", " ", " "}, {"V", " ", " ", " ", " ", " ", " ", " "}, {"V", " ", " ", " ", " ", " ", " ", " "}, {"V", " ", " ", " ", " ", " ", " ", " "}, {"V", " ", " ", " ", " ", " ", " ", " "}, {"V", " ", " ", " ", " ", " ", " ", " "}, {"V", " ", " ", " ", " ", " ", " ", " "}, {"V", " ", " ", " ", " ", " ", " ", " "}, {"V", " ", " ", " ", " ", " ", " ", " "}, {"V", " ", " ", " ", " ", " ", " ", " "}, {"V", " ", " ", " ", " ", " ", " ", " "}, {"V", " ", " ", " ", " ", " ", " ", " "}, {"V", " ", " ", " ", " ", " ", " ", " "}, {"V", " ", " ", " ", " ", " ", " ", " "}, {"V", " ", " ", " ", " ", " ", " ", " "}};
    };
    AnyFolder LABELS = {
      AnyInt ID = 4;
      AnyString locked = "UNLOCKED";
      AnyString Description = "";
      AnyString Data = {{"F", "P", "B", "F", "x", "1", "+", "2", " ", " ", " ", " ", " ", " ", " ", " "}, {"F", "P", "B", "F", "x", "3", "+", "4", " ", " ", " ", " ", " ", " ", " ", " "}, {"F", "P", "B", "F", "y", "1", "+", "4", " ", " ", " ", " ", " ", " ", " ", " "}, {"F", "P", "B", "F", "y", "2", "+", "3", " ", " ", " ", " ", " ", " ", " ", " "}, {"F", "P", "B", "F", "z", "1", " ", " ", " ", " ", " ", " ", " ", " ", " ", " "}, {"F", "P", "B", "F", "z", "2", " ", " ", " ", " ", " ", " ", " ", " ", " ", " "}, {"F", "P", "B", "F", "z", "3", " ", " ", " ", " ", " ", " ", " ", " ", " ", " "}, {"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
    };
    AnyFolder DESCRIPTIONS = {
      AnyInt ID = 4;
      AnyString locked = "UNLOCKED";
      AnyString Description = "";
      AnyString Data = {{"F", "x", "1", "+", "2", " ", "f", "r", "o", "m", " ", "'", "B", "'", " ", "K", "i", "s", "t", "l", "e", "r", " ", "F", "o", "r", "c", "e", " ", "P", "l", "a", "t", "e", " ", "4", "1", "6", "7", "0", "9", " ", " ", " ", " ", " ", " ", " ", " ", " "}, {"F", "x", "3", "+", "4", " ", "f", "r", "o", "m", " ", "'", "B", "'", " ", "K", "i", "s", "t", "l", "e", "r", " ", "F", "o", "r", "c", "e", " ", "P", "l", "a", "t", "e", " ", "4", "1", "6", "7", "0", "9", " ", " ", " ", " ", " ", " ", " ", " ", " "}, {"F", "y", "1", "+", "4", " ", "f", "r", "o", "m", " ", "'", "B", "'", "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
    };
    AnyFolder BOARDS = {
      AnyInt ID = 4;
      AnyString locked = "UNLOCKED";
      AnyString Description = "";
      AnyInt Data = 1;
    };
    AnyFolder BOARD_LABELS = {
      AnyInt ID = 4;
      AnyString locked = "UNLOCKED";
      AnyString Description = "";
      AnyString Data = {{"O", "M", "L", " ", "6", "4", " ", "C", "h", "a", "n", "n", "e", "l", " ", " ", " ", " ", " ", " ", " ", " ", " ", " ", " ", " ", " ", " ", " ", " ", " ", " ", " ", " ", " ", " ", " ", " ", " ", " "}};
    };
    AnyFolder BOARD_CHANNELS = {
      AnyInt ID = 4;
      AnyString locked = "UNLOCKED";
      AnyString Description = "";
      AnyInt Data = {64};
    };
    AnyFolder PCHAN = {
      AnyInt ID = 4;
      AnyString locked = "UNLOCKED";
      AnyString Description = "";
      AnyInt Data = {1, 2, 3, 4, 5, 6, 7, 8, 9, 10, 11, 12, 13, 14, 15, 16, 17, 18, 19, 20, 21, 22, 23, 24, 25, 26, 27, 28, 29, 30, 31, 32, 33, 34, 35, 36, 37, 38, 40, 41, 42, 43, 44, 45, 46, 47, 48, 49, 50, 51, 52, 53, 54, 55, 56, 57};
    };
  };
  AnyFolder FORCE_PLATFORM = {
    AnyInt ID = -5;
    AnyString locked = "UNLOCKED";
    AnyString Description = "";
    AnyFolder USED = {
      AnyInt ID = 5;
      AnyString locked = "UNLOCKED";
      AnyString Description = "";
      AnyInt Data = 4;
    };
    AnyFolder ZERO = {
      AnyInt ID = 5;
      AnyString locked = "UNLOCKED";
      AnyString Description = "";
      AnyInt Data = {0, 20};
    };
    AnyFolder TYPE = {
      AnyInt ID = 5;
      AnyString locked = "UNLOCKED";
      AnyString Description = "";
      AnyInt Data = {3, 3, 3, 3};
    };
    AnyFolder CORNERS = {
      AnyInt ID = 5;
      AnyString locked = "UNLOCKED";
      AnyString Description = "";
      AnyFloat Data = {{{-3.0000000000, 500.0000000000, 0.0000000000}, {-3.0000000000, 100.0000000000, 0.0000000000}, {-603.0000000000, 100.0000000000, 0.0000000000}, {-603.0000000000, 500.0000000000, 0.0000000000}}, {{0.0000000000, 0.0000000000, 0.0000000000}, {0.0000000000, 600.0000000000, 0.0000000000}, {900.0000000000, 600.0000000000, 0.0000000000}, {900.0000000000, 0.0000000000, 0.0000000000}}, {{-1207.0000000000, 100.0000000000, 0.0000000000}, {-1207.0000000000, 500.0000000000, 0.0000000000}, {-607.0000000000, 500.0000000000, 0.0000000000}, {-607.0000000000, 100.0000000000, 0.0000000000}}, {{1504.0000000000, 500.0000000000, 0.0000000000}, {1504.0000000000, 100.0000000000, 0.0000000000}, {904.0000000000, 100.0000000000, 0.0000000000}, {904.0000000000, 500.0000000000, 0.0000000000}}};
    };
    AnyFolder ORIGIN = {
      AnyInt ID = 5;
      AnyString locked = "UNLOCKED";
      AnyString Description = "";
      AnyFloat Data = {{120.0000000000, 200.0000000000, 54.0000000000}, {210.0000000000, 350.0000000000, 52.0000000000}, {120.0000000000, 200.0000000000, 49.0000000000}, {120.0000000000, 200.0000000000, 49.0000000000}};
    };
    AnyFolder CHANNEL = {
      AnyInt ID = 5;
      AnyString locked = "UNLOCKED";
      AnyString Description = "";
      AnyInt Data = {{1, 2, 3, 4, 5, 6, 7, 8}, {9, 10, 11, 12, 13, 14, 15, 16}, {17, 18, 19, 20, 21, 22, 23, 24}, {25, 26, 27, 28, 29, 30, 31, 32}};
    };
    AnyFolder CAL_MATRIX = {
      AnyInt ID = 5;
      AnyString locked = "UNLOCKED";
      AnyString Description = "";
    };
  };
  AnyFolder SEG = {
    AnyInt ID = -6;
    AnyString locked = "UNLOCKED";
    AnyString Description = "";
    AnyFolder MARKER_DIAMETER = {
      AnyInt ID = 6;
      AnyString locked = "UNLOCKED";
      AnyString Description = "";
      AnyFloat Data = 25.0000000000;
    };
    AnyFolder DATA_LIMITS = {
      AnyInt ID = 6;
      AnyString locked = "UNLOCKED";
      AnyString Description = "";
      AnyFloat Data = {{-3500.0000000000, -3500.0000000000, -100.0000000000}, {3500.0000000000, 3500.0000000000, 3000.0000000000}};
    };
    AnyFolder ACC_FACTOR = {
      AnyInt ID = 6;
      AnyString locked = "UNLOCKED";
      AnyString Description = "";
      AnyFloat Data = 50.0000000000;
    };
    AnyFolder MAX_NOISE_FACTOR = {
      AnyInt ID = 6;
      AnyString locked = "UNLOCKED";
      AnyString Description = "";
      AnyFloat Data = 7.0000000000;
    };
    AnyFolder INTERSECTION_LIMIT = {
      AnyInt ID = 6;
      AnyString locked = "UNLOCKED";
      AnyString Description = "";
      AnyFloat Data = 12.0000000000;
    };
    AnyFolder RESIDUAL_ERROR_FACTOR = {
      AnyInt ID = 6;
      AnyString locked = "UNLOCKED";
      AnyString Description = "";
      AnyFloat Data = 2.0000000000;
    };
    AnyFolder PREDICTION_ERROR = {
      AnyInt ID = 6;
      AnyString locked = "UNLOCKED";
      AnyString Description = "";
      AnyFloat Data = 30.0000000000;
    };
  };
  AnyFolder EVENT_CONTEXT = {
    AnyInt ID = -7;
    AnyString locked = "UNLOCKED";
    AnyString Description = "";
    AnyFolder USED = {
      AnyInt ID = 7;
      AnyString locked = "UNLOCKED";
      AnyString Description = "";
      AnyInt Data = 3;
    };
    AnyFolder ICON_IDS = {
      AnyInt ID = 7;
      AnyString locked = "UNLOCKED";
      AnyString Description = "";
      AnyInt Data = {0, 0, 0};
    };
    AnyFolder LABELS = {
      AnyInt ID = 7;
      AnyString locked = "UNLOCKED";
      AnyString Description = "";
      AnyString Data = {{"L", "e", "f", "t", " ", " ", " ", " ", " ", " ", " ", " ", " ", " ", " ", " "}, {"R", "i", "g", "h", "t", " ", " ", " ", " ", " ", " ", " ", " ", " ", " ", " "}, {"G", "e", "n", "e", "r", "a", "l", " ", " ", " ", " ", " ", " ", " ", " ", " "}};
    };
    AnyFolder DESCRIPTIONS = {
      AnyInt ID = 7;
      AnyString locked = "UNLOCKED";
      AnyString Description = "";
      AnyString Data = {{"L", "e", "f", "t", " ", "s", "i", "d", "e", " ", " ", " ", " ", " ", " ", " ", " ", " ", " ", " ", " ", " ", " ", " ", " ", " ", " ", " ", " ", " ", " ", " "}, {"R", "i", "g", "h", "t", " ", "s", "i", "d", "e", " ", " ", " ", " ", " ", " ", " ", " ", " ", " ", " ", " ", " ", " ", " ", " ", " ", " ", " ", " ", " ", " "}, {"F", "o", "r", " ", "o", "t", "h", "e", "r", " ", "e", "v", "e", "n", "t", "s", " ", " ", " ", " ", " ", " ", " ", " ", " ", " ", " ", " ", " ", " ", " ", " "}};
    };
    AnyFolder COLOURS = {
      AnyInt ID = 7;
      AnyString locked = "UNLOCKED";
      AnyString Description = "";
      AnyInt Data = {{192, 0, 0}, {0, 192, 0}, {0, 0, 192}};
    };
  };
  AnyFolder EVENT = {
    AnyInt ID = -8;
    AnyString locked = "UNLOCKED";
    AnyString Description = "";
    AnyFolder USED = {
      AnyInt ID = 8;
      AnyString locked = "UNLOCKED";
      AnyString Description = "";
      AnyInt Data = 10;
    };
    AnyFolder CONTEXTS = {
      AnyInt ID = 8;
      AnyString locked = "UNLOCKED";
      AnyString Description = "";
      AnyString Data = {{"R", "i", "g", "h", "t", " ", " ", " ", " ", " ", " ", " ", " ", " ", " ", " "}, {"R", "i", "g", "h", "t", " ", " ", " ", " ", " ", " ", " ", " ", " ", " ", " "}, {"L", "e", "f", "t", " ", " ", " ", " ", " ", " ", " ", " ", " ", " ", " ", " "}, {"L", "e", "f", "t", " ", " ", " ", " ", " ", " ", " ", " ", " ", " ", " ", " "}, {"L", "e", "f", "t", " ", " ", " ", " ", " ", " ", " ", " ", " ", " ", " ", " "}, {"L", "e", "f", "t", " ", " ", " ", " ", " ", " ", " ", " ", " ", " ", " ", " "}, {"R", "i", "g", "h", "t", " ", " ", " ", " ", " ", " ", " ", " ", " ", " ", " "}, {"R", "i", "g", "h", "t", " ", " ", " ", " ", " ", " ", " ", " ", " ", " ", " "}, {"R", "i", "g", "h", "t", " ", " ", " ", " ", " ", " ", " ", " ", " ", " ", " "}, {"L", "e", "f", "t", " ", " ", " ", " ", " ", " ", " ", " ", " ", " ", " ", " "}};
    };
    AnyFolder ICON_IDS = {
      AnyInt ID = 8;
      AnyString locked = "UNLOCKED";
      AnyString Description = "";
      AnyInt Data = {1, 2, 1, 2, 1, 2, 1, 2, 1, 2};
    };
    AnyFolder LABELS = {
      AnyInt ID = 8;
      AnyString locked = "UNLOCKED";
      AnyString Description = "";
      AnyString Data = {{"F", "o", "o", "t", " ", "S", "t", "r", "i", "k", "e", " ", " ", " ", " ", " ", " ", " ", " ", " ", " ", " ", " ", " ", " ", " ", " ", " ", " ", " ", " ", " "}, {"F", "o", "o", "t", " ", "O", "f", "f", " ", " ", " ", " ", " ", " ", " ", " ", " ", " ", " ", " ", " ", " ", " ", " ", " ", " ", " ", " ", " ", " ", " ", " "}, {"F", "o", "o", "t", " ", "S", "t", "r", "i", "k", "e", " ", " ", " ", " ", " ", " ", " ", " ", " ", " ", " ", " ", " ", " ", " ", " ", " ", " ", " ", " ", " "}, {"F", "o", "o", "t", " ", "O", "f", "f", " ", " ", " ", " ", " ", " ", " ", " ", " ", " ", " ", " ", " ", " ", " ", " ", " ", " ", " ", " ", " ", " ", " ", " "}, {"F", "o", "o", "t", " ", "S", "t", "r", "i", "k", "e", " ", " ", " ", " ", " ", " ", " ", " ", " ", " ", " ", " ", " ", " ", " ", " ", " ", " ", " ", " ", " "}, {"F", "o", "o", "t", " ", "O", "f", "f", " ", " ", " ", " ", " ", " ", " ", " ", " ", " ", " ", " ", " ", " ", " ", " ", " ", " ", " ", " ", " ", " ", " ", " "}, {"F", "o", "o", "t", " ", "S", "t", "r", "i", "k", "e", " ", " ", " ", " ", " ", " ", " ", " ", " ", " ", " ", " ", " ", " ", " ", " ", " ", " ", " ", " ", " "}, {"F", "o", "o", "t", " ", "O", "f", "f", " ", " ", " ", " ", " ", " ", " ", " ", " ", " ", " ", " ", " ", " ", " ", " ", " ", " ", " ", " ", " ", " ", " ", " "}, {"F", "o", "o", "t", " ", "S", "t", "r", "i", "k", "e", " ", " ", " ", " ", " ", " ", " ", " ", " ", " ", " ", " ", " ", " ", " ", " ", " ", " ", " ", " ", " "}, {"F", "o", "o", "t", " ", "O", "f", "f", " ", " ", " ", " ", " ", " ", " ", " ", " ", " ", " ", " ", " ", " ", " ", " ", " ", " ", " ", " ", " ", " ", " ", " "}};
    };
    AnyFolder DESCRIPTIONS = {
      AnyInt ID = 8;
      AnyString locked = "UNLOCKED";
      AnyString Description = "";
      AnyString Data = {{"T", "h", "e", " ", "m", "o", "m", "e", "n", "t", " ", "a", "n", "y", " ", "p", "a", "r", "t", " ", "o", "f", " ", "t", "h", "e", " ", "f", "o", "o", "t", " ", "f", "i", "r", "s", "t", " ", "c", "o", "n", "t", "a", "c", "t", "s", " ", "t", "h", "e", " ", "f", "l", "o", "o", "r", " ", "d", "u", "r", "i", "n", "g", " ", "a", " ", "g", "a", "i", "t", " ", "c", "y", "c", "l", "e", ".", " ", " ", " "}, {"T", "h", "e", " ", "m", "o", "m", "e", "n", "t", " ", "t", "h", "e", " ", "f", "o", "o", "t", " ", "c", "e", "a", "s", "e", "s", " ", "a", "l", "l", " ", "c", "o", "n", "t"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
    };
    AnyFolder SUBJECTS = {
      AnyInt ID = 8;
      AnyString locked = "UNLOCKED";
      AnyString Description = "";
      AnyString Data = {{   " ", " ", " ", " ", " ", " ", " ", " ", " ", " ", " ", " ", " ", " ", " ", " ", " ", " ", " ", " ", " ", " ", " ", " ", " ", " ", " ", " "}, {   " ", " ", " ", " ", " ", " ", " ", " ", " ", " ", " ", " ", " ", " ", " ", " ", " ", " ", " ", " ", " ", " ", " ", " ", " ", " ", " ", " "}, {   " ", " ", " ", " ", " ", " ", " ", " ", " ", " ", " ", " ", " ", " ", " ", " ", " ", " ", " ", " ", " ", " ", " ", " ", " ", " ", " ", " "}, {   " ", " ", " ", " ", " ", " ", " ", " ", " ", " ", " ", " ", " ", " ", " ", " ", " ", " ", " ", " ", " ", " ", " ", " ", " ", " ", " ", " "}, {   " ", " ", " ", " ", " ", " ", " ", " ", " ", " ", " ", " ", " ", " ", " ", " ", " ", " ", " ", " ", " ", " ", " ", " ", " ", " ", " ", " "}, {   " ", " ", " ", " ", " ", " ", " ", " ", " ", " ", " ", " ", " ", " ", " ", " ", " ", " ", " ", " ", " ", " ", " ", " ", " ", " ", " ", " "}, {   " ", " ", " ", " ", " ", " ", " ", " ", " ", " ", " ", " ", " ", " ", " ", " ", " ", " ", " ", " ", " ", " ", " ", " ", " ", " ", " ", " "}, {   " ", " ", " ", " ", " ", " ", " ", " ", " ", " ", " ", " ", " ", " ", " ", " ", " ", " ", " ", " ", " ", " ", " ", " ", " ", " ", " ", " "}, {   " ", " ", " ", " ", " ", " ", " ", " ", " ", " ", " ", " ", " ", " ", " ", " ", " ", " ", " ", " ", " ", " ", " ", " ", " ", " ", " ", " "}, {   " ", " ", " ", " ", " ", " ", " ", " ", " ", " ", " ", " ", " ", " ", " ", " ", " ", " ", " ", " ", " ", " ", " ", " ", " ", " ", " ", " "}};
    };
    AnyFolder TIMES = {
      AnyInt ID = 8;
      AnyString locked = "UNLOCKED";
      AnyString Description = "";
      AnyFloat Data = {{0.0000000000, 3.9844443798}, {0.0000000000, 4.6622223854}, {0.0000000000, 3.4155554771}, {0.0000000000, 4.1038889885}, {0.0000000000, 4.5549998283}, {0.0000000000, 5.2911109924}, {0.0000000000, 2.8411111832}, {0.0000000000, 3.5311110020}, {0.0000000000, 5.1500000954}, {0.0000000000, 2.9749999046}};
    };
    AnyFolder GENERIC_FLAGS = {
      AnyInt ID = 8;
      AnyString locked = "UNLOCKED";
      AnyString Description = "";
      AnyInt Data = {0, 0, 0, 0, 0, 0, 0, 0, 0, 0};
    };
  };
  AnyFolder MANUFACTURER = {
    AnyInt ID = -9;
    AnyString locked = "UNLOCKED";
    AnyString Description = "";
    AnyFolder COMPANY = {
      AnyInt ID = 9;
      AnyString locked = "UNLOCKED";
      AnyString Description = "";
      AnyString Data = {"V", "i", "c", "o", "n", " ", "M", "o", "t", "i", "o", "n", " ", "S", "y", "s", "t", "e", "m", "s", " ", "L", "i", "m", "i", "t", "e", "d"};
    };
    AnyFolder SOFTWARE = {
      AnyInt ID = 9;
      AnyString locked = "UNLOCKED";
      AnyString Description = "";
      AnyString Data = {"V", "i", "c", "o", "n", " ", "W", "o", "r", "k", "s", "t", "a", "t", "i", "o", "n"};
    };
    AnyFolder VERSION_LABEL = {
      AnyInt ID = 9;
      AnyString locked = "UNLOCKED";
      AnyString Description = "";
      AnyString Data = {"5", ".", "2", ".", "1"};
    };
  };
  AnyFolder ANALYSIS = {
    AnyInt ID = -10;
    AnyString locked = "UNLOCKED";
    AnyString Description = "";
    AnyFolder USED = {
      AnyInt ID = 10;
      AnyString locked = "UNLOCKED";
      AnyString Description = "";
      AnyInt Data = 22;
    };
    AnyFolder NAMES = {
      AnyInt ID = 10;
      AnyString locked = "UNLOCKED";
      AnyString Description = "";
      AnyString Data = {{"C", "a", "d", "e", "n", "c", "e", " ", " ", " ", " ", " ", " ", " ", " ", " ", " ", " ", " ", " ", " ", " ", " ", " ", " ", " ", " ", " ", " ", " ", " ", " "}, {"W", "a", "l", "k", "i", "n", "g", " ", "S", "p", "e", "e", "d", " ", " ", " ", " ", " ", " ", " ", " ", " ", " ", " ", " ", " ", " ", " ", " ", " ", " ", " "}, {"S", "t", "r", "i", "d", "e", " ", "T", "i", "m", "e", " ", " ", " ", " ", " ", " ", " ", " ", " ", " ", " ", " ", " ", " ", " ", " ", " ", " ", " ", " ", " "}, {"S", "t", "e", "p", " ", "T", "i", "m", "e", " ", " ", " ", " ", " ", " ", " ", " ", " ",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
    };

    AnyFolder CONTEXTS = {
      AnyInt ID = 10;
      AnyString locked = "UNLOCKED";
      AnyString Description = "";
      AnyString Data = {{"L", "e", "f", "t", " ", " ", " ", " ", " ", " ", " ", " ", " ", " ", " ", " "}, {"L", "e", "f", "t", " ", " ", " ", " ", " ", " ", " ", " ", " ", " ", " ", " "}, {"L", "e", "f", "t", " ", " ", " ", " ", " ", " ", " ", " ", " ", " ", " ", " "}, {"L", "e", "f", "t", " ", " ", " ", " ", " ", " ", " ", " ", " ", " ", " ", " "}, {"L", "e", "f", "t", " ", " ", " ", " ", " ", " ", " ", " ", " ", " ", " ", " "}, {"L", "e", "f", "t", " ", " ", " ", " ", " ", " ", " ", " ", " ", " ", " ", " "}, {"L", "e", "f", "t", " ", " ", " ", " ", " ", " ", " ", " ", " ", " ", " ", " "}, {"L", "e", "f", "t", " ", " ", " ", " ", " ", " ", " ", " ", " ", " ", " ", " "}, {"L", "e", "f", "t", " ", " ", " ", " ", " ", " ", " ", " ", " ", " ", " ", " "}, {"L", "e", "f", "t", " ", " ", " ", " ", " ", " ", " ", " ", " ", " ", " ", " "}, {"L", "e", "f", "t", " ", " ", " ", " ", " ", " ", " ", " ", " ", " ", " ", " "}, {"R", "i", "g", "h", "t", " ", " ", " ", " ", " ", " ", " ", " ", " ", " ", " "}, {"R", "i", "g", "h", "t", " ", " ", " ", " ", " ", " ", " ", " ", " ", " ", " "}, {"R", "i", "g", "h", "t", " ", " ", " ", " ", " ", " ", " ", " ", " ", " ", " "}, {"R", "i", "g", "h", "t", " ", " ", " ", " ", " ", " ", " ", " ", " ", " ", " "}, {"R", "i", "g", "h", "t", " ", " ", " ", " ", " ", " ", " ", " ", " ", " ", " "}, {"R", "i", "g", "h", "t", " ", " ", " ", " ", " ", " ", " ", " ", " ", " ", " "}, {"R", "i", "g", "h", "t", " ", " ", " ", " ", " ", " ", " ", " ", " ", " ", " "}, {"R", "i", "g", "h", "t", " ", " ", " ", " ", " ", " ", " ", " ", " ", " ", " "}, {"R", "i", "g", "h", "t", " ", " ", " ", " ", " ", " ", " ", " ", " ", " ", " "}, {"R", "i", "g", "h", "t", " ", " ", " ", " ", " ", " ", " ", " ", " ", " ", " "}, {"R", "i", "g", "h", "t", " ", " ", " ", " ", " ", " ", " ", " ", " ", " ", " "}};
    };
    AnyFolder UNITS = {
      AnyInt ID = 10;
      AnyString locked = "UNLOCKED";
      AnyString Description = "";
      AnyString Data = {{"s", "t", "e", "p", "s", "/", "m", "i", "n", " ", " ", " "}, {"m", "/", "s", " ", " ", " ", " ", " ", " ", " ", " ", " "}, {"s", " ", " ", " ", " ", " ", " ", " ", " ", " ", " ", " "}, {"s", " ", " ", " ", " ", " ", " ", " ", " ", " ", " ", " "}, {"%", " ", " ", " ", " ", " ", " ", " ", " ", " ", " ", " "}, {"%", " ", " ", " ", " ", " ", " ", " ", " ", " ", " ", " "}, {"%", " ", " ", " ", " ", " ", " ", " ", " ", " ", " ", " "}, {"s", " ", " ", " ", " ", " ", " ", " ", " ", " ", " ", " "}, {"s", " ", " ", " ", " ", " ", " ", " ", " ", " ", " ", " "}, {"m", " ", " ", " ", " ", " ", " ", " ", " ", " ", " ", " "}, {"m", " ", " ", " ", " ", " ", " ", " ", " ", " ", " ", " "}, {"s", "t", "e", "p", "s", "/", "m", "i", "n", " ", " ", " "}, {"m", "/", "s", " ", " ", " ", " ", " ", " ", " ", " ", " "}, {"s", " ", " ", " ", " ", " ", " ", " ", " ", " ", " ", " "}, {"s", " ", " ", " ", " ", " ", " ", " ", " ", " ", " ", " "}, {"%", " ", " ", " ", " ", " ", " ", " ", " ", " ", " ", " "}, {"%", " ", " ", " ", " ", " ", " ", " ", " ", " ", " ", " "}, {"%", " ", " ", " ", " ", " ", " ", " ", " ", " ", " ", " "}, {"s", " ", " ", " ", " ", " ", " ", " ", " ", " ", " ", " "}, {"s", " ", " ", " ", " ", " ", " ", " ", " ", " ", " ", " "}, {"m", " ", " ", " ", " ", " ", " ", " ", " ", " ", " ", " "}, {"m", " ", " ", " ", " ", " ", " ", " ", " ", " ", " ", " "}};
    };
    AnyFolder DESCRIPTIONS = {
      AnyInt ID = 10;
      AnyString locked = "UNLOCKED";
      AnyString Description = "";
      AnyString Data = {{" ", " ", " ", " ", " ", " ", " ", " ", " ", " ", " ", " ", " ", " ", " ", " ", " ", " ", " ", " ", " ", " ", " ", " ", " ", " ", " ", " ", " ", " ", " ", " ", " ", " ", " ", " ", " ", " ", " ", " ", " ", " ", " ", " ", " ", " ", " ", " "}, {" ", " ", " ", " ", " ", " ", " ", " ", " ", " ", " ", " ", " ", " ", " ", " ", " ", " ", " ", " ", " ", " ", " ", " ", " ", " ", " ", " ", " ", " ", " ", " ", " ", " ", " ", " ", " ", " ", " ", " ", " ", " ", " ", " ", " ", " ", " ", " "}, {" ", " ", " ", " ", " ", " ", " ", " ", " ", " ", " ", " ", " ", " ", " ", " ", " ", " ", "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
    };
    AnyFolder VALUES = {
      AnyInt ID = 10;
      AnyString locked = "UNLOCKED";
      AnyString Description = "";
      AnyFloat Data = {105.3144836426, 1.2044485807, 1.1394444704, 0.5705555677, 10.1413946152, 49.9268646240, 60.4095573425, 0.4533333480, 0.2349999994, 1.3724023104, 0.6822836399, 104.9562683105, 1.2339905500, 1.1433333158, 0.5688889027, 11.7103900909, 50.2429542542, 60.3498535156, 0.4405556619, 0.2494443506, 1.4108625650, 0.6899222136};
    };
  };
  AnyFolder PROCESSING = {
    AnyInt ID = -11;
    AnyString locked = "UNLOCKED";
    AnyString Description = "";
    AnyFolder Bodymass = {
      AnyInt ID = 11;
      AnyString locked = "UNLOCKED";
      AnyString Description = "";
      AnyFloat Data = 75.4000015259;
    };
    AnyFolder Height = {
      AnyInt ID = 11;
      AnyString locked = "UNLOCKED";
      AnyString Description = "";
      AnyFloat Data = 1735.0000000000;
    };
    AnyFolder LLegLength = {
      AnyInt ID = 11;
      AnyString locked = "UNLOCKED";
      AnyString Description = "";
      AnyFloat Data = 920.0000000000;
    };
    AnyFolder RLegLength = {
      AnyInt ID = 11;
      AnyString locked = "UNLOCKED";
      AnyString Description = "";
      AnyFloat Data = 920.0000000000;
    };
    AnyFolder LKneeWidth = {
      AnyInt ID = 11;
      AnyString locked = "UNLOCKED";
      AnyString Description = "";
      AnyFloat Data = 100.0000000000;
    };
    AnyFolder RKneeWidth = {
      AnyInt ID = 11;
      AnyString locked = "UNLOCKED";
      AnyString Description = "";
      AnyFloat Data = 100.0000000000;
    };
    AnyFolder LAnkleWidth = {
      AnyInt ID = 11;
      AnyString locked = "UNLOCKED";
      AnyString Description = "";
      AnyFloat Data = 70.0000000000;
    };
    AnyFolder RAnkleWidth = {
      AnyInt ID = 11;
      AnyString locked = "UNLOCKED";
      AnyString Description = "";
      AnyFloat Data = 70.0000000000;
    };
    AnyFolder InterAsisDistance = {
      AnyInt ID = 11;
      AnyString locked = "UNLOCKED";
      AnyString Description = "";
      AnyFloat Data = 279.0249938965;
    };
    AnyFolder LAsisTrocanterDistance = {
      AnyInt ID = 11;
      AnyString locked = "UNLOCKED";
      AnyString Description = "";
      AnyFloat Data = 69.9359970093;
    };
    AnyFolder RAsisTrocanterDistance = {
      AnyInt ID = 11;
      AnyString locked = "UNLOCKED";
      AnyString Description = "";
      AnyFloat Data = 69.9359970093;
    };
    AnyFolder LThighRotation = {
      AnyInt ID = 11;
      AnyString locked = "UNLOCKED";
      AnyString Description = "";
      AnyFloat Data = -0.7663519979;
    };
    AnyFolder RThighRotation = {
      AnyInt ID = 11;
      AnyString locked = "UNLOCKED";
      AnyString Description = "";
      AnyFloat Data = 16.6075000763;
    };
    AnyFolder LShankRotation = {
      AnyInt ID = 11;
      AnyString locked = "UNLOCKED";
      AnyString Description = "";
      AnyFloat Data = -1.4481199980;
    };
    AnyFolder RShankRotation = {
      AnyInt ID = 11;
      AnyString locked = "UNLOCKED";
      AnyString Description = "";
      AnyFloat Data = 5.9679799080;
    };
    AnyFolder LStaticPlantFlex = {
      AnyInt ID = 11;
      AnyString locked = "UNLOCKED";
      AnyString Description = "";
      AnyFloat Data = 6.2526898384;
    };
    AnyFolder RStaticPlantFlex = {
      AnyInt ID = 11;
      AnyString locked = "UNLOCKED";
      AnyString Description = "";
      AnyFloat Data = 5.3285398483;
    };
    AnyFolder LStaticRotOff = {
      AnyInt ID = 11;
      AnyString locked = "UNLOCKED";
      AnyString Description = "";
      AnyFloat Data = -0.2718999982;
    };
    AnyFolder RStaticRotOff = {
      AnyInt ID = 11;
      AnyString locked = "UNLOCKED";
      AnyString Description = "";
      AnyFloat Data = 0.6776980162;
    };
    AnyFolder LAnkleAbAdd = {
      AnyInt ID = 11;
      AnyString locked = "UNLOCKED";
      AnyString Description = "";
      AnyFloat Data = 0.0000000000;
    };
    AnyFolder RAnkleAbAdd = {
      AnyInt ID = 11;
      AnyString locked = "UNLOCKED";
      AnyString Description = "";
      AnyFloat Data = -0.0000000000;
    };
    AnyFolder PelvisLength = {
      AnyInt ID = 11;
      AnyString locked = "UNLOCKED";
      AnyString Description = "";
      AnyFloat Data = 192.2489929199;
    };
    AnyFolder LFemurLength = {
      AnyInt ID = 11;
      AnyString locked = "UNLOCKED";
      AnyString Description = "";
      AnyFloat Data = 418.8930053711;
    };
    AnyFolder RFemurLength = {
      AnyInt ID = 11;
      AnyString locked = "UNLOCKED";
      AnyString Description = "";
      AnyFloat Data = 420.6470031738;
    };
    AnyFolder LTibiaLength = {
      AnyInt ID = 11;
      AnyString locked = "UNLOCKED";
      AnyString Description = "";
      AnyFloat Data = 417.7669982910;
    };
    AnyFolder RTibiaLength = {
      AnyInt ID = 11;
      AnyString locked = "UNLOCKED";
      AnyString Description = "";
      AnyFloat Data = 426.5710144043;
    };
    AnyFolder LFootLength = {
      AnyInt ID = 11;
      AnyString locked = "UNLOCKED";
      AnyString Description = "";
      AnyFloat Data = 198.9149932861;
    };
    AnyFolder RFootLength = {
      AnyInt ID = 11;
      AnyString locked = "UNLOCKED";
      AnyString Description = "";
      AnyFloat Data = 185.2530059814;
    };
    AnyFolder Marker_Diameter = {
      AnyInt ID = 11;
      AnyString locked = "UNLOCKED";
      AnyString Description = "";
      AnyInt Data = 25;
    };
  };
};
