// This file contains the application-specific drivers for the problem
AnyFolder Drivers = {

  AnyFolder &JntPos=..Mannequin.Posture;
  AnyFolder &JntVel=..Mannequin.PostureVel;
  AnyFolder &Thorax = ..HumanModel.Trunk.SegmentsThorax.ThoraxSeg;
  AnyFolder &RefHM = Main.Model.HumanModel;
  AnyFolder &ref=Main.Model.HumanModel.Trunk;


  // Attachment of the pelvis to the global reference system
  AnyKinEqSimpleDriver PelvisGroundDriver ={
    AnyKinLinear lin ={
      AnyFixedRefFrame &ref1 =....EnvironmentModel.GlobalRef;
      AnySeg &ref2 =....HumanModel.Trunk.SegmentsLumbar.PelvisSeg;
    };
    AnyKinRotational rot ={
      AnyFixedRefFrame &ref1 =....EnvironmentModel.GlobalRef;
      AnySeg &ref2 =....HumanModel.Trunk.SegmentsLumbar.PelvisSeg;
      Type=RotAxesAngles;
    };
    DriverPos={
      .JntPos.PelvisPosX,
      .JntPos.PelvisPosY,
      .JntPos.PelvisPosZ,
      pi/180*.JntPos.PelvisRotZ,
      pi/180*.JntPos.PelvisRotY,
      pi/180*.JntPos.PelvisRotX
    };
    DriverVel={
      .JntVel.PelvisPosX,
      .JntVel.PelvisPosY,
      .JntVel.PelvisPosZ,
      pi/180*.JntVel.PelvisRotX,
      pi/180*.JntVel.PelvisRotY,
      pi/180*.JntVel.PelvisRotZ
    };
    Reaction.Type={On,On,On,On,On,On};
  };

  /// Driver for the lateral position of the right elbow
  ///according to measurements.
  AnyKinEqSimpleDriver RightElbowPos = {
    AnyKinLinear FEPos = {
      AnyFixedRefFrame &ground = Main.Model.EnvironmentModel.GlobalRef;
      AnyRefNode &GH = Main.Model.HumanModel.Right.ShoulderArm.Seg.Humerus.fe;
    };
    MeasureOrganizer = {2};
    DriverPos={0.3};
    DriverVel={0};
    Reaction.Type = {Off};
  };

  // ************************************
  // Drivers for the spine
  // ************************************

  /// Neck driver
  AnyKinEqSimpleDriver NeckJntDriver = {
    AnyRevoluteJoint &T12L1Joint = ...HumanModel.Interface.Trunk.NeckJoint;
    DriverPos = pi/180*{.JntPos.NeckExtension};
    DriverVel = pi/180*{.JntVel.NeckExtension};
    Reaction.Type = {Off};
  };

  /// Thorax pelvis rotation driver. The intermediate vertebral joints are
  /// controlled by the spinal rhythm.
  AnyKinEqSimpleDriver PostureDriver ={
    AnyKinMeasureOrg &Ref2 = ...HumanModel.Interface.Trunk.PelvisThoraxLateralBending;
    AnyKinMeasureOrg &Ref3 = ...HumanModel.Interface.Trunk.PelvisThoraxRotation;
    AnyKinMeasureOrg &Ref1 = ...HumanModel.Interface.Trunk.PelvisThoraxExtension;

    DriverPos = pi/180*{
      .JntPos.PelvisThoraxLateralBending,
      .JntPos.PelvisThoraxRotation,
      .JntPos.PelvisThoraxExtension
    };
    DriverVel = pi/180*{
      .JntVel.PelvisThoraxLateralBending,
      .JntVel.PelvisThoraxRotation,
      .JntVel.PelvisThoraxExtension
    };
    Reaction.Type = {Off,Off,Off};
  };

  // ************************************
  // Drivers for the right arm
  // ************************************

  /// Sterno-clavicular joint driver
  AnyKinEqSimpleDriver SCDriverRight ={
    AnyKinMeasureOrg &ref1 =...HumanModel.Interface.Right.SternoClavicularProtraction;
    AnyKinMeasureOrg &ref2 =...HumanModel.Interface.Right.SternoClavicularElevation;
    AnyKinMeasureOrg &ref3 =...HumanModel.Interface.Right.SternoClavicularAxialRotation;
    DriverPos = pi/180*{
      .JntPos.Right.SternoClavicularProtraction,
      .JntPos.Right.SternoClavicularElevation,
      .JntPos.Right.SternoClavicularAxialRotation
    };
    DriverVel = {
      .JntVel.Right.SternoClavicularProtraction,
      .JntVel.Right.SternoClavicularElevation,
      .JntVel.Right.SternoClavicularAxialRotation
    };
    Reaction.Type={Off,Off,Off};
  };

  /// Elbow pronation driver
  AnyKinEqSimpleDriver ElbowPronationDriverRight={
    AnyKinMeasureOrg &Elbow =...HumanModel.Interface.Right.ElbowPronation;
    DriverPos = pi/180*{.JntPos.Right.ElbowPronation };
    DriverVel=pi/180*{.JntVel.Right.ElbowPronation };
    Reaction.Type={Off};
  };

  /// Wrist driver
  AnyKinEqSimpleDriver WristDriverRight ={
    AnyKinMeasureOrg &ref1 =...HumanModel.Interface.Right.WristFlexion;
    AnyKinMeasureOrg &ref2 =...HumanModel.Interface.Right.WristAbduction;
    DriverPos = pi/180*{
      .JntPos.Right.WristFlexion,
      .JntPos.Right.WristAbduction
    };
    DriverVel = pi/180*{
      .JntVel.Right.WristFlexion,
      .JntVel.Right.WristAbduction};
    Reaction.Type={Off,Off};
  };

  // ************************************
  // Drivers for the left arm
  // ************************************

  /// Sterno-clavicular joint driver
  AnyKinEqSimpleDriver SCDriverLeft ={
    AnyKinMeasureOrg &ref1 =...HumanModel.Interface.Left.SternoClavicularProtraction;
    AnyKinMeasureOrg &ref2 =...HumanModel.Interface.Left.SternoClavicularElevation;
    AnyKinMeasureOrg &ref3 =...HumanModel.Interface.Left.SternoClavicularAxialRotation;

    DriverPos = pi/180*{
      .JntPos.Left.SternoClavicularProtraction,
      .JntPos.Left.SternoClavicularElevation,
      .JntPos.Left.SternoClavicularAxialRotation
    };
    DriverVel = pi/180*{
      .JntVel.Left.SternoClavicularProtraction,
      .JntVel.Left.SternoClavicularElevation,
      .JntVel.Left.SternoClavicularAxialRotation
    };
    Reaction.Type={Off,Off,Off};
  };

  /// Glenohumeral joint driver
  AnyKinEqSimpleDriver GHDriverLeft={
    AnyKinMeasureOrg &ref1 =...HumanModel.Interface.Left.GlenohumeralAbduction;
    AnyKinMeasureOrg &ref2 =...HumanModel.Interface.Left.GlenohumeralFlexion;
    AnyKinMeasureOrg &ref3 =...HumanModel.Interface.Left.GlenohumeralExternalRotation;
    DriverPos=pi/180*{
      .JntPos.Left.GlenohumeralAbduction,  //GH joint
      .JntPos.Left.GlenohumeralFlexion,  //GH joint
      .JntPos.Left.GlenohumeralExternalRotation  //GH joint
    };
    DriverVel = pi/180*{
      .JntVel.Left.GlenohumeralAbduction,  //GH joint
      .JntVel.Left.GlenohumeralFlexion,  //GH joint
      .JntVel.Left.GlenohumeralExternalRotation  //GH joint
    };
    Reaction.Type={Off,Off,Off};
  };

  /// Elbow flexion driver
  AnyKinEqSimpleDriver ElbowFEDriverLeft={
    AnyKinMeasureOrg  &Elbow =...HumanModel.Interface.Left.ElbowFlexion;
    DriverPos=pi/180*{.JntPos.Left.ElbowFlexion};
    DriverVel = pi/180*{.JntVel.Left.ElbowFlexion};
    Reaction.Type={Off};
  };

  /// Elbow pronation driver
  AnyKinEqSimpleDriver ElbowPSDriverLeft={
    AnyKinMeasureOrg &Elbow =...HumanModel.Interface.Left.ElbowPronation;
    DriverPos= pi/180*{.JntPos.Left.ElbowPronation };
    DriverVel = pi/180*{.JntVel.Left.ElbowPronation };
    Reaction.Type={Off};
  };

  /// Wrist driver
  AnyKinEqSimpleDriver WristDriverLeft ={
    AnyKinMeasureOrg &ref1 =...HumanModel.Interface.Left.WristFlexion;
    AnyKinMeasureOrg &ref2 =...HumanModel.Interface.Left.WristAbduction;
    DriverPos = pi/180*{
      .JntPos.Left.WristFlexion,
      .JntPos.Left.WristAbduction
    };
    DriverVel = pi/180*{
      .JntVel.Left.WristFlexion,
      .JntVel.Left.WristAbduction};
    Reaction.Type={Off,Off};
  };
}; //Drivers

/// Joints between the human model and the environment
AnyFolder Joints = {
  AnySphericalJoint HandKnob = {
    AnySeg &Knob = Main.Model.EnvironmentModel.GearStick;
    AnySeg &Palm = Main.Model.HumanModel.Right.ShoulderArm.Seg.Glove;
    Constraints.Reaction.Type = {Off,On,On};  // Support in y and z but not in x.
  };
};
