/// This folder controls the load time posture of the model and
/// also drives the joint angles that are not controlled by the
/// connection to the environment.
AnyFolder Mannequin = {
  AnyFolder Posture = {
    AnyVar PelvisPosX = 7.996584e-028;
    AnyVar PelvisPosY = 4.180094e-066;
    AnyVar PelvisPosZ = 0;
    AnyVar PelvisRotX = 0;
    AnyVar PelvisRotY = 3.509792e-015;
    AnyVar PelvisRotZ = 0;
    AnyVar PelvisThoraxExtension = 0;
    AnyVar PelvisThoraxLateralBending = 0;
    AnyVar PelvisThoraxRotation = 0;
    AnyVar NeckExtension = 0;
    AnyFolder Right = {
      AnyVar SternoClavicularProtraction = -22.91831;
      AnyVar SternoClavicularElevation = 11.45916;
      AnyVar SternoClavicularAxialRotation = -20.05352;
      AnyVar GlenohumeralFlexion = -45.11917;
      AnyVar GlenohumeralAbduction = 17.71734;
      AnyVar GlenohumeralExternalRotation = -6.944152;
      AnyVar ElbowFlexion = 100.3452;
      AnyVar ElbowPronation = 80;
      AnyVar WristFlexion = -2.579369e-006;
      AnyVar WristAbduction = 1.207418e-006;
    };
    AnyFolder Left = {
      AnyVar SternoClavicularProtraction = -22.91831;
      AnyVar SternoClavicularElevation = 11.45916;
      AnyVar SternoClavicularAxialRotation = -20.05352;
      AnyVar GlenohumeralFlexion = 0;
      AnyVar GlenohumeralAbduction = 10;
      AnyVar GlenohumeralExternalRotation = 1.150934e-006;
      AnyVar ElbowFlexion = 5;
      AnyVar ElbowPronation = -30 + 1.781111e-013;
      AnyVar WristFlexion = -2.835307e-007;
      AnyVar WristAbduction = 0;
    };
  };

  AnyFolder PostureVel = {
    AnyVar PelvisPosX = 0;
    AnyVar PelvisPosY = 0;
    AnyVar PelvisPosZ = 0;
    AnyVar PelvisRotX = 0;
    AnyVar PelvisRotY = 0;
    AnyVar PelvisRotZ = 0;
    AnyVar PelvisThoraxExtension = 0;
    AnyVar PelvisThoraxLateralBending = 0;
    AnyVar PelvisThoraxRotation = 0;
    AnyVar NeckExtension = 0;
    AnyFolder Right = {
      AnyVar SternoClavicularProtraction = 0;
      AnyVar SternoClavicularElevation = 0;
      AnyVar SternoClavicularAxialRotation = 0;
      AnyVar GlenohumeralFlexion = 0;
      AnyVar GlenohumeralAbduction = 0;
      AnyVar GlenohumeralExternalRotation = 0;
      AnyVar ElbowFlexion =0;
      AnyVar ElbowPronation = 0;
      AnyVar WristFlexion = 0;
      AnyVar WristAbduction =0;
    };
    AnyFolder Left = {
      AnyVar SternoClavicularProtraction = 0;
      AnyVar SternoClavicularElevation = 0;
      AnyVar SternoClavicularAxialRotation = 0;
      AnyVar GlenohumeralFlexion = 0;
      AnyVar GlenohumeralAbduction = 0;
      AnyVar GlenohumeralExternalRotation = 0;
      AnyVar ElbowFlexion =0;
      AnyVar ElbowPronation = 0;
      AnyVar WristFlexion = 0;
      AnyVar WristAbduction =0;
    };
  };
};
