// This file contains the connections between the model and the environment
// along with the motion drivers

AnyFolder Joints = {
  AnyStdJoint PelvisGround = {
    AnyRefNode &ref1 = Main.Model.EnvironmentModel.GlobalRef.Hip;
    AnyRefNode &ref2 = Main.HumanModel.BodyModel.Trunk.SegmentsLumbar.PelvisSeg.HipJointRight;
  };
};

AnyFolder Drivers = {

  // Aliases for convenient referencing
  AnyFolder &JntPos=..Mannequin.Posture;
  AnyFolder &JntVel=..Mannequin.PostureVel;

  //Neck driver
  AnyKinEqSimpleDriver NeckJntDriver = {
    AnyRevoluteJoint &T12L1Joint = ....HumanModel.BodyModel.Interface.Trunk.NeckJoint;
    DriverPos = pi/180*{.JntPos.NeckExtension};
    DriverVel = pi/180*{.JntVel.NeckExtension};
    Reaction.Type = {Off};
  };

  //Thorax pelvis rotation driver
  AnyKinEqSimpleDriver PostureDriver ={
    AnyKinMeasureOrg &Ref2 = ...HumanModel.Interface.Trunk.PelvisThoraxLateralBending;
    AnyKinMeasureOrg &Ref3 = ...HumanModel.Interface.Trunk.PelvisThoraxRotation;
    AnyKinMeasureOrg &Ref1 = ...HumanModel.Interface.Trunk.PelvisThoraxExtension;

    DriverPos = pi/180*{
          .JntPos.PelvisThoraxLateralBending,
      .JntPos.PelvisThoraxRotation,
      .JntPos.PelvisThoraxExtension
    };
    DriverVel = pi/180*{
      .JntVel.PelvisThoraxLateralBending,
      .JntVel.PelvisThoraxRotation,
      .JntVel.PelvisThoraxExtension
    };
    Reaction.Type = {Off,Off,Off};
  };


  ///Hip driver
  AnyKinEqSimpleDriver HipDriverRight={
    AnyKinMeasureOrg &ref1 =...HumanModel.Interface.Right.HipFlexion;
    AnyKinMeasureOrg &ref2 =...HumanModel.Interface.Right.HipExternalRotation;
    AnyKinMeasureOrg &ref3 =...HumanModel.Interface.Right.HipAbduction;
    DriverPos = pi/180*{
      .JntPos.Right.HipFlexion,
      .JntPos.Right.HipExternalRotation,
      .JntPos.Right.HipAbduction
    };
    DriverVel={0,0,0};
    Reaction.Type={Off,Off,Off};
  };

  ///Knee driver
  AnyKinEqSimpleDriver KneeDriverRight={
    AnyKinMeasureOrg  &Knee = ...HumanModel.Interface.Right.KneeFlexion;
    DriverPos = pi/180*{.JntPos.Right.KneeFlexion};
    DriverVel={0.0};
    Reaction.Type={Off};
  };

  ///Ankle driver
  AnyKinEqSimpleDriver AnkleDriverRight={
    AnyKinMeasureOrg &ref1=...HumanModel.Interface.Right.AnklePlantarFlexion;
    AnyKinMeasureOrg &ref2=...HumanModel.Interface.Right.AnkleEversion;
    DriverPos = pi/180*{.JntPos.Right.AnklePlantarFlexion,.JntPos.Right.AnkleEversion};
    DriverVel=pi/180*{0,0};
    Reaction.Type={Off,Off};
  };

  AnyKinEqSimpleDriver ForcePos = {
    AnyPrismaticJoint &Slide = Main.Model.EnvironmentModel.FootSlide;
    DriverPos = {0.10};
    DriverVel = {-0.18};
    Reaction.Type = {On};
  };

};
