AnyDesEvalStudy EvalStudy =
{
  Analysis =
  {
    AnyOperation& RunInit = ..InitStudy.Kinematics;
  };

//  AnyDesVar RefLength_aACL =
//  {
//    Val = Main.Parameters.Ligaments.aACL.RefLength;
//  };
//  AnyDesVar RefLength_pACL =
//  {
//    Val = Main.Parameters.Ligaments.pACL.RefLength;
//  };
//  AnyDesVar RefLength_aPCL =
//  {
//    Val = Main.Parameters.Ligaments.aPCL.RefLength;
//  };
//  AnyDesVar RefLength_pPCL =
//  {
//    Val = Main.Parameters.Ligaments.pPCL.RefLength;
//  };
//  AnyDesVar RefLength_ALS =
//  {
//    Val = Main.Parameters.Ligaments.ALS.RefLength;
//  };
//  AnyDesVar RefLength_LCL =
//  {
//    Val = Main.Parameters.Ligaments.LCL.RefLength;
//  };
//  AnyDesVar RefLength_aMCL =
//  {
//    Val = Main.Parameters.Ligaments.aMCL.RefLength;
//  };
//  AnyDesVar RefLength_cMCL =
//  {
//    Val = Main.Parameters.Ligaments.cMCL.RefLength;
//  };
//  AnyDesVar RefLength_pMCL =
//  {
//    Val = Main.Parameters.Ligaments.pMCL.RefLength;
//  };
//  AnyDesVar RefLength_aCM =
//  {
//    Val = Main.Parameters.Ligaments.aCM.RefLength;
//  };
//  AnyDesVar RefLength_pCM =
//  {
//    Val = Main.Parameters.Ligaments.pCM.RefLength;
//  };
//  AnyDesVar RefLength_Lcap =
//  {
//    Val = Main.Parameters.Ligaments.Lcap.RefLength;
//  };
//  AnyDesVar RefLength_Mcap =
//  {
//    Val = Main.Parameters.Ligaments.Mcap.RefLength;
//  };
//  AnyDesVar RefLength_OPL =
//  {
//    Val = Main.Parameters.Ligaments.OPL.RefLength;
//  };
//  AnyDesVar RefLength_PFL =
//  {
//    Val = Main.Parameters.Ligaments.PFL.RefLength;
//  };
//  AnyDesVar RefLength_MPFL =
//  {
//    Val = Main.Parameters.Ligaments.MPFL.RefLength;
//  };
//  AnyDesVar RefLength_LPFL =
//  {
//    Val = Main.Parameters.Ligaments.LPFL.RefLength;
//  };

//  AnyDesMeasure Measure_aACL =
//  {
//    Val = max(Main.InitStudy.OutputFunctions_Length.aACL());
//    Type = OutputFun ;
//  };
//  AnyDesMeasure Measure_pACL =
//  {
//    Val = max(Main.InitStudy.OutputFunctions_Length.pACL());
//    Type = OutputFun ;
//  };
//  AnyDesMeasure Measure_aPCL =
//  {
//    Val = max(Main.InitStudy.OutputFunctions_Length.aPCL());
//    Type = OutputFun ;
//  };
//  AnyDesMeasure Measure_pPCL =
//  {
//    Val = max(Main.InitStudy.OutputFunctions_Length.pPCL());
//    Type = OutputFun ;
//  };
//  AnyDesMeasure Measure_ALS =
//  {
//    Val = max(Main.InitStudy.OutputFunctions_Length.ALS());
//    Type = OutputFun ;
//  };
//  AnyDesMeasure Measure_LCL =
//  {
//    Val = max(Main.InitStudy.OutputFunctions_Length.LCL());
//    Type = OutputFun ;
//  };
//  AnyDesMeasure Measure_aMCL =
//  {
//    Val = max(Main.InitStudy.OutputFunctions_Length.aMCL());
//    Type = OutputFun ;
//  };
//  AnyDesMeasure Measure_cMCL =
//  {
//    Val = max(Main.InitStudy.OutputFunctions_Length.cMCL());
//    Type = OutputFun ;
//  };
//  AnyDesMeasure Measure_pMCL =
//  {
//    Val = max(Main.InitStudy.OutputFunctions_Length.pMCL());
//    Type = OutputFun ;
//  };
//  AnyDesMeasure Measure_aCM =
//  {
//    Val = max(Main.InitStudy.OutputFunctions_Length.aCM());
//    Type = OutputFun ;
//  };
//  AnyDesMeasure Measure_pCM =
//  {
//    Val = max(Main.InitStudy.OutputFunctions_Length.pCM());
//    Type = OutputFun ;
//  };
//  AnyDesMeasure Measure_Lcap =
//  {
//    Val = max(Main.InitStudy.OutputFunctions_Length.Lcap());
//    Type = OutputFun ;
//  };
//  AnyDesMeasure Measure_Mcap =
//  {
//    Val = max(Main.InitStudy.OutputFunctions_Length.Mcap());
//    Type = OutputFun ;
//  };
//  AnyDesMeasure Measure_OPL =
//  {
//    Val = max(Main.InitStudy.OutputFunctions_Length.OPL());
//    Type = OutputFun ;
//  };
//  AnyDesMeasure Measure_PFL =
//  {
//    Val = max(Main.InitStudy.OutputFunctions_Length.PFL());
//    Type = OutputFun ;
//  };
//  AnyDesMeasure Measure_MPFL =
//  {
//    Val = max(Main.InitStudy.OutputFunctions_Length.MPFL());
//    Type = OutputFun ;
//  };
//  AnyDesMeasure Measure_LPFL =
//  {
//    Val = max(Main.InitStudy.OutputFunctions_Length.LPFL());
//    Type = OutputFun ;
//  };
};
