// Those variable control the initial position of the body.
// They are also the input values for the MannequinDrivers if switched On above.
// ****************************************************************************


AnyFolder Mannequin =
{
  AnyFolder& RefInitPos = Main.Parameters.TrialSpecificData.InitialPositionOfBody;

  AnyFolder Posture =
  {
    AnyVar PelvisPosX=.RefInitPos.PelvisPosX;
    AnyVar PelvisPosY=.RefInitPos.PelvisPosY;
    AnyVar PelvisPosZ=.RefInitPos.PelvisPosZ;

    AnyVar PelvisRotX=.RefInitPos.PelvisRotX;
    AnyVar PelvisRotY=.RefInitPos.PelvisRotY;
    AnyVar PelvisRotZ=.RefInitPos.PelvisRotZ;

    AnyVar PelvisThoraxExtension=.RefInitPos.PelvisThoraxExtension;
    AnyVar PelvisThoraxLateralBending=.RefInitPos.PelvisThoraxLateralBending;
    AnyVar PelvisThoraxRotation=.RefInitPos.PelvisThoraxRotation;

    AnyVar NeckExtension=.RefInitPos.NeckExtension;
    AnyVar NeckLateralBending = .RefInitPos.NeckLateralBending;
    AnyVar NeckRotation = .RefInitPos.NeckRotation;

    AnyFolder Right =
    {
      //Arm
      AnyVar SternoClavicularProtraction=-23;   //This value is not used for initial position
      AnyVar SternoClavicularElevation=11.5;    //This value is not used for initial position
      AnyVar SternoClavicularAxialRotation=-20; //This value is not used for initial position

      AnyVar GlenohumeralFlexion = ..RefInitPos.Right.GlenohumeralFlexion ;
      AnyVar GlenohumeralAbduction = ..RefInitPos.Right.GlenohumeralAbduction ;
      AnyVar GlenohumeralExternalRotation = ..RefInitPos.Right.GlenohumeralExternalRotation ;

      AnyVar ElbowFlexion = ..RefInitPos.Right.ElbowFlexion ;
      AnyVar ElbowPronation = ..RefInitPos.Right.ElbowPronation ;

      AnyVar WristFlexion = ..RefInitPos.Right.WristFlexion ;
      AnyVar WristAbduction = ..RefInitPos.Right.WristAbduction ;

      //Leg
      AnyVar HipFlexion = ..RefInitPos.Right.HipFlexion ;
      AnyVar HipAbduction = ..RefInitPos.Right.HipAbduction ;
      AnyVar HipExternalRotation = ..RefInitPos.Right.HipExternalRotation ;

      AnyVar KneeFlexion = ..RefInitPos.Right.KneeFlexion ;
      AnyVar AnklePlantarFlexion =..RefInitPos.Right.AnklePlantarFlexion ;
      AnyVar SubTalarEversion = ..RefInitPos.Right.SubTalarEversion ;
    };

    AnyFolder Left =
    {
      //Arm
      AnyVar SternoClavicularProtraction=.Right.SternoClavicularProtraction;
      AnyVar SternoClavicularElevation=.Right.SternoClavicularElevation;
      AnyVar SternoClavicularAxialRotation=.Right.SternoClavicularAxialRotation;

      AnyVar GlenohumeralFlexion = ..RefInitPos.Left.GlenohumeralFlexion ;
      AnyVar GlenohumeralAbduction =..RefInitPos.Left.GlenohumeralAbduction ;
      AnyVar GlenohumeralExternalRotation =..RefInitPos.Left.GlenohumeralExternalRotation  ;

      AnyVar ElbowFlexion = ..RefInitPos.Left.ElbowFlexion  ;
      AnyVar ElbowPronation = ..RefInitPos.Left.ElbowPronation  ;
      AnyVar WristFlexion = ..RefInitPos.Left.WristFlexion ;
      AnyVar WristAbduction = ..RefInitPos.Left.WristAbduction  ;

      //Leg
      AnyVar HipFlexion =..RefInitPos.Left.HipFlexion ;
      AnyVar HipAbduction =..RefInitPos.Left.HipAbduction ;
      AnyVar HipExternalRotation = ..RefInitPos.Left.HipExternalRotation ;
      AnyVar KneeFlexion = ..RefInitPos.Left.KneeFlexion ;
      AnyVar AnklePlantarFlexion = ..RefInitPos.Left.AnklePlantarFlexion  ;
      AnyVar SubTalarEversion = ..RefInitPos.Left.SubTalarEversion  ;
    };
  };

  AnyFolder PostureVel={
    //This controls the position of the pelvi wrt. to the global reference frame
    AnyVar PelvisPosX=0;
    AnyVar PelvisPosY=0;
    AnyVar PelvisPosZ=0;

    //This controls the rotation of the pelvis wrt. to the global reference frame
    AnyVar PelvisRotX=0;
    AnyVar PelvisRotY=0;
    AnyVar PelvisRotZ=0;

    // These variables control the rotation of the thorax wrt the
    // pelvis
    AnyVar PelvisThoraxExtension=0;
    AnyVar PelvisThoraxLateralBending=0;
    AnyVar PelvisThoraxRotation=0;

    AnyVar NeckExtension=0;
    AnyVar NeckLateralBending=0;
    AnyVar NeckRotation=0;

    AnyFolder Right = {
      //Arm
      AnyVar SternoClavicularProtraction=0;   //This value is not used for initial position
      AnyVar SternoClavicularElevation=0;    //This value is not used for initial position
      AnyVar SternoClavicularAxialRotation=0; //This value is not used for initial position

      AnyVar GlenohumeralFlexion =0;
      AnyVar GlenohumeralAbduction = 0;
      AnyVar GlenohumeralExternalRotation = 0;

      AnyVar ElbowFlexion = 0.0;
      AnyVar ElbowPronation = 0.0;

      AnyVar WristFlexion =0;
      AnyVar WristAbduction =0;

      //Leg
      AnyVar HipFlexion = 0.0;
      AnyVar HipAbduction = 0.0;
      AnyVar HipExternalRotation = 0.0;

      AnyVar KneeFlexion = 0.0;
      AnyVar AnklePlantarFlexion =0.0;
      AnyVar SubTalarEversion = 0;
    };

    AnyFolder Left = {
      //all values are set to be equal to the right side values
      //feel free to change this!

      //Arm
      AnyVar SternoClavicularProtraction=.Right.SternoClavicularProtraction;
      AnyVar SternoClavicularElevation=.Right.SternoClavicularElevation;
      AnyVar SternoClavicularAxialRotation=.Right.SternoClavicularAxialRotation;

      AnyVar GlenohumeralFlexion = .Right.GlenohumeralFlexion ;
      AnyVar GlenohumeralAbduction =.Right.GlenohumeralAbduction ;
      AnyVar GlenohumeralExternalRotation =.Right.GlenohumeralExternalRotation ;

      AnyVar ElbowFlexion = .Right.ElbowFlexion;
      AnyVar ElbowPronation = .Right.ElbowPronation;
      AnyVar WristFlexion =.Right.WristFlexion;
      AnyVar WristAbduction =.Right.WristAbduction;

      //Leg
      AnyVar HipFlexion =.Right.HipFlexion;
      AnyVar HipAbduction =.Right.HipAbduction;
      AnyVar HipExternalRotation = .Right.HipExternalRotation;
      AnyVar KneeFlexion = .Right.KneeFlexion;
      AnyVar AnklePlantarFlexion = .Right.AnklePlantarFlexion ;
      AnyVar SubTalarEversion = .Right.SubTalarEversion;
    };
  };

};
