AnyFolder SupportSettings =
{
  AnyVar StaticFrictionSeat = 0.2;
  AnyVar StaticFrictionBackrest = 0.2;
  AnyVar StaticFrictionFootrest = 0.2;

  AnyVar LowerbodySupportStrength=1000 ;
  AnyVar BackrestSupportStrength=1000 ;
  AnyVar FootrestSupportStrength=1000 ;
};
