AnyFolder LocalMarkerCoordinates = {
	AnyVec3 SACRUM = {-0.0555000000000,0.0000000000000,0.0000000000000};
	AnyVec3 ASISR = {0.1718224436012,-0.0704460000000,0.1363939092485};
	AnyVec3 ASISL = {0.1768781088463,-0.0709230000000,-0.1543912173049};
	AnyVec3 KNEER = {-0.0081828726803,-0.2396297305777,-0.0114534978140};
	AnyVec3 KNEEL = {-0.0245332330802,-0.1867004661082,-0.0245114560465};
	AnyVec3 MALLEOLUSR = {0.0080332833457,-0.2580235262014,0.0365985651934};
	AnyVec3 MALLEOLUSL = {-0.0069005004596,-0.2636375578787,-0.0513010399493};
	AnyVec3 METATARSALR = {0.0107920000000,-0.0539590000000,0.0431670000000};
	AnyVec3 METATARSALL = {0.0107920000000,-0.0539590000000,-0.0431670000000};
	AnyVec3 TIBIALTUBERCLEL = {0.0099149352575,0.1786732635090,-0.0005549233066};
	AnyVec3 TIBIALTUBERCLER = {0.0368023628479,0.1571001263527,-0.0576487431945};
	AnyVec3 TROCHANTERMAJORL = {0.0100256602498,0.1859439761086,-0.0890395838341};
	AnyVec3 TROCHANTERMAJORR = {0.0475589529535,0.1371873579658,0.0755478552579};
	AnyVec3 HEELR = {0.0230210000000,0.1197080000000,0.0000000000000};
	AnyVec3 HEELL = {0.0230210000000,0.1197080000000,0.0000000000000};
};

AnyFolder ScalingParameters = {
	AnyVar FOOT = 0.1901000000000;
	AnyVar SHANK = 0.3839934776061;
	AnyVar THIGH = 0.4690356716510;
	AnyVar PELVIS = 0.1491463400000;
};
