//---------------------------------------------------------------
// Chair package
//---------------------------------------------------------------

// AnyFolder &RefPP = Main.PackageParameters;

//------------------------------------------------------
// Global Reference Frame
//------------------------------------------------------


AnyFixedRefFrame GlobalRef = {

  AnyRefNode GroundNode = {
    sRel = {0.0, 0.0, 0.0};
  };

};
