  AnyFolder HumanModel={

    AnyFolder &Mannequin=.Model.Mannequin;

    #include  "BodyPartsSetup.any"
    #include  "<ANYBODY_PATH_BODY>/BodyModels/GenericBodyModel/BodyModel.any"

    AnyFolder StrengthParameters={
      AnyVar SpecificMuscleTensionSpine= 35; //N/cm^2
      //AnyVar SpecificMuscleTensionSpine= 90; //N/cm^2
      AnyVar StrengthIndexLeg= 1;
      AnyVar SpecificMuscleTensionShoulderArm= 90; //N/cm^2
    };

    /*
    Choice of Scaling
    */
    #include "<ANYBODY_PATH_BODY>\Scaling\ScalingStandard.any"

  };
