// This file creates the environment around the human. By default, it creates
// the force plates. You can also add additional devices here.
AnyFolder EnvironmentModel ={

  // Defines the Global Ref Frame, usually no changes necessary.
  AnyFixedRefFrame GlobalRef ={
    Origin={0,0,0};
    AnyDrawRefFrame drw={ScaleXYZ=0.4*{1,1,1};};
  };
  AnyFolder DrawC3DMarkers = {};
  // Reference to the BodyModel to allow easy scripting, usually no changes necessary.
  AnyFolder &BodyModelRef=Main.Studies.HumanModel.BodyModel;

  // ***************************
  // Force Plates are included here. If you want to run the model on your own data
  // and you have a different amount or type of force plates, this is the place to start:
  // There is a detailed description of how to change forceplate types, number of plates,
  // orientation etc. in the Wiki at: www.anyscript.org
  // ***************************
  #define HumanModelPresent 1
  #include "../Input/ForcePlates.any"
  #undef HumanModelPresent


  // ***************************
  // Add other environment here:
  // ***************************

};
