AnyFolder HumanModel={

  //    // Select the body model:
  //    // ----------------------
  //    // This file contains a list of all body parts, select them to create
  //    // the body model wanted.
  #if  MotionAndParameterOptimizationModel
  AnyFolder &Mannequin=.KinematicStudyForParameterIdentification.Mannequin;
  #include  "BodyPartsSetupKinematics.any"
  #endif

  #if InverseDynamicModel
  AnyFolder &Mannequin=.InverseDynamicStudy.Mannequin;
  #include  "BodyPartsSetup.any"
  #endif
  //
  // This file creates the body model from the selected list.
  #include  "<ANYBODY_PATH_BODY>\BodyModels\GenericBodyModel\BodyModel.any"


  AnyFolder StrengthParameters={
    // This model is from an experienced world leading runner,
    // therefore all strength parameters have been increased!
    AnyVar SpecificMuscleTensionSpine= 250; //N/cm^2
    AnyVar StrengthIndexLeg= 3;
    AnyVar SpecificMuscleTensionShoulderArm= 250; //N/cm^2
  };

  //Choose between scaling laws
  //#include "<ANYBODY_PATH_BODY>\Scaling\ScalingUniform.any"
  //#include "<ANYBODY_PATH_BODY>\Scaling\ScalingLengthMass.any"
  #include "<ANYBODY_PATH_BODY>\Scaling\ScalingLengthMassFat.any"


  Scaling = {
    //This is the file which set the segments lenghts
    #include "AnyMan.any"
  };

};
