//AnyFolder &pelvis =Main.Studies.HumanModel.BodyModel.Trunk.SegmentsLumbar.PelvisSeg;
//pelvis ={AnyDrawRefFrame drw={};};

AnyFolder Mannequin = {

  AnyFolder Posture = {

    AnyParamFun &RASI = Main.ModelSetup.C3DFileData.Points.Markers.RASIS.PosInterpol;
    AnyParamFun &LASI = Main.ModelSetup.C3DFileData.Points.Markers.LASIS.PosInterpol;

    AnyParamFun &RPSI = Main.ModelSetup.C3DFileData.Points.Markers.RPSIS.PosInterpol;
    AnyParamFun &LPSI = Main.ModelSetup.C3DFileData.Points.Markers.LPSIS.PosInterpol;

    AnyVar PelvisPosX = 0.25* (RASI(Main.ModelSetup.tStart)[0]+LASI(Main.ModelSetup.tStart)[0]+RPSI(Main.ModelSetup.tStart)[0]+LPSI(Main.ModelSetup.tStart)[0]);
    AnyVar PelvisPosY =  0.25* (RASI(Main.ModelSetup.tStart)[1]+LASI(Main.ModelSetup.tStart)[1]+RPSI(Main.ModelSetup.tStart)[1]+LPSI(Main.ModelSetup.tStart)[1]);
    AnyVar PelvisPosZ = 0.25* (RASI(Main.ModelSetup.tStart)[2]+LASI(Main.ModelSetup.tStart)[2]+RPSI(Main.ModelSetup.tStart)[2]+LPSI(Main.ModelSetup.tStart)[2]);
    AnyVar PelvisRotZ = Main.TrialSpecificData.InitialPositionOfBody.PelvisRotZ;
    AnyVar PelvisRotY = Main.TrialSpecificData.InitialPositionOfBody.PelvisRotY;
    AnyVar PelvisRotX = Main.TrialSpecificData.InitialPositionOfBody.PelvisRotX;

    // These variables control the rotation of the thorax wrt the
    // pelvis
    AnyVar PelvisThoraxExtension=Main.TrialSpecificData.InitialPositionOfBody.PelvisThoraxExtension;
    AnyVar PelvisThoraxLateralBending=Main.TrialSpecificData.InitialPositionOfBody.PelvisThoraxLateralBending;
    AnyVar PelvisThoraxRotation=Main.TrialSpecificData.InitialPositionOfBody.PelvisThoraxRotation;

    AnyVar NeckExtension=Main.TrialSpecificData.InitialPositionOfBody.NeckExtension;
    AnyVar NeckLateralBending=Main.TrialSpecificData.InitialPositionOfBody.NeckLateralBending;
    AnyVar NeckRotation=Main.TrialSpecificData.InitialPositionOfBody.NeckRotation;

    AnyFolder Right =
    {
      //Arm
      AnyVar SternoClavicularProtraction=-23;   //This value is not used for initial position
      AnyVar SternoClavicularElevation=11.5;    //This value is not used for initial position
      AnyVar SternoClavicularAxialRotation=-20; //This value is not used for initial position

      AnyVar GlenohumeralFlexion = Main.TrialSpecificData.InitialPositionOfBody.Right.GlenohumeralFlexion;
      AnyVar GlenohumeralAbduction = Main.TrialSpecificData.InitialPositionOfBody.Right.GlenohumeralAbduction ;
      AnyVar GlenohumeralExternalRotation = Main.TrialSpecificData.InitialPositionOfBody.Right.GlenohumeralExternalRotation ;

      AnyVar ElbowFlexion = Main.TrialSpecificData.InitialPositionOfBody.Right.ElbowFlexion ;
      AnyVar ElbowPronation = Main.TrialSpecificData.InitialPositionOfBody.Right.ElbowPronation;
      AnyVar WristFlexion = Main.TrialSpecificData.InitialPositionOfBody.Right.WristFlexion;
      AnyVar WristAbduction = Main.TrialSpecificData.InitialPositionOfBody.Right.WristAbduction;

      AnyVar HipFlexion = Main.TrialSpecificData.InitialPositionOfBody.Right.HipFlexion;
      AnyVar HipAbduction = Main.TrialSpecificData.InitialPositionOfBody.Right.HipAbduction;
      AnyVar HipExternalRotation = Main.TrialSpecificData.InitialPositionOfBody.Right.HipExternalRotation;
      AnyVar KneeFlexion = Main.TrialSpecificData.InitialPositionOfBody.Right.KneeFlexion;
      AnyVar AnklePlantarFlexion = Main.TrialSpecificData.InitialPositionOfBody.Right.AnklePlantarFlexion;
      AnyVar SubTalarEversion =Main.TrialSpecificData.InitialPositionOfBody.Right.SubTalarEversion;
    };
    AnyFolder Left =
    {

      //Arm
      AnyVar SternoClavicularProtraction=.Right.SternoClavicularProtraction;
      AnyVar SternoClavicularElevation=.Right.SternoClavicularElevation;
      AnyVar SternoClavicularAxialRotation=.Right.SternoClavicularAxialRotation;

      AnyVar GlenohumeralFlexion = Main.TrialSpecificData.InitialPositionOfBody.Left.GlenohumeralFlexion;
      AnyVar GlenohumeralAbduction = Main.TrialSpecificData.InitialPositionOfBody.Left.GlenohumeralAbduction ;
      AnyVar GlenohumeralExternalRotation = Main.TrialSpecificData.InitialPositionOfBody.Left.GlenohumeralExternalRotation ;

      AnyVar ElbowFlexion = Main.TrialSpecificData.InitialPositionOfBody.Left.ElbowFlexion ;
      AnyVar ElbowPronation = Main.TrialSpecificData.InitialPositionOfBody.Left.ElbowPronation;
      AnyVar WristFlexion = Main.TrialSpecificData.InitialPositionOfBody.Left.WristFlexion;
      AnyVar WristAbduction = Main.TrialSpecificData.InitialPositionOfBody.Left.WristAbduction;

      AnyVar HipFlexion = Main.TrialSpecificData.InitialPositionOfBody.Left.HipFlexion;
      AnyVar HipAbduction = Main.TrialSpecificData.InitialPositionOfBody.Left.HipAbduction;
      AnyVar HipExternalRotation = Main.TrialSpecificData.InitialPositionOfBody.Left.HipExternalRotation;
      AnyVar KneeFlexion = Main.TrialSpecificData.InitialPositionOfBody.Left.KneeFlexion;
      AnyVar AnklePlantarFlexion = Main.TrialSpecificData.InitialPositionOfBody.Left.AnklePlantarFlexion;
      AnyVar SubTalarEversion =Main.TrialSpecificData.InitialPositionOfBody.Left.SubTalarEversion;
    };


  };

  AnyFolder PostureVel={
    //This controls the position of the pelvi wrt. to the global reference frame
    AnyVar PelvisPosX=0;
    AnyVar PelvisPosY=0;
    AnyVar PelvisPosZ=0;

    //This controls the rotation of the pelvis wrt. to the global reference frame
    AnyVar PelvisRotX=0;
    AnyVar PelvisRotY=0;
    AnyVar PelvisRotZ=0;

    // These variables control the rotation of the thorax wrt the
    // pelvis
    AnyVar PelvisThoraxExtension=0;
    AnyVar PelvisThoraxLateralBending=0;
    AnyVar PelvisThoraxRotation=0;

    AnyVar NeckExtension=0;
    AnyVar NeckLateralBending=0;
    AnyVar NeckRotation=0;

    AnyFolder Right = {
      //Arm
      AnyVar SternoClavicularProtraction=0;   //This value is not used for initial position
      AnyVar SternoClavicularElevation=0;    //This value is not used for initial position
      AnyVar SternoClavicularAxialRotation=0; //This value is not used for initial position

      AnyVar GlenohumeralFlexion =0;
      AnyVar GlenohumeralAbduction = 0;
      AnyVar GlenohumeralExternalRotation = 0;

      AnyVar ElbowFlexion = 0.0;
      AnyVar ElbowPronation = 0.0;

      AnyVar WristFlexion =0;
      AnyVar WristAbduction =0;

      AnyVar HipFlexion = 0.0;
      AnyVar HipAbduction = 0.0;
      AnyVar HipExternalRotation = 0.0;

      AnyVar KneeFlexion = 0.0;

      AnyVar AnklePlantarFlexion =0.0;
      AnyVar SubTalarEversion=0.0;

    };

    AnyFolder Left = {
      //all values are set to be equal to the right side values
      //feel free to change this!

      //Arm
      AnyVar SternoClavicularProtraction=.Right.SternoClavicularProtraction;
      AnyVar SternoClavicularElevation=.Right.SternoClavicularElevation;
      AnyVar SternoClavicularAxialRotation=.Right.SternoClavicularAxialRotation;

      AnyVar GlenohumeralFlexion = .Right.GlenohumeralFlexion ;
      AnyVar GlenohumeralAbduction =.Right.GlenohumeralAbduction ;
      AnyVar GlenohumeralExternalRotation =.Right.GlenohumeralExternalRotation ;

      AnyVar ElbowFlexion = .Right.ElbowFlexion;
      AnyVar ElbowPronation = .Right.ElbowPronation;
      AnyVar WristFlexion =.Right.WristFlexion;
      AnyVar WristAbduction =.Right.WristAbduction;


      //Leg
      AnyVar HipFlexion =.Right.HipFlexion;
      AnyVar HipAbduction =.Right.HipAbduction;
      AnyVar HipExternalRotation = .Right.HipExternalRotation;
      AnyVar KneeFlexion = .Right.KneeFlexion;
      AnyVar AnklePlantarFlexion = .Right.AnklePlantarFlexion ;
      AnyVar SubTalarEversion=.Right.SubTalarEversion;


    };
  };
};
