  AnyIntVar FirstFrame = C3DFileData.Header.FirstFrameNo + Main.TrialSpecificData.FrontFrameOffset;
  AnyIntVar LastFrame = C3DFileData.Header.LastFrameNo - Main.TrialSpecificData.LastFrameOffset;
  AnyIntVar nStep =(LastFrame-FirstFrame+1);
  AnyFloatVar tStart = FirstFrame/C3DFileData.Header.VideoFrameRate;
  AnyFloatVar tEnd = LastFrame/C3DFileData.Header.VideoFrameRate;
  AnyFolder Macros={};
