AnyFolder TrialSpecificData={

  // ********** Input File ***********
  //Name of the C3D file to be analysed
  AnyString NameOfFile ="GaitUniMiami"; //Write the name of the file here

  // ********** Time ***********
    // FrontFrameOffset is the offset value from the first frame of C3D file
  AnyIntVar FrontFrameOffset = 50;
  // LastFrameOffset is the offset value from the last frame of C3D file
  AnyIntVar LastFrameOffset  = 75;
  // Number of steps for the analysis but can be changed is needed
  AnyIntVar nStep = Main.ModelSetup.nStep;


  // ********** Gravity ***********
  // Gravity vector that is consistent with the laboratory setting
  AnyVector Gravity = {0, 0, -9.81}; // Z direction is normal to the ground


  // ********** Antrhopometrics ***********
  //These antrhopometric data will be used as initial guess for the optimization alogorithm the optimization algoritm will allow changes to the
  //segment lengths
  AnyFolder Anthropometrics={
    AnyVar BodyMass         = 75.4;  //the mass is automatically distributed to the segments
    AnyVar BodyHeight       = 1.735; //height

    AnyVar ThighLength      = 0.452;  //rigth and left side is mirrored
    AnyVar ShankLength      = 0.41;
    AnyVar FootLength       = 0.22;
    AnyVar PelvisWidth      = 0.169;  //distance between hip joints

    AnyVar HeadHeight       = 0.14;  //height in neutral position from  C1HatNode to top of head
    AnyVar TrunkHeight      = 0.569;  //height in neautral position from  C1HatNode to L5SacrumJnt
    AnyVar UpperArmLength   = 0.294;
    AnyVar LowerArmLength   = 0.25;
    AnyVar HandLength       = 0.182;
    AnyVar HandBreadth      = 0.085;
  };


  // Define what anthropometrics will be optimised, but be aware that inconsiderate changes
  // might lead to model failure! Pelvis and Trunk can only be "On" if there are markers available.
  // Upper and Lower arms can only be "On" if Upper Body is used and sufficient markers are available.
  Main.ModelSetup = {
    // For FullBody model
    #if UseUpperExtremities == 1
    OptimizeAnthropometricsOnOff OptimizeOnOff (
    PelvisWidthOnOff ="On",
    ThighLengthOnOff="On",
    ShankLengthOnOff="On",
    FootLengthOnOff="On",
    HeadHeightOnOff="Off",
    TrunkHeightOnOff="On",
    UpperArmLengthOnOff="On",
    LowerArmLengthOnOff="On",
    Model1=MotionAndParameterOptimizationModel, Model2= InverseDynamicModel
    ) ={};
    #endif
    // For LowerBody model
    #if UseUpperExtremities == 0
    OptimizeAnthropometricsOnOff OptimizeOnOff (
    PelvisWidthOnOff ="On",
    ThighLengthOnOff="On",
    ShankLengthOnOff="On",
    FootLengthOnOff="On",
    HeadHeightOnOff="Off",
    TrunkHeightOnOff="On",
    UpperArmLengthOnOff="Off",
    LowerArmLengthOnOff="Off",
    Model1=MotionAndParameterOptimizationModel, Model2= InverseDynamicModel
    ) ={};
    #endif
    //
   };


  // ********** Initial Position ***********
  //This is the initial position of the body it should only be touched it the kinematics does not work it first timestep
  //then these variable can be used to create a better guess, otherwise leave them unchanged
  AnyFolder InitialPositionOfBody ={

    AnyVar PelvisRotZ   = 180;
    AnyVar PelvisRotY   = 0;
    AnyVar PelvisRotX   = 90;

    AnyVar PelvisThoraxExtension=0;
    AnyVar PelvisThoraxLateralBending=0;
    AnyVar PelvisThoraxRotation=0;

    AnyVar NeckExtension=0;

    AnyFolder Right={
      AnyVar HipFlexion                = 10;
      AnyVar HipAbduction              = 0;
      AnyVar HipExternalRotation       = -3;
      AnyVar KneeFlexion               = 20;
      AnyVar AnklePlantarFlexion       = 20;
      AnyVar SubTalarEversion          = 0.2;
      AnyVar GlenohumeralFlexion       = 5;
      AnyVar GlenohumeralAbduction     = 15;
      AnyVar GlenohumeralExternalRotation = -10;
      AnyVar ElbowFlexion              = 10;
      AnyVar ElbowPronation            = 0.0;
      AnyVar WristFlexion              = 0;
      AnyVar WristAbduction            = 0;
    };

    AnyFolder Left ={
      AnyVar HipFlexion                 = 5;
      AnyVar HipAbduction               = -3;
      AnyVar HipExternalRotation        = 0;
      AnyVar KneeFlexion                = 60;
      AnyVar AnklePlantarFlexion        = 30;
      AnyVar SubTalarEversion           = 0.2;
      AnyVar GlenohumeralFlexion        = 0;
      AnyVar GlenohumeralAbduction      = 10;
      AnyVar GlenohumeralExternalRotation = -10;
      AnyVar ElbowFlexion               = 35 ;
      AnyVar ElbowPronation             = 0;
      AnyVar WristFlexion               = 0;
      AnyVar WristAbduction             = 0;
    };
  };


  // ********** Extra Drivers ***********
  // Some Gait Labs protocols do not record sufficient markers to create a full body model.
  // In particular, markers on the head, trunk and a third marker on the foot are not standard.
  // Therefore, additioanl drivers have been added to the model fix the head, drive the trunk
  // above the pelvis and fix subtalar eversio. You can switch them on for your own C3D files:
  // Do you have markers on the head? If not turn on following switch:

#define HeadMarkersOnOff 1

  // Do you have markers on the Trunk? If not turn on following switch:

#define TrunkMarkersOnOff 1

  // Do you have three markers on the Foot? If not turn on following switch:

#define ThreeFootMarkersOnOff 1

  // Do you have markers on the Scapula/Clavicle? If not turn on following switch:

#define SCMarkersOnOff 1
};
