//** Creates the RunApplication **//
Main = {
  AnyOperationMacro InverseDynamicAnalysisSequence =
  {
    MacroStr =
    ({
      "classoperation Main.Studies.LoadParametersOptimizationResults" + " " + strquote("Load design") + " --file=" + strformat("\x22") + "../Input/" + OutputFileNamePrefix + Main.ModelSetup.C3DFileData.NameOfFile +"-"+"OptimizedParameters.txt" + strformat("\x22"),
      "classoperation Main" + strformat("\x22")+ "Update Values" + strformat("\x22"),
      "operation Main.Studies.InverseDynamicStudy.InitialConditions",
      "run",
      "operation Main.Studies.HumanModel.Calibration.CalibrationSequence",
      "run",
      "operation Main.Studies.InverseDynamicStudy.InverseDynamics",
      "run"
      #if AutoSaveOption
      ,
      "classoperation Main.Studies.InverseDynamicStudy.Output" + strquote("Save data") + " --file="+ "../Output/" + OutputFileNamePrefix + Main.ModelSetup.C3DFileData.NameOfFile + ".anydata.h5 " + "--type=Deep"
      #endif
    });
  };
};


//** Includes the human body model **// Usually no need to make changes
#include "HumanModel.any"


// Main Study to run Inverse Dynamics and compute muscle and joint forces**// Usually no need to make changes
AnyBodyStudy InverseDynamicStudy = {
  AnyFolder &C3DData=..ModelSetup.C3DFileData ;
  AnyFolder &BodyModel=.HumanModel.BodyModel;
  #include "Mannequin.any"          //**// Usually no need to make changes

  AnyFolder &EnvironmentModel = Main.EnvironmentModel;
  AnyFolder ModelEnvironmentConnection = {
  #include "JointsAndDriversOptimized.any"    //**// Usually no need to make changes
  };

  Gravity = Main.TrialSpecificData.Gravity;
  tStart = Main.ModelSetup.tStart+2*Kinematics.ApproxVelAccPerturb;
  tEnd = Main.ModelSetup.tEnd-2*Kinematics.ApproxVelAccPerturb;
  nStep = Main.TrialSpecificData.nStep;
  InverseDynamics.Criterion.UpperBoundOnOff=Off;
  InitialConditions.MaxIteration = 20000;
  Kinematics.MaxIteration = 20000;
};


//This study is only used for loading the optimized parameters **// Usually no need to make changes
AnyOptKinStudy LoadParametersOptimizationResults =     {
  AnyFolder &Study = .InverseDynamicStudy;
  AnyFolder &HumanModel = .HumanModel;
  ParameterOptimization.ConvergenceTol=1e-3;
  Analysis =   {
    AnyOperation &ref = .Study.Kinematics;
  };
};
