AnyFolder TrialSpecificData={

  // ********** Input File ***********
  //Name of the C3D file to be analysed. Following C3D files are available:
  AnyString NameOfFile ="GaitNormal_1"; //Write the name of the file here
//  AnyString NameOfFile ="GaitNormal_2"; //Write the name of the file here
//  AnyString NameOfFile ="GaitNormal_3"; //Write the name of the file here
//  AnyString NameOfFile ="GaitFast_1"; //Write the name of the file here


  // ********** Time ***********
  // FrontFrameOffset is the offset value from the first frame of C3D file
  AnyIntVar FrontFrameOffset = 0;
  // LastFrameOffset is the offset value from the last frame of C3D file
  AnyIntVar LastFrameOffset  = 0;
  // Number of steps for the analysis but can be changed is needed
  AnyIntVar nStep = Main.ModelSetup.nStep;

  // ********** Gravity ***********
  // Gravity vector that is consistent with the laboratory setting
  AnyVector Gravity = {0, -9.81, 0}; // Y direction is normal to the ground

  // ********** Antrhopometrics ***********
  //This antrhopometric data will be used as initial guess for the optimization alogorithm.
  //The optimization algoritm will allow changes to the segment lengths.
  AnyFolder Anthropometrics={
    AnyVar BodyMass=62;  //the mass is automatically distributed to the segments
    AnyVar BodyHeight=1.73;  //height

    AnyVar ThighLength= 0.3524087 + 0.03;  //rigth and left side is mirrored
    AnyVar ShankLength= 0.3819627 + 0.05;
    AnyVar FootLength= 0.1633907;
    AnyVar PelvisWidth= 0.1686071; //distance between hip joints
    AnyVar PelvisDepth= 0.1686071; //Only effective at a special scaling method
    AnyVar HeadHeight = 0.14;//height in neutral position from  C1HatNode to top of head
    AnyVar TrunkHeight = 0.620233;//height in neutral position from  C1HatNode to L5SacrumJnt
    AnyVar UpperArmLength = 0.340079;
    AnyVar LowerArmLength =0.2690167;
    AnyVar HandLength = 0.182;
    AnyVar HandBreadth = 0.085;
  };

  // Define what anthropometrics will be optimised, but be aware that inconsiderate changes
  // might lead to model failure! Pelvis and Trunk can only be "On" if there are markers available.
  // Upper and Lower arms can only be "On" if Upper Body is used and sufficient markers are available.
  Main.ModelSetup =
  {
    // For FullBody model
    #if BM_ARM_LEFT + BM_ARM_RIGHT >= 1
    OptimizeAnthropometricsOnOff OptimizeOnOff (
    PelvisWidthOnOff ="On",
    PelvisDepthOnOff ="Off",
    ThighLengthOnOff="On",
    ShankLengthOnOff="On",
    FootLengthOnOff="On",
    HeadHeightOnOff="Off",
    TrunkHeightOnOff="On",
    UpperArmLengthOnOff="On",
    LowerArmLengthOnOff="On",
    Model1=MotionAndParameterOptimizationModel, Model2= InverseDynamicModel
    ) ={};
    #else
    OptimizeAnthropometricsOnOff OptimizeOnOff (
    PelvisWidthOnOff ="On",
    PelvisDepthOnOff ="Off",
    ThighLengthOnOff="On",
    ShankLengthOnOff="On",
    FootLengthOnOff="On",
    HeadHeightOnOff="Off",
    TrunkHeightOnOff="On",
    UpperArmLengthOnOff="Off",
    LowerArmLengthOnOff="Off",
    Model1=MotionAndParameterOptimizationModel, Model2= InverseDynamicModel
    ) ={};
    #endif
  };

  // ********** Initial Position ***********
  //This is the initial position of the body it should only be touched it the kinematics does not work it first timestep
  //then these variable can be used to create a better guess, otherwise leave them unchanged
  AnyFolder InitialPositionOfBody ={

    AnyVar PelvisRotZ = 0;
    AnyVar PelvisRotY = 0;
    AnyVar PelvisRotX = 0;

    AnyVar PelvisThoraxExtension=0;
    AnyVar PelvisThoraxLateralBending=0;
    AnyVar PelvisThoraxRotation=0;

    AnyVar NeckExtension=0;
    AnyVar NeckLateralBending=0;
    AnyVar NeckRotation=0;

    AnyFolder Right= {
      AnyVar HipFlexion                   = -20;
      AnyVar HipAbduction                 =  5.7;
      AnyVar HipExternalRotation          = -3;
      AnyVar KneeFlexion                  =  6.5;
      AnyVar AnklePlantarFlexion          =  0;
      AnyVar SubTalarEversion             =  0.23;
      AnyVar GlenohumeralFlexion          = -10;
      AnyVar GlenohumeralAbduction        =  10;
      AnyVar GlenohumeralExternalRotation =  00;
      AnyVar ElbowFlexion                 =  35;
      AnyVar ElbowPronation               = -60;
      AnyVar WristFlexion                 =  0;
      AnyVar WristAbduction               =  0;
    };

    AnyFolder Left = {
      AnyVar HipFlexion                   =  -20;
      AnyVar HipAbduction                 = -3.0;
      AnyVar HipExternalRotation          =  0;
      AnyVar KneeFlexion                  =  7.8;
      AnyVar AnklePlantarFlexion          =  0;
      AnyVar SubTalarEversion             =  0.21;
      AnyVar GlenohumeralFlexion          = -10;
      AnyVar GlenohumeralAbduction        =  10;
      AnyVar GlenohumeralExternalRotation =  0;
      AnyVar ElbowFlexion                 =  35;
      AnyVar ElbowPronation               = -60;
      AnyVar WristFlexion                 =  0;
      AnyVar WristAbduction               =  0;
    };
  };


  // ********** Extra Drivers ***********
  // Some Gait Labs protocols do not record sufficient markers to create a full body model.
  // In particular, markers on the head, trunk and a third marker on the foot are not standard.
  // Therefore, additioanl drivers have been added to the model fix the head, drive the trunk
  // above the pelvis and fix subtalar eversio. You can switch them on for your own C3D files:

  // Do you have markers on the head? If not turn OFF following switch:
#ifndef HeadMarkersOnOff
  #define HeadMarkersOnOff ON
#endif
  // Do you have markers on the Trunk? If not turn OFF following switch:
#ifndef TrunkMarkersOnOff
  #define TrunkMarkersOnOff ON
#endif
  // Do you have three markers on the Foot? If not turn OFF following switch:
#ifndef ThreeFootMarkersOnOff
  #define ThreeFootMarkersOnOff ON
#endif
  // Do you have markers on the Scapula/Clavicle? If not turn OFF following switch:
#ifndef SCMarkersOnOff
  #define SCMarkersOnOff ON
#endif

#ifndef UseDetailNeckModel
  #define UseDetailNeckModel OFF
#endif
};
