AnyFolder JointsAndDrivers = {

  // Aliases for convenient referencing
  AnyFolder &JntPos=..Mannequin.Posture;
  AnyFolder &JntVel=..Mannequin.PostureVel;


  AnyKinEqInterPolDriver JntDriverTrunk = {
    FileErrorContinueOnOff = On;
    Type = Bspline;
    BsplineOrder = 4;
    FileName = "../Input/"+OutputFileNamePrefix+Main.ModelSetup.C3DFileData.NameOfFile+"-euler-trunk.txt";
    AnyKinMeasureOrg &PelvisPosX = ...BodyModel.Interface.Trunk.PelvisPosX;
    AnyKinMeasureOrg &PelvisPosY = ...BodyModel.Interface.Trunk.PelvisPosY;
    AnyKinMeasureOrg &PelvisPosZ = ...BodyModel.Interface.Trunk.PelvisPosZ;
    AnyKinMeasureOrg &PelvisRotX = ...BodyModel.Interface.Trunk.PelvisRotX;
    AnyKinMeasureOrg &PelvisRotY = ...BodyModel.Interface.Trunk.PelvisRotY;
    AnyKinMeasureOrg &PelvisRotZ = ...BodyModel.Interface.Trunk.PelvisRotZ;
    AnyKinMeasureOrg &PelvisThoraxExtension = ...BodyModel.Interface.Trunk.PelvisThoraxExtension;
    AnyKinMeasureOrg &PelvisThoraxLateralBending = ...BodyModel.Interface.Trunk.PelvisThoraxLateralBending;
    AnyKinMeasureOrg &PelvisThoraxRotation = ...BodyModel.Interface.Trunk.PelvisThoraxRotation;
    #if TRUNK == 1
    AnyKinMeasureOrg &NeckExtension = ...BodyModel.Interface.Trunk.NeckJoint;
    Reaction.Type={On,On,On,On,On,On,Off,Off,Off,Off};
    #endif
    #if TRUNK_NECK == 1
    AnyKinMeasureOrg& SkullThoraxFlexion = ...BodyModel.Interface.Trunk.SkullThoraxFlexion;
    AnyKinMeasureOrg& SkullThoraxLateralBending = ...BodyModel.Interface.Trunk.SkullThoraxLateralBending;
    AnyKinMeasureOrg& SkullThoraxRotation = ...BodyModel.Interface.Trunk.SkullThoraxRotation;
    Reaction.Type={On,On,On,On,On,On,Off,Off,Off,Off,Off,Off};
    #endif
  };

  #if LEFT_LEG_TD == 1
  AnyKinEqInterPolDriver JntDriverLeftLegTD = {
    FileErrorContinueOnOff = On;
    Type = Bspline;
    BsplineOrder = 4;
    FileName = "../Input/"+OutputFileNamePrefix+Main.ModelSetup.C3DFileData.NameOfFile+"-euler-leftlegtd.txt";
    AnyKinMeasureOrg &HipFlexion = ...BodyModel.Interface.Left.HipFlexion;
    AnyKinMeasureOrg &HipAbduction = ...BodyModel.Interface.Left.HipAbduction;
    AnyKinMeasureOrg &HipExternalRotation = ...BodyModel.Interface.Left.HipExternalRotation;
    AnyKinMeasureOrg &KneeFlexion = ...BodyModel.Interface.Left.KneeFlexion;
    AnyKinMeasureOrg &AnklePlantarFlexion = ...BodyModel.Interface.Left.AnklePlantarFlexion;
    AnyKinMeasureOrg &SubTalarEversion = ...BodyModel.Interface.Left.SubTalarEversion;
    Reaction.Type={Off,Off,Off,Off,Off,Off};
  };
  #endif


  #if RIGHT_LEG_TD == 1
  AnyKinEqInterPolDriver JntDriverRightLegTD =  {
    FileErrorContinueOnOff = On;
    Type = Bspline;
    BsplineOrder = 4;
    FileName = "../Input/"+OutputFileNamePrefix+Main.ModelSetup.C3DFileData.NameOfFile+"-euler-rightlegtd.txt";
    AnyKinMeasureOrg &HipFlexion = ...BodyModel.Interface.Right.HipFlexion;
    AnyKinMeasureOrg &HipAbduction = ...BodyModel.Interface.Right.HipAbduction;
    AnyKinMeasureOrg &HipExternalRotation = ...BodyModel.Interface.Right.HipExternalRotation;
    AnyKinMeasureOrg &KneeFlexion = ...BodyModel.Interface.Right.KneeFlexion;
    AnyKinMeasureOrg &AnklePlantarFlexion = ...BodyModel.Interface.Right.AnklePlantarFlexion;
    AnyKinMeasureOrg &SubTalarEversion = ...BodyModel.Interface.Right.SubTalarEversion;
    Reaction.Type={Off,Off,Off,Off,Off,Off};
  };
  #endif


  #if LEFT_LEG == 1
  AnyKinEqInterPolDriver JntDriverLeftLeg =
  {
    FileErrorContinueOnOff = On;
    Type = Bspline;
    BsplineOrder = 4;
    FileName = "../Input/"+OutputFileNamePrefix+Main.ModelSetup.C3DFileData.NameOfFile+"-euler-leftleg.txt";
    AnyKinMeasureOrg &HipFlexion = ...BodyModel.Interface.Left.HipFlexion;
    AnyKinMeasureOrg &HipAbduction = ...BodyModel.Interface.Left.HipAbduction;
    AnyKinMeasureOrg &HipExternalRotation = ...BodyModel.Interface.Left.HipExternalRotation;
    AnyKinMeasureOrg &KneeFlexion = ...BodyModel.Interface.Left.KneeFlexion;
    AnyKinMeasureOrg &AnklePlantarFlexion = ...BodyModel.Interface.Left.AnklePlantarFlexion;
    AnyKinMeasureOrg &AnkleEversion = ...BodyModel.Interface.Left.AnkleEversion;
    Reaction.Type={Off,Off,Off,Off,Off,Off};
  };
  #endif


  #if RIGHT_LEG == 1
  AnyKinEqInterPolDriver JntDriverRightLeg =
  {
    FileErrorContinueOnOff = On;
    Type = Bspline;
    BsplineOrder = 4;
    FileName = "../Input/"+OutputFileNamePrefix+Main.ModelSetup.C3DFileData.NameOfFile+"-euler-rightleg.txt";
    AnyKinMeasureOrg &HipFlexion = ...BodyModel.Interface.Right.HipFlexion;
    AnyKinMeasureOrg &HipAbduction = ...BodyModel.Interface.Right.HipAbduction;
    AnyKinMeasureOrg &HipExternalRotation = ...BodyModel.Interface.Right.HipExternalRotation;
    AnyKinMeasureOrg &KneeFlexion = ...BodyModel.Interface.Right.KneeFlexion;
    AnyKinMeasureOrg &AnklePlantarFlexion = ...BodyModel.Interface.Right.AnklePlantarFlexion;
    AnyKinMeasureOrg &AnkleEversion = ...BodyModel.Interface.Right.AnkleEversion;
    Reaction.Type={Off,Off,Off,Off,Off,Off};
  };
  #endif


  #if LEFT_ARM == 1
  AnyKinEqInterPolDriver JntDriverLeftArm =
  {
    FileErrorContinueOnOff = On;
    Type = Bspline;
    BsplineOrder = 4;
    FileName = "../Input/"+OutputFileNamePrefix+Main.ModelSetup.C3DFileData.NameOfFile+"-euler-leftarm.txt";

    AnyKinMeasureOrg &SternoClavicularProtraction=...BodyModel.Interface.Left.SternoClavicularProtraction;
    AnyKinMeasureOrg &SternoClavicularElevation=...BodyModel.Interface.Left.SternoClavicularElevation;
    AnyKinMeasureOrg &SternoClavicularAxialRotation=...BodyModel.Interface.Left.SternoClavicularAxialRotation;
    AnyKinMeasureOrg &GlenohumeralFlexion = ...BodyModel.Interface.Left.GlenohumeralFlexion;
    AnyKinMeasureOrg &GlenohumeralExternalRotation = ...BodyModel.Interface.Left.GlenohumeralExternalRotation;
    AnyKinMeasureOrg &GlenohumeralAbduction = ...BodyModel.Interface.Left.GlenohumeralAbduction;
    AnyKinMeasureOrg &ElbowFlexion = ...BodyModel.Interface.Left.ElbowFlexion;
    AnyKinMeasureOrg &ElbowPronation = ...BodyModel.Interface.Left.ElbowPronation;
    AnyKinMeasureOrg &WristFlexion = ...BodyModel.Interface.Left.WristFlexion;
    AnyKinMeasureOrg &WristAbduction = ...BodyModel.Interface.Left.WristAbduction;
    Reaction.Type={Off,Off,Off,Off,Off,Off,Off,Off,Off,Off};
  };
  #endif


  #if RIGHT_ARM == 1
  AnyKinEqInterPolDriver JntDriverRightArm =
  {
    FileErrorContinueOnOff = On;
    Type = Bspline;
    BsplineOrder = 4;
    FileName = "../Input/"+OutputFileNamePrefix+Main.ModelSetup.C3DFileData.NameOfFile+"-euler-rightarm.txt";

    AnyKinMeasureOrg &SternoClavicularProtraction=...BodyModel.Interface.Right.SternoClavicularProtraction;
    AnyKinMeasureOrg &SternoClavicularElevation=...BodyModel.Interface.Right.SternoClavicularElevation;
    AnyKinMeasureOrg &SternoClavicularAxialRotation=...BodyModel.Interface.Right.SternoClavicularAxialRotation;

    AnyKinMeasureOrg &GlenohumeralFlexion = ...BodyModel.Interface.Right.GlenohumeralFlexion;
    AnyKinMeasureOrg &GlenohumeralExternalRotation = ...BodyModel.Interface.Right.GlenohumeralExternalRotation;
    AnyKinMeasureOrg &GlenohumeralAbduction = ...BodyModel.Interface.Right.GlenohumeralAbduction;
    AnyKinMeasureOrg &ElbowFlexion = ...BodyModel.Interface.Right.ElbowFlexion;
    AnyKinMeasureOrg &ElbowPronation = ...BodyModel.Interface.Right.ElbowPronation;
    AnyKinMeasureOrg &WristFlexion = ...BodyModel.Interface.Right.WristFlexion;
    AnyKinMeasureOrg &WristAbduction = ...BodyModel.Interface.Right.WristAbduction;
    Reaction.Type={Off,Off,Off,Off,Off,Off,Off,Off,Off,Off};
  };
  #endif


};
