//** Creates the RunApplication **//
Main = {
  AnyOperationMacro RunMotionAndParameterOptimizationSequence =
  {
    MacroStr =
    ({
      "operation Main.Studies.ParameterIdentification.ParameterOptimization",
      "run",
      "classoperation Main.Studies.ParameterIdentification" + " " + strquote("Save design") + " --file=" + strformat("\x22") + "../Input/" + OutputFileNamePrefix + Main.ModelSetup.C3DFileData.NameOfFile +"-"+"OptimizedParameters.txt" + strformat("\x22"),
      //"classoperation Main" + strformat("\x22")+ "Update Values" + strformat("\x22"),
      "operation Main.Studies.MotionOptimization.Kinematics",
      "run"
    });
  };
};


//** Includes the human body model **// Usually no need to make changes
#include "HumanModel.any"


// First Sub-Study to identify the Parameters**// Usually no need to make changes
AnyBodyStudy KinematicStudyForParameterIdentification = {
  AnyFolder &C3DData=..ModelSetup.C3DFileData ;

  AnyFolder &BodyModel = .HumanModel.BodyModel;
  #include  "Mannequin.any" //**// Usually no need to make changes
  AnyFolder &EnvironmentModel = Main.EnvironmentModel;

  AnyFolder ModelEnvironmentConnection = {

    AnyFolder Drivers= {

      // ***************************************************************************************
      // ** This ExtraDrivers.any file may be modified according to your marker set **//
      // Depending on your marker configuration, you might need to add additional drivers in here.
      // Most drivers are predefined in the file and just need to be switched on:
      // ***************************************************************************************
      #include "ExtraDrivers.any"

      AnyFolder &JntPos=..Mannequin.Posture;
      AnyFolder &JntVel=..Mannequin.PostureVel;
    };
  };


  #include "JointAngleOutputs.any"          //**// Usually no need to make changes
  #include "UndefineBodyPartSetup.any"      //**// Usually no need to make changes

  Gravity = Main.TrialSpecificData.Gravity;
  tStart = Main.ModelSetup.tStart+2*Kinematics.ApproxVelAccPerturb;
  tEnd = Main.ModelSetup.tEnd-2*Kinematics.ApproxVelAccPerturb;
  nStep = floor(Main.TrialSpecificData.nStep/6); //run this analysis with a reduced step number be carefull it can be too low!

  Kinematics.PosAnalysisOnlyOnOff=On; //only run the position analysis
  InitialConditions.KinematicTol=1e-3;
  Kinematics.KinematicTol=1e-3;
  InitialConditions.SolverType = KinSolOverDeterminate;
  Kinematics.SolverType = KinSolOverDeterminate;
  InitialConditions.MaxIteration = 20000;
  Kinematics.MaxIteration = 20000;
};

// Second Sub-Study to optimize the Parameters**// Usually no need to make changes
AnyOptKinStudy ParameterIdentification =     {
  AnyFolder &StudyRef = .KinematicStudyForParameterIdentification;
  ParameterOptimization.ConvergenceTol=1e-2;
  Analysis =   {
    AnyOperation &ref = .StudyRef.Kinematics;
  };
};

// First Sub-Study to optimize the Motion**// Usually no need to make changes
AnyBodyStudy MotionOptimization =
{
  AnyFolder &C3DData=..ModelSetup.C3DFileData ;
  AnyFolder &BodyModel=.HumanModel.BodyModel;
  AnyFolder &ModelOptimizationModel=.KinematicStudyForParameterIdentification;
  AnyFolder &JointAngleOutput=.KinematicStudyForParameterIdentification.JointAngleOutputs;

  Gravity = Main.TrialSpecificData.Gravity;
  tStart = Main.ModelSetup.tStart+2*Kinematics.ApproxVelAccPerturb;
  tEnd = Main.ModelSetup.tEnd-2*Kinematics.ApproxVelAccPerturb;
  nStep = Main.TrialSpecificData.nStep;

  Kinematics.PosAnalysisOnlyOnOff=On;
  InitialConditions.SolverType = KinSolOverDeterminate;
  Kinematics.SolverType = KinSolOverDeterminate;
  InitialConditions.MaxIteration = 20000;
  Kinematics.MaxIteration = 20000;
};
