  //Neck driver
  AnyKinEqSimpleDriver NeckJntDriver = {
    AnyKinMeasure& fe = ...BodyModel.Interface.Trunk.SkullThoraxFlexion;
    AnyKinMeasure& ar = ...BodyModel.Interface.Trunk.SkullThoraxRotation;
    AnyKinMeasure& lb = ...BodyModel.Interface.Trunk.SkullThoraxLateralBending;
    DriverPos = pi/180*{.JntPos.NeckExtension,.JntPos.NeckRotation,.JntPos.NeckLateralBending};
    DriverVel = pi/180*{.JntVel.NeckExtension,.JntVel.NeckRotation,.JntVel.NeckLateralBending};
    Reaction.Type = {Off,Off,Off};
  };

  //Thorax pelvis rotation driver
  AnyKinEqSimpleDriver PostureDriver ={
    AnyKinMeasure& Ref2 = ...BodyModel.Interface.Trunk.PelvisThoraxLateralBending;
    AnyKinMeasure& Ref3 = ...BodyModel.Interface.Trunk.PelvisThoraxRotation;
    AnyKinMeasure& Ref1 = ...BodyModel.Interface.Trunk.PelvisThoraxExtension;

    DriverPos = pi/180*{
          .JntPos.PelvisThoraxLateralBending,
      .JntPos.PelvisThoraxRotation,
      .JntPos.PelvisThoraxExtension
    };
    DriverVel = pi/180*{
      .JntVel.PelvisThoraxLateralBending,
      .JntVel.PelvisThoraxRotation,
      .JntVel.PelvisThoraxExtension
    };
    Reaction.Type = {Off,Off,Off};
  };


//  MannequinLoads = {
//    AnyForce3D TopVertebra = {
//      AnyRefNode &ApplPoint = .hm.Trunk.SegmentsThorax.ThoraxSeg.C1HatNode;
//      F = .mql.TopVertebra;
//    };
//  };
