#include "../libdef.any"

// Find a detailed description here
#include "Model/Description.any"

Main = {

  #path BM_DRAWSETTINGS_FILE "Model/DrawSettings.any"

  #include "Model/BodyModelConfiguration.any"

//-----------Have to insert code before <ANYMOCAP_MODEL>---------
// Exclude right knee joint
#define BM_JOINT_TYPE_KNEE_RIGHT _JOINT_TYPE_USERDEFINED_
//Include right Moving-axis knee joint
#include "<ANYBODY_PATH_MODELUTILS>/MovingAxisKnee/AddOnKnee.any"
//----------------------------------------------------------------


  #path BM_MANNEQUIN_FILE "Model/Mannequin.any"

  #include "<ANYBODY_PATH_BODY>/HumanModel.any"

  /// The actual model where all components are assembled
  AnyFolder Model ={
    /// Body model without default drivers
    AnyFolder &BodyModel=.HumanModel.BodyModel;
    /// Reference to the mannequin folder (used by drivers)
    AnyFolder &Mannequin =.HumanModel.Mannequin;

    #include "Model/Environment.any"

    AnyFolder ModelEnvironmentConnection = {
     #include "Model/JointsAndDrivers.any"
    };
  };

  AnyBodyStudy Study = {
    AnyFolder &Model = .Model;

    tEnd = 1.0;
    Gravity = {0.0, -9.81, 0.0};
    nStep = 1;

    //include the next line to have a camera in the model
    //#include "Model/MovingCamera.any"

  }; // End of study

  // Include an operation sequence to run all required steps of your application (see Operations tab)
    #include "<ANYBODY_PATH_MODELUTILS>\Operations\RunAppSequence.any"

}; //Main
