/// This folder controls the load time posture of the model and
/// also drives the joint angles that are not controlled by the
/// connection to the environment.
AnyFolder Mannequin = {
  AnyFolder Posture = {
    AnyVar PelvisPosX = ...Model.MyPedal.Hpoint[0];
    AnyVar PelvisPosY = ...Model.MyPedal.Hpoint[1];
    AnyVar PelvisPosZ = ...Model.MyPedal.Hpoint[2];
    AnyVar PelvisRotX = 0;
    AnyVar PelvisRotY = 0;
    AnyVar PelvisRotZ = 0;
    AnyVar PelvisThoraxExtension = -0;
    AnyVar PelvisThoraxLateralBending = 0;
    AnyVar PelvisThoraxRotation = 0;
    AnyVar NeckExtension = 0;
    AnyVar NeckLateralBending=0;
    AnyVar NeckRotation=0;
    AnyFolder Right = {
      AnyVar HipFlexion = 107.6877;
      AnyVar HipAbduction = -11.21655;
      AnyVar HipExternalRotation = 3.285595;
      AnyVar KneeFlexion = 118.0613;
      AnyVar AnklePlantarFlexion = 0;
      AnyVar SubTalarEversion = 2.639792e-012;
    };
    AnyFolder Left = {
      AnyVar HipFlexion = 95.48516;
      AnyVar HipAbduction = 29.97731;
      AnyVar HipExternalRotation = 15.98248;
      AnyVar KneeFlexion = 86.94433;
      AnyVar AnklePlantarFlexion = -1.083317e-005;
      AnyVar SubTalarEversion = -4.126266e-009;
    };
  };

  AnyFolder PostureVel = {

    //This controls the position of the pelvi wrt. to the global reference frame
    AnyVar PelvisPosX=0;
    AnyVar PelvisPosY=0;
    AnyVar PelvisPosZ=0;

    //This controls the rotation of the pelvis wrt. to the global reference frame
    AnyVar PelvisRotX=0;
    AnyVar PelvisRotY=0;
    AnyVar PelvisRotZ=0;

    AnyVar PelvisThoraxExtension=0;
    AnyVar PelvisThoraxLateralBending=0;
    AnyVar PelvisThoraxRotation=0;

    AnyVar NeckExtension=0;
    AnyVar NeckLateralBending=0;
    AnyVar NeckRotation=0;

    AnyFolder Right = {
      AnyVar HipFlexion = 0.0;
      AnyVar HipAbduction = 0.0;
      AnyVar HipExternalRotation = 0.0;

      AnyVar KneeFlexion = 0.0;

      AnyVar AnklePlantarFlexion =0.0;
      AnyVar SubTalarEversion =0.0;
    };

    AnyFolder Left = {
      //all values are set to be equal to the right side values
      //feel free to change this!

      //Leg
      AnyVar HipFlexion =.Right.HipFlexion;
      AnyVar HipAbduction =.Right.HipAbduction;
      AnyVar HipExternalRotation = .Right.HipExternalRotation;
      AnyVar KneeFlexion = .Right.KneeFlexion;
      AnyVar AnklePlantarFlexion = .Right.AnklePlantarFlexion ;
      AnyVar SubTalarEversion =.Right.SubTalarEversion;
    };
  };
};
