#path __BM_PLUGIN_FILE__ "BodyModelConfiguration.any"
#define BM_CONFIG_PLUGIN __BM_PLUGIN_FILE__
// -----------------------------------------------------------------------------------
// The BodyModel configuration can be modified using BodyModel GUI plugin
// or by manually editing this file.
//
// Please see this this file for more information on the options:
// #path HTML_DOC "<AMMR_PATH_DOC>/bm_config/index.html"
// -----------------------------------------------------------------------------------

// Application was created using previous leg model
#define BM_LEG_MODEL _LEG_MODEL_TLEM2_
#define BM_SCALING _SCALING_STANDARD_

#define BM_FOOT_MODEL _FOOT_MODEL_TOE_FLEX_GM_
