//Remark that there are two markers on each foot which are not positioned automatically here one has to adjust the paramters of the "output-par.any"
//manually

AnyString String = {
      "INITPOS" +" "
      + strval(.PelvisLin.Pos[0]) + "  "
      + strval(.PelvisLin.Pos[1]) + "  "
      + strval(.PelvisLin.Pos[2]) + "  "
      + strval(.PelvisRot.Pos[0]) + "  "
      + strval(.PelvisRot.Pos[1]) + "  "
      + strval(.PelvisRot.Pos[2]) + "  "
      + strval(.PelvisRot.Pos[3]) + "  "

      + strval(.ThighLeftLin.Pos[0]) + "  "
      + strval(.ThighLeftLin.Pos[1]) + "  "
      + strval(.ThighLeftLin.Pos[2]) + "  "
      + strval(.ThighLeftRot.Pos[0]) + "  "
      + strval(.ThighLeftRot.Pos[1]) + "  "
      + strval(.ThighLeftRot.Pos[2]) + "  "
      + strval(.ThighLeftRot.Pos[3]) + "  "

      + strval(.ShankLeftLin.Pos[0]) + "  "
      + strval(.ShankLeftLin.Pos[1]) + "  "
      + strval(.ShankLeftLin.Pos[2]) + "  "
      + strval(.ShankLeftRot.Pos[0]) + "  "
      + strval(.ShankLeftRot.Pos[1]) + "  "
      + strval(.ShankLeftRot.Pos[2]) + "  "
      + strval(.ShankLeftRot.Pos[3]) + "  "

      + strval(.FootLeftLin.Pos[0]) + "  "
      + strval(.FootLeftLin.Pos[1]) + "  "
      + strval(.FootLeftLin.Pos[2]) + "  "
      + strval(.FootLeftRot.Pos[0]) + "  "
      + strval(.FootLeftRot.Pos[1]) + "  "
      + strval(.FootLeftRot.Pos[2]) + "  "
      + strval(.FootLeftRot.Pos[3]) + "  "

      + strval(.ThighRightLin.Pos[0]) + "  "
      + strval(.ThighRightLin.Pos[1]) + "  "
      + strval(.ThighRightLin.Pos[2]) + "  "
      + strval(.ThighRightRot.Pos[0]) + "  "
      + strval(.ThighRightRot.Pos[1]) + "  "
      + strval(.ThighRightRot.Pos[2]) + "  "
      + strval(.ThighRightRot.Pos[3]) + "  "

      + strval(.ShankRightLin.Pos[0]) + "  "
      + strval(.ShankRightLin.Pos[1]) + "  "
      + strval(.ShankRightLin.Pos[2]) + "  "
      + strval(.ShankRightRot.Pos[0]) + "  "
      + strval(.ShankRightRot.Pos[1]) + "  "
      + strval(.ShankRightRot.Pos[2]) + "  "
      + strval(.ShankRightRot.Pos[3]) + "  "

      + strval(.FootRightLin.Pos[0]) + "  "
      + strval(.FootRightLin.Pos[1]) + "  "
      + strval(.FootRightLin.Pos[2]) + "  "
      + strval(.FootRightRot.Pos[0]) + "  "
      + strval(.FootRightRot.Pos[1]) + "  "
      + strval(.FootRightRot.Pos[2]) + "  "
      + strval(.FootRightRot.Pos[3]) + "  ",

      "EULERANGLE" +" "
      + strval(..Mannequin.Posture.PelvisRotX/180*pi) + "  "
      + strval(..Mannequin.Posture.PelvisRotY/180*pi) + "  "
      + strval(..Mannequin.Posture.PelvisRotZ/180*pi) + "  "
      + strval(..Mannequin.Posture.Left.HipFlexion/180*pi) + "  "
      + strval(..Mannequin.Posture.Left.HipAbduction/180*pi) + "  "
      + strval(..Mannequin.Posture.Left.HipExternalRotation/180*pi) + "  "
      + strval(-..Mannequin.Posture.Left.KneeFlexion/180*pi) + "  "

      + strval(1.2) + "  "
      + strval(..Mannequin.Posture.Left.AnkleEversion/180*pi) + "  "
      + strval(..Mannequin.Posture.Right.HipFlexion/180*pi) + "  "
      + strval(..Mannequin.Posture.Right.HipAbduction/180*pi) + "  "
      + strval(..Mannequin.Posture.Right.HipExternalRotation/180*pi) + "  "
      + strval(-..Mannequin.Posture.Right.KneeFlexion/180*pi) + "  "
      + strval(1.2) + "  "

      + strval(..Mannequin.Posture.Right.AnkleEversion/180*pi) + "  ",


      // Specify the scaling law
      //"SCALINGLAW UNIFORMSCALING ",
      "SCALINGLAW LENGTHMASSSCALING",

      // // Include the standard parameters
      "STANDARDPELVISWIDTH " + strval(...HumanModel.Scaling.StandardParameters.Pelvis.Width) ,
      "STANDARDTHIGHLENGTH " + strval(...HumanModel.Scaling.StandardParameters.Thigh.Length) ,
      "STANDARDSHANKLENGTH " + strval(...HumanModel.Scaling.StandardParameters.Shank.Length) ,
      "STANDARDFOOTLENGTH "  + strval(...HumanModel.Scaling.StandardParameters.Foot.Length) ,

      "STANDARDPELVISMASS " + strval(...HumanModel.Scaling.StandardParameters.Pelvis.Mass),
      "STANDARDTHIGHMASS " + strval(...HumanModel.Scaling.StandardParameters.Thigh.Mass),
      "STANDARDSHANKMASS " + strval(...HumanModel.Scaling.StandardParameters.Shank.Mass),
      "STANDARDFOOTMASS "  + strval(...HumanModel.Scaling.StandardParameters.Foot.Mass),

      // // Include the current mass parameters. These parameters are only used when a MASSLENGTH scaling is performed.
      "ANTROPELVIS " + strval(...HumanModel.Scaling.AnthroData.pelvis),
      "ANTROTHIGH " + strval(...HumanModel.Scaling.AnthroData.thigh_r),
      "ANTROLOWERLEG " + strval(...HumanModel.Scaling.AnthroData.lower_leg_r),
      "ANTROFOOT "  + strval(...HumanModel.Scaling.AnthroData.foot_r),
      "ANTROBALL "  + strval(...HumanModel.Scaling.AnthroData.ball_r),

      //Unscaled coordinates for joints these numbers should only change if there are modifications in the Body
      // Left hip pelvis
      "LEFTHIPPELVIS 0.03 -0.10 -0.08",
      // Left hip thigh
      "LEFTHIPTHIGH 0.0 0.197 0.038",
      // Left knee thigh
      "LEFTKNEETHIGH -0.025 -0.2580 0.028",
      // Left knee shank
      "LEFTKNEESHANK 0.0 0.1992 0.0",
      // Left ankle shank
      "LEFTANKLESHANK 0.0 -0.2608 0.0",
      // Left ankle foot
      "LEFTANKLEFOOT 0.06 0.06 -0.0",
      // Right hip pelvis
      "RIGHTHIPPELVIS 0.03 -0.10 0.08 ",
      // Right hip thigh
      "RIGHTHIPTHIGH 0.0 0.197 -0.038",
      // Right knee thigh
      "RIGHTKNEETHIGH -0.025 -0.2580 -0.028",
      // Right knee shank
      "RIGHTKNEESHANK 0.0 0.1992 0.0",
      // Right ankle shank
      "RIGHTANKLESHANK 0.0 -0.2608 0.0",
      // Right ankle foot
      "RIGHTANKLEFOOT 0.06 0.06 0.0",

      "MARKER " + .MarkerTopology.M1.Name  + .MarkerTopology.M1.SegNr + strval(.MarkerTopology.M1.NodePos[0]) +" "+ strval(.MarkerTopology.M1.NodePos[1])+ " "+ strval(.MarkerTopology.M1.NodePos[2])+ " weightdummy.txt " +  .MarkerTopology.M1.Name+ ".txt dummy.txt  dummy.txt " + .MarkerTopology.M1.OptSetting,
      "MARKER " + .MarkerTopology.M2.Name  + .MarkerTopology.M2.SegNr + strval(.MarkerTopology.M2.NodePos[0]) +" "+ strval(.MarkerTopology.M2.NodePos[1])+ " "+ strval(.MarkerTopology.M2.NodePos[2])+ " weightdummy.txt " +  .MarkerTopology.M2.Name+ ".txt dummy.txt  dummy.txt " + .MarkerTopology.M2.OptSetting,
//      "MARKER " + .MarkerTopology.M3.Name  + .MarkerTopology.M3.SegNr + strval(.MarkerTopology.M3.NodePos[0]) +" "+ strval(.MarkerTopology.M3.NodePos[1])+ " "+ strval(.MarkerTopology.M3.NodePos[2])+  " weightdummy.txt " +  .MarkerTopology.M3.Name+ ".txt dummy.txt  dummy.txt "+ .MarkerTopology.M3.OptSetting,
      "MARKER " + .MarkerTopology.M4.Name  + .MarkerTopology.M4.SegNr + strval(.MarkerTopology.M4.NodePos[0]) +" "+ strval(.MarkerTopology.M4.NodePos[1])+ " "+ strval(.MarkerTopology.M4.NodePos[2])+ " weightdummy.txt " +  .MarkerTopology.M4.Name+ ".txt dummy.txt  dummy.txt " + .MarkerTopology.M4.OptSetting,
 //   "MARKER " + .MarkerTopology.M5.Name  + .MarkerTopology.M5.SegNr + strval(.MarkerTopology.M5.NodePos[0]) +" "+ strval(.MarkerTopology.M5.NodePos[1])+ " "+ strval(.MarkerTopology.M5.NodePos[2])+ " weightdummy.txt " +  .MarkerTopology.M5.Name+ ".txt dummy.txt  dummy.txt " + .MarkerTopology.M5.OptSetting,

      "MARKER " + .MarkerTopology.M6.Name  + .MarkerTopology.M6.SegNr + strval(.MarkerTopology.M6.NodePos[0]) +" "+ strval(.MarkerTopology.M6.NodePos[1])+ " "+ strval(.MarkerTopology.M6.NodePos[2])+ " weightdummy.txt " +  .MarkerTopology.M6.Name+ ".txt dummy.txt  dummy.txt " + .MarkerTopology.M6.OptSetting,
      "MARKER " + .MarkerTopology.M7.Name  + .MarkerTopology.M7.SegNr + strval(.MarkerTopology.M7.NodePos[0]) +" "+ strval(.MarkerTopology.M7.NodePos[1])+ " "+ strval(.MarkerTopology.M7.NodePos[2])+ " weightdummy.txt " +  .MarkerTopology.M7.Name+ ".txt dummy.txt  dummy.txt " + .MarkerTopology.M7.OptSetting,
      "MARKER " + .MarkerTopology.M8.Name  + .MarkerTopology.M8.SegNr + strval(.MarkerTopology.M8.NodePos[0]) +" "+ strval(.MarkerTopology.M8.NodePos[1])+ " "+ strval(.MarkerTopology.M8.NodePos[2])+ " weightdummy.txt " +  .MarkerTopology.M8.Name+ ".txt dummy.txt  dummy.txt " + .MarkerTopology.M8.OptSetting,
      "MARKER " + .MarkerTopology.M9.Name  + .MarkerTopology.M9.SegNr + strval(.MarkerTopology.M9.NodePos[0]) +" "+ strval(.MarkerTopology.M9.NodePos[1])+ " "+ strval(.MarkerTopology.M9.NodePos[2])+ " weightdummy.txt " +  .MarkerTopology.M9.Name+ ".txt dummy.txt  dummy.txt " + .MarkerTopology.M9.OptSetting,
      "MARKER " + .MarkerTopology.M10.Name  + .MarkerTopology.M10.SegNr + strval(.MarkerTopology.M10.NodePos[0]) +" "+ strval(.MarkerTopology.M10.NodePos[1])+ " "+ strval(.MarkerTopology.M10.NodePos[2])+ " weightdummy.txt " +  .MarkerTopology.M10.Name+ ".txt dummy.txt  dummy.txt " + .MarkerTopology.M10.OptSetting,


      "MARKER " + .MarkerTopology.M11.Name  + .MarkerTopology.M11.SegNr + strval(.MarkerTopology.M11.NodePos[0]) +" "+ strval(.MarkerTopology.M11.NodePos[1])+ " "+ strval(.MarkerTopology.M11.NodePos[2])+ " weightdummy.txt " +  .MarkerTopology.M11.Name+ ".txt dummy.txt  dummy.txt " + .MarkerTopology.M11.OptSetting,
      "MARKER " + .MarkerTopology.M12.Name  + .MarkerTopology.M12.SegNr + strval(.MarkerTopology.M12.NodePos[0]) +" "+ strval(.MarkerTopology.M12.NodePos[1])+ " "+ strval(.MarkerTopology.M12.NodePos[2])+ " weightdummy.txt " +  .MarkerTopology.M12.Name+ ".txt dummy.txt  dummy.txt " + .MarkerTopology.M12.OptSetting,
      "MARKER " + .MarkerTopology.M13.Name  + .MarkerTopology.M13.SegNr + strval(.MarkerTopology.M13.NodePos[0]) +" "+ strval(.MarkerTopology.M13.NodePos[1])+ " "+ strval(.MarkerTopology.M13.NodePos[2])+ " weightdummy.txt " +  .MarkerTopology.M13.Name+ ".txt dummy.txt  dummy.txt " + .MarkerTopology.M13.OptSetting,


      "MARKER " + .MarkerTopology.M14.Name  + .MarkerTopology.M14.SegNr + strval(.MarkerTopology.M14.NodePos[0]) +" "+ strval(.MarkerTopology.M14.NodePos[1])+ " "+ strval(.MarkerTopology.M14.NodePos[2])+ " weightdummy.txt " +  .MarkerTopology.M14.Name+ ".txt dummy.txt  dummy.txt " + .MarkerTopology.M14.OptSetting,
     // "MARKER " + .MarkerTopology.M15.Name  + .MarkerTopology.M15.SegNr + strval(.MarkerTopology.M15.NodePos[0]) +" "+ strval(.MarkerTopology.M15.NodePos[1])+ " "+ strval(.MarkerTopology.M15.NodePos[2])+ " weightdummy.txt " +  .MarkerTopology.M15.Name+ ".txt dummy.txt  dummy.txt "+ .MarkerTopology.M15.OptSetting,

     "MARKER " + .MarkerTopology.M16.Name  + .MarkerTopology.M16.SegNr + strval(.MarkerTopology.M16.NodePos[0]) +" "+ strval(.MarkerTopology.M16.NodePos[1])+ " "+ strval(.MarkerTopology.M16.NodePos[2])+ " weightdummy.txt " +  .MarkerTopology.M16.Name+ ".txt dummy.txt  dummy.txt " + .MarkerTopology.M16.OptSetting,
      "MARKER " + .MarkerTopology.M17.Name  + .MarkerTopology.M17.SegNr + strval(.MarkerTopology.M17.NodePos[0]) +" "+ strval(.MarkerTopology.M17.NodePos[1])+ " "+ strval(.MarkerTopology.M17.NodePos[2])+ " weightdummy.txt " +  .MarkerTopology.M17.Name+ ".txt dummy.txt  dummy.txt " + .MarkerTopology.M17.OptSetting,
      "MARKER " + .MarkerTopology.M18.Name  + .MarkerTopology.M18.SegNr + strval(.MarkerTopology.M18.NodePos[0]) +" "+ strval(.MarkerTopology.M18.NodePos[1])+ " "+ strval(.MarkerTopology.M18.NodePos[2])+ " weightdummy.txt " +  .MarkerTopology.M18.Name+ ".txt dummy.txt  dummy.txt " + .MarkerTopology.M18.OptSetting,
      "MARKER " + .MarkerTopology.M19.Name  + .MarkerTopology.M19.SegNr + strval(.MarkerTopology.M19.NodePos[0]) +" "+ strval(.MarkerTopology.M19.NodePos[1])+ " "+ strval(.MarkerTopology.M19.NodePos[2])+ " weightdummy.txt " +  .MarkerTopology.M19.Name+ ".txt dummy.txt  dummy.txt " +.MarkerTopology.M19.OptSetting,
      "MARKER " + .MarkerTopology.M20.Name  + .MarkerTopology.M20.SegNr + strval(.MarkerTopology.M20.NodePos[0]) +" "+ strval(.MarkerTopology.M20.NodePos[1])+ " "+ strval(.MarkerTopology.M20.NodePos[2])+ " weightdummy.txt " +  .MarkerTopology.M20.Name+ ".txt dummy.txt  dummy.txt "+.MarkerTopology.M20.OptSetting,

      "MARKER " + .MarkerTopology.M21.Name  + .MarkerTopology.M21.SegNr + strval(.MarkerTopology.M21.NodePos[0]) +" "+ strval(.MarkerTopology.M21.NodePos[1])+ " "+ strval(.MarkerTopology.M21.NodePos[2])+ " weightdummy.txt " +  .MarkerTopology.M21.Name+ ".txt dummy.txt  dummy.txt "   + .MarkerTopology.M21.OptSetting,
      "MARKER " + .MarkerTopology.M22.Name  + .MarkerTopology.M22.SegNr + strval(.MarkerTopology.M22.NodePos[0]) +" "+ strval(.MarkerTopology.M22.NodePos[1])+ " "+ strval(.MarkerTopology.M22.NodePos[2])+ " weightdummy.txt " +  .MarkerTopology.M22.Name+ ".txt dummy.txt  dummy.txt " + .MarkerTopology.M22.OptSetting,
      "MARKER " + .MarkerTopology.M23.Name  + .MarkerTopology.M23.SegNr + strval(.MarkerTopology.M23.NodePos[0]) +" "+ strval(.MarkerTopology.M23.NodePos[1])+ " "+ strval(.MarkerTopology.M23.NodePos[2])+ " weightdummy.txt " +  .MarkerTopology.M23.Name+ ".txt dummy.txt  dummy.txt " + .MarkerTopology.M23.OptSetting,
      "MARKER " + .MarkerTopology.M24.Name  + .MarkerTopology.M24.SegNr + strval(.MarkerTopology.M24.NodePos[0]) +" "+ strval(.MarkerTopology.M24.NodePos[1])+ " "+ strval(.MarkerTopology.M24.NodePos[2])+ " weightdummy.txt " +  .MarkerTopology.M24.Name+ ".txt dummy.txt  dummy.txt "   + .MarkerTopology.M24.OptSetting,
      "MARKER " + .MarkerTopology.M25.Name  + .MarkerTopology.M25.SegNr + strval(.MarkerTopology.M25.NodePos[0]) +" "+ strval(.MarkerTopology.M25.NodePos[1])+ " "+ strval(.MarkerTopology.M25.NodePos[2])+ " weightdummy.txt " +  .MarkerTopology.M25.Name+ ".txt dummy.txt  dummy.txt " +.MarkerTopology.M25.OptSetting,
      "MARKER " + .MarkerTopology.M26.Name  + .MarkerTopology.M26.SegNr + strval(.MarkerTopology.M26.NodePos[0]) +" "+ strval(.MarkerTopology.M26.NodePos[1])+ " "+ strval(.MarkerTopology.M26.NodePos[2])+ " weightdummy.txt " +  .MarkerTopology.M26.Name+ ".txt dummy.txt  dummy.txt " + .MarkerTopology.M26.OptSetting,

      "SCALEMAN PELVIS" + " " +strval(.sp.PELVIS)  + " off",
      "SCALEMAN THIGH"  + " " +strval(.sp.THIGH) + " on",
      "SCALEMAN SHANK"  + " " +strval(.sp.SHANK) + " on",
      "SCALEMAN FOOT"   + " " +strval(.sp.FOOT) + " off"

    };
