/**
This procedure explains the steps needed to create a runner model based on data from a C3D file, the data was kindly provided by Prof. Y. Liu of
the Shanghai University of Sports.

This is a description of how AnyBody by means of some special studies can interact with Michael Skipper's application for mocap data processing.
In short, Skipper's application performs an optimization of segment scaling, marker positioning and joint angles to best fit measured data from
optical markers.

This model takes you through the steps of having a C3D file with measured mocap on a gait experiment to having an equivalent AnyBody model of
the experiment allowing you to calculate muscles forces joint reactions ect.

In time this technology will be built directly into AnyBody, but for the time being we rely on processing the data by an external, stand-alone
application called GaitAplication2.exe. This application reads marker trajectories from a gait experiment and processes them to joint angle
variations that can subsequently be imposed on the AnyBody gait model. It also performs a scaling of the segments and local positioning of the
markers on the bones to comply optimally with the recorded data.

The stand-alone version of GaitApplication2 is limited in the sense that it only works for a model comprising two rigid feet, two shanks, two
thighs, and a pelvis. The hip joints are spherical, the knees are hinges, and the ankles are universal joints.

To facilitate practical work with the application, some special AnyScript models have been set up that will give the user an interface to
generate the necessary input data for GaitApplication2. Subsequently GaitApplication2 will process the data and generate input for the AnyBody
model.

Prerequisites to this procedure if you will run it on a new c3d file are the following:
1) a suitable C3D file, with a reasonable amount of markers on the legs, together with force plate data. The more markers available on the feet
the better, this will make the process easier.
2) c3d2any.exe converter application which converts the c3d file into AnyScript files, the file is available from www.AnyBodyTech.com
3) gaitapplication2.exe the file is available from www.AnyBodytech.com, this application can optimize the marker locations, segment lengths and
joint angle variations.

The following description assumes that a new data set is to be used in the descrition named NewDataSet, instead of the data set in this particular
model which is runner

1)
Locate the c3d2any.exe application on your pc, and open a dos prompt in that directory, place the c3D in the same directory. Run the converter by
typing  "c3d2any <input filename> <output filename> <output directory>" <input filename> specifies the C3D file that has to be converted
<output filename> specifies the output file prefixes <output directory> specifies the absolute path of where the output is to be placed.
Then move the in total seven output files to the directory where the gait model will be created. These will have the first part of their
equal to the name of the C3D file, in this case NewDataSet

2)
Open the Main file file named NewDataSet.Main.any copy the include statements in the top named
#include "NewDataSet.Header.any"
#include "NewDataSet.Groups.any"
#include "NewDataSet.Analog.any"
#include "NewDataSet.PointsMarkers.any"
#include "NewDataSet.PointsProcessed.any"
And inserted the lines in the AnyGait.Main.any file replacing the similar include statements for the runner files. Similarly identify the tEnd,
tStart and nstep values and replace the variables in the top of the AnyGait.Main.any file

3)
In the file named "MarkerListMoverInclude.any"  change the include statement to #include "NewDataSet.MarkerListMover.any""  You have to make sure
that the new NewDataSet.MarkerListMover  file contain the data for all the markers. It can happen that all the markers are moved to the
ProcessedData file instead because they are tagged as such in the c3d  file. But it should be straight forward to move them back, and you can
also reuse the MarkerListMover file.

4)
After this, you have to open the MarkerMover.any file and uncomment the AnyOutputFile statement in the bottom. This will make sure that the marker
data are written to text files when you run the  kinematic analysis of the MarkerModelStudy (But don't do that yet).

5)
Load your model.

6)
Run the kinematic analysis in the MarkerModelStudy. After this has successfully ended, please verify that you now have a set of text files with
the new marker data in. If they are all there now, comment out the AnyOuputFile statement in the MarkerMover.any file again (this is just to make
sure that you don't have to rerun the MarkerModelStudy every time you reload your model). Here it is very important to make sure that the markers
moving in the positive x direction having y upward and z sideways, if this is not the case then modify the  Main.Orientaion matrix so that this will the case.

At this point, we are ready to start to get the man to follow the new measured data, and this we can do by the following steps:

7)
In comment the MarkerPlacementStudy again

8)
Open the Mannequin.any file and adjust the initial condition of the man to fit the data. Again, how well this has to be done will depend on how
much it takes to get GaitApplication2 to find the solution. While doing this it is also a good idea to adjust the segment lengths in the
LocalMarkerCoordinateAndSize.any file. Make sure that the model ends up close to the markers. How well this has to be done will depend on how
much it takes to get GaitApplication2 to find the solution - but we'll again find out later.

9)
I you have another marker set than the one used in the runner model, you will now need to create new markers according to the measured markers.
This is done by editing two files, these are LocalMarkerCoordinateAndSize.any and MarkerTopology.any. Here you will need to modify the markernames
in the Markertopology file and the coordinates in the LocalMarkerCoordinaesAndSize file. During this work it is very important to make sure that
the new markers get attached to the right segments and gets the correct SegNr applied, otherwise the gaitapplication2.exe will fail to optimize
the problem.


10)
Load the model again, open the MarkerPlacementStudy and execute  SetInitialConditions. This will make your man be located in your initial guess
and with the local markers placed according to what is  in LocalMarkerCoordinateAndSize file, repeat changing the marker coordinated until their
location is close to location of the markers on the real subject

11)
In the model tree, locate MarkerPlacmentModel -> DataForConfigFile  ->  ModelGait1->String. Right click it and save it to a file named
ModelGait.txt . Open the StudyGait.txt and make sure that it has the  STUDYTYPE SCALE set.

12)
Execute GaitApplication2. If this terminates successfully, reload  your model and execute the KinematicAnalysis in the OptStudy to see the results.

If GaitApplication2 fails, please note where it fails. If it fails  before it writes out "Finished study of initial conditions", it means  that
your start guess on the local marker coordinates, segment  lengths and initial condition of the man is not good enough for the  solver to find a
solution when the local maker coordinates and  segment lengths are kept fixed. In this case, you can inspect what goes wrong by changing the
study type in StudyGait.txt to STUDYTYPE  POSONLY and rerunning GaitApplication2, reload your model and run the KinematicAnalysis in the OptStudy. Repeat step 8) - 12) until GaitApplication2 finishes successfully with the POSONLY  setting, then change it back to SCALE and run again.

If GaitApplication2 fails after it has written "Finished study of  Initial conditions", or you are just not satisfied with the result, it means
that guesses were good enough for the solver to find a  solution with the local marker coordinates and segment lengths kept  fixed, but that it
was unable to optimize their placement. Again,  repeating step 8) - 12) should make
GaitApplication2 converge eventually.

13)
Once the gaitApplication2 has converged enable the OptStudy again, in the environment.any file outcomment all of except the GlobalRef object
reload the model.
Then run the kinematic analysis of the OptStudy, this will display the optimized motion.

14)
Now all you need is to create a new environment.any file which fits the forceplate layout of the trial, this is done in the Environment.any file.
Currently this file contains an environment of four force plates, all coordinates cornes, origins etc in this file originates from the C3D file.
There are inprinciple four ways the forceplate data can come in this is specified by the force plate type setting in the C3D file. The runner
data set is a type 3, meaning that for each force plate there are eight force signals, applied.  Depending on the Force_Plate.Type setting on the
NewDataSet the Environment.any file will need to be changed, all four types should be possible to replicate.

15)
Once the environment file is ok then you are ready to run the OptStudy.InverseAnalysis which is the end goal of this exercise!, this will let you
see muscles forces and joint reactions. Remember to calibrate the muscles.


Known issues for this model:
By evaluating the accelerations of the markers on the foot without filtering it was discovered that the accelerations of
the foot markers had the highest peak values in the fly phase. There are also peak values at the landing which is expected
different filtering settings has been tested but it has been impossible to remove the peaks in the fly phase with at the same
time to remove the peaks in the landing. So in the present model the filtering is likely to be too heavy, but this was needed
with this dataset

There are no heel marker in this model, this means that the ankel makers needs to be locked in the longitudinal direction of
the shank (y) otherwise they may be moved up or down the shank during the optimization, there is nothing to prevent this. Having
a heel marker could have prevented this for being possible and thus avoid the need of setting this marker to {on, off, off}. Similarly it has also
been found that the ankle markers needs to be set to off in the medial lateral direction (z) during the optimization otherwise the optimizer
may tilt the foot side ways and ruin the convergency of the gaitapplication2 application

*/
Main = {

  /**Execute this operation to run the model in the intended operation sequence.
  It is also possible to run operations seperately, by manual selections in the operation tree*/
  AnyOperationSequence RunApplication = {

    /**This operation calibrates the muscles in the model if these are of the type AnyMuscleModel3E.
    This will just be an empty operation if the model is using a muscle type that does not require calibration.*/
    AnyOperation &CalibrationAnal = Main.HumanModel.Calibration.CalibrationSequence;

    ///This operation is the inverse dynamic analysis
    AnyOperation &InvAnal=Main.OptStudy.InverseDynamics;
  };


  AnyFolder C3DFileData ={
    #include "running.Header.any"
    #include "running.Groups.any"
    #include "running.Analog.any"
    #include "running.PointsMarkers.any"
    #include "running.PointsProcessed.any"
  };

  //Includes some settings for the visual representation of the model
  #include "DrawSettings.any"

  AnyIntVar   nStep = 180;
  AnyFloatVar tStart=0.85;
  AnyFloatVar tEnd= 1.24;

  //This variable controls the orientation of the markers and the environment
  //it can be used to rotate it all
  //The makers must walk in the positive x direction in order for the gaitapplication2 to work
  //if the experimental data does reflect this it can be changed by this variable.
  AnyMat33 Orientation =RotMat(pi,z);

  //This study is used for creating marker trajectories of the recorded markers
  AnyBodyStudy MarkerModelStudy = {
    //This is a model of containing only the free floating markers
    AnyFolder MarkerModel={
      //Create segments for each of the markers and drive them according to data
      //which can be found in the files p1.any - p15.any
      #include "MarkerListMoverInclude.any"
    };
    InverseDynamics = {
      Criterion.Type = MR_MinMaxStrict;
    };
    nStep=Main.nStep;
    Gravity = {0.0, 0.0,-9.81};
    tStart=Main.tStart;
    tEnd= Main.tEnd;
  };


  //This study is used for creating the an input file for the gaitapplication2 study
//  AnyBodyStudy MarkerPlacementStudy = {
//    #include "MarkerPlacementModel.any"
//    RecruitmentSolver = MinMaxNRSimplex;
//    nStep=Main.nStep;
//    Gravity = {0.0000, 0.00000,-9.81};
//    tStart = Main.tStart;
//    tEnd = Main.tEnd;
//  };

  #include "OptHumanModel.any"
  //This study is used for displaying and running the inverse dynamic analysis of the optimized motion created  by the gaitapllication2
  AnyBodyStudy OptStudy = {
    #include "OptModel.any"
    InverseDynamics.Criterion.Type = MR_MinMaxStrict;
    nStep=Main.nStep;
    Gravity = {0.0, 0.0,-9.81};

    tStart=Main.tStart;
    tEnd= Main.tEnd-0.05;
  };


};  // Main
