AnyFolder Groups = {
  AnyFolder TRIAL = {
    AnyInt ID = -1;
    AnyString locked = "UNLOCKED";
    AnyString Description = "";
    AnyFolder ACTUAL_START_FIELD = {
      AnyInt ID = 1;
      AnyString locked = "UNLOCKED";
      AnyString Description = "";
      AnyInt Data = {242, 0};
    };
    AnyFolder ACTUAL_END_FIELD = {
      AnyInt ID = 1;
      AnyString locked = "UNLOCKED";
      AnyString Description = "";
      AnyInt Data = {415, 0};
    };
    AnyFolder CAMERA_RATE = {
      AnyInt ID = 1;
      AnyString locked = "UNLOCKED";
      AnyString Description = "";
      AnyFloat Data = 300.0000000000;
    };
    AnyFolder VIDEO_RATE_DIVIDER = {
      AnyInt ID = 1;
      AnyString locked = "UNLOCKED";
      AnyString Description = "";
      AnyInt Data = 1;
    };
  };
  AnyFolder POINT = {
    AnyInt ID = -3;
    AnyString locked = "UNLOCKED";
    AnyString Description = "";
    AnyFolder USED = {
      AnyInt ID = 3;
      AnyString locked = "UNLOCKED";
      AnyString Description = "";
      AnyInt Data = 52;
    };
    AnyFolder FRAMES = {
      AnyInt ID = 3;
      AnyString locked = "UNLOCKED";
      AnyString Description = "";
      AnyInt Data = 174;
    };
    AnyFolder DATA_START = {
      AnyInt ID = 3;
      AnyString locked = "UNLOCKED";
      AnyString Description = "";
      AnyInt Data = 29;
    };
    AnyFolder SCALE = {
      AnyInt ID = 3;
      AnyString locked = "UNLOCKED";
      AnyString Description = "";
      AnyFloat Data = -0.1000000015;
    };
    AnyFolder RATE = {
      AnyInt ID = 3;
      AnyString locked = "UNLOCKED";
      AnyString Description = "";
      AnyFloat Data = 300.0000000000;
    };
    AnyFolder MOVIE_DELAY = {
      AnyInt ID = 3;
      AnyString locked = "UNLOCKED";
      AnyString Description = "";
      AnyFloat Data = 0.0000000000;
    };
    AnyFolder X_SCREEN = {
      AnyInt ID = 3;
      AnyString locked = "UNLOCKED";
      AnyString Description = "";
      AnyString Data = {"+", "X"};
    };
    AnyFolder Y_SCREEN = {
      AnyInt ID = 3;
      AnyString locked = "UNLOCKED";
      AnyString Description = "";
      AnyString Data = {"+", "Z"};
    };
    AnyFolder UNITS = {
      AnyInt ID = 3;
      AnyString locked = "UNLOCKED";
      AnyString Description = "";
      AnyString Data = {"m", "m"};
    };
    AnyFolder ANGLE_UNITS = {
      AnyInt ID = 3;
      AnyString locked = "UNLOCKED";
      AnyString Description = "";
      AnyString Data = {"d", "e", "g"};
    };
    AnyFolder FORCE_UNITS = {
      AnyInt ID = 3;
      AnyString locked = "UNLOCKED";
      AnyString Description = "";
      AnyString Data = {"N"};
    };
    AnyFolder MOMENT_UNITS = {
      AnyInt ID = 3;
      AnyString locked = "UNLOCKED";
      AnyString Description = "";
      AnyString Data = {"N", "m", "m"};
    };
    AnyFolder POWER_UNITS = {
      AnyInt ID = 3;
      AnyString locked = "UNLOCKED";
      AnyString Description = "";
      AnyString Data = {"W"};
    };
    AnyFolder SCALAR_UNITS = {
      AnyInt ID = 3;
      AnyString locked = "UNLOCKED";
      AnyString Description = "";
      AnyString Data = {"m", "m"};
    };
    AnyFolder TYPE_GROUPS = {
      AnyInt ID = 3;
      AnyString locked = "UNLOCKED";
      AnyString Description = "";
    };
    AnyFolder LABELS = {
      AnyInt ID = 3;
      AnyString locked = "UNLOCKED";
      AnyString Description = "";
      AnyString Data = {{"R", "M", "M", "E", " ", " ", " ", " ", " ", " ", " ", " ", " ", " ", " ", " ", " ", " ", " ", " ", " ", " ", " ", " ", " ", " ", " ", " ", " ", " "}, {"r", "f", "b", "k", " ", " ", " ", " ", " ", " ", " ", " ", " ", " ", " ", " ", " ", " ", " ", " ", " ", " ", " ", " ", " ", " ", " ", " ", " ", " "}, {"r", "t", "r", "a", "n", "k", " ", " ", " ", " ", " ", " ", " ", " ", " ", " ", " ", " ", " ", " ", " ", " ", " ", " ", " ", " ", " ", " ", " ", " "}, {"R", "L", "E", "P", " ", " ", " ", " ", " ", " ", " ", " ", " ", " ", " ", " ", " ", " ", " ", " ", " ", " ", " ", " ",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
    };
    AnyFolder DESCRIPTIONS = {
      AnyInt ID = 3;
      AnyString locked = "UNLOCKED";
      AnyString Description = "";
      AnyString Data = {{"R", "i", "g", "h", "t", " ", "M", "e", "d", "i", "a", "l", " ", "a", "n", "k", " ", " ", " ", " ", " ", " ", " ", " ", " ", " ", " ", " ", " ", " ", " ", " ", " ", " ", " ", " ", " ", " ", " ", " ", " ", " ", " ", " ", " ", " ", " ", " ", " ", " "}, {" ", " ", " ", " ", " ", " ", " ", " ", " ", " ", " ", " ", " ", " ", " ", " ", " ", " ", " ", " ", " ", " ", " ", " ", " ", " ", " ", " ", " ", " ", " ", " ", " ", " ", " ", " ", " ", " ", " ", " ", " ", " ", " ", " ", " ", " ", " ", " ", " ", " "}, {"r", "i", "g", "h", "t", " ", "t", "r", "a", "n", "k", " ", " ", " ", "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
    };
  };
  AnyFolder ANALOG = {
    AnyInt ID = -4;
    AnyString locked = "UNLOCKED";
    AnyString Description = "";
    AnyFolder FORMAT = {
      AnyInt ID = 4;
      AnyString locked = "UNLOCKED";
      AnyString Description = "";
      AnyString Data = {"U", "N", "S", "I", "G", "N", "E", "D"};
    };
    AnyFolder BITS = {
      AnyInt ID = 4;
      AnyString locked = "UNLOCKED";
      AnyString Description = "";
      AnyInt Data = 16;
    };
    AnyFolder GEN_SCALE = {
      AnyInt ID = 4;
      AnyString locked = "UNLOCKED";
      AnyString Description = "";
      AnyFloat Data = 1.0000000000;
    };
    AnyFolder RATE = {
      AnyInt ID = 4;
      AnyString locked = "UNLOCKED";
      AnyString Description = "";
      AnyFloat Data = 1200.0000000000;
    };
    AnyFolder USED = {
      AnyInt ID = 4;
      AnyString locked = "UNLOCKED";
      AnyString Description = "";
      AnyInt Data = 64;
    };
    AnyFolder GAIN = {
      AnyInt ID = 4;
      AnyString locked = "UNLOCKED";
      AnyString Description = "";
      AnyInt Data = {1, 1, 1, 1, 1, 1, 1, 1, 1, 1, 1, 1, 1, 1, 1, 1, 1, 1, 1, 1, 1, 1, 1, 1, 1, 1, 1, 1, 1, 1, 1, 1, 1, 1, 1, 1, 1, 1, 1, 1, 1, 1, 1, 1, 1, 1, 1, 1, 1, 1, 1, 1, 1, 1, 1, 1, 1, 1, 1, 1, 1, 1, 1, 1};
    };
    AnyFolder SCALE = {
      AnyInt ID = 4;
      AnyString locked = "UNLOCKED";
      AnyString Description = "";
      AnyFloat Data = {-0.0810571983, -0.0811866000, -0.0805862993, -0.0802050978, -0.3159219921, -0.3136489987, -0.3126850128, -0.3149439991, -0.0161767993, -0.0162026007, -0.0160492007, -0.0159735996, -0.1574690044, -0.1568219960, -0.1563400030, -0.1573880017, 1.0000000000, 1.0000000000, 1.0000000000, 1.0000000000, 1.0000000000, 1.0000000000, 1.0000000000, 1.0000000000, 1.0000000000, 1.0000000000, 1.0000000000, 1.0000000000, 1.0000000000, 1.0000000000, 1.0000000000, 1.0000000000, 1.0000000000, 1.0000000000, 1.0000000000, 1.0000000000, 1.0000000000, 1.0000000000, 1.0000000000, 1.0000000000, 1.0000000000, 1.0000000000, 1.0000000000, 1.0000000000, 1.0000000000, 1.0000000000, 1.0000000000, 1.0000000000, 1.0000000000, 1.0000000000, 1.0000000000, 1.0000000000, 1.0000000000, 1.0000000000, 1.0000000000, 1.0000000000, 1.0000000000, 1.0000000000, 1.0000000000, 1.0000000000, 1.0000000000, 1.0000000000, 1.0000000000, 1.0000000000};
    };
    AnyFolder OFFSET = {
      AnyInt ID = 4;
      AnyString locked = "UNLOCKED";
      AnyString Description = "";
      AnyInt Data = {32723, 32724, 32723, 32721, 32722, 32723, 32724, 32718, 32763, 32763, 32763, 32763, 32763, 32763, 32763, 32763, 32763, 32763, 32763, 32763, 32763, 32763, 32763, 32763, 32763, 32763, 32763, 32763, 32763, 32763, 32763, 32763, 32763, 32763, 32763, 32763, 32763, 32763, 32763, 32763, 32763, 32763, 32763, 32763, 32763, 32763, 32763, 32763, 32763, 32763, 32763, 32763, 32763, 32763, 32763, 32763, 32763, 32763, 32763, 32763, 32763, 32763, 32763, 32763};
    };
    AnyFolder UNITS = {
      AnyInt ID = 4;
      AnyString locked = "UNLOCKED";
      AnyString Description = "";
      AnyString Data = {{"N", " ", " ", " ", " ", " ", " ", " "}, {"N", " ", " ", " ", " ", " ", " ", " "}, {"N", " ", " ", " ", " ", " ", " ", " "}, {"N", " ", " ", " ", " ", " ", " ", " "}, {"N", " ", " ", " ", " ", " ", " ", " "}, {"N", " ", " ", " ", " ", " ", " ", " "}, {"N", " ", " ", " ", " ", " ", " ", " "}, {"N", " ", " ", " ", " ", " ", " ", " "}, {"N", " ", " ", " ", " ", " ", " ", " "}, {"N", " ", " ", " ", " ", " ", " ", " "}, {"N", " ", " ", " ", " ", " ", " ", " "}, {"N", " ", " ", " ", " ", " ", " ", " "}, {"N", " ", " ", " ", " ", " ", " ", " "}, {"N", " ", " ", " ", " ", " ", " ", " "}, {"N", " ", " ", " ", " ", " ", " ", " "}, {"N", " ", " ", " ", " ", " ", " ", " "}, {"V", " ", " ", " ", " ", " ", " ", " "}, {"V", " ", " ", " ", " ", " ", " ", " "}, {"V", " ", " ", " ", " ", " ", " ", " "}, {"V", " ", " ", " ", " ", " ", " ", " "}, {"V", " ", " ", " ", " ", " ", " ", " "}, {"V", " ", " ", " ", " ", " ", " ", " "}, {"V", " ", " ", " ", " ", " ", " ", " "}, {"V", " ", " ", " ", " ", " ", " ", " "}, {"V", " ", " ", " ", " ", " ", " ", " "}, {"V", " ", " ", " ", " ", " ", " ", " "}, {"V", " ", " ", " ", " ", " ", " ", " "}, {"V", " ", " ", " ", " ", " ", " ", " "}, {"V", " ", " ", " ", " ", " ", " ", " "}, {"V", " ", " ", " ", " ", " ", " ", " "}, {"V", " ", " ", " ", " ", " ", " ", " "}, {"V", " ", " ", " ", " ", " ", " ", " "}, {"V", " ", " ", " ", " ", " ", " ", " "}, {"V", " ", " ", " ", " ", " ", " ", " "}, {"V", " ", " ", " ", " ", " ", " ", " "}, {"V", " ", " ", " ", " ", " ", " ", " "}, {"V", " ", " ", " ", " ", " ", " ", " "}, {"V", " ", " ", " ", " ", " ", " ", " "}, {"V", " ", " ", " ", " ", " ", " ", " "}, {"V", " ", " ", " ", " ", " ", " ", " "}, {"V", " ", " ", " ", " ", " ", " ", " "}, {"V", " ", " ", " ", " ", " ", " ", " "}, {"V", " ", " ", " ", " ", " ", " ", " "}, {"V", " ", " ", " ", " ", " ", " ", " "}, {"V", " ", " ", " ", " ", " ", " ", " "}, {"V", " ", " ", " ", " ", " ", " ", " "}, {"V", " ", " ", " ", " ", " ", " ", " "}, {"V", " ", " ", " ", " ", " ", " ", " "}, {"V", " ", " ", " ", " ", " ", " ", " "}, {"V", " ", " ", " ", " ", " ", " ", " "}, {"V", " ", " ", " ", " ", " ", " ", " "}, {"V", " ", " ", " ", " ", " ", " ", " "}, {"V", " ", " ", " ", " ", " ", " ", " "}, {"V", " ", " ", " ", " ", " ", " ", " "}, {"V", " ", " ", " ", " ", " ", " ", " "}, {"V", " ", " ", " ", " ", " ", " ", " "}, {"V", " ", " ", " ", " ", " ", " ", " "}, {"V", " ", " ", " ", " ", " ", " ", " "}, {"V", " ", " ", " ", " ", " ", " ", " "}, {"V", " ", " ", " ", " ", " ", " ", " "}, {"V", " ", " ", " ", " ", " ", " ", " "}, {"V", " ", " ", " ", " ", " ", " ", " "}, {"V", " ", " ", " ", " ", " ", " ", " "}, {"V", " ", " ", " ", " ", " ", " ", " "}};
    };
    AnyFolder LABELS = {
      AnyInt ID = 4;
      AnyString locked = "UNLOCKED";
      AnyString Description = "";
      AnyString Data = {{"F", "P", "1", "F", "x", "1", "2", " ", " ", " ", " ", " ", " ", " ", " ", " "}, {"F", "P", "1", "F", "x", "3", "4", " ", " ", " ", " ", " ", " ", " ", " ", " "}, {"F", "P", "1", "F", "y", "1", "4", " ", " ", " ", " ", " ", " ", " ", " ", " "}, {"F", "P", "1", "F", "y", "2", "3", " ", " ", " ", " ", " ", " ", " ", " ", " "}, {"F", "P", "1", "F", "z", "1", " ", " ", " ", " ", " ", " ", " ", " ", " ", " "}, {"F", "P", "1", "F", "z", "2", " ", " ", " ", " ", " ", " ", " ", " ", " ", " "}, {"F", "P", "1", "F", "z", "3", " ", " ", " ", " ", " ", " ", " ", " ", " ", " "}, {"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
    };
    AnyFolder DESCRIPTIONS = {
      AnyInt ID = 4;
      AnyString locked = "UNLOCKED";
      AnyString Description = "";
      AnyString Data = {{"C", "h", "a", "n", "n", "e", "l", " ", "0", " ", " ", " ", " ", " ", " ", " ", " ", " ", " ", " ", " ", " ", " ", " ", " ", " ", " ", " ", " ", " ", " ", " ", " ", " ", " ", " ", " ", " ", " ", " ", " ", " ", " ", " ", " ", " ", " ", " ", " ", " "}, {"C", "h", "a", "n", "n", "e", "l", " ", "1", " ", " ", " ", " ", " ", " ", " ", " ", " ", " ", " ", " ", " ", " ", " ", " ", " ", " ", " ", " ", " ", " ", " ", " ", " ", " ", " ", " ", " ", " ", " ", " ", " ", " ", " ", " ", " ", " ", " ", " ", " "}, {"C", "h", "a", "n", "n", "e", "l", " ", "2", " ", " ", " ", " ", " ", "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
    };
    AnyFolder BOARDS = {
      AnyInt ID = 4;
      AnyString locked = "UNLOCKED";
      AnyString Description = "";
      AnyInt Data = 1;
    };
    AnyFolder BOARD_LABELS = {
      AnyInt ID = 4;
      AnyString locked = "UNLOCKED";
      AnyString Description = "";
      AnyString Data = {{"6", "4", " ", "C", "h", "a", "n", "n", "e", "l", " ", "A", "n", "a", "l", "o", "g", " ", "C", "a", "r", "d", " ", " ", " ", " ", " ", " ", " ", " ", " ", " ", " ", " ", " ", " ", " ", " ", " ", " "}};
    };
    AnyFolder BOARD_CHANNELS = {
      AnyInt ID = 4;
      AnyString locked = "UNLOCKED";
      AnyString Description = "";
      AnyInt Data = {64};
    };
    AnyFolder PCHAN = {
      AnyInt ID = 4;
      AnyString locked = "UNLOCKED";
      AnyString Description = "";
      AnyInt Data = {1, 2, 3, 4, 5, 6, 7, 8, 9, 10, 11, 12, 13, 14, 15, 16, 17, 18, 19, 20, 21, 22, 23, 24, 25, 26, 27, 28, 29, 30, 31, 32, 33, 34, 35, 36, 37, 38, 39, 40, 41, 42, 43, 44, 45, 46, 47, 48, 49, 50, 51, 52, 53, 54, 55, 56, 57, 58, 59, 60, 61, 62, 63, 64};
    };
  };
  AnyFolder FORCE_PLATFORM = {
    AnyInt ID = -5;
    AnyString locked = "UNLOCKED";
    AnyString Description = "";
    AnyFolder USED = {
      AnyInt ID = 5;
      AnyString locked = "UNLOCKED";
      AnyString Description = "";
      AnyInt Data = 2;
    };
    AnyFolder ZERO = {
      AnyInt ID = 5;
      AnyString locked = "UNLOCKED";
      AnyString Description = "";
      AnyInt Data = {0, 10};
    };
    AnyFolder TYPE = {
      AnyInt ID = 5;
      AnyString locked = "UNLOCKED";
      AnyString Description = "";
      AnyInt Data = {3, 3};
    };
    AnyFolder CORNERS = {
      AnyInt ID = 5;
      AnyString locked = "UNLOCKED";
      AnyString Description = "";
      AnyFloat Data = {{{600.0000000000, 0.0000000000, 0.0000000000}, {0.0000000000, 0.0000000000, 0.0000000000}, {0.0000000000, 900.0000000000, 0.0000000000}, {600.0000000000, 900.0000000000, 0.0000000000}}, {{600.0000000000, 900.0000000000, 0.0000000000}, {0.0000000000, 900.0000000000, 0.0000000000}, {0.0000000000, 1800.0000000000, 0.0000000000}, {600.0000000000, 1800.0000000000, 0.0000000000}}};
    };
    AnyFolder ORIGIN = {
      AnyInt ID = 5;
      AnyString locked = "UNLOCKED";
      AnyString Description = "";
      AnyFloat Data = {{300.0000000000, 450.0000000000, 0.0000000000}, {300.0000000000, 450.0000000000, 0.0000000000}};
    };
    AnyFolder CHANNEL = {
      AnyInt ID = 5;
      AnyString locked = "UNLOCKED";
      AnyString Description = "";
      AnyInt Data = {{1, 2, 3, 4, 5, 6, 7, 8}, {9, 10, 11, 12, 13, 14, 15, 16}};
    };
    AnyFolder CAL_MATRIX = {
      AnyInt ID = 5;
      AnyString locked = "UNLOCKED";
      AnyString Description = "";
    };
  };
  AnyFolder SEG = {
    AnyInt ID = -6;
    AnyString locked = "UNLOCKED";
    AnyString Description = "";
    AnyFolder MARKER_DIAMETER = {
      AnyInt ID = 6;
      AnyString locked = "UNLOCKED";
      AnyString Description = "";
      AnyFloat Data = 25.0000000000;
    };
    AnyFolder DATA_LIMITS = {
      AnyInt ID = 6;
      AnyString locked = "UNLOCKED";
      AnyString Description = "";
      AnyFloat Data = {{-3500.0000000000, -3500.0000000000, -100.0000000000}, {3500.0000000000, 3500.0000000000, 2500.0000000000}};
    };
    AnyFolder ACC_FACTOR = {
      AnyInt ID = 6;
      AnyString locked = "UNLOCKED";
      AnyString Description = "";
      AnyFloat Data = 50.0000000000;
    };
    AnyFolder MAX_NOISE_FACTOR = {
      AnyInt ID = 6;
      AnyString locked = "UNLOCKED";
      AnyString Description = "";
      AnyFloat Data = 7.0000000000;
    };
    AnyFolder INTERSECTION_LIMIT = {
      AnyInt ID = 6;
      AnyString locked = "UNLOCKED";
      AnyString Description = "";
      AnyFloat Data = 12.0000000000;
    };
    AnyFolder RESIDUAL_ERROR_FACTOR = {
      AnyInt ID = 6;
      AnyString locked = "UNLOCKED";
      AnyString Description = "";
      AnyFloat Data = 2.0000000000;
    };
    AnyFolder PREDICTION_ERROR = {
      AnyInt ID = 6;
      AnyString locked = "UNLOCKED";
      AnyString Description = "";
      AnyFloat Data = 30.0000000000;
    };
  };
  AnyFolder EVENT_CONTEXT = {
    AnyInt ID = -7;
    AnyString locked = "UNLOCKED";
    AnyString Description = "";
    AnyFolder USED = {
      AnyInt ID = 7;
      AnyString locked = "UNLOCKED";
      AnyString Description = "";
      AnyInt Data = 3;
    };
    AnyFolder ICON_IDS = {
      AnyInt ID = 7;
      AnyString locked = "UNLOCKED";
      AnyString Description = "";
      AnyInt Data = {0, 0, 0};
    };
    AnyFolder LABELS = {
      AnyInt ID = 7;
      AnyString locked = "UNLOCKED";
      AnyString Description = "";
      AnyString Data = {{"L", "e", "f", "t", " ", " ", " ", " ", " ", " ", " ", " ", " ", " ", " ", " "}, {"R", "i", "g", "h", "t", " ", " ", " ", " ", " ", " ", " ", " ", " ", " ", " "}, {"G", "e", "n", "e", "r", "a", "l", " ", " ", " ", " ", " ", " ", " ", " ", " "}};
    };
    AnyFolder DESCRIPTIONS = {
      AnyInt ID = 7;
      AnyString locked = "UNLOCKED";
      AnyString Description = "";
      AnyString Data = {{"L", "e", "f", "t", " ", "s", "i", "d", "e", " ", " ", " ", " ", " ", " ", " ", " ", " ", " ", " ", " ", " ", " ", " ", " ", " ", " ", " ", " ", " ", " ", " "}, {"R", "i", "g", "h", "t", " ", "s", "i", "d", "e", " ", " ", " ", " ", " ", " ", " ", " ", " ", " ", " ", " ", " ", " ", " ", " ", " ", " ", " ", " ", " ", " "}, {"F", "o", "r", " ", "o", "t", "h", "e", "r", " ", "e", "v", "e", "n", "t", "s", " ", " ", " ", " ", " ", " ", " ", " ", " ", " ", " ", " ", " ", " ", " ", " "}};
    };
    AnyFolder COLOURS = {
      AnyInt ID = 7;
      AnyString locked = "UNLOCKED";
      AnyString Description = "";
      AnyInt Data = {{192, 0, 0}, {0, 192, 0}, {0, 0, 192}};
    };
  };
  AnyFolder EVENT = {
    AnyInt ID = -8;
    AnyString locked = "UNLOCKED";
    AnyString Description = "";
    AnyFolder USED = {
      AnyInt ID = 8;
      AnyString locked = "UNLOCKED";
      AnyString Description = "";
      AnyInt Data = 0;
    };
    AnyFolder CONTEXTS = {
      AnyInt ID = 8;
      AnyString locked = "UNLOCKED";
      AnyString Description = "";
    };
    AnyFolder ICON_IDS = {
      AnyInt ID = 8;
      AnyString locked = "UNLOCKED";
      AnyString Description = "";
    };
    AnyFolder LABELS = {
      AnyInt ID = 8;
      AnyString locked = "UNLOCKED";
      AnyString Description = "";
    };
    AnyFolder DESCRIPTIONS = {
      AnyInt ID = 8;
      AnyString locked = "UNLOCKED";
      AnyString Description = "";
    };

    AnyFolder TIMES = {
      AnyInt ID = 8;
      AnyString locked = "UNLOCKED";
      AnyString Description = "";
    };
    AnyFolder GENERIC_FLAGS = {
      AnyInt ID = 8;
      AnyString locked = "UNLOCKED";
      AnyString Description = "";
    };
  };
  AnyFolder MANUFACTURER = {
    AnyInt ID = -9;
    AnyString locked = "UNLOCKED";
    AnyString Description = "";
    AnyFolder COMPANY = {
      AnyInt ID = 9;
      AnyString locked = "UNLOCKED";
      AnyString Description = "";
      AnyString Data = {"V", "i", "c", "o", "n", " ", "M", "o", "t", "i", "o", "n", " ", "S", "y", "s", "t", "e", "m", "s", " ", "L", "i", "m", "i", "t", "e", "d"};
    };
    AnyFolder SOFTWARE = {
      AnyInt ID = 9;
      AnyString locked = "UNLOCKED";
      AnyString Description = "";
      AnyString Data = {"V", "i", "c", "o", "n", " ", "W", "o", "r", "k", "s", "t", "a", "t", "i", "o", "n"};
    };
    AnyFolder VERSION_LABEL = {
      AnyInt ID = 9;
      AnyString locked = "UNLOCKED";
      AnyString Description = "";
      AnyString Data = {"5", ".", "1"};
    };
  };
};
