AnyFolder Header = {
AnyString FileType = "PC";
AnyString DataType = "REAL";
AnyString DataSign = "UNSIGNED";
AnyInt No3DPoints = 52;
AnyInt TotalNoAnalogPer3DFrame = 256;
AnyInt FirstFrameNo = 242;
AnyInt LastFrameNo = 415;
AnyInt NoAnalogSamplesPer3DFrame = 4;
AnyFloat VideoFrameRate = 300.0000000000;
AnyInt Frames = {242,243,244,245,246,247,248,249,250,251,252,253,254,255,256,257,258,259,260,261,262,263,264,265,266,267,268,269,270,271,
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  415};
AnyFolder Events = {
};};
