//---------------------------------------------------------
// Segments - For connection between body-model and package
//---------------------------------------------------------

AnyFolder Segments = {

  AnyFolder &Pelvis = ..HumanModel.Trunk.SegmentsLumbar.PelvisSeg;
  AnyFolder &Thorax = ..HumanModel.Trunk.SegmentsThorax.ThoraxSeg;
  AnyFolder &FootRight = ..HumanModel.Right.Leg.Seg.Foot;
  AnyFolder &FootLeft = ..HumanModel.Left.Leg.Seg.Foot;
  AnyFolder &RefCD = Main.Model.PackageModel.Seg.ChairDimensions;
  AnyFolder &Seat = ..PackageModel.Seg.Seat;
  AnyFolder &BackRest = ..PackageModel.Seg.BackRest;
  AnyFolder &FootRest = ..PackageModel.Seg.FootRest;
  AnyFolder &ArmRestRight = ..PackageModel.Seg.Right.ArmRest;
  AnyFolder &ArmRestLeft = ..PackageModel.Seg.Left.ArmRest;

  //-------------------------------------------------------
  // Coordinates of points for attaching human to chair
  //-------------------------------------------------------

  AnyFolder InterfaceCoords = {
    AnyVar ITX = (1/2*.RefCD.SeatLength-0.07);
    AnyVar ITZ =  -0.034;
  }; //InterfaceCoords

  //-------------------------------------------------------
  // Attachment - Pelvis to Seat
  //-------------------------------------------------------

  Pelvis = {
    AnyRefNode PelvisSeatJntNode = {

      sRel = {-0.01,-0.175,0.0};

      ARel = {{0,-1,0},{1,0,0},{0,0,1}};

      AnyDrawRefFrame DrwRef = {
      RGB = {1,0,0};
      ScaleXYZ = {0.4,0.1,0.1};
      };

    };
  }; // Pelvis

  Seat = {
    AnyRefNode SeatPelvisJntNode = {
      sRel = {1/1*..RefCD.SeatThickness,..InterfaceCoords.ITX,0};
      /*
      AnyDrawRefFrame DrwRef = {
      RGB = {0,0,1};
      ScaleXYZ = {0.3,0.3,0.3};
      };
      */
    };
  }; // Seat

  //--------------------------------------------------------
  // Attachment - Thorax to BackRest
  //--------------------------------------------------------

  Thorax = {
    AnyRefNode ThoraxBackRestJntNode = {
      sRel ={-0.08,0.42,0.0};
      AnyDrawRefFrame DrwRef = {
        RGB = {0,0,1};
        ScaleXYZ = {0.4,0.1,0.1};
      };


    };
  }; // Thorax


  FootRight = {
    AnyRefNode FootFootRestJntNode = {
      sRel = {0,0,0};
      //ARel = {{0,-1,0},{1,0,0},{0,0,1}};
      /*
      AnyDrawNode DrwNode = {
      ScaleXYZ = {0.04,0.04,0.04};
      RGB = {1,0,0};
      };
      */
      /*
      AnyDrawRefFrame DrwRef = {
      ScaleXYZ = {0.3,0.3,0.3};
      RGB = {1,0,0};
      };
      */
    };
  };

  FootLeft = {
    AnyRefNode FootFootRestJntNode = {
      sRel = {0,0,0};
      //ARel = {{0,-1,0},{1,0,0},{0,0,1}};
      /*
      AnyDrawNode DrwNode = {
      ScaleXYZ = {0.04,0.04,0.04};
      RGB = {1,0,0};
      };
      */
      /*
      AnyDrawRefFrame DrwRef = {
      ScaleXYZ = {0.3,0.3,0.3};
      RGB = {1,0,0};
      };
      */
    };
  };

  FootRest = {
    AnyRefNode FootRestFootJntNodeRight = {
      sRel = {0,0.10,0.096};
      /*
      AnyDrawRefFrame DrwRefFrame = {
      ScaleXYZ = {0.3,0.3,0.3};
      RGB = {0,0,1};
      };
      */
    };
    AnyRefNode FootRestFootJntNodeLeft = {
      sRel = {0,0.10,-0.096};
      /*
      AnyDrawRefFrame DrwRefFrame = {
      ScaleXYZ = {0.3,0.3,0.3};
      RGB = {0,0,1};
      };
      */
    };
  }; // FootRest


}; // Segments
