  AnyDrawNodes DrwNode = {
    ScaleXYZ = {0.0005,0.0005,0.0005};
    RGB = {1, 0, 0};
  };

//AnyDrawRefFrame DrawFacetRefSup = {
//  RGB = {0.0 , 1.0, 0.0};
//  ScaleXYZ = {0.005,0.005,0.005};
//  Opacity = 1;
//};
