    // RIGHT FACET
    AnyKinPointSurface PointSurfaceMeasureR =
    {
      NormedMeasureOnOff = Off;
      // Central
      AnyRefFrame &PC1 = .seg1.FSRp1;
      AnyRefFrame &PC2 = .seg1.FSRp2;
      AnyRefFrame &PC3 = .seg1.FSRp3;
      AnyRefFrame &PC4 = .seg1.FSRp4;
      AnyRefFrame &PC5 = .seg1.FSRp5;
      AnyRefFrame &PC6 = .seg1.FSRp6;
      AnyRefFrame &PC7 = .seg1.FSRp7;
      AnyRefFrame &PC8 = .seg1.FSRp8;
      AnyRefFrame &PC9 = .seg1.FSRp9;
      AnyRefFrame &PC10 = .seg1.FSRp10;
      AnyRefFrame &PC11 = .seg1.FSRp11;
      AnyRefFrame &PC12 = .seg1.FSRp12;
      AnySurface &sR = .seg2.FacetInferiorR.InfR;
    };
    AnyVar MaxPennetrationR = min(PointSurfaceMeasureR.Pos);
    AnyForce ContactForcesR =
    {
      AnyVar Stiffness =12.5*10^3;
      AnyVar l0 = 0.0;

      AnyKinMeasure& meas = .PointSurfaceMeasureR;

      AnyFolder PC1 = {
        AnyIntVar i=0;
        AnyVar l0=.l0;
        AnyVar Stiffness = .Stiffness;
        #include "..\ForceCalc.any"
      };
      AnyFolder PC2 = {
        AnyIntVar i=1;
        AnyVar l0=.l0;
        AnyVar Stiffness = .Stiffness;
        #include "..\ForceCalc.any"
      };
      AnyFolder PC3 = {
        AnyIntVar i=2;
        AnyVar l0=.l0;
        AnyVar Stiffness = .Stiffness;
        #include "..\ForceCalc.any"
      };
      AnyFolder PC4 = {
        AnyIntVar i=3;
        AnyVar l0=.l0;
        AnyVar Stiffness = .Stiffness;
        #include "..\ForceCalc.any"
      };
      AnyFolder PC5 = {
        AnyIntVar i=4;
        AnyVar l0=.l0;
        AnyVar Stiffness = .Stiffness;
        #include "..\ForceCalc.any"
      };
      AnyFolder PC6 = {
        AnyIntVar i=5;
        AnyVar l0=.l0;
        AnyVar Stiffness = .Stiffness;
        #include "..\ForceCalc.any"
      };
      AnyFolder PC7 = {
        AnyIntVar i=6;
        AnyVar l0=.l0;
        AnyVar Stiffness = .Stiffness;
        #include "..\ForceCalc.any"
      };
      AnyFolder PC8 = {
        AnyIntVar i=7;
        AnyVar l0=.l0;
        AnyVar Stiffness = .Stiffness;
        #include "..\ForceCalc.any"
      };
      AnyFolder PC9 = {
        AnyIntVar i=8;
        AnyVar l0=.l0;
        AnyVar Stiffness = .Stiffness;
        #include "..\ForceCalc.any"
      };
      AnyFolder PC10 = {
        AnyIntVar i=9;
        AnyVar l0=.l0;
        AnyVar Stiffness = .Stiffness;
        #include "..\ForceCalc.any"
      };
      AnyFolder PC11 = {
        AnyIntVar i=10;
        AnyVar l0=.l0;
        AnyVar Stiffness = .Stiffness;
        #include "..\ForceCalc.any"
      };
      AnyFolder PC12 = {
        AnyIntVar i=11;
        AnyVar l0=.l0;
        AnyVar Stiffness = .Stiffness;
        #include "..\ForceCalc.any"
      };
      F = {PC1.Val,PC2.Val,PC3.Val,PC4.Val,PC5.Val,PC6.Val,PC7.Val,PC8.Val,PC9.Val,PC10.Val,PC11.Val,PC12.Val};
    };
    // LEFT FACET
    AnyKinPointSurface PointSurfaceMeasureL =
    {
      NormedMeasureOnOff = Off;
      // Central
      AnyRefFrame &PC1 = .seg1.FSLp1;
      AnyRefFrame &PC2 = .seg1.FSLp2;
      AnyRefFrame &PC3 = .seg1.FSLp3;
      AnyRefFrame &PC4 = .seg1.FSLp4;
      AnyRefFrame &PC5 = .seg1.FSLp5;
      AnyRefFrame &PC6 = .seg1.FSLp6;
      AnyRefFrame &PC7 = .seg1.FSLp7;
      AnyRefFrame &PC8 = .seg1.FSLp8;
      AnyRefFrame &PC9 = .seg1.FSLp9;
      AnyRefFrame &PC10 = .seg1.FSLp10;
      AnyRefFrame &PC11 = .seg1.FSLp11;
      AnyRefFrame &PC12 = .seg1.FSLp12;
      AnySurface &sR = .seg2.FacetInferiorL.InfL;
    };
    AnyVar MaxPennetrationL = min(PointSurfaceMeasureL.Pos);
    AnyForce ContactForcesL =
    {
      AnyVar Stiffness =12.5*10^3;
      AnyVar l0 = 0.0;

      AnyKinMeasure& meas = .PointSurfaceMeasureL;

      AnyFolder PC1 = {
        AnyIntVar i=0;
        AnyVar l0=.l0;
        AnyVar Stiffness = .Stiffness;
        #include "..\ForceCalc.any"
      };
      AnyFolder PC2 = {
        AnyIntVar i=1;
        AnyVar l0=.l0;
        AnyVar Stiffness = .Stiffness;
        #include "..\ForceCalc.any"
      };
      AnyFolder PC3 = {
        AnyIntVar i=2;
        AnyVar l0=.l0;
        AnyVar Stiffness = .Stiffness;
        #include "..\ForceCalc.any"
      };
      AnyFolder PC4 = {
        AnyIntVar i=3;
        AnyVar l0=.l0;
        AnyVar Stiffness = .Stiffness;
        #include "..\ForceCalc.any"
      };
      AnyFolder PC5 = {
        AnyIntVar i=4;
        AnyVar l0=.l0;
        AnyVar Stiffness = .Stiffness;
        #include "..\ForceCalc.any"
      };
      AnyFolder PC6 = {
        AnyIntVar i=5;
        AnyVar l0=.l0;
        AnyVar Stiffness = .Stiffness;
        #include "..\ForceCalc.any"
      };
      AnyFolder PC7 = {
        AnyIntVar i=6;
        AnyVar l0=.l0;
        AnyVar Stiffness = .Stiffness;
        #include "..\ForceCalc.any"
      };
      AnyFolder PC8 = {
        AnyIntVar i=7;
        AnyVar l0=.l0;
        AnyVar Stiffness = .Stiffness;
        #include "..\ForceCalc.any"
      };
      AnyFolder PC9 = {
        AnyIntVar i=8;
        AnyVar l0=.l0;
        AnyVar Stiffness = .Stiffness;
        #include "..\ForceCalc.any"
      };
      AnyFolder PC10 = {
        AnyIntVar i=9;
        AnyVar l0=.l0;
        AnyVar Stiffness = .Stiffness;
        #include "..\ForceCalc.any"
      };
      AnyFolder PC11 = {
        AnyIntVar i=10;
        AnyVar l0=.l0;
        AnyVar Stiffness = .Stiffness;
        #include "..\ForceCalc.any"
      };
      AnyFolder PC12 = {
        AnyIntVar i=11;
        AnyVar l0=.l0;
        AnyVar Stiffness = .Stiffness;
        #include "..\ForceCalc.any"
      };
      F = {PC1.Val,PC2.Val,PC3.Val,PC4.Val,PC5.Val,PC6.Val,PC7.Val,PC8.Val,PC9.Val,PC10.Val,PC11.Val,PC12.Val};
    };
