#path BM_CONFIG_PLUGIN "BodyModelConfiguration.any"

// ----------------------------------------------------------
// Model configuration:
// For more info on body model configuration options please load the model and double click on:
// #path HTML_DOC "<AMMR_PATH_DOC>/bm_config/index.html"
// To modify the body model configuration, manually edit this file or use the
// BM Configurator Plugin.
// ----------------------------------------------------------


#define BM_LEG_MODEL _LEG_MODEL_TLEM2_

//#define BM_ARM_MUSCLES_LEFT CONST_MUSCLES_NONE
//#define BM_ARM_MUSCLES_RIGHT CONST_MUSCLES_NONE
//#define BM_TRUNK_MUSCLES CONST_MUSCLES_NONE
//#define BM_LEG_MUSCLES_RIGHT CONST_MUSCLES_NONE
//#define BM_LEG_MUSCLES_LEFT CONST_MUSCLES_NONE
#define BM_TRUNK_CERVICAL_MUSCLES ON

#define BM_ARM_SHOULDER_RHYTHM ON
