#path __BM_PLUGIN_FILE__ "BodyModelConfiguration.any"
#define BM_CONFIG_PLUGIN __BM_PLUGIN_FILE__

// -----------------------------------------------------------------------------------
// The BodyModel configuration can be modified using BodyModel GUI plugin
// or by manually editing this file.
//
// Please see this this file for more information on the options:
// #path HTML_DOC "<AMMR_PATH_DOC>/bm_config/index.html"
// -----------------------------------------------------------------------------------


#define BM_LEG_MODEL _LEG_MODEL_TLEM2_

//#define BM_ARM_MUSCLES_LEFT CONST_MUSCLES_NONE
//#define BM_ARM_MUSCLES_RIGHT CONST_MUSCLES_NONE
//#define BM_TRUNK_MUSCLES CONST_MUSCLES_NONE
//#define BM_LEG_MUSCLES_RIGHT CONST_MUSCLES_NONE
//#define BM_LEG_MUSCLES_LEFT CONST_MUSCLES_NONE
#define BM_TRUNK_CERVICAL_MUSCLES ON

#define BM_ARM_SHOULDER_RHYTHM ON
