Main.HumanModel.Mannequin =
{
  Posture =
  {
    PelvisPosX=-0.1;
    PelvisPosY=0.9 + 0.1;
    PelvisPosZ=0;

//    PelvisRotX=0;
//    PelvisRotY=0;
//    PelvisRotZ=0;
//
//    PelvisThoraxExtension=0;
//    PelvisThoraxLateralBending=0;
//    PelvisThoraxRotation=0;
//
//    NeckExtension=0;
//    NeckLateralBending=0;
//    NeckRotation=0;

    Right =
    {
//      SternoClavicularProtraction=-23;   //This value is not used for initial position
//      SternoClavicularElevation=11.5;    //This value is not used for initial position
//      SternoClavicularAxialRotation=-20; //This value is not used for initial position

      GlenohumeralFlexion = 20;
      GlenohumeralAbduction = 10;
      GlenohumeralExternalRotation = -70;

      ElbowFlexion = 120;
      ElbowPronation = -20.0;

//      WristFlexion =0;
//      WristAbduction =0;
//
//      HipFlexion = 0.0;
//      HipAbduction = 3.0;
//      HipExternalRotation = 0.0;
//
//      KneeFlexion = 0.0;
//
//      AnklePlantarFlexion =10.0;
//      SubTalarEversion =0.0;

    };

    Left =
    {
//      SternoClavicularProtraction=.Right.SternoClavicularProtraction;
//      SternoClavicularElevation=.Right.SternoClavicularElevation;
//      SternoClavicularAxialRotation=.Right.SternoClavicularAxialRotation;

      GlenohumeralFlexion = .Right.GlenohumeralFlexion ;
      GlenohumeralAbduction =.Right.GlenohumeralAbduction ;
      GlenohumeralExternalRotation =.Right.GlenohumeralExternalRotation ;

      ElbowFlexion = .Right.ElbowFlexion;
      ElbowPronation = .Right.ElbowPronation;

//      WristFlexion =.Right.WristFlexion;
//      WristAbduction =.Right.WristAbduction;
//
//      HipFlexion =.Right.HipFlexion;
//      HipAbduction =.Right.HipAbduction;
//      HipExternalRotation = .Right.HipExternalRotation;
//
//      KneeFlexion = .Right.KneeFlexion;
//
//      AnklePlantarFlexion = .Right.AnklePlantarFlexion ;
//      SubTalarEversion =.Right.SubTalarEversion;
    };
  };
};
