  // ************************************
  // Drivers for the right arm
  // ************************************


  #if BM_ARM_SHOULDER_RHYTHM == 0
  //Sterno clavicular joint driver
  AnyKinEqSimpleDriver SCDriverRight ={
    AnyKinMeasureOrg &ref1 =...HumanModel.Interface.Right.SternoClavicularProtraction;
    AnyKinMeasureOrg &ref2 =...HumanModel.Interface.Right.SternoClavicularElevation;
    AnyKinMeasureOrg &ref3 =...HumanModel.Interface.Right.SternoClavicularAxialRotation;
    DriverPos = pi/180*{
      .JntPos.Right.SternoClavicularProtraction,
      .JntPos.Right.SternoClavicularElevation,
      .JntPos.Right.SternoClavicularAxialRotation
    };
    DriverVel = {
      .JntVel.Right.SternoClavicularProtraction,
      .JntVel.Right.SternoClavicularElevation,
      .JntVel.Right.SternoClavicularAxialRotation
    };
    Reaction.Type={Off,Off,Off};
  };
  #endif

  #if ADL_SQUAT_SWITCH_ARM_POSTURE_HORIZONTAL == 1

  AnyKinEqSimpleDriver GHFlexionDriverRight =
  {
    AnyKinLinear lin =
    {
      AnyRefFrame& ref0 = ....HumanModel.Right.ShoulderArm.Seg.Humerus.gh ;
      AnyRefFrame& ref1 = ....HumanModel.Right.ShoulderArm.Seg.Glove.ContactNode;
      Ref = -1;
    };
    MeasureOrganizer = {1};
    DriverPos = {0.0};
    DriverVel = {0.0};
    Reaction.Type = {Off};
  };

  AnyKinEqSimpleDriver GHDriverRight=
  {
    AnyKinMeasureOrg &ref0 = ...HumanModel.Interface.Right.GlenohumeralAbduction;
    AnyKinMeasureOrg &ref1 = ...HumanModel.Interface.Right.GlenohumeralExternalRotation;
    DriverPos = pi/180*{0, -90};
    DriverVel = pi/180*{0, 0};
    Reaction.Type={Off, Off};
  };

  AnyKinEqSimpleDriver ElbowDriverRight=
  {
    AnyKinMeasureOrg &ref0 =...HumanModel.Interface.Right.ElbowFlexion;
    AnyKinMeasureOrg &ref1 =...HumanModel.Interface.Right.ElbowPronation;
    DriverPos = pi/180*{0, 0};
    DriverVel = pi/180*{0, 0};
    Reaction.Type={Off, Off};
  };

  AnyKinEqSimpleDriver WristDriverRight =
  {
    AnyKinMeasureOrg &ref0 =...HumanModel.Interface.Right.WristFlexion;
    AnyKinMeasureOrg &ref1 =...HumanModel.Interface.Right.WristAbduction;
    DriverPos = pi/180*{0, 0};
    DriverVel = pi/180*{0, 0};
    Reaction.Type={Off,Off};
  };

  #else

  AnyKinEqSimpleDriver GHDriverRight=
  {
    AnyKinMeasureOrg &ref1 =...HumanModel.Interface.Right.GlenohumeralAbduction;
    AnyKinMeasureOrg &ref2 =...HumanModel.Interface.Right.GlenohumeralFlexion;
    AnyKinMeasureOrg &ref3 =...HumanModel.Interface.Right.GlenohumeralExternalRotation;

     DriverPos=pi/180*
     {
      .JntPos.Right.GlenohumeralAbduction,
      .JntPos.Right.GlenohumeralFlexion,
      .JntPos.Right.GlenohumeralExternalRotation
     };
     DriverVel = pi/180*
     {
      .JntVel.Right.GlenohumeralAbduction,
      .JntVel.Right.GlenohumeralFlexion,
      .JntVel.Right.GlenohumeralExternalRotation
     };
     Reaction.Type={Off, Off, Off};
  };

  AnyKinEqSimpleDriver ElbowFEDriverRight=
  {
    AnyKinMeasureOrg  &Elbow =...HumanModel.Interface.Right.ElbowFlexion;
    DriverPos = pi/180*{.JntPos.Right.ElbowFlexion};
    DriverVel = pi/180*{.JntVel.Right.ElbowFlexion};
    Reaction.Type={Off};
  };

  AnyKinEqSimpleDriver ElbowPSDriverRight=
  {
    AnyKinMeasureOrg &Elbow =...HumanModel.Interface.Right.ElbowPronation;
    DriverPos = pi/180*{.JntPos.Right.ElbowPronation };
    DriverVel = pi/180*{.JntVel.Right.ElbowPronation };
    Reaction.Type={Off};
  };

  AnyKinEqSimpleDriver WristDriverRight =
  {
    AnyKinMeasureOrg &ref1 =...HumanModel.Interface.Right.WristFlexion;
    AnyKinMeasureOrg &ref2 =...HumanModel.Interface.Right.WristAbduction;
    DriverPos = pi/180*
    {
      .JntPos.Right.WristFlexion,
      .JntPos.Right.WristAbduction
    };

    DriverVel = pi/180*
    {
      .JntVel.Right.WristFlexion,
      .JntVel.Right.WristAbduction
    };
    Reaction.Type={Off,Off};
  };

  #endif
