AnyKinEqSimpleDriver NeckLateralBendingDriver =
{
  AnyKinMeasure &ref0 = ...HumanModel.Interface.Trunk.SkullThoraxLateralBending;
  DriverPos = pi/180*{.JntPos.NeckLateralBending};
  DriverVel = pi/180*{.JntVel.NeckLateralBending};
  Reaction.Type = {Off};
};

AnyKinEqSimpleDriver NeckRotationDriver =
{
  AnyKinMeasure &ref0= ...HumanModel.Interface.Trunk.SkullThoraxRotation;
  DriverPos = pi/180*{.JntPos.NeckRotation};
  DriverVel = pi/180*{.JntVel.NeckRotation};
  Reaction.Type = {Off};
};

//AnyKinEqSimpleDriver NeckJntDriver =
//{
//  AnyKinMeasure &ref0 = ...HumanModel.Interface.Trunk.SkullThoraxFlexion;
//  DriverPos = pi/180*{.JntPos.NeckExtension};
//  DriverVel = pi/180*{.JntVel.NeckExtension};
//  Reaction.Type = {Off};
//};

AnyKinEqSimpleDriver NeckExtensionDriver =
{
  AnyKinRotational rot =
  {
    AnyRefFrame& ref = ....HumanModel.Trunk.SegmentsThorax.SkullSeg.TopOfHead;
    Type = RotAxesAngles;
    Axis1 = z;
    Axis2 = y;
    Axis3 = x;
  };
  MeasureOrganizer = {0};
  DriverPos = pi/180*{0.0};
  DriverVel = pi/180*{0.0};
  Reaction.Type = {Off};
};

AnyKinEqSimpleDriver PelvisThoraxDriver =
{
  AnyKinMeasureOrg &ref0 = ...HumanModel.Interface.Trunk.PelvisThoraxExtension;
  AnyKinMeasureOrg &ref1 = ...HumanModel.Interface.Trunk.PelvisThoraxLateralBending;
  AnyKinMeasureOrg &ref2 = ...HumanModel.Interface.Trunk.PelvisThoraxRotation;

  DriverPos = pi/180*
  {
    .JntPos.PelvisThoraxExtension,
    .JntPos.PelvisThoraxLateralBending,
    .JntPos.PelvisThoraxRotation
  };
  DriverVel = pi/180*
  {
    .JntVel.PelvisThoraxExtension,
    .JntVel.PelvisThoraxLateralBending,
    .JntVel.PelvisThoraxRotation
  };
  Reaction.Type = {Off, Off, Off};
};

AnyKinEqSimpleDriver PelvisRotXDriver=
{
  AnyKinMeasure& ref = ...HumanModel.Interface.Trunk.PelvisRotX;
  DriverPos = pi/180 * {.JntPos.PelvisRotX};
  DriverVel = pi/180 * {.JntVel.PelvisRotX};
  Reaction.Type = {Off};
};

AnyKinEqSimpleDriver PelvisRotYDriver=
{
  AnyKinMeasure& ref = ...HumanModel.Interface.Trunk.PelvisRotY;
  DriverPos = pi/180 * {.JntPos.PelvisRotY};
  DriverVel = pi/180 * {.JntVel.PelvisRotY};
  Reaction.Type = {Off};
};

AnyKinEqSimpleDriver TrunkAnteriorPosteriorDriver =
{
  AnyKinLinear lin =
  {
    AnyRefFrame& ref1 = ....HumanModel.Right.Leg.Seg.Foot.BigToeNode ;
    AnyRefFrame& ref0 = ....HumanModel.Trunk.SegmentsThorax.ThoraxSeg.ij ;
    Ref = -1;
  };
  MeasureOrganizer = {0};
  DriverPos = {0};
  DriverVel = {0};
  Reaction.Type = {Off};
};
