AnyFolder Mannequin = {
 AnyFolder  Posture =
  {
    AnyVar PelvisPosX = 0.03;
    AnyVar PelvisPosY = 1.158839;
    AnyVar PelvisPosZ = 1.83691e-018;
    AnyVar PelvisRotX = 0;
    AnyVar PelvisRotY = 7.127729e-010;
    AnyVar PelvisRotZ = -11.05118;
    AnyVar PelvisThoraxExtension = 17.78666;
    AnyVar PelvisThoraxLateralBending = -7.675164;
    AnyVar PelvisThoraxRotation = 1.215739e-015;
    AnyVar NeckExtension = 0;
    AnyFolder Right =
    {
      AnyVar SternoClavicularProtraction = -22.91831;
      AnyVar SternoClavicularElevation = 11.45916;
      AnyVar SternoClavicularAxialRotation = -20.05352;
      AnyVar GlenohumeralFlexion = -54.26091;
      AnyVar GlenohumeralAbduction = 26.68727;
      AnyVar GlenohumeralExternalRotation = -27.48365;
      AnyVar ElbowFlexion = 78.27422;
      AnyVar ElbowPronation = 70;
      AnyVar WristFlexion = 1.360147e-006;
      AnyVar WristAbduction = 0;
      AnyVar HipFlexion = 9.963622;
      AnyVar HipAbduction = 8.471685;
      AnyVar HipExternalRotation = -0.7398045;
      AnyVar KneeFlexion = 0;
      AnyVar AnklePlantarFlexion = 2.760797;
      AnyVar AnkleEversion = 1.636356e-007;
    };
    AnyFolder Left =
    {
      AnyVar SternoClavicularProtraction = -22.91831;
      AnyVar SternoClavicularElevation = 11.45916;
      AnyVar SternoClavicularAxialRotation = -20.05352;
      AnyVar GlenohumeralFlexion = -57.86945;
      AnyVar GlenohumeralAbduction = 18.77086;
      AnyVar GlenohumeralExternalRotation = -9.684607;
      AnyVar ElbowFlexion = 88.34145;
      AnyVar ElbowPronation = 50;
      AnyVar WristFlexion = 8.508767e-009;
      AnyVar WristAbduction = 0;
      AnyVar HipFlexion = 9.963622;
      AnyVar HipAbduction = 8.471685;
      AnyVar HipExternalRotation = -0.7398045;
      AnyVar KneeFlexion = 0;
      AnyVar AnklePlantarFlexion = 2.760797;
      AnyVar AnkleEversion = -2.593927e-009;
    };
  };


   AnyFolder  PostureVel =
  {
    AnyVar PelvisPosX = 0;
    AnyVar PelvisPosY = 0;
    AnyVar PelvisPosZ = 0;
    AnyVar PelvisRotX = 0;
    AnyVar PelvisRotY = 0;
    AnyVar PelvisRotZ = 0;
    AnyVar PelvisThoraxExtension = 0;
    AnyVar PelvisThoraxLateralBending = 0;
    AnyVar PelvisThoraxRotation = 0;
    AnyVar NeckExtension = 0;
    AnyFolder Right =
    {
      AnyVar SternoClavicularProtraction = 0;
      AnyVar SternoClavicularElevation = 0;
      AnyVar SternoClavicularAxialRotation =0;
      AnyVar GlenohumeralFlexion = 0;
      AnyVar GlenohumeralAbduction =0;
      AnyVar GlenohumeralExternalRotation = 0;
      AnyVar ElbowFlexion =0;
      AnyVar ElbowPronation = 0;
      AnyVar WristFlexion = 0;
      AnyVar WristAbduction = 0;
      AnyVar HipFlexion = 0;
      AnyVar HipAbduction =0;
      AnyVar HipExternalRotation = 0;
      AnyVar KneeFlexion = 0;
      AnyVar AnklePlantarFlexion = 0;
      AnyVar AnkleEversion = 0;
    };
    AnyFolder Left =
    {
      AnyVar SternoClavicularProtraction = 0;
      AnyVar SternoClavicularElevation = 0;
      AnyVar SternoClavicularAxialRotation =0;
      AnyVar GlenohumeralFlexion = 0;
      AnyVar GlenohumeralAbduction =0;
      AnyVar GlenohumeralExternalRotation = 0;
      AnyVar ElbowFlexion =0;
      AnyVar ElbowPronation = 0;
      AnyVar WristFlexion = 0;
      AnyVar WristAbduction = 0;
      AnyVar HipFlexion = 0;
      AnyVar HipAbduction =0;
      AnyVar HipExternalRotation = 0;
      AnyVar KneeFlexion = 0;
      AnyVar AnklePlantarFlexion = 0;
      AnyVar AnkleEversion = 0;
    };
  };
};
