/**
This model is a stading model perfomin a circumduction motion
The plevis is following a circular horizontal path and the center
of mass for the entire body is locked above the feet. The feet are
supported using artificial muscles in order to create non-sticky boundary
conditions.
*/
Main = {

  /**Execute this operation to run the model in the intended operation sequence.
  It is also possible to run operations seperately, by manual selections in the operation tree*/
  AnyOperationSequence RunApplication = {

    /**This operation calibrates the muscles in the model if these are of the type AnyMuscleModel3E.
    This will just be an empty operation if the model is using a muscle type that does not require calibration.*/
    AnyOperation &CalibrationAnal = Main.HumanModel.Calibration.CalibrationSequence;

    ///This operation is the inverse dynamic analysis
    AnyOperation &InvAnal=Main.Study.InverseDynamics;

  };


  #include "DrawSettings.any"

  AnyFolder HumanModel={
    AnyFolder &Mannequin=.Model.Mannequin;
    // Use only ONE of the three include files below at any time
    // --------------------------------------------------------

    // Selecting the include file below results in a body model without muscles.
    // Instead, the model is equipped with joint moment providers. This version
    // loads and run much faster than versions with anatomical muscles.
//    #include  "..\..\..\Body\AAUHuman\BodyModels\FullBodyModel\BodyModel_NoMuscles.any"

    // Selecting the include file below results in a body model with simple
    // constant stength muscles. They are adequate for many purposes and have the
    // advantage of not requiring calibration
    #include  "..\..\..\Body\AAUHuman\BodyModels\FullBodyModel\BodyModel.any"

    // The include file below selects the three-element Hill-type muscles.
    // They require calibration before they can be used, and this can be done
    // by the HumanModel.Calibration.CalibrationSequence operation. This must
    // be executed every time the model is reloaded.
    //#include  "..\..\..\Body\AAUHuman\BodyModels\FullBodyModel\BodyModel_Mus3E.any"

    // The StrengthParameters folder allows for simple scaling of strength
    // between the spine, the legs and the ShoulderArm body parts. The methods
    // are slightly different to adhere to the anatomical literature on which the
    // models are based.
    AnyFolder StrengthParameters={
      AnyVar SpecificMuscleTensionSpine= 90; //N/cm^2
      AnyVar StrengthIndexLeg= 1;
      AnyVar SpecificMuscleTensionShoulderArm= 90; //N/cm^2
    };

    // This section below offers the choice between two scaling strategies for the
    // human model.

    // ScalingStandard means that all the body parts will have the standard size
    // at which they were originally developed, i.e. with anthropometric
    // data from the anatomical literature. This roughly corresponds to a 50th
    // percentile European male.
    #include "..\..\..\Body\AAUHuman\Scaling\ScalingStandard.any"

    // ScalingLengthMassFat will scale each segment of the body to anthropometric data
    // specified in the selected AnyFamily include file, attempting to take the
    // fat percentage into account in the assessment of the muscle strength.
    // #include "..\..\..\Body\AAUHuman\Scaling\ScalingLengthMassFat.any"
    // Scaling = {
    //   #include "..\..\..\Body\AAUHuman\Scaling\AnyFamily\AnyMan.any"
    // };

  };

  // This folder collects the elements of the model. It is referred by the
  // study section below as the target of the analyses.
  AnyFolder Model = {


    AnyFolder &HumanModel=.HumanModel.BodyModel;
    #include "Environment.any"

    //The Mannequin values is used both for setting the initial positions of the model
    //and driving the model at analysis time. So you can change the values in the Mannequin
    //file and it will change both initial positions and how it is positioned at analysis time.
    //If you want to run the model into some posture and then dump the momentary joint angles as the
    //initial ones then simply do the following:
    // 1  Double click the folder Main.MannequinValuesFromModel.AnyFolder_Posture and it will dump the joint angles to the message window
    // 2. Copy the dumped text into the Mannequin.any replacing the "Posture" folder
    // 3. Press ctrl+h and search and replace "_" with " "
    // 4. Once the model is reloaded it will start in the position corresponding to the one which was dumped.
    #include "Mannequin.any"

    AnyFolder ModelEnvironmentConnection = {
      #include "JointsAndDrivers.any"
    };

  };
  AnyBodyStudy Study = {

    AnyFolder &Model = .Model;
    tEnd = 3.0;
    Gravity = {0.0, -9.81, 0.0};
    nStep = 15;
    //This tolerance determines how agressively the muscles will be removed from the system
    //if there is symmetry problems this value should be lowered
  }; // End of study

}; //Main
