#path __BM_PLUGIN_FILE__ "BodyModelConfiguration.any"
#define BM_CONFIG_PLUGIN __BM_PLUGIN_FILE__

// ----------------------------------------------------------
// Model configuration:
// For more info on body model configuration options please load the model and double click on:
// #path HTML_DOC "<AMMR_PATH_DOC>/bm_config/index.html"
// To modify the body model configuration, manually edit this file or use the
// BM Configurator Plugin.
// ----------------------------------------------------------

// Switch off all muscles for the convenience of display
//
//#define BM_LEG_MUSCLES_RIGHT OFF
//#define BM_LEG_MUSCLES_LEFT OFF
//
//
//#define BM_ARM_MUSCLES_RIGHT OFF
//#define BM_ARM_MUSCLES_LEFT OFF
//
//#define BM_TRUNK_MUSCLES OFF
