// This File displays the location of the external measures


AnyFolder DrawMeasures = {


  AnyFolder Head ={
    AnyRefFrame &refframe1 = Main.HumanModel.BodyModel.Trunk.SegmentsThorax.SkullSeg.ChinBonyTip;
    AnyRefFrame &refframe2 = Main.HumanModel.BodyModel.Trunk.SegmentsThorax.SkullSeg.TopOfHead;
    AnyRefFrameAxis DirAxis= y;
    AnyVec3 Offset = {0.02, 0, 0};
    AnyStringVar Text = "Head";
    AnyVec3 RGB = ...DrawSettings.Line.RGB;
    AnyVar Thickness = ...DrawSettings.Line.Thickness;
    #include "../../../Body/AAUHuman/ToolBox/DimensionArrowWithText/DimensionLines.any"

    Main.HumanModel.BodyModel.Trunk.SegmentsThorax.SkullSeg.ChinBonyTip ={
      AnyDrawNode DrawNode =
      {
        RGB = {1, 0, 0};
        ScaleXYZ = 0.3*{0.025, 0.025, 0.025};
      };
    };

    Main.HumanModel.BodyModel.Trunk.SegmentsThorax.SkullSeg.TopOfHead ={
      AnyDrawNode DrawNode =
      {
        RGB = {1, 0, 0};
        ScaleXYZ = 0.3*{0.025, 0.025, 0.025};
      };
    };

  };


  AnyFolder Trunk ={
    AnyRefFrame &refframe1 = Main.HumanModel.BodyModel.Trunk.SegmentsThorax.ThoraxSeg.C7Tip;
    AnyRefFrame &refframe2 = Main.HumanModel.BodyModel.Trunk.SegmentsLumbar.SacrumSeg.SacrumBonyTip;
    AnyRefFrameAxis DirAxis= y;
    AnyVec3 Offset = {-0.02, 0, 0};
    AnyStringVar Text = "Trunk";
    AnyVec3 RGB = ...DrawSettings.Line.RGB;
    AnyVar Thickness = ...DrawSettings.Line.Thickness;
    #include "../../../Body/AAUHuman/ToolBox/DimensionArrowWithText/DimensionLines.any"

    Main.HumanModel.BodyModel.Trunk.SegmentsThorax.ThoraxSeg.C7Tip={
      AnyDrawNode DrawNode =
      {
        RGB = {1, 0, 0};
        ScaleXYZ = 0.3*{0.025, 0.025, 0.025};
      };
    };

    Main.HumanModel.BodyModel.Trunk.SegmentsLumbar.SacrumSeg.SacrumBonyTip={
      AnyDrawNode DrawNode =
      {
        RGB = {1, 0, 0};
        ScaleXYZ = 0.3*{0.025, 0.025, 0.025};
      };
    };

  };


  AnyFolder Pelvis ={
    AnyRefFrame &refframe1 = Main.HumanModel.BodyModel.Trunk.SegmentsLumbar.PelvisSeg.TrochanterBonyTipR ;
    AnyRefFrame &refframe2 = Main.HumanModel.BodyModel.Trunk.SegmentsLumbar.PelvisSeg.TrochanterBonyTipL;
    AnyRefFrameAxis DirAxis= z;
    AnyVec3 Offset = {-0.06, 0, 0};
    AnyStringVar Text = "Pelvis";
    AnyVec3 RGB = ...DrawSettings.Line.RGB;
    AnyVar Thickness = ...DrawSettings.Line.Thickness;
    #include "../../../Body/AAUHuman/ToolBox/DimensionArrowWithText/DimensionLines.any"

    Main.HumanModel.BodyModel.Trunk.SegmentsLumbar.PelvisSeg.TrochanterBonyTipR ={
      AnyDrawNode DrawNode =
      {
        RGB = {1, 0, 0};
        ScaleXYZ = 0.3*{0.025, 0.025, 0.025};
      };
    };

    Main.HumanModel.BodyModel.Trunk.SegmentsLumbar.PelvisSeg.TrochanterBonyTipL={
      AnyDrawNode DrawNode =
      {
        RGB = {1, 0, 0};
        ScaleXYZ = 0.3*{0.025, 0.025, 0.025};
      };
    };

  };


  AnyFolder Foot ={
    AnyRefFrame &refframe1 = Main.HumanModel.BodyModel.Right.Leg.Seg.Foot.HeelJointRot;
    AnyRefFrame &refframe2 = Main.HumanModel.BodyModel.Right.Leg.Seg.Foot.Toetip;
    AnyRefFrameAxis DirAxis= {x,y,z};
    AnyVec3 Offset = {0, 0, 0.06};
    AnyStringVar Text = "Foot";
    AnyVec3 RGB = ...DrawSettings.Line.RGB;
    AnyVar Thickness = ...DrawSettings.Line.Thickness;
    #include "../../../Body/AAUHuman/ToolBox/DimensionArrowWithText/DimensionLines.any"

    Main.HumanModel.BodyModel.Right.Leg.Seg.Foot.HeelJointRot={
      AnyDrawNode DrawNode =
      {
        RGB = {1, 0, 0};
        ScaleXYZ = 0.3*{0.025, 0.025, 0.025};
      };
    };

    Main.HumanModel.BodyModel.Right.Leg.Seg.Foot.Toetip={
      AnyDrawNode DrawNode =
      {
        RGB = {1, 0, 0};
        ScaleXYZ = 0.3*{0.025, 0.025, 0.025};
      };
    };

  };


  AnyFolder Shank ={
    AnyRefFrame &refframe1 = Main.HumanModel.BodyModel.Right.Leg.Seg.Shank.CondylusMedial;
    AnyRefFrame &refframe2 = Main.HumanModel.BodyModel.Right.Leg.Seg.Shank.MalleolusMedial;
    AnyRefFrameAxis DirAxis= {x,y,z};
    AnyVec3 Offset = {0, 0, -0.03};
    AnyStringVar Text = "Shank";
    AnyVec3 RGB = ...DrawSettings.Line.RGB;
    AnyVar Thickness = ...DrawSettings.Line.Thickness;
    #include "../../../Body/AAUHuman/ToolBox/DimensionArrowWithText/DimensionLines.any"

    Main.HumanModel.BodyModel.Right.Leg.Seg.Shank.CondylusMedial={
      AnyDrawNode DrawNode =
      {
        RGB = {1, 0, 0};
        ScaleXYZ = 0.3*{0.025, 0.025, 0.025};
      };
    };

    Main.HumanModel.BodyModel.Right.Leg.Seg.Shank.MalleolusMedial={
      AnyDrawNode DrawNode =
      {
        RGB = {1, 0, 0};
        ScaleXYZ = 0.3*{0.025, 0.025, 0.025};
      };
    };

  };


  AnyFolder Thigh ={
    AnyRefFrame &refframe1 = Main.HumanModel.BodyModel.Right.Leg.Seg.Thigh.TopOfTrochanter;
    AnyRefFrame &refframe2 = Main.HumanModel.BodyModel.Right.Leg.Seg.Thigh.EpicondylusLateral;
    AnyRefFrameAxis DirAxis= {x,y};
    AnyVec3 Offset = {0, 0, 0.04};
    AnyStringVar Text = "Thigh";
    AnyVec3 RGB = ...DrawSettings.Line.RGB;
    AnyVar Thickness = ...DrawSettings.Line.Thickness;
    #include "../../../Body/AAUHuman/ToolBox/DimensionArrowWithText/DimensionLines.any"

    Main.HumanModel.BodyModel.Right.Leg.Seg.Thigh.TopOfTrochanter={
      AnyDrawNode DrawNode =
      {
        RGB = {1, 0, 0};
        ScaleXYZ = 0.3*{0.025, 0.025, 0.025};
      };
    };

    Main.HumanModel.BodyModel.Right.Leg.Seg.Thigh.EpicondylusLateral={
      AnyDrawNode DrawNode =
      {
        RGB = {1, 0, 0};
        ScaleXYZ = 0.3*{0.025, 0.025, 0.025};
      };
    };

  };


  AnyFolder UpperArm ={
    AnyRefFrame &refframe1 = Main.HumanModel.BodyModel.Left.ShoulderArm.Seg.Humerus.ElbowBonyTip;
    AnyRefFrame &refframe2 = Main.HumanModel.BodyModel.Left.ShoulderArm.Seg.Humerus.AcromionBonyTip;
    AnyRefFrameAxis DirAxis= {x,y,z};
    AnyVec3 Offset = {0, 0, -0.06};
    AnyStringVar Text = "UpperArm";
    AnyVec3 RGB = ...DrawSettings.Line.RGB;
    AnyVar Thickness = ...DrawSettings.Line.Thickness;
    #include "../../../Body/AAUHuman/ToolBox/DimensionArrowWithText/DimensionLines.any"

    Main.HumanModel.BodyModel.Left.ShoulderArm.Seg.Humerus.ElbowBonyTip={
      AnyDrawNode DrawNode =
      {
        RGB = {1, 0, 0};
        ScaleXYZ = 0.3*{0.025, 0.025, 0.025};
      };
    };

    Main.HumanModel.BodyModel.Left.ShoulderArm.Seg.Humerus.AcromionBonyTip={
      AnyDrawNode DrawNode =
      {
        RGB = {1, 0, 0};
        ScaleXYZ = 0.3*{0.025, 0.025, 0.025};
      };
    };

  };


  AnyFolder LowerArm ={
    AnyRefFrame &refframe1 = Main.HumanModel.BodyModel.Left.ShoulderArm.Seg.Ulna.ElbowBonyTip;
    AnyRefFrame &refframe2 = Main.HumanModel.BodyModel.Left.ShoulderArm.Seg.Ulna.StyloidBonyTip;
    AnyRefFrameAxis DirAxis= {x,y,z};
    AnyVec3 Offset = {0, -0.04, 0};
    AnyStringVar Text = "LowerArm";
    AnyVec3 RGB = ...DrawSettings.Line.RGB;
    AnyVar Thickness = ...DrawSettings.Line.Thickness;
    #include "../../../Body/AAUHuman/ToolBox/DimensionArrowWithText/DimensionLines.any"

    Main.HumanModel.BodyModel.Left.ShoulderArm.Seg.Ulna.ElbowBonyTip={
      AnyDrawNode DrawNode =
      {
        RGB = {1, 0, 0};
        ScaleXYZ = 0.3*{0.025, 0.025, 0.025};
      };
    };

    Main.HumanModel.BodyModel.Left.ShoulderArm.Seg.Ulna.StyloidBonyTip={
      AnyDrawNode DrawNode =
      {
        RGB = {1, 0, 0};
        ScaleXYZ = 0.3*{0.025, 0.025, 0.025};
      };
    };

  };


  AnyFolder HandLength ={
    AnyRefFrame &refframe1 = Main.HumanModel.BodyModel.Left.ShoulderArm.Seg.Hand.PalmBase;
    AnyRefFrame &refframe2 = Main.HumanModel.BodyModel.Left.ShoulderArm.Seg.Hand.MiddleFingerTip;
    AnyRefFrameAxis DirAxis= {x,y,z};
    AnyVec3 Offset = {0, 0, -0.035};
    AnyStringVar Text = "HandLength";
    AnyVec3 RGB = ...DrawSettings.Line.RGB;
    AnyVar Thickness = ...DrawSettings.Line.Thickness;
    #include "../../../Body/AAUHuman/ToolBox/DimensionArrowWithText/DimensionLines.any"

    Main.HumanModel.BodyModel.Left.ShoulderArm.Seg.Hand.PalmBase={
      AnyDrawNode DrawNode =
      {
        RGB = {1, 0, 0};
        ScaleXYZ = 0.3*{0.025, 0.025, 0.025};
      };
    };

    Main.HumanModel.BodyModel.Left.ShoulderArm.Seg.Hand.MiddleFingerTip={
      AnyDrawNode DrawNode =
      {
        RGB = {1, 0, 0};
        ScaleXYZ = 0.3*{0.025, 0.025, 0.025};
      };
    };

  };


  AnyFolder HandBreath ={
    AnyRefFrame &refframe1 = Main.HumanModel.BodyModel.Left.ShoulderArm.Seg.Hand.CMPFinger5;
    AnyRefFrame &refframe2 = Main.HumanModel.BodyModel.Left.ShoulderArm.Seg.Hand.CMPFinger2;
    AnyRefFrameAxis DirAxis= {x,y,z};
    AnyVec3 Offset = {0, 0, 0.035};
    AnyStringVar Text = "HandBreath";
    AnyVec3 RGB = ...DrawSettings.Line.RGB;
    AnyVar Thickness = ...DrawSettings.Line.Thickness;
    #include "../../../Body/AAUHuman/ToolBox/DimensionArrowWithText/DimensionLines.any"

    Main.HumanModel.BodyModel.Left.ShoulderArm.Seg.Hand.CMPFinger5={
      AnyDrawNode DrawNode =
      {
        RGB = {1, 0, 0};
        ScaleXYZ = 0.3*{0.025, 0.025, 0.025};
      };
    };

    Main.HumanModel.BodyModel.Left.ShoulderArm.Seg.Hand.CMPFinger2={
      AnyDrawNode DrawNode =
      {
        RGB = {1, 0, 0};
        ScaleXYZ = 0.3*{0.025, 0.025, 0.025};
      };
    };

  };


};


Main.HumanModel.BodyModel.Trunk = {#include "../../../Body/AAUHuman/Trunk/NodeForScalingExt.any"};

Main.HumanModel.BodyModel.Right.ShoulderArm.Seg = {#include "../../../Body/AAUHuman/Arm/NodeForScalingExt.any"};
Main.HumanModel.BodyModel.Left.ShoulderArm.Seg = {#include "../../../Body/AAUHuman/Arm/NodeForScalingExt.any"};

Main.HumanModel.BodyModel.Right.Leg.Seg = {#include "../../../Body/AAUHuman/Leg/NodeForScalingExt.any"};
Main.HumanModel.BodyModel.Left.Leg.Seg = {#include "../../../Body/AAUHuman/Leg/NodeForScalingExt.any"};
