// This is to switch On or Off the MannequinDrivers. It is a quick way to drive any joint of the body
// with pre-existing drivers. They are based on the FreePosture drivers,
// so they are driving directly the joint angles and are really independent from each other. Also
// all DOF can be driven separatly.
// 0 switch the driver Off and 1 switch it On.
// The input value for each driver is the joint angles and velocities defined below in the Mannequin folder.
// Notice that even if it is possible to drive fully the model with those drivers, we originaly thinked them
// as alternative or debug drivers.
// *********************************************************************************************************

// Global switch:
// - if turned to 1 the drivers will be activated according to their individual statut.
// - if turned to 0 all drivers will desactivated (regardless to their individual statut).
#define GLOBAL_DRIVER_SWITCH 0

// Drivers for attaching the pelvis to the global reference system
#define PELVIS_POS_X_DRIVER 1
#define PELVIS_POS_Y_DRIVER 1
#define PELVIS_POS_Z_DRIVER 1

#define PELVIS_ROT_Z_DRIVER 1
#define PELVIS_ROT_Y_DRIVER 1
#define PELVIS_ROT_X_DRIVER 1


// Drivers for the spine
#define NECK_DRIVER 1

#define PELVIS_THORAX_LATERAL_BENDING_DRIVER 1
#define PELVIS_THORAX_ROTATION_DRIVER 1
#define PELVIS_THORAX_EXTENSION_DRIVER 1


// Drivers for the right arm
#define STERNO_CLAVICULAR_RIGHT_DRIVER 1

#define GLENOHUMERAL_ABDUCTION_RIGHT_DRIVER 1
#define GLENOHUMERAL_FLEXION_RIGHT_DRIVER 1
#define GLENOHUMERAL_EXTERNAL_ROTATION_RIGHT_DRIVER 1

#define ELBOW_FLEXION_RIGHT_DRIVER 1
#define ELBOW_PRONATION_RIGHT_DRIVER 1

#define WRIST_FLEXION_RIGHT_DRIVER 1
#define WRIST_ABDUCTION_RIGHT_DRIVER 1


// Drivers for the left arm
#define STERNO_CLAVICULAR_LEFT_DRIVER 1

#define GLENOHUMERAL_ABDUCTION_LEFT_DRIVER 1
#define GLENOHUMERAL_FLEXION_LEFT_DRIVER 1
#define GLENOHUMERAL_EXTERNAL_ROTATION_LEFT_DRIVER 1

#define ELBOW_FLEXION_LEFT_DRIVER 1
#define ELBOW_PRONATION_LEFT_DRIVER 1

#define WRIST_FLEXION_LEFT_DRIVER 1
#define WRIST_ABDUCTION_LEFT_DRIVER 1


// Drivers for the right leg
#define HIP_FLEXION_RIGHT_DRIVER 1
#define HIP_EXTERNAL_ROTATION_RIGHT_DRIVER 1
#define HIP_ABDUCTION_RIGHT_DRIVER 1

#define KNEE_FLEXION_RIGHT_DRIVER 1

#define ANKLE_FLEXION_RIGHT_DRIVER 1
#define ANKLE_EVERSION_RIGHT_DRIVER 0
#define ANKLE_SUBTALAR_EVERSION_RIGHT_DRIVER 1


// Drivers for the Left leg
#define HIP_FLEXION_LEFT_DRIVER 1
#define HIP_EXTERNAL_ROTATION_LEFT_DRIVER 1
#define HIP_ABDUCTION_LEFT_DRIVER 1

#define KNEE_FLEXION_LEFT_DRIVER 1

#define ANKLE_FLEXION_LEFT_DRIVER 1
#define ANKLE_EVERSION_LEFT_DRIVER 0
#define ANKLE_SUBTALAR_EVERSION_LEFT_DRIVER 1


// Those variable control the initial position of the body.
// They are also the input values for the MannequinDrivers if switched On above.
// ****************************************************************************


AnyFolder Mannequin = {

  AnyFolder Posture = {
    //This controls the position of the pelvi wrt. to the global reference frame
    AnyVar PelvisPosX=0.046;
    AnyVar PelvisPosY=1.16;
    AnyVar PelvisPosZ=0;

    //This controls the rotation of the pelvis wrt. to the global reference frame
    AnyVar PelvisRotX=0;
    AnyVar PelvisRotY=0;
    AnyVar PelvisRotZ=0;

    // These variables control the rotation of the thorax wrt the
    // pelvis
    AnyVar PelvisThoraxExtension=0;
    AnyVar PelvisThoraxLateralBending=0;
    AnyVar PelvisThoraxRotation=0;

    AnyVar NeckExtension=0;
    AnyVar NeckLateralBending=0;
    AnyVar NeckRotation=0;

    AnyFolder Right = {
      //Arm
      AnyVar SternoClavicularProtraction=-23;   //This value is not used for initial position
      AnyVar SternoClavicularElevation=11.5;    //This value is not used for initial position
      AnyVar SternoClavicularAxialRotation=-20; //This value is not used for initial position

      AnyVar GlenohumeralFlexion = 35.0;
      AnyVar GlenohumeralAbduction = 10.0;
      AnyVar GlenohumeralExternalRotation = 0.0;

      AnyVar ElbowFlexion = 65.0;
      AnyVar ElbowPronation = 90.01;

      AnyVar WristFlexion = 0.0;
      AnyVar WristAbduction = 0.0;

      //Hand
      AnyFolder Finger1 ={
        AnyVar CMCAbduction = 0.0;
        AnyVar CMCFlexion = 30.0;
        AnyVar MCPFlexion = 20.0;
        AnyVar MCPAbduction = 0.0;
        AnyVar DIPFlexion = -15.0;
      };

      AnyFolder Finger2 ={
        AnyVar MCPFlexion = 0.0;
        AnyVar MCPAbduction = 0.0;
        AnyVar PIPFlexion = 0.0;
        AnyVar DIPFlexion = 0.0;
      };

      AnyFolder Finger3 ={
        AnyVar MCPFlexion = 0.0;
        AnyVar MCPAbduction = 0.0;
        AnyVar PIPFlexion = 0.0;
        AnyVar DIPFlexion = 0.0;
      };

      AnyFolder Finger4 ={
        AnyVar MCPFlexion = 0.0;
        AnyVar MCPAbduction = 0.0;
        AnyVar PIPFlexion = 0.0;
        AnyVar DIPFlexion = 0.0;
      };

      AnyFolder Finger5 ={
        AnyVar MCPFlexion = 0.0;
        AnyVar MCPAbduction = 0.0;
        AnyVar PIPFlexion = 0.0;
        AnyVar DIPFlexion = 0.0;
      };

      //Leg
      AnyVar HipFlexion = 0.0;
      AnyVar HipAbduction = 0.0;
      AnyVar HipExternalRotation = 0.0;

      AnyVar KneeFlexion = 0.0;

      AnyVar AnklePlantarFlexion =0.0;
      AnyVar SubTalarEversion =0.0;
    };

    AnyFolder Left = {
      //all values are set to be equal to the right side values
      //feel free to change this!

      //Arm
      AnyVar SternoClavicularProtraction=.Right.SternoClavicularProtraction;
      AnyVar SternoClavicularElevation=.Right.SternoClavicularElevation;
      AnyVar SternoClavicularAxialRotation=.Right.SternoClavicularAxialRotation;

      AnyVar GlenohumeralFlexion = .Right.GlenohumeralFlexion ;
      AnyVar GlenohumeralAbduction =.Right.GlenohumeralAbduction ;
      AnyVar GlenohumeralExternalRotation =.Right.GlenohumeralExternalRotation ;

      AnyVar ElbowFlexion = .Right.ElbowFlexion;
      AnyVar ElbowPronation = .Right.ElbowPronation;
      AnyVar WristFlexion =.Right.WristFlexion;
      AnyVar WristAbduction =.Right.WristAbduction;

      //Hand
      AnyFolder Finger1 ={
        AnyVar CMCAbduction= ..Right.Finger1.CMCAbduction;
        AnyVar CMCFlexion= ..Right.Finger1.CMCFlexion;
        AnyVar MCPFlexion= ..Right.Finger1.MCPFlexion;
        AnyVar MCPAbduction= ..Right.Finger1.MCPAbduction;
        AnyVar DIPFlexion= ..Right.Finger1.DIPFlexion;
      };

      AnyFolder Finger2 ={
        AnyVar MCPFlexion= ..Right.Finger2.MCPFlexion;
        AnyVar MCPAbduction= ..Right.Finger2.MCPAbduction;
        AnyVar PIPFlexion= ..Right.Finger2.PIPFlexion;
        AnyVar DIPFlexion= ..Right.Finger2.DIPFlexion;
      };

      AnyFolder Finger3 ={
        AnyVar MCPFlexion= ..Right.Finger3.MCPFlexion;
        AnyVar MCPAbduction= ..Right.Finger3.MCPAbduction;
        AnyVar PIPFlexion= ..Right.Finger3.PIPFlexion;
        AnyVar DIPFlexion= ..Right.Finger3.DIPFlexion;
      };

      AnyFolder Finger4 ={
        AnyVar MCPFlexion= ..Right.Finger4.MCPFlexion;
        AnyVar MCPAbduction= ..Right.Finger4.MCPAbduction;
        AnyVar PIPFlexion= ..Right.Finger4.PIPFlexion;
        AnyVar DIPFlexion= ..Right.Finger4.DIPFlexion;
      };

      AnyFolder Finger5 ={
        AnyVar MCPFlexion= ..Right.Finger5.MCPFlexion;
        AnyVar MCPAbduction= ..Right.Finger5.MCPAbduction;
        AnyVar PIPFlexion= ..Right.Finger5.PIPFlexion;
        AnyVar DIPFlexion= ..Right.Finger5.DIPFlexion;
      };

      //Leg
      AnyVar HipFlexion =.Right.HipFlexion;
      AnyVar HipAbduction =.Right.HipAbduction;
      AnyVar HipExternalRotation = .Right.HipExternalRotation;
      AnyVar KneeFlexion = .Right.KneeFlexion;
      AnyVar AnklePlantarFlexion = .Right.AnklePlantarFlexion ;
      AnyVar SubTalarEversion =.Right.SubTalarEversion;
    };
  };

  AnyFolder PostureVel={
    //This controls the position of the pelvi wrt. to the global reference frame
    AnyVar PelvisPosX=0;
    AnyVar PelvisPosY=0;
    AnyVar PelvisPosZ=0;

    //This controls the rotation of the pelvis wrt. to the global reference frame
    AnyVar PelvisRotX=0;
    AnyVar PelvisRotY=0;
    AnyVar PelvisRotZ=0;

    // These variables control the rotation of the thorax wrt the
    // pelvis
    AnyVar PelvisThoraxExtension=0;
    AnyVar PelvisThoraxLateralBending=0;
    AnyVar PelvisThoraxRotation=0;

    AnyVar NeckExtension=0;
    AnyVar NeckLateralBending=0;
    AnyVar NeckRotation=0;

    AnyFolder Right = {
      //Arm
      AnyVar SternoClavicularProtraction=0;   //This value is not used for initial position
      AnyVar SternoClavicularElevation=0;    //This value is not used for initial position
      AnyVar SternoClavicularAxialRotation=0; //This value is not used for initial position

      AnyVar GlenohumeralFlexion =0;
      AnyVar GlenohumeralAbduction = 0;
      AnyVar GlenohumeralExternalRotation = 0;

      AnyVar ElbowFlexion = 0.0;
      AnyVar ElbowPronation = 0.0;

      AnyVar WristFlexion =0;
      AnyVar WristAbduction =0;

      //Leg
      AnyVar HipFlexion = 0.0;
      AnyVar HipAbduction = 0.0;
      AnyVar HipExternalRotation = 0.0;

      AnyVar KneeFlexion = 0.0;

      AnyVar AnklePlantarFlexion =0.0;
      AnyVar SubTalarEversion =0.0;

      //Detail Hand
      AnyFolder Finger1 ={
        AnyVar CMCAbduction=0;
        AnyVar CMCFlexion=0;
        AnyVar MCPFlexion= 0;
        AnyVar MCPAbduction= 0;
        AnyVar DIPFlexion=0;
      };

      AnyFolder Finger2 ={
        AnyVar MCPFlexion=0;
        AnyVar MCPAbduction=0;
        AnyVar PIPFlexion=0;
        AnyVar DIPFlexion=0;
      };

      AnyFolder Finger3 ={
        AnyVar MCPFlexion=0;
        AnyVar MCPAbduction=0;
        AnyVar PIPFlexion=0;
        AnyVar DIPFlexion=0;
      };

      AnyFolder Finger4 ={
        AnyVar MCPFlexion=0;
        AnyVar MCPAbduction=0;
        AnyVar PIPFlexion=0;
        AnyVar DIPFlexion=0;
      };

      AnyFolder Finger5 ={
        AnyVar MCPFlexion=0;
        AnyVar MCPAbduction=0;
        AnyVar PIPFlexion=0;
        AnyVar DIPFlexion=0;
      };
    };

    AnyFolder Left = {
      //all values are set to be equal to the right side values
      //feel free to change this!

      //Arm
      AnyVar SternoClavicularProtraction=.Right.SternoClavicularProtraction;
      AnyVar SternoClavicularElevation=.Right.SternoClavicularElevation;
      AnyVar SternoClavicularAxialRotation=.Right.SternoClavicularAxialRotation;

      AnyVar GlenohumeralFlexion = .Right.GlenohumeralFlexion ;
      AnyVar GlenohumeralAbduction =.Right.GlenohumeralAbduction ;
      AnyVar GlenohumeralExternalRotation =.Right.GlenohumeralExternalRotation ;

      AnyVar ElbowFlexion = .Right.ElbowFlexion;
      AnyVar ElbowPronation = .Right.ElbowPronation;
      AnyVar WristFlexion =.Right.WristFlexion;
      AnyVar WristAbduction =.Right.WristAbduction;

      //Leg
      AnyVar HipFlexion =.Right.HipFlexion;
      AnyVar HipAbduction =.Right.HipAbduction;
      AnyVar HipExternalRotation = .Right.HipExternalRotation;
      AnyVar KneeFlexion = .Right.KneeFlexion;
      AnyVar AnklePlantarFlexion = .Right.AnklePlantarFlexion ;
      AnyVar SubTalarEversion =.Right.SubTalarEversion;

      //Detail Hand
      AnyFolder Finger1 ={
        AnyVar CMCAbduction=..Right.Finger1.CMCAbduction;
        AnyVar CMCFlexion=..Right.Finger1.CMCFlexion;
        AnyVar MCPFlexion= ..Right.Finger1.MCPFlexion;
        AnyVar MCPAbduction= ..Right.Finger1.MCPAbduction;
        AnyVar DIPFlexion=..Right.Finger1.DIPFlexion;
      };

      AnyFolder Finger2 ={
        AnyVar MCPFlexion=..Right.Finger2.MCPFlexion;
        AnyVar MCPAbduction=..Right.Finger2.MCPAbduction;
        AnyVar PIPFlexion=..Right.Finger2.PIPFlexion;
        AnyVar DIPFlexion=..Right.Finger2.DIPFlexion;
      };

      AnyFolder Finger3 ={
        AnyVar MCPFlexion=..Right.Finger3.MCPFlexion;
        AnyVar MCPAbduction=..Right.Finger3.MCPAbduction;
        AnyVar PIPFlexion=..Right.Finger3.PIPFlexion;
        AnyVar DIPFlexion=..Right.Finger3.DIPFlexion;
      };

      AnyFolder Finger4 ={
        AnyVar MCPFlexion=..Right.Finger4.MCPFlexion;
        AnyVar MCPAbduction=..Right.Finger4.MCPAbduction;
        AnyVar PIPFlexion=..Right.Finger4.PIPFlexion;
        AnyVar DIPFlexion=..Right.Finger4.DIPFlexion;
      };

      AnyFolder Finger5 ={
        AnyVar MCPFlexion=..Right.Finger5.MCPFlexion;
        AnyVar MCPAbduction=..Right.Finger5.MCPAbduction;
        AnyVar PIPFlexion=..Right.Finger5.PIPFlexion;
        AnyVar DIPFlexion=..Right.Finger5.DIPFlexion;
      };
    };
  };

  AnyFolder Load = {
    AnyVec3 TopVertebra = {0.000, 0.000, 0.000};

    AnyFolder Right = {
      AnyVec3 Shoulder  = {0.000, 0.000, 0.000};
      AnyVec3 Elbow     = {0.000, 0.000, 0.000};
      AnyVec3 Hand      = {0.000, 0.000, 0.000};
      AnyVec3 Hip       = {0.000, 0.000, 0.000};
      AnyVec3 Knee      = {0.000, 0.000, 0.000};
      AnyVec3 Ankle     = {0.000, 0.000, 0.000};
    };
    AnyFolder Left = {
      AnyVec3 Shoulder  = {0.000, 0.000, 0.000};
      AnyVec3 Elbow     = {0.000, 0.000, 0.000};
      AnyVec3 Hand      = {0.000, 0.000, 0.000};
      AnyVec3 Hip       = {0.000, 0.000, 0.000};
      AnyVec3 Knee      = {0.000, 0.000, 0.000};
      AnyVec3 Ankle     = {0.000, 0.000, 0.000};
    };
  };  // Loads
};
