#include "../libdef.any"

// Find a detailed description here
#include "Model/Description.any"

Main = {
  // ----------------------------------------------------------
  // Path to draw settings
  // ----------------------------------------------------------
  #path BM_DRAWSETTINGS_FILE "Model/DrawSettings.any"

  // ----------------------------------------------------------
  // Body Model Configuration
  // ----------------------------------------------------------
  #define BM_TRUNK_MUSCLES CONST_MUSCLES_NONE
  #define BM_LEG_LEFT CONST_LEG_MODEL_OFF
  #define BM_LEG_RIGHT CONST_LEG_MODEL_OFF
  #define BM_ARM_LEFT	 ON

  #define BM_HAND_MODEL _HAND_MODEL_RUHM_

  //#define BM_SCALING _SCALING_XYZ_
  //#define BM_SCALING _SCALING_NONE_

  #include "Model/BodyModelConfiguration.any"

  // The Mannequin file specifies load-time positions for all the segments
  // in the HumanModel. This is important for the model's ablity to resolve
  // all the kinematic constraints when the model is analyzed.
  // The mannequin file also drives those degrees of freedom of the human
  // model that are not governed by problem-specific drivers at run time.
  #path BM_MANNEQUIN_FILE "Model/Mannequin.any"

  // Model of the human body to be used for the analysis
  #include "<ANYBODY_PATH_BODY>/HumanModel.any"

  //Save/load calibration results
  #include "Model/CachedMuscleCalibration.any"

  /// The actual model where all components are assembled
  AnyFolder Model ={
    /// Body model without default drivers
    AnyFolder &HumanModel=.HumanModel.BodyModel;
    /// Reference to the mannequin folder (used by drivers)
    AnyFolder &Mannequin =.HumanModel.Mannequin;

    #include "Model/Environment.any"

    AnyFolder ModelEnvironmentConnection = {
      #include "Model/JointsAndDrivers.any"
    };


  };

  AnyBodyStudy Study = {
    AnyFolder &Model = .Model;

    tEnd = 1.0;
    Gravity = {0.0, -9.81, 0.0};
    nStep = 1;
 //
//    InverseDynamics.Criterion.Type = MR_MinMaxStrict;
    InverseDynamics.Criterion.UpperBoundOnOff = Off;

    //include the next line to have a camera in the model
    //#include "Model/MovingCamera.any"

  }; // End of study

  // Include an operation sequence to run all required steps of your application (see Operations tab)
  #include "<ANYBODY_PATH_MODELUTILS>\Operations\RunAppSequence.any"

}; //Main
