  AnyFunInterpol F_fun =
  {
    Type = Bspline;
    T = .F_ext.T;
    AnyVector ZEROVEC = zeros(1,NumElemOf(T))[0];
    Data = {ZEROVEC,      .F_ext.Data[2], -.F_ext.Data[1],
          -.F_ext.Data[2],  ZEROVEC     , .F_ext.Data[0],
          .F_ext.Data[1], -.F_ext.Data[0],  ZEROVEC
         };
  };


  AnyKinMeasureLinComb RCrossF =   {
    OutDim = 3;
    AnyKinMeasure &Rx = .Rx;
    AnyKinMeasure &Ry = .Ry;
    AnyKinMeasure &Rz = .Rz;
    Coef = zeros(3,3);
    CoefTimeFun = &.F_fun;
  };
