//// Remove old Right Bone

Main.HumanModel.BodyModel.Right.Leg.Seg.Thigh.Drw3 ={

Visible = Off;
};


//MechObjectExclude =
//arrcat(
//arrcat(
//ObjSearch("Main.HumanModel.BodyModel.Right.Leg.Seg.Thigh.Drw3","AnyMechObject"),
//ObjSearchRecursive("Main.HumanModel.BodyModel.Right.Leg.Seg.Thigh.Drw3","*","AnyMechObject")
//)
//,
//ObjSearchRecursive("Main.HumanModel.BodyModel.Right.Leg.Seg.Thigh.Drw3","Femur*","AnyMechObject")
//);


Main.HumanModel.BodyModel.Right.Leg.Seg.Thigh ={

  AnyDrawSurf NewFem = {
    FileName = "stl files/femur";
    ScaleXYZ = {1.0, 1.0,1.0};
    RGB = ...ColorRef.Segments;
    Opacity = 0.42;//;
    AnyFunTransform3D &Scale =Main.HumanModel.BodyModel.Right.Leg.Seg.Thigh.Drw3.Scale;//.Scale;
    Face=-1;
  };
};


//Add New Cut Bone


//      // Adding bones and implant
//      AnyFolder STL = {
//        AnyRefNode &CylStemNode = Main.HumanModel.BodyModel.Right.Leg.Seg.Thigh.CylStemNode;
//        CylStemNode ={ AnySurfCylinder CylinderStem = {
//            Radius = 0.008;
//            Length = 0.15;
//            AnyDrawParamSurf drv = {
//              Opacity = 1;};};};
//
//        AnyRefNode &FemHeadNode = Main.HumanModel.BodyModel.Right.Leg.Seg.Thigh.FemHeadNode;
//        FemHeadNode ={  AnyDrawRefFrame drw = {
//            ScaleXYZ = 0.1*{1.0, 1.0, 1.0} * Main.Studies.InverseDynamicStudy.Parameters.ShowRefFrameFem;
//            RGB = {1,0,0};};
//          AnySurfEllipsoid FemHead = {
//            Radius = {Main.Studies.InverseDynamicStudy.Parameters.BallDia*0.5, Main.Studies.InverseDynamicStudy.Parameters.BallDia*0.5,Main.Studies.InverseDynamicStudy.Parameters.BallDia*0.5};
//            AnyDrawParamSurf drw = {
//              Opacity = 1;};};};
