      // exclude Original Hip Joint

      MechObjectExclude =
      arrcat(
      arrcat(
      ObjSearch("Main.HumanModel.BodyModel.Right.Leg.Seg.Thigh.HipJoint","AnyMechObject"),//MechObjectExclude =
      ObjSearchRecursive("Main.HumanModel.BodyModel.Right.Leg.Jnt.Hip","*","AnyMechObject")
)
      ,
      ObjSearchRecursive("Main.Model.ModelEnvironmentConnection.JointsAndDrivers.JntDriverRightLegTD","Hip*","AnyMechObject")
      );
//      MechObjectExclude =
//      ObjSearchRecursive("Main.HumanModel.BodyModel.Right.Leg.Jnt.Hip","*","AnyMechObject");


      // New Hip Joint:
      AnyKinRotational Hip ={

        ThighNode = {
          //           AnyDrawRefFrame drw={RGB={0,1,1};};
        };
        AnyRefNode &ThighNode = Main.HumanModel.BodyModel.Right.Leg.Seg.Thigh.HipJointAnatomicalFrame.FemImplantNode;//Main.HumanModel.BodyModel.Right.Leg.Seg.Thigh.HipJoint;//Right;
        AnyRefNode &PelvisNode = Main.HumanModel.BodyModel.Trunk.SegmentsLumbar.PelvisSeg.Right.HipJoint;
//        AnyRefNode &PelvisNode = Main.HumanModel.BodyModel.Trunk.SegmentsLumbar.PelvisSeg.HipJointRightTD;
        Type=RotVector;
      };

      AnyKinLinear HipLin={
        AnyRefNode &ThighNode = Main.HumanModel.BodyModel.Right.Leg.Seg.Thigh.HipJointAnatomicalFrame.FemImplantNode;//Main.HumanModel.BodyModel.Right.Leg.Seg.Thigh.HipJoint;//Right;
        AnyRefNode &PelvisNode = Main.HumanModel.BodyModel.Trunk.SegmentsLumbar.PelvisSeg.Right.HipJoint;
//        AnyRefNode &PelvisNode = Main.HumanModel.BodyModel.Trunk.SegmentsLumbar.PelvisSeg.HipJointRightTD;
        Ref=0;
      };

      AnyKinEqSimpleDriver HipLinCon={
        AnyKinLinear &ref=. HipLin;
//        CType= {Hard,Hard,Hard};
//        Reaction.Type={On,On,On};
        DriverPos={0.0,0.0,0.0};
        DriverVel={0,0,0};
      CType = {ForceDep,ForceDep,ForceDep};
      Reaction.Type = {Off,Off,Off};
    };
