#if BM_FOOT_MODEL == _FOOT_MODEL_DEFAULT_

SoleusMedialis1 = { AnyVar WeightFactor = WEIGHTFACTOR; };
SoleusMedialis2 = { AnyVar WeightFactor = WEIGHTFACTOR; };
SoleusMedialis3 = { AnyVar WeightFactor = WEIGHTFACTOR; };
SoleusLateralis1 = { AnyVar WeightFactor = WEIGHTFACTOR; };
SoleusLateralis2 = { AnyVar WeightFactor = WEIGHTFACTOR; };
SoleusLateralis3 = { AnyVar WeightFactor = WEIGHTFACTOR; };

#if BM_LEG_MORPHOLOGY == 1
GastrocnemiusLateralis1 = { AnyVar WeightFactor = WEIGHTFACTOR; };
GastrocnemiusMedialis1 = { AnyVar WeightFactor = WEIGHTFACTOR; };
#endif

#if BM_LEG_MORPHOLOGY == 2
GastrocnemiusLateralis1 = { AnyVar WeightFactor = WEIGHTFACTOR; };
GastrocnemiusMedialis1 = { AnyVar WeightFactor = WEIGHTFACTOR; };
#endif


#if BM_LEG_MORPHOLOGY ==1
FlexorDigitorumLongus1 = { AnyVar WeightFactor = WEIGHTFACTOR; };
FlexorDigitorumLongus2 = { AnyVar WeightFactor = WEIGHTFACTOR; };
FlexorDigitorumLongus3 = { AnyVar WeightFactor = WEIGHTFACTOR; };
#endif

#if BM_LEG_MORPHOLOGY == 2
FlexorDigitorumLongus1 = { AnyVar WeightFactor = WEIGHTFACTOR; };
FlexorDigitorumLongus2 = { AnyVar WeightFactor = WEIGHTFACTOR; };
FlexorDigitorumLongus3 = { AnyVar WeightFactor = WEIGHTFACTOR; };
FlexorDigitorumLongus4 = { AnyVar WeightFactor = WEIGHTFACTOR; };
#endif

#if BM_LEG_MORPHOLOGY == 1
FlexorHallucisLongus1 = { AnyVar WeightFactor = WEIGHTFACTOR; };
FlexorHallucisLongus2 = { AnyVar WeightFactor = WEIGHTFACTOR; };
FlexorHallucisLongus3 = { AnyVar WeightFactor = WEIGHTFACTOR; };
#endif

#if BM_LEG_MORPHOLOGY == 2
FlexorHallucisLongus1 = { AnyVar WeightFactor = WEIGHTFACTOR; };
FlexorHallucisLongus2 = { AnyVar WeightFactor = WEIGHTFACTOR; };
FlexorHallucisLongus3 = { AnyVar WeightFactor = WEIGHTFACTOR; };
#endif

TibialisPosteriorLateralis1 = { AnyVar WeightFactor = WEIGHTFACTOR; };
TibialisPosteriorLateralis2 = { AnyVar WeightFactor = WEIGHTFACTOR; };
TibialisPosteriorLateralis3 = { AnyVar WeightFactor = WEIGHTFACTOR; };
TibialisPosteriorMedialis1 = { AnyVar WeightFactor = WEIGHTFACTOR; };
TibialisPosteriorMedialis2 = { AnyVar WeightFactor = WEIGHTFACTOR; };
TibialisPosteriorMedialis3 = { AnyVar WeightFactor = WEIGHTFACTOR; };
TibialisAnterior1 = { AnyVar WeightFactor = WEIGHTFACTOR; };
TibialisAnterior2 = { AnyVar WeightFactor = WEIGHTFACTOR; };
TibialisAnterior3 = { AnyVar WeightFactor = WEIGHTFACTOR; };
PeroneusBrevis1 = { AnyVar WeightFactor = WEIGHTFACTOR; };
PeroneusBrevis2 = { AnyVar WeightFactor = WEIGHTFACTOR; };
PeroneusBrevis3 = { AnyVar WeightFactor = WEIGHTFACTOR; };
PeroneusLongus1 = { AnyVar WeightFactor = WEIGHTFACTOR; };
PeroneusLongus2 = { AnyVar WeightFactor = WEIGHTFACTOR; };
PeroneusLongus3 = { AnyVar WeightFactor = WEIGHTFACTOR; };

#if BM_LEG_MORPHOLOGY == 1

PeroneusTertius1 = { AnyVar WeightFactor = WEIGHTFACTOR; };
PeroneusTertius2 = { AnyVar WeightFactor = WEIGHTFACTOR; };
PeroneusTertius3 = { AnyVar WeightFactor = WEIGHTFACTOR; };
#endif

ExtensorDigitorumLongus1 = { AnyVar WeightFactor = WEIGHTFACTOR; };
ExtensorDigitorumLongus2 = { AnyVar WeightFactor = WEIGHTFACTOR; };
ExtensorDigitorumLongus3 = { AnyVar WeightFactor = WEIGHTFACTOR; };
#if BM_LEG_MORPHOLOGY == 2
ExtensorDigitorumLongus4 = { AnyVar WeightFactor = WEIGHTFACTOR; };
#endif

ExtensorHallucisLongus1 = { AnyVar WeightFactor = WEIGHTFACTOR; };
ExtensorHallucisLongus2 = { AnyVar WeightFactor = WEIGHTFACTOR; };
ExtensorHallucisLongus3 = { AnyVar WeightFactor = WEIGHTFACTOR; };


#endif // BM_FOOT_MODEL != _FOOT_MODEL_DEFAULT_


// Start Quadriceps
// Note that all Vastus muscles have their insertion on the patella. The patella has
// been defined as a segment in the file seg.any.
// The Rectus Femoris has its origin on the Pelvis and its insertion on the patella.
// Also the Pelvis has been defined in the seg.any file.


//VASTUS LATERALIS INFERIOR WRAPPING

VastusLateralisInferior1 = { AnyVar WeightFactor = WEIGHTFACTOR; };
VastusLateralisInferior2 = { AnyVar WeightFactor = WEIGHTFACTOR; };
VastusLateralisInferior3 = { AnyVar WeightFactor = WEIGHTFACTOR; };
VastusLateralisInferior4 = { AnyVar WeightFactor = WEIGHTFACTOR; };
VastusLateralisInferior5 = { AnyVar WeightFactor = WEIGHTFACTOR; };
VastusLateralisInferior6 = { AnyVar WeightFactor = WEIGHTFACTOR; };

//VASTUS LATERALIS SUPERIOR WRAPPING

VastusLateralisSuperior1 = { AnyVar WeightFactor = WEIGHTFACTOR; };
VastusLateralisSuperior2 = { AnyVar WeightFactor = WEIGHTFACTOR; };

//VASTUS MEDIALIS INFERIOR WRAPPING

VastusMedialisInferior1 = { AnyVar WeightFactor = WEIGHTFACTOR; };
VastusMedialisInferior2 = { AnyVar WeightFactor = WEIGHTFACTOR; };

//VASTUS MEDIALIS MID WRAPPING

VastusMedialisMid1 = { AnyVar WeightFactor = WEIGHTFACTOR; };
VastusMedialisMid2 = { AnyVar WeightFactor = WEIGHTFACTOR; };

//VASTUS MEDIALIS SUPERIOR WRAPPING

VastusMedialisSuperior1 = { AnyVar WeightFactor = WEIGHTFACTOR; };
VastusMedialisSuperior2 = { AnyVar WeightFactor = WEIGHTFACTOR; };
VastusMedialisSuperior3 = { AnyVar WeightFactor = WEIGHTFACTOR; };
VastusMedialisSuperior4 = { AnyVar WeightFactor = WEIGHTFACTOR; };

#if BM_LEG_MORPHOLOGY == 1
VastusMedialisSuperior5 = { AnyVar WeightFactor = WEIGHTFACTOR; };
VastusMedialisSuperior6 = { AnyVar WeightFactor = WEIGHTFACTOR; };
#endif

//VASTUS INTERMEDIUS WRAPPING

VastusIntermedius1 = { AnyVar WeightFactor = WEIGHTFACTOR; };
VastusIntermedius2 = { AnyVar WeightFactor = WEIGHTFACTOR; };
VastusIntermedius3 = { AnyVar WeightFactor = WEIGHTFACTOR; };
VastusIntermedius4 = { AnyVar WeightFactor = WEIGHTFACTOR; };
VastusIntermedius5 = { AnyVar WeightFactor = WEIGHTFACTOR; };
VastusIntermedius6 = { AnyVar WeightFactor = WEIGHTFACTOR; };

//RECTUS FEMORIS WRAPPING

RectusFemoris1 = { AnyVar WeightFactor = WEIGHTFACTOR; };
RectusFemoris2 = { AnyVar WeightFactor = WEIGHTFACTOR; };


// End Quadriceps.

// Start of Hamstrings
#if BM_LEG_MORPHOLOGY == 2

Semitendinosus1 = { AnyVar WeightFactor = WEIGHTFACTOR; };
Semimembranosus1 = { AnyVar WeightFactor = WEIGHTFACTOR; };
Semimembranosus2 = { AnyVar WeightFactor = WEIGHTFACTOR; };
Semimembranosus3 = { AnyVar WeightFactor = WEIGHTFACTOR; };


BicepsFemorisCaputLongum1 = { AnyVar WeightFactor = WEIGHTFACTOR; };
BicepsFemorisCaputBreve1 = { AnyVar WeightFactor = WEIGHTFACTOR; };
BicepsFemorisCaputBreve2 = { AnyVar WeightFactor = WEIGHTFACTOR; };
BicepsFemorisCaputBreve3 = { AnyVar WeightFactor = WEIGHTFACTOR; };


#else

Semitendinosus1 = { AnyVar WeightFactor = WEIGHTFACTOR; };
Semimembranosus1 = { AnyVar WeightFactor = WEIGHTFACTOR; };
#if BM_LEG_MORPHOLOGY == 2
Semimembranosus2 = { AnyVar WeightFactor = WEIGHTFACTOR; };
Semimembranosus3 = { AnyVar WeightFactor = WEIGHTFACTOR; };
#endif

BicepsFemorisCaputLongum1 = { AnyVar WeightFactor = WEIGHTFACTOR; };
BicepsFemorisCaputBreve1 = { AnyVar WeightFactor = WEIGHTFACTOR; };
BicepsFemorisCaputBreve2 = { AnyVar WeightFactor = WEIGHTFACTOR; };
BicepsFemorisCaputBreve3 = { AnyVar WeightFactor = WEIGHTFACTOR; };

#endif
// End of Hamstrings


// Start hip muscles
#if BM_LEG_MORPHOLOGY == 1
SartoriusProximal1 = { AnyVar WeightFactor = WEIGHTFACTOR; };
SartoriusDistal1 = { AnyVar WeightFactor = WEIGHTFACTOR; };
#endif

#if BM_LEG_MORPHOLOGY == 2
Sartorius1 = { AnyVar WeightFactor = WEIGHTFACTOR; };
#endif

#if BM_LEG_MORPHOLOGY == 1
IliacusLateralis1 = { AnyVar WeightFactor = WEIGHTFACTOR; };


IliacusLateralis2 = { AnyVar WeightFactor = WEIGHTFACTOR; };


IliacusLateralis3 = { AnyVar WeightFactor = WEIGHTFACTOR; };


IliacusMid1 = { AnyVar WeightFactor = WEIGHTFACTOR; };


IliacusMid2 = { AnyVar WeightFactor = WEIGHTFACTOR; };


IliacusMid3 = { AnyVar WeightFactor = WEIGHTFACTOR; };


IliacusMedialis1 = { AnyVar WeightFactor = WEIGHTFACTOR; };


IliacusMedialis2 = { AnyVar WeightFactor = WEIGHTFACTOR; };


IliacusMedialis3 = { AnyVar WeightFactor = WEIGHTFACTOR; };
#endif

#if BM_LEG_MORPHOLOGY == 2
IliacusLateralis1 = { AnyVar WeightFactor = WEIGHTFACTOR; };


IliacusLateralis2 = { AnyVar WeightFactor = WEIGHTFACTOR; };


IliacusMid1 = { AnyVar WeightFactor = WEIGHTFACTOR; };


IliacusMid2 = { AnyVar WeightFactor = WEIGHTFACTOR; };


IliacusMedialis1 = { AnyVar WeightFactor = WEIGHTFACTOR; };


IliacusMedialis2 = { AnyVar WeightFactor = WEIGHTFACTOR; };

#endif

PsoasMajor_PMT12I_TM = {AnyVar WeightFactor = WEIGHTFACTOR; };
PsoasMajor_PML1I_TM = {AnyVar WeightFactor = WEIGHTFACTOR; };
PsoasMajor_PML1T_TM = {AnyVar WeightFactor = WEIGHTFACTOR; };
PsoasMajor_PML2I_TM = {AnyVar WeightFactor = WEIGHTFACTOR; };
PsoasMajor_PML2T_TM = {AnyVar WeightFactor = WEIGHTFACTOR; };
PsoasMajor_PML3I_TM = {AnyVar WeightFactor = WEIGHTFACTOR; };
PsoasMajor_PML3T_TM = {AnyVar WeightFactor = WEIGHTFACTOR; };
PsoasMajor_PML4I_TM = {AnyVar WeightFactor = WEIGHTFACTOR; };
PsoasMajor_PML4T_TM = {AnyVar WeightFactor = WEIGHTFACTOR; };
PsoasMajor_PML5_TM = {AnyVar WeightFactor = WEIGHTFACTOR; };
PsoasMajor_PML5T_TM = {AnyVar WeightFactor = WEIGHTFACTOR; };


GluteusMinimusAnterior1 = { AnyVar WeightFactor = WEIGHTFACTOR; };
GluteusMinimusMid1 = { AnyVar WeightFactor = WEIGHTFACTOR; };
GluteusMinimusPosterior1 = { AnyVar WeightFactor = WEIGHTFACTOR; };
GluteusMediusAnterior1 = { AnyVar WeightFactor = WEIGHTFACTOR; };
GluteusMediusAnterior2 = { AnyVar WeightFactor = WEIGHTFACTOR; };
GluteusMediusAnterior3 = { AnyVar WeightFactor = WEIGHTFACTOR; };
GluteusMediusAnterior4 = { AnyVar WeightFactor = WEIGHTFACTOR; };
GluteusMediusAnterior5 = { AnyVar WeightFactor = WEIGHTFACTOR; };
GluteusMediusAnterior6 = { AnyVar WeightFactor = WEIGHTFACTOR; };
GluteusMediusPosterior1 = { AnyVar WeightFactor = WEIGHTFACTOR; };
GluteusMediusPosterior2 = { AnyVar WeightFactor = WEIGHTFACTOR; };
GluteusMediusPosterior3 = { AnyVar WeightFactor = WEIGHTFACTOR; };
GluteusMediusPosterior4 = { AnyVar WeightFactor = WEIGHTFACTOR; };

//#if BM_LEG_MORPHOLOGY == 1
GluteusMediusPosterior5 = { AnyVar WeightFactor = WEIGHTFACTOR; };
GluteusMediusPosterior6 = { AnyVar WeightFactor = WEIGHTFACTOR; };
//#endif // TLEM1


#if BM_LEG_MORPHOLOGY >= 2

GluteusMaximusSuperior1 = { AnyVar WeightFactor = WEIGHTFACTOR; };
GluteusMaximusSuperior2 = { AnyVar WeightFactor = WEIGHTFACTOR; };
GluteusMaximusSuperior3 = { AnyVar WeightFactor = WEIGHTFACTOR; };
GluteusMaximusSuperior4 = { AnyVar WeightFactor = WEIGHTFACTOR; };
GluteusMaximusSuperior5 = { AnyVar WeightFactor = WEIGHTFACTOR; };
GluteusMaximusSuperior6 = { AnyVar WeightFactor = WEIGHTFACTOR; };
GluteusMaximusInferior1 = { AnyVar WeightFactor = WEIGHTFACTOR; };
GluteusMaximusInferior2 = { AnyVar WeightFactor = WEIGHTFACTOR; };
GluteusMaximusInferior3 = { AnyVar WeightFactor = WEIGHTFACTOR; };
GluteusMaximusInferior4 = { AnyVar WeightFactor = WEIGHTFACTOR; };
GluteusMaximusInferior5 = { AnyVar WeightFactor = WEIGHTFACTOR; };
GluteusMaximusInferior6 = { AnyVar WeightFactor = WEIGHTFACTOR; };

#else

#ifdef GLUTEUS_MAX_WRAPPING_BETA


GluteusMaximusSuperior1 = { AnyVar WeightFactor = WEIGHTFACTOR; };
GluteusMaximusSuperior2 = { AnyVar WeightFactor = WEIGHTFACTOR; };
GluteusMaximusSuperior3 = { AnyVar WeightFactor = WEIGHTFACTOR; };
GluteusMaximusSuperior4 = { AnyVar WeightFactor = WEIGHTFACTOR; };
GluteusMaximusSuperior5 = { AnyVar WeightFactor = WEIGHTFACTOR; };

GluteusMaximusSuperior6 = { AnyVar WeightFactor = WEIGHTFACTOR; };

GluteusMaximusInferior1 = { AnyVar WeightFactor = WEIGHTFACTOR; };
GluteusMaximusInferior2 = { AnyVar WeightFactor = WEIGHTFACTOR; };
GluteusMaximusInferior3 = { AnyVar WeightFactor = WEIGHTFACTOR; };

GluteusMaximusInferior4 = { AnyVar WeightFactor = WEIGHTFACTOR; };

GluteusMaximusInferior5 = { AnyVar WeightFactor = WEIGHTFACTOR; };

GluteusMaximusInferior6 = { AnyVar WeightFactor = WEIGHTFACTOR; };

#else

GluteusMaximusSuperior1 = { AnyVar WeightFactor = WEIGHTFACTOR; };
GluteusMaximusSuperior2 = { AnyVar WeightFactor = WEIGHTFACTOR; };
GluteusMaximusSuperior3 = { AnyVar WeightFactor = WEIGHTFACTOR; };
GluteusMaximusSuperior4 = { AnyVar WeightFactor = WEIGHTFACTOR; };
GluteusMaximusSuperior5 = { AnyVar WeightFactor = WEIGHTFACTOR; };
GluteusMaximusSuperior6 = { AnyVar WeightFactor = WEIGHTFACTOR; };
GluteusMaximusInferior1 = { AnyVar WeightFactor = WEIGHTFACTOR; };
GluteusMaximusInferior2 = { AnyVar WeightFactor = WEIGHTFACTOR; };
GluteusMaximusInferior3 = { AnyVar WeightFactor = WEIGHTFACTOR; };


GluteusMaximusInferior4 = { AnyVar WeightFactor = WEIGHTFACTOR; };
GluteusMaximusInferior5 = { AnyVar WeightFactor = WEIGHTFACTOR; };
GluteusMaximusInferior6 = { AnyVar WeightFactor = WEIGHTFACTOR; };

#endif

#endif

TensorFasciaeLatae1 = { AnyVar WeightFactor = WEIGHTFACTOR; };
TensorFasciaeLatae2 = { AnyVar WeightFactor = WEIGHTFACTOR; };
Piriformis1 = { AnyVar WeightFactor = WEIGHTFACTOR; };
Gracilis1 = { AnyVar WeightFactor = WEIGHTFACTOR; };
Gracilis2 = { AnyVar WeightFactor = WEIGHTFACTOR; };


AdductorLongus1 = { AnyVar WeightFactor = WEIGHTFACTOR; };
AdductorLongus2 = { AnyVar WeightFactor = WEIGHTFACTOR; };
AdductorLongus3 = { AnyVar WeightFactor = WEIGHTFACTOR; };
AdductorLongus4 = { AnyVar WeightFactor = WEIGHTFACTOR; };
AdductorLongus5 = { AnyVar WeightFactor = WEIGHTFACTOR; };
AdductorLongus6 = { AnyVar WeightFactor = WEIGHTFACTOR; };

//muscle changed to insert on thigh
AdductorMagnusDistal1 = { AnyVar WeightFactor = WEIGHTFACTOR; };


AdductorMagnusDistal2 = { AnyVar WeightFactor = WEIGHTFACTOR; };
AdductorMagnusDistal3 = { AnyVar WeightFactor = WEIGHTFACTOR; };


AdductorMagnusMid1 = { AnyVar WeightFactor = WEIGHTFACTOR; };
AdductorMagnusMid2 = { AnyVar WeightFactor = WEIGHTFACTOR; };
AdductorMagnusMid3 = { AnyVar WeightFactor = WEIGHTFACTOR; };
AdductorMagnusMid4 = { AnyVar WeightFactor = WEIGHTFACTOR; };
AdductorMagnusMid5 = { AnyVar WeightFactor = WEIGHTFACTOR; };
AdductorMagnusMid6 = { AnyVar WeightFactor = WEIGHTFACTOR; };
AdductorMagnusProximal1 = { AnyVar WeightFactor = WEIGHTFACTOR; };
AdductorMagnusProximal2 = { AnyVar WeightFactor = WEIGHTFACTOR; };
AdductorMagnusProximal3 = { AnyVar WeightFactor = WEIGHTFACTOR; };
AdductorMagnusProximal4 = { AnyVar WeightFactor = WEIGHTFACTOR; };
AdductorBrevisProximal1 = { AnyVar WeightFactor = WEIGHTFACTOR; };
AdductorBrevisProximal2 = { AnyVar WeightFactor = WEIGHTFACTOR; };
AdductorBrevisMid1 = { AnyVar WeightFactor = WEIGHTFACTOR; };
AdductorBrevisMid2 = { AnyVar WeightFactor = WEIGHTFACTOR; };
AdductorBrevisDistal1 = { AnyVar WeightFactor = WEIGHTFACTOR; };
AdductorBrevisDistal2 = { AnyVar WeightFactor = WEIGHTFACTOR; };
GemellusInferior1 = { AnyVar WeightFactor = WEIGHTFACTOR; };
GemellusSuperior1 = { AnyVar WeightFactor = WEIGHTFACTOR; };

#if BM_LEG_MORPHOLOGY == 1

ObturatorExternusSuperior1 = { AnyVar WeightFactor = WEIGHTFACTOR; };
ObturatorExternusSuperior2 = { AnyVar WeightFactor = WEIGHTFACTOR; };
ObturatorExternusSuperior3 = { AnyVar WeightFactor = WEIGHTFACTOR; };
ObturatorExternusInferior1 = { AnyVar WeightFactor = WEIGHTFACTOR; };
ObturatorExternusInferior2 = { AnyVar WeightFactor = WEIGHTFACTOR; };
ObturatorInternus1 = { AnyVar WeightFactor = WEIGHTFACTOR; };


ObturatorInternus2 = { AnyVar WeightFactor = WEIGHTFACTOR; };
ObturatorInternus3 = { AnyVar WeightFactor = WEIGHTFACTOR; };
#endif

#if BM_LEG_MORPHOLOGY == 2
ObturatorExternusSuperior1 = { AnyVar WeightFactor = WEIGHTFACTOR; };
ObturatorExternusSuperior2 = { AnyVar WeightFactor = WEIGHTFACTOR; };
ObturatorExternusSuperior3 = { AnyVar WeightFactor = WEIGHTFACTOR; };
ObturatorExternusInferior1 = { AnyVar WeightFactor = WEIGHTFACTOR; };
ObturatorExternusInferior2 = { AnyVar WeightFactor = WEIGHTFACTOR; };
ObturatorInternus1 = { AnyVar WeightFactor = WEIGHTFACTOR; };
ObturatorInternus2 = { AnyVar WeightFactor = WEIGHTFACTOR; };
ObturatorInternus3 = { AnyVar WeightFactor = WEIGHTFACTOR; };
ObturatorInternus4 = { AnyVar WeightFactor = WEIGHTFACTOR; };
ObturatorInternus5 = { AnyVar WeightFactor = WEIGHTFACTOR; };
ObturatorInternus6 = { AnyVar WeightFactor = WEIGHTFACTOR; };

#endif


Pectineus1 = { AnyVar WeightFactor = WEIGHTFACTOR; };
Pectineus2 = { AnyVar WeightFactor = WEIGHTFACTOR; };
Pectineus3 = { AnyVar WeightFactor = WEIGHTFACTOR; };
Pectineus4 = { AnyVar WeightFactor = WEIGHTFACTOR; };


#if BM_FOOT_MODEL == _FOOT_MODEL_DEFAULT_
#if BM_LEG_MORPHOLOGY == 1
Plantaris1 = { AnyVar WeightFactor = WEIGHTFACTOR; };
#endif
#if BM_LEG_MORPHOLOGY == 2
Plantaris1 = { AnyVar WeightFactor = WEIGHTFACTOR; };
#endif
#endif

Popliteus1 = { AnyVar WeightFactor = WEIGHTFACTOR; };
Popliteus2 = { AnyVar WeightFactor = WEIGHTFACTOR; };

#if BM_LEG_MORPHOLOGY == 2
Popliteus3 = { AnyVar WeightFactor = WEIGHTFACTOR; };
#endif

QuadratusFemoris1 = { AnyVar WeightFactor = WEIGHTFACTOR; };
QuadratusFemoris2 = { AnyVar WeightFactor = WEIGHTFACTOR; };
QuadratusFemoris3 = { AnyVar WeightFactor = WEIGHTFACTOR; };
QuadratusFemoris4 = { AnyVar WeightFactor = WEIGHTFACTOR; };
