#include "../libdef.any"

Main = {

#define BM_ARM_MUSCLES_LEFT OFF
#define BM_ARM_MUSCLES_RIGHT OFF
#define BM_TRUNK_MUSCLES OFF

#include "<ANYBODY_PATH_BODY>/HumanModel.any"


  #define WEIGHTFACTOR MusMdl.Vol0

  Main.HumanModel.BodyModel.Right.Leg.Mus = {
    #include "HookTLEMMuscles.any"
  };
  Main.HumanModel.BodyModel.Left.Leg.Mus = {
    #include "HookTLEMMuscles.any"
  };

  AnyBodyStudy Study = {
     Gravity = {0, 0, -9.81};
     AnyFolder& BodyModel = Main.HumanModel.BodyModel;
     AnyFolder& DefaultDrivers = Main.HumanModel.DefaultMannequinDrivers;

     InverseDynamics.Criterion.PrimaryTerm.Weight_SearchName = "WeightFactor";
  };

};
