AnyFunInterpol FunADELT={
  Type=PiecewiseLinear;
  T = Main.C3DFileData.ANALOG.ADELT.Frames/Main.C3DFileData.HeaderInformation.VideoFrameRate;
  Data ={Main.C3DFileData.ANALOG.ADELT.Frame1};
};
AnyVector ADELT =FunADELT(.t);

AnyFunInterpol FunINFRASP={
  Type=PiecewiseLinear;
  T = Main.C3DFileData.ANALOG.INFRASP.Frames/Main.C3DFileData.HeaderInformation.VideoFrameRate;
  Data ={Main.C3DFileData.ANALOG.INFRASP.Frame1};
};
AnyVector INFRASP =FunINFRASP(.t);


AnyFunInterpol FunSUPRASP={
  Type=PiecewiseLinear;
  T = Main.C3DFileData.ANALOG.SUPRASP.Frames/Main.C3DFileData.HeaderInformation.VideoFrameRate;
  Data ={Main.C3DFileData.ANALOG.SUPRASP.Frame1};
};
AnyVector SUPRASP =FunSUPRASP(.t);


AnyFunInterpol FunMDELT={
  Type=PiecewiseLinear;
  T = Main.C3DFileData.ANALOG.MDELT.Frames/Main.C3DFileData.HeaderInformation.VideoFrameRate;
  Data ={Main.C3DFileData.ANALOG.MDELT.Frame1};
};
AnyVector MDELT =FunMDELT(.t);


AnyFunInterpol FunRHOMB={
  Type=PiecewiseLinear;
  T = Main.C3DFileData.ANALOG.RHOMB.Frames/Main.C3DFileData.HeaderInformation.VideoFrameRate;
  Data ={Main.C3DFileData.ANALOG.RHOMB.Frame1};
};
AnyVector RHOMB =FunRHOMB(.t);
