 AnyFolder HeaderInformation  ={
 AnyString C3DBasisFile ="C:\users\stc\AnyScript\Repository.6.2\Application\AAUHuman\WheelChairRancho\5858_free.c3d";
 AnyString FileType = "PC";
 AnyString DataType = "Real";
 AnyInt Points3D = 14;
 AnyInt AnalogChannels = 16;
 AnyInt FirstVideoFrame = 1;
 AnyInt LastVideoFrame = 400;
 AnyVar AVRatio = 5.0000e+001;
 AnyVar VideoFrameRate = 5.0000e+001;
 AnyVar AnalogSamplFreq = 2.5000e+003;
 }; //End HeaderInformation
