// **********************************************************
//   This folder contains the model of a full body, it is build using the following blocks
//   from the BRep
//      BRep\AAUHuman\TrunkSimpleSpine\Trunk.root.any  root file for the trunk model
//      BRep\AAUHuman\Arm\ShoulderArm.root.any"  root file for the shoulder and arm
//      BRep\AAUHuman\Leg\LegMus3E.root.any  root file for the leg
//
//    The structure of the file is the following
//
//
//       Trunk =  {
//          Trunk.root.any
//       }
//       Right ={
//          ShoulderArm ={
//            ShoulderArm.root.any
//          }
//       }
//       Left ={
//          ShoulderArm ={
//            ShoulderArm.root.any
//          }
//       }
//
// **********************************************************
  //This folder should eventually contain head torso and spine
  AnyFolder Trunk ={

   //This is a reference to where the colors for the model are located, the leg needs
    //  AnyVec3 Nodes
    //  AnyVec3 Segments
    AnyFolder &ColorRef = Main.Colors;
    #include "..\..\..\Body\AAUHuman\DetailedSpineModel\Trunk.root.any"
  };//Trunk


AnyFolder Right={

  AnyFolder ShoulderArm = {

    //-------------------------------------------------------
    // Interface references that specifies what the arm "Arm/ShoulderArm.any" should connect to
    //-------------------------------------------------------

    //This point is used for attachement of the arm to the shoulder
    AnyRefFrame &ShoulderRef = ..Trunk.SegmentsThorax.ThoraxSeg.ij;


    //This is a reference to where the body parameters are located the leg needs
    //  AnyVar BodyMass
    //  AnyVar BodyHeigth
    //  AnyVar Density
    AnyFolder &BodyParRef = Main.BodyParameters;

    //This is a reference to where the colors for the model are located, the leg needs
    //  AnyVec3 Nodes
    //  AnyVec3 Segments
    AnyFolder &ColorRef = Main.Colors;

    // **********************************************************
    // This is a reference to the folder which contains the scaling settings for the segment
    // **********************************************************
    AnyFolder &ScalingShoulderArm = Main.Scaling.ShoulderArm;

    // **********************************************************
    // This is a reference to the folder which contains the scaling settings for the segment
    // **********************************************************
   AnyFolder &ScalingTrunk = Main.Scaling.Trunk;


    //This is a sign variable which indicates that this is the right side
    AnyVar Sign =1;

     #include "..\..\..\Body\AAUHuman\Arm\ShoulderArm.root.any"

  }; //End ShoulderArm
};//Right

AnyFolder Left = {

  AnyFolder ShoulderArm = {

    //-------------------------------------------------------
    // Interface references that specifies what the arm "Arm/ShoulderArm.any" should connect to
    //-------------------------------------------------------

    //This point is used for attachement of the arm to the shoulder
    AnyRefFrame &ShoulderRef = ..Trunk.SegmentsThorax.ThoraxSeg.iji;

    //This is a reference to where the body parameters are located the leg needs
    //  AnyVar BodyMass
    //  AnyVar BodyHeigth
    //  AnyVar Density
    AnyFolder &BodyParRef = Main.BodyParameters;

    //This is a reference to where the colors for the model are located, the leg needs
    //  AnyVec3 Nodes
    //  AnyVec3 Segments
    AnyFolder &ColorRef = Main.Colors;

    // **********************************************************
   // This is a reference to the folder which contains the scaling settings for the segment
   // **********************************************************
   AnyFolder &ScalingShoulderArm = Main.Scaling.ShoulderArm;

    // **********************************************************
    // This is a reference to the folder which contains the scaling settings for the segment
    // **********************************************************
    AnyFolder &ScalingTrunk = Main.Scaling.Trunk;


    //This is a sign variable which indicates that this is the right side
    AnyVar Sign =-1;

    #include "..\..\..\Body\AAUHuman\Arm\ShoulderArm.root.any"

  }; //End ShoulderArm

}; //End Left
