Main.ModelSetup.SubjectSpecificData =
{

  AnyStringVar SubjectID = "2014003";
  #define SUBJECT_ID "2014003"
  AnyInt Gender = 0;
  AnyIntVar Age =  29;
  AnyFloat RightLegLength = 0.72;
  AnyFloat LeftLegLength = 0.72;

};

Main.HumanModel.Anthropometrics =
{
     BodyMass = DesignVar(50.0);
     BodyHeight = DesignVar(1.56);

};
