Main.ModelSetup.SubjectSpecificData =
{

  AnyStringVar SubjectID = "2014004";
  #define SUBJECT_ID "2014004"
  AnyInt Gender = 1;
  AnyIntVar Age =  24;
  AnyFloat RightLegLength = 0.83;
  AnyFloat LeftLegLength = 0.85;

};

Main.HumanModel.Anthropometrics =
{
     BodyMass = DesignVar(72.5);
     BodyHeight = DesignVar(1.77);

};
