Main.ModelSetup.SubjectSpecificData =
{

  AnyStringVar SubjectID = "2014006";
  #define SUBJECT_ID "2014006"
  AnyInt Gender = 1;
  AnyIntVar Age =  23;
  AnyFloat RightLegLength = 0.85;
  AnyFloat LeftLegLength = 0.86;

};

Main.HumanModel.Anthropometrics =
{
     BodyMass = DesignVar(73.0);
     BodyHeight = DesignVar(1.76);

};
