Main.ModelSetup.SubjectSpecificData =
{

  AnyStringVar SubjectID = "2014007";
  #define SUBJECT_ID "2014007"
  AnyInt Gender = 0;
  AnyIntVar Age =  54;
  AnyFloat RightLegLength = 0.84;
  AnyFloat LeftLegLength = 0.84;

};

Main.HumanModel.Anthropometrics =
{
     BodyMass = DesignVar(65.0);
     BodyHeight = DesignVar(1.69);

};
