Main.ModelSetup.SubjectSpecificData =
{

  AnyStringVar SubjectID = "2014016";
  #define SUBJECT_ID "2014016"
  AnyInt Gender = 0;
  AnyIntVar Age =  47;
  AnyFloat RightLegLength = 0.86;
  AnyFloat LeftLegLength = 0.83;

};

Main.HumanModel.Anthropometrics =
{
     BodyMass = DesignVar(76.0);
     BodyHeight = DesignVar(1.69);

};
