Main.ModelSetup.SubjectSpecificData =
{

  AnyStringVar SubjectID = "2014019";
  #define SUBJECT_ID "2014019"
  AnyInt Gender = 0;
  AnyIntVar Age =  26;
  AnyFloat RightLegLength = 0.82;
  AnyFloat LeftLegLength = 0.83;

};

Main.HumanModel.Anthropometrics =
{
     BodyMass = DesignVar(73.8);
     BodyHeight = DesignVar(1.75);

};
