Main.ModelSetup.SubjectSpecificData =
{

  AnyStringVar SubjectID = "2014022";
  #define SUBJECT_ID "2014022"
  AnyInt Gender = 0;
  AnyIntVar Age =  48;
  AnyFloat RightLegLength = 0.82;
  AnyFloat LeftLegLength = 0.83;

};

Main.HumanModel.Anthropometrics =
{
     BodyMass = DesignVar(59.8);
     BodyHeight = DesignVar(1.71);

};
