Main.ModelSetup.SubjectSpecificData =
{

  AnyStringVar SubjectID = "2014024";
  #define SUBJECT_ID "2014024"
  AnyInt Gender = 1;
  AnyIntVar Age =  34;
  AnyFloat RightLegLength = 0.91;
  AnyFloat LeftLegLength = 0.91;

};

Main.HumanModel.Anthropometrics =
{
     BodyMass = DesignVar(87.5);
     BodyHeight = DesignVar(1.92);

};
