Main.ModelSetup.SubjectSpecificData =
{

  AnyStringVar SubjectID = "2014025";
  #define SUBJECT_ID "2014025"
  AnyInt Gender = 0;
  AnyIntVar Age =  32;
  AnyFloat RightLegLength = 0.78;
  AnyFloat LeftLegLength = 0.79;

};

Main.HumanModel.Anthropometrics =
{
     BodyMass = DesignVar(80.5);
     BodyHeight = DesignVar(1.66);

};
