Main.ModelSetup.SubjectSpecificData =
{

  AnyStringVar SubjectID = "2014030";
  #define SUBJECT_ID "2014030"
  AnyInt Gender = 0;
  AnyIntVar Age =  62;
  AnyFloat RightLegLength = 0.80;
  AnyFloat LeftLegLength = 0.81;

};

Main.HumanModel.Anthropometrics =
{
     BodyMass = DesignVar(60.7);
     BodyHeight = DesignVar(1.70);

};
