Main.ModelSetup.SubjectSpecificData =
{

  AnyStringVar SubjectID = "2014031";
  #define SUBJECT_ID "2014031"
  AnyInt Gender = 1;
  AnyIntVar Age =  21;
  AnyFloat RightLegLength = 0.80;
  AnyFloat LeftLegLength = 0.82;

};

Main.HumanModel.Anthropometrics =
{
     BodyMass = DesignVar(67.2);
     BodyHeight = DesignVar(1.77);

};
