Main.ModelSetup.SubjectSpecificData =
{

  AnyStringVar SubjectID = "2014034";
  #define SUBJECT_ID "2014034"
  AnyInt Gender = 1;
  AnyIntVar Age =  21;
  AnyFloat RightLegLength = 0.90;
  AnyFloat LeftLegLength = 0.90;

};

Main.HumanModel.Anthropometrics =
{
     BodyMass = DesignVar(89.6);
     BodyHeight = DesignVar(1.84);

};
