Main.ModelSetup.SubjectSpecificData =
{

  AnyStringVar SubjectID = "2014048";
  #define SUBJECT_ID "2014048"
  AnyInt Gender = 0;
  AnyIntVar Age =  40;
  AnyFloat RightLegLength = 0.81;
  AnyFloat LeftLegLength = 0.82;

};

Main.HumanModel.Anthropometrics =
{
     BodyMass = DesignVar(61.8);
     BodyHeight = DesignVar(1.65);

};
