Main.ModelSetup.SubjectSpecificData =
{

  AnyStringVar SubjectID = "2014051";
  #define SUBJECT_ID "2014051"
  AnyInt Gender = 1;
  AnyIntVar Age =  25;
  AnyFloat RightLegLength = 0.92;
  AnyFloat LeftLegLength = 0.92;

};

Main.HumanModel.Anthropometrics =
{
     BodyMass = DesignVar(88.0);
     BodyHeight = DesignVar(1.91);

};
