Main.ModelSetup.SubjectSpecificData =
{

  AnyStringVar SubjectID = "2015003";
  #define SUBJECT_ID "2015003"
  AnyInt Gender = 1;
  AnyIntVar Age =  53;
  AnyFloat RightLegLength = 0.84;
  AnyFloat LeftLegLength = 0.85;

};

Main.HumanModel.Anthropometrics =
{
     BodyMass = DesignVar(87.2);
     BodyHeight = DesignVar(1.77);

};
