Main.ModelSetup.SubjectSpecificData =
{

  AnyStringVar SubjectID = "2015007";
  #define SUBJECT_ID "2015007"
  AnyInt Gender = 0;
  AnyIntVar Age =  64;
  AnyFloat RightLegLength = 0.75;
  AnyFloat LeftLegLength = 0.75;

};

Main.HumanModel.Anthropometrics =
{
     BodyMass = DesignVar(60.2);
     BodyHeight = DesignVar(1.66);

};
