Main.ModelSetup.SubjectSpecificData =
{

  AnyStringVar SubjectID = "2015013";
  #define SUBJECT_ID "2015013"
  AnyInt Gender = 0;
  AnyIntVar Age =  59;
  AnyFloat RightLegLength = 0.81;
  AnyFloat LeftLegLength = 0.81;

};

Main.HumanModel.Anthropometrics =
{
     BodyMass = DesignVar(73.0);
     BodyHeight = DesignVar(1.69);

};
