Main.ModelSetup.SubjectSpecificData =
{

  AnyStringVar SubjectID = "2015020";
  #define SUBJECT_ID "2015020"
  AnyInt Gender = 1;
  AnyIntVar Age =  44;
  AnyFloat RightLegLength = 0.85;
  AnyFloat LeftLegLength = 0.85;

};

Main.HumanModel.Anthropometrics =
{
     BodyMass = DesignVar(95.0);
     BodyHeight = DesignVar(1.79);

};
