Main.ModelSetup.SubjectSpecificData =
{

  AnyStringVar SubjectID = "2015021";
  #define SUBJECT_ID "2015021"
  AnyInt Gender = 0;
  AnyIntVar Age =  30;
  AnyFloat RightLegLength = 0.78;
  AnyFloat LeftLegLength = 0.79;

};

Main.HumanModel.Anthropometrics =
{
     BodyMass = DesignVar(58.0);
     BodyHeight = DesignVar(1.69);

};
