Main.ModelSetup.SubjectSpecificData =
{

  AnyStringVar SubjectID = "2015026";
  #define SUBJECT_ID "2015026"
  AnyInt Gender = 0;
  AnyIntVar Age =  64;
  AnyFloat RightLegLength = 0.80;
  AnyFloat LeftLegLength = 0.81;

};

Main.HumanModel.Anthropometrics =
{
     BodyMass = DesignVar(51.5);
     BodyHeight = DesignVar(1.71);

};
