Main.ModelSetup.TrialSpecificData =
{

  LoadParametersFrom = {"2014001_ST" };


  AnyStringVar WalkingCondition = "C5";

  // Special configuration/exception for this trial
  // HM5 has a dropout at the beginning of the trial. Manually adjust the marker weight.
  Main.ModelSetup.MocapDrivers.R_HM5.MarkerWeightsFun = {
    Data = arrcat(-1*ones(17), ones(127-17));
  };
  // RSP and UHE swap place at around frame 25, so we only use their Z coordinates
  // and add constraint to the wrist abduction
  Main.ModelSetup.MocapDrivers.R_RSP.ConstMarkerWeightX = 0;
  Main.ModelSetup.MocapDrivers.R_UHE.ConstMarkerWeightX = 0;
  Main.ModelSetup.MocapDrivers.R_RSP.ConstMarkerWeightY = 0;
  Main.ModelSetup.MocapDrivers.R_UHE.ConstMarkerWeightY = 0;


  TrialFileName = MOCAP_NAME_MAINFILEDIR;

  /// Uniqe ID for each trial
  AnyStringVar TrialID = MOCAP_NAME_MAINFILEDIR;
  //nStep = 1+(tEnd-tStart)*.C3DFileData.Header.VideoFrameRate;


   // This class_template calculates the load time position and orientation of
   // the pelvis based on markers.
   AutoPelvisPos AutoPos(RASIS=R_IAS, LASIS=L_IAS, BACK=L_IPS) = {};

};
