Main.ModelSetup.SubjectSpecificData =
{

  AnyStringVar SubjectID = "2014001";
  #define SUBJECT_ID "2014001"
  AnyInt Gender = 1;
  AnyIntVar Age =  30;
  AnyFloat RightLegLength = 0.73;
  AnyFloat LeftLegLength = 0.73;

};

Main.HumanModel.Anthropometrics =
{
     BodyMass = DesignVar(67.0);
     BodyHeight = DesignVar(1.65);

};
