Main.ModelSetup.TrialSpecificData =
{

  LoadParametersFrom = {"2014002_ST" };


  AnyStringVar WalkingCondition = "C5";

  // Special configuration/exception for this trial
  // L_UHE and L_RSP are swapped in this trial
  #define EXCLUDE_L_UHE
  #define EXCLUDE_L_RSP

  Main.ModelSetup.MocapDrivers = {
    // Marker on the Left Wrist A
    CreateMarkerDriver L_RSP (
    MarkerName=L_UHE,
    SKIP_MARKER_EXIST_CHECK = ON,
    MarkerPlacement=Left.ShoulderArm.Segments.Radius,
    PlaceMarkerAt=RadiusStylo,
    OptX=ON,OptY=ON,OptZ=OFF,
    ) = {
          sRelOpt = {0.01, 0, 0.00};
    };

    CreateMarkerDriver L_UHE (
    MarkerName=L_RSP,
    SKIP_MARKER_EXIST_CHECK = ON,
    MarkerPlacement=Left.ShoulderArm.Segments.Radius,
    PlaceMarkerAt=UlnaStylo,
    OptX=ON,OptY=ON,OptZ=OFF,
    ) = {
        sRelOpt = {-0.015, 0, 0.00};
    };
  };


  TrialFileName = MOCAP_NAME_MAINFILEDIR;

  /// Uniqe ID for each trial
  AnyStringVar TrialID = MOCAP_NAME_MAINFILEDIR;
  //nStep = 1+(tEnd-tStart)*.C3DFileData.Header.VideoFrameRate;


   // This class_template calculates the load time position and orientation of
   // the pelvis based on markers.
   AutoPelvisPos AutoPos(RASIS=R_IAS, LASIS=L_IAS, BACK=L_IPS) = {};

};
