Main.ModelSetup.SubjectSpecificData =
{

  AnyStringVar SubjectID = "2014002";
  #define SUBJECT_ID "2014002"
  AnyInt Gender = 0;
  AnyIntVar Age =  49;
  AnyFloat RightLegLength = 0.77;
  AnyFloat LeftLegLength = 0.77;

};

Main.HumanModel.Anthropometrics =
{
     BodyMass = DesignVar(65.4);
     BodyHeight = DesignVar(1.64);

};
