Main.ModelSetup.SubjectSpecificData =
{

  AnyStringVar SubjectID = "2014005";
  #define SUBJECT_ID "2014005"
  AnyInt Gender = 1;
  AnyIntVar Age =  25;
  AnyFloat RightLegLength = 0.86;
  AnyFloat LeftLegLength = 0.89;

};

Main.HumanModel.Anthropometrics =
{
     BodyMass = DesignVar(73.5);
     BodyHeight = DesignVar(1.83);

};
