Main.ModelSetup.SubjectSpecificData =
{

  AnyStringVar SubjectID = "2014008";
  #define SUBJECT_ID "2014008"
  AnyInt Gender = 0;
  AnyIntVar Age =  30;
  AnyFloat RightLegLength = 0.80;
  AnyFloat LeftLegLength = 0.79;

};

Main.HumanModel.Anthropometrics =
{
     BodyMass = DesignVar(57.1);
     BodyHeight = DesignVar(1.66);

};
