Main.ModelSetup.SubjectSpecificData =
{

  AnyStringVar SubjectID = "2014009";
  #define SUBJECT_ID "2014009"
  AnyInt Gender = 1;
  AnyIntVar Age =  58;
  AnyFloat RightLegLength = 0.90;
  AnyFloat LeftLegLength = 0.89;

};

Main.HumanModel.Anthropometrics =
{
     BodyMass = DesignVar(86.0);
     BodyHeight = DesignVar(1.87);

};
