Main.ModelSetup.SubjectSpecificData =
{

  AnyStringVar SubjectID = "2014011";
  #define SUBJECT_ID "2014011"
  AnyInt Gender = 1;
  AnyIntVar Age =  60;
  AnyFloat RightLegLength = 0.85;
  AnyFloat LeftLegLength = 0.85;

};

Main.HumanModel.Anthropometrics =
{
     BodyMass = DesignVar(63.4);
     BodyHeight = DesignVar(1.80);

};
