Main.ModelSetup.SubjectSpecificData =
{

  AnyStringVar SubjectID = "2014013";
  #define SUBJECT_ID "2014013"
  AnyInt Gender = 0;
  AnyIntVar Age =  27;
  AnyFloat RightLegLength = 0.79;
  AnyFloat LeftLegLength = 0.78;

};

Main.HumanModel.Anthropometrics =
{
     BodyMass = DesignVar(61.3);
     BodyHeight = DesignVar(1.70);

};
