Main.ModelSetup.SubjectSpecificData =
{

  AnyStringVar SubjectID = "2014014";
  #define SUBJECT_ID "2014014"
  AnyInt Gender = 1;
  AnyIntVar Age =  29;
  AnyFloat RightLegLength = 0.84;
  AnyFloat LeftLegLength = 0.85;

};

Main.HumanModel.Anthropometrics =
{
     BodyMass = DesignVar(92.0);
     BodyHeight = DesignVar(1.80);

};
