Main.ModelSetup.SubjectSpecificData =
{

  AnyStringVar SubjectID = "2014015";
  #define SUBJECT_ID "2014015"
  AnyInt Gender = 0;
  AnyIntVar Age =  23;
  AnyFloat RightLegLength = 0.72;
  AnyFloat LeftLegLength = 0.71;

};

Main.HumanModel.Anthropometrics =
{
     BodyMass = DesignVar(67.0);
     BodyHeight = DesignVar(1.58);

};
