Main.ModelSetup.SubjectSpecificData =
{

  AnyStringVar SubjectID = "2014029";
  #define SUBJECT_ID "2014029"
  AnyInt Gender = 1;
  AnyIntVar Age =  38;
  AnyFloat RightLegLength = 0.88;
  AnyFloat LeftLegLength = 0.88;

};

Main.HumanModel.Anthropometrics =
{
     BodyMass = DesignVar(89.9);
     BodyHeight = DesignVar(1.88);

};
