Main.ModelSetup.SubjectSpecificData =
{

  AnyStringVar SubjectID = "2014033";
  #define SUBJECT_ID "2014033"
  AnyInt Gender = 0;
  AnyIntVar Age =  24;
  AnyFloat RightLegLength = 0.71;
  AnyFloat LeftLegLength = 0.71;

};

Main.HumanModel.Anthropometrics =
{
     BodyMass = DesignVar(63.5);
     BodyHeight = DesignVar(1.60);

};
