Main.ModelSetup.SubjectSpecificData =
{

  AnyStringVar SubjectID = "2014040";
  #define SUBJECT_ID "2014040"
  AnyInt Gender = 0;
  AnyIntVar Age =  19;
  AnyFloat RightLegLength = 0.73;
  AnyFloat LeftLegLength = 0.72;

};

Main.HumanModel.Anthropometrics =
{
     BodyMass = DesignVar(56.5);
     BodyHeight = DesignVar(1.55);

};
