Main.ModelSetup.SubjectSpecificData =
{

  AnyStringVar SubjectID = "2014049";
  #define SUBJECT_ID "2014049"
  AnyInt Gender = 1;
  AnyIntVar Age =  40;
  AnyFloat RightLegLength = 0.84;
  AnyFloat LeftLegLength = 0.83;

};

Main.HumanModel.Anthropometrics =
{
     BodyMass = DesignVar(72.1);
     BodyHeight = DesignVar(1.74);

};
