Main.ModelSetup.SubjectSpecificData =
{

  AnyStringVar SubjectID = "2014050";
  #define SUBJECT_ID "2014050"
  AnyInt Gender = 0;
  AnyIntVar Age =  38;
  AnyFloat RightLegLength = 0.75;
  AnyFloat LeftLegLength = 0.76;

};

Main.HumanModel.Anthropometrics =
{
     BodyMass = DesignVar(61.9);
     BodyHeight = DesignVar(1.64);

};
