Main.ModelSetup.SubjectSpecificData =
{

  AnyStringVar SubjectID = "2014051";
  #define SUBJECT_ID "2014051"
  AnyInt Gender = 1;
  AnyIntVar Age =  25;
  AnyFloat RightLegLength = 0.92;
  AnyFloat LeftLegLength = 0.92;

  // Special configuration/exception for this subject
  // This subject is missing a number of markers
  #define EXCLUDE_R_UOA
  #define EXCLUDE_L_UOA
  #define EXCLUDE_R_SAA
  #define EXCLUDE_L_SAA
  #define EXCLUDE_R_SRS
  #define EXCLUDE_L_SRS
  #define EXCLUDE_R_SIA
  #define EXCLUDE_L_SIA

  // lateral/medial elbow markers anterior/posterior postion.
  // So we recreate the elbow markers without optimizaiton
  #define EXCLUDE_R_HME
  #define EXCLUDE_R_HLE
  #define EXCLUDE_L_HME
  #define EXCLUDE_L_HLE

  // We need to use the SKIP_MARKER_EXIST_CHECK = 1, to be able to
  // create markers earlier than the C3D file is include.
  Main.ModelSetup.MocapDrivers = {
    CreateMarkerDriver R_HME (
    MarkerPlacement=Right.ShoulderArm.Segments.Humerus,
    OptX=ON,OptY=OFF,OptZ=ON,
    PlaceMarkerAt=EpicondylusHumerusMedialis,
    SKIP_MARKER_EXIST_CHECK = 1,
    UseC3DWeightResiduals = ON
    ) = {
      sRelOpt = {0.00, 0, -0.015};
      #ifdef REFERENCE_TRIAL
      ConstMarkerWeightX = 5;
      ConstMarkerWeightZ = 5;
      #endif
    };
    CreateMarkerDriver R_HLE (
    MarkerPlacement=Right.ShoulderArm.Segments.Humerus,
    OptX=OFF,OptY=OFF,OptZ=OFF,
    SKIP_MARKER_EXIST_CHECK = 1,
    PlaceMarkerAt=EpicondylusHumerusLateralis,
    UseC3DWeightResiduals = ON
    ) = {
      sRelOpt = {0, 0, 0.01};
      #ifdef REFERENCE_TRIAL
      ConstMarkerWeightZ = 5;
      ConstMarkerWeightX = 5;
      #endif
    };

    CreateMarkerDriver L_HME (
    MarkerPlacement=Left.ShoulderArm.Segments.Humerus,
    OptX=ON,OptY=OFF,OptZ=ON,
    SKIP_MARKER_EXIST_CHECK = 1,
    PlaceMarkerAt=EpicondylusHumerusMedialis,
    UseC3DWeightResiduals = ON
    ) = {
      sRelOpt = {0.00, 0, 0.015};
      #ifdef REFERENCE_TRIAL
      ConstMarkerWeightX = 5;
      ConstMarkerWeightZ = 5;
      #endif
    };
    CreateMarkerDriver L_HLE (
    MarkerPlacement=Left.ShoulderArm.Segments.Humerus,
    OptX=OFF,OptY=OFF,OptZ=OFF,
    SKIP_MARKER_EXIST_CHECK = 1,
    PlaceMarkerAt=EpicondylusHumerusLateralis,
    UseC3DWeightResiduals = ON
    ) = {
      sRelOpt = {0, 0, -0.01};
      #ifdef REFERENCE_TRIAL
      ConstMarkerWeightZ = 5;
      ConstMarkerWeightX = 5;
      #endif
    };
  };

};

Main.HumanModel.Anthropometrics =
{
     BodyMass = DesignVar(88.0);
     BodyHeight = DesignVar(1.91);

};
