Main.ModelSetup.TrialSpecificData =
{

  LoadParametersFrom = {"2014053_ST" };


  AnyStringVar WalkingCondition = "C3";

  // Special configuration/exception for this trial
  // Better start guess for left hand position
  Main.HumanModel.Mannequin.Posture.Left.ElbowPronation = -40;


  TrialFileName = MOCAP_NAME_MAINFILEDIR;

  /// Uniqe ID for each trial
  AnyStringVar TrialID = MOCAP_NAME_MAINFILEDIR;
  //nStep = 1+(tEnd-tStart)*.C3DFileData.Header.VideoFrameRate;


   // This class_template calculates the load time position and orientation of
   // the pelvis based on markers.
   AutoPelvisPos AutoPos(RASIS=R_IAS, LASIS=L_IAS, BACK=L_IPS) = {};

};
