Main.ModelSetup.SubjectSpecificData =
{

  AnyStringVar SubjectID = "2014053";
  #define SUBJECT_ID "2014053"
  AnyInt Gender = 0;
  AnyIntVar Age =  21;
  AnyFloat RightLegLength = 0.83;
  AnyFloat LeftLegLength = 0.82;

};

Main.HumanModel.Anthropometrics =
{
     BodyMass = DesignVar(62.8);
     BodyHeight = DesignVar(1.72);

};
