Main.ModelSetup.SubjectSpecificData =
{

  AnyStringVar SubjectID = "2015002";
  #define SUBJECT_ID "2015002"
  AnyInt Gender = 1;
  AnyIntVar Age =  40;
  AnyFloat RightLegLength = 0.83;
  AnyFloat LeftLegLength = 0.84;

};

Main.HumanModel.Anthropometrics =
{
     BodyMass = DesignVar(74.0);
     BodyHeight = DesignVar(1.74);

};
