Main.ModelSetup.SubjectSpecificData =
{

  AnyStringVar SubjectID = "2015004";
  #define SUBJECT_ID "2015004"
  AnyInt Gender = 0;
  AnyIntVar Age =  36;
  AnyFloat RightLegLength = 0.80;
  AnyFloat LeftLegLength = 0.81;

};

Main.HumanModel.Anthropometrics =
{
     BodyMass = DesignVar(62.0);
     BodyHeight = DesignVar(1.70);

};
