Main.ModelSetup.SubjectSpecificData =
{

  AnyStringVar SubjectID = "2015005";
  #define SUBJECT_ID "2015005"
  AnyInt Gender = 1;
  AnyIntVar Age =  49;
  AnyFloat RightLegLength = 0.87;
  AnyFloat LeftLegLength = 0.88;

};

Main.HumanModel.Anthropometrics =
{
     BodyMass = DesignVar(89.4);
     BodyHeight = DesignVar(1.90);

};
