Main.ModelSetup.SubjectSpecificData =
{

  AnyStringVar SubjectID = "2015015";
  #define SUBJECT_ID "2015015"
  AnyInt Gender = 0;
  AnyIntVar Age =  51;
  AnyFloat RightLegLength = 0.82;
  AnyFloat LeftLegLength = 0.83;

};

Main.HumanModel.Anthropometrics =
{
     BodyMass = DesignVar(68.0);
     BodyHeight = DesignVar(1.73);

};
