Main.ModelSetup.TrialSpecificData =
{

  LoadParametersFrom = {"2015017_ST" };


  AnyStringVar WalkingCondition = "C5";

  // Special configuration/exception for this trial
  LastFrame = 151; // Exclude the last frame of this trial

  TrialFileName = MOCAP_NAME_MAINFILEDIR;

  /// Uniqe ID for each trial
  AnyStringVar TrialID = MOCAP_NAME_MAINFILEDIR;
  //nStep = 1+(tEnd-tStart)*.C3DFileData.Header.VideoFrameRate;


   // This class_template calculates the load time position and orientation of
   // the pelvis based on markers.
   AutoPelvisPos AutoPos(RASIS=R_IAS, LASIS=L_IAS, BACK=L_IPS) = {};

};
