Main.ModelSetup.SubjectSpecificData =
{

  AnyStringVar SubjectID = "2015017";
  #define SUBJECT_ID "2015017"
  AnyInt Gender = 0;
  AnyIntVar Age =  42;
  AnyFloat RightLegLength = 0.80;
  AnyFloat LeftLegLength = 0.81;

};

Main.HumanModel.Anthropometrics =
{
     BodyMass = DesignVar(60.5);
     BodyHeight = DesignVar(1.67);

};
