Main.ModelSetup.SubjectSpecificData =
{

  AnyStringVar SubjectID = "2015027";
  #define SUBJECT_ID "2015027"
  AnyInt Gender = 1;
  AnyIntVar Age =  52;
  AnyFloat RightLegLength = 0.79;
  AnyFloat LeftLegLength = 0.79;


};

Main.HumanModel.Anthropometrics =
{
     BodyMass = DesignVar(65.5);
     BodyHeight = DesignVar(1.72);

};
