Main.ModelSetup.SubjectSpecificData =
{

  AnyStringVar SubjectID = "2015030";
  #define SUBJECT_ID "2015030"
  AnyInt Gender = 1;
  AnyIntVar Age =  24;
  AnyFloat RightLegLength = 0.92;
  AnyFloat LeftLegLength = 0.92;


};

Main.HumanModel.Anthropometrics =
{
     BodyMass = DesignVar(86.0);
     BodyHeight = DesignVar(1.87);

};
