Main.ModelSetup.SubjectSpecificData =
{

  AnyStringVar SubjectID = "2015032";
  #define SUBJECT_ID "2015032"
  AnyInt Gender = 1;
  AnyIntVar Age =  27;
  AnyFloat RightLegLength = 0.80;
  AnyFloat LeftLegLength = 0.82;


};

Main.HumanModel.Anthropometrics =
{
     BodyMass = DesignVar(50.8);
     BodyHeight = DesignVar(1.72);

};
