Main.ModelSetup.SubjectSpecificData =
{

  AnyStringVar SubjectID = "2015035";
  #define SUBJECT_ID "2015035"
  AnyInt Gender = 1;
  AnyIntVar Age =  38;
  AnyFloat RightLegLength = 0.82;
  AnyFloat LeftLegLength = 0.84;


};

Main.HumanModel.Anthropometrics =
{
     BodyMass = DesignVar(81.5);
     BodyHeight = DesignVar(1.77);

};
