Main.ModelSetup.SubjectSpecificData =
{

  AnyStringVar SubjectID = "2015037";
  #define SUBJECT_ID "2015037"
  AnyInt Gender = 1;
  AnyIntVar Age =  43;
  AnyFloat RightLegLength = 0.84;
  AnyFloat LeftLegLength = 0.85;


};

Main.HumanModel.Anthropometrics =
{
     BodyMass = DesignVar(66.1);
     BodyHeight = DesignVar(1.76);

};
