Main.ModelSetup.SubjectSpecificData =
{

  AnyStringVar SubjectID = "2015041";
  #define SUBJECT_ID "2015041"
  AnyInt Gender = 1;
  AnyIntVar Age =  31;
  AnyFloat RightLegLength = 0.88;
  AnyFloat LeftLegLength = 0.86;

};

Main.HumanModel.Anthropometrics =
{
     BodyMass = DesignVar(74.8);
     BodyHeight = DesignVar(1.88);

};
