Main.ModelSetup.SubjectSpecificData =
{

  AnyStringVar SubjectID = "2015042";
  #define SUBJECT_ID "2015042"
  AnyInt Gender = 1;
  AnyIntVar Age =  67;
  AnyFloat RightLegLength = 0.85;
  AnyFloat LeftLegLength = 0.87;

};

Main.HumanModel.Anthropometrics =
{
     BodyMass = DesignVar(98.0);
     BodyHeight = DesignVar(1.83);

};
