Main.ModelSetup.SubjectSpecificData =
{

  AnyStringVar SubjectID = "2015043";
  #define SUBJECT_ID "2015043"
  AnyInt Gender = 1;
  AnyIntVar Age =  23;
  AnyFloat RightLegLength = 0.84;
  AnyFloat LeftLegLength = 0.83;


};

Main.HumanModel.Anthropometrics =
{
     BodyMass = DesignVar(74.0);
     BodyHeight = DesignVar(1.78);

};
