Main.EnvironmentModel.GlobalRef = {
    };


//// Left thigh
Main.Studies.HumanModel.BodyModel.Left.Leg.Seg.Thigh = {
  AnyFunTransform3D &CustomMarkerScaling = Main.Studies.HumanModel.SubjectSpecificScaling.Left.Thigh.RegistrationTransform;
  AnyRefNode SS_STLNode  = {
    //AnyDrawRefFrame drw ={};
    //    AnySurfSTL FemurSTL =
    //    {
    //      FileName = "target\Femur_target_L.stl";
    //      ScaleXYZ = {1, 1, 1}/1000;
    //      AnyFunTransform3D &scale = ..CustomMarkerScaling;
    //      AnyDrawSurf stldraw = {
    //        FileName = .FileName;
    //        ScaleXYZ = {1, 1, 1}/1000;
    //        AnyFunTransform3D &scale = .scale;
    //
    //        RGB = {0,1,0};
    //        Opacity = .....BonesOpacity.Thigh;
    //
    //      };
    //    };
  };
};

//Left Shank
Main.Studies.HumanModel.BodyModel.Left.Leg.Seg.Shank = {
  AnyFunTransform3D &CustomMarkerScaling = Main.Studies.HumanModel.SubjectSpecificScaling.Left.Shank.RegistrationTransform;
  AnyRefNode SS_Shank = {
    //    AnySurfSTL ShankSTL =
    //    {
    //      FileName = "target\Tibia_target_L.stl";
    //      ScaleXYZ = {1, 1, 1}/1000;
    //
    //      AnyFunTransform3D &scale = ..CustomMarkerScaling;
    //      AnyDrawSurf stldraw = {
    //        FileName = .FileName;
    //        ScaleXYZ = {1, 1, 1}/1000;
    //        AnyFunTransform3D &scale = .scale;
    //
    //        RGB = {0,1,0};
    //
    //      };
    //    };
    //    AnySurfSTL SSFibula_STL =
    //    {
    //      FileName = "target\fibula_target_L.stl";
    //      ScaleXYZ = {1, 1, 1}/1000;
    //
    //      AnyFunTransform3D &scale = ..CustomMarkerScaling;
    //      AnyDrawSurf stldraw = {
    //        FileName = .FileName;
    //        ScaleXYZ = {1, 1, 1}/1000;
    //        AnyFunTransform3D &scale = .scale;
    //
    //        RGB = {0,1,0};
    //
    //      };
    //    };
  };
};


//Left Patella
Main.Studies.HumanModel.BodyModel.Left.Leg.Seg.Patella = {
  AnyFunTransform3D &CustomMarkerScaling = Main.Studies.HumanModel.SubjectSpecificScaling.Left.Patella.RegistrationTransform;
  AnyRefNode SS_Patella = {
    //    AnySurfSTL PatellaSTL =
    //    {
    //      FileName = ".target\Patella_target_L.stl";
    //      ScaleXYZ = {1, 1, 1}/1000;
    //
    //      AnyFunTransform3D &scale = ..CustomMarkerScaling;
    //      AnyDrawSurf stldraw = {
    //        FileName = .FileName;
    //        ScaleXYZ = {1, 1, 1}/1000;
    //        AnyFunTransform3D &scale = .scale;
    //
    //        RGB = {0,1,0};
    //        Opacity = .....BonesOpacity.Shank;
    //
    //      };
    //    };
  };
};

// Left talus
Main.Studies.HumanModel.BodyModel.Left.Leg.Seg.Talus = {
  AnyFunTransform3D &CustomMarkerScaling = Main.Studies.HumanModel.SubjectSpecificScaling.Left.Talus.RegistrationTransform;
  AnyRefNode SS_Talus = {
    //    AnySurfSTL TalusSTL =
    //    {
    //      FileName = "target\Talus_target_L.stl";
    //      ScaleXYZ = {1, 1, 1}/1000;
    //
    //      AnyFunTransform3D &scale = ..CustomMarkerScaling;
    //      AnyDrawSurf stldraw = {
    //        FileName = .FileName;
    //        ScaleXYZ = {1, 1, 1}/1000;
    //        AnyFunTransform3D &scale = .scale;
    //
    //        RGB = {0,1,0};
    //        Opacity = .....BonesOpacity.Shank;
    //
    //      };
    //    };
    //    AnySurfSTL TalusMorphedSourceSTL =
    //    {
    //      FileName = "source\Talus_source_R.stl";
    //      ScaleXYZ = {1, 1, 1};
    //
    //      AnyFunTransform3D &scale = ..Scale;
    //            AnyDrawSurf stldraw = {
    //              FileName = .FileName;
    //              ScaleXYZ = {1, 1, -1};
    //              AnyFunTransform3D &scale = .scale;
    //              RGB = {0,0,1};
    //
    //      };
    //    };

  };
};

// Left foot
Main.Studies.HumanModel.BodyModel.Left.Leg.Seg.Foot = {
  AnyFunTransform3D &CustomMarkerScaling = Main.Studies.HumanModel.SubjectSpecificScaling.Left.Foot.RegistrationTransform;
};

// Right thigh
Main.Studies.HumanModel.BodyModel.Right.Leg.Seg.Thigh = {
  AnyFunTransform3D &CustomMarkerScaling = Main.Studies.HumanModel.SubjectSpecificScaling.Right.Thigh.RegistrationTransform;
  AnyRefNode SS_STLNode = {
    //AnyDrawRefFrame drw ={};
    //    AnySurfSTL FemurSTL =
    //    {
    //      FileName = "target\Femur_target_R.stl";
    //      ScaleXYZ = {1, 1, 1}/1000;
    //      AnyFunTransform3D &scale = ..CustomMarkerScaling;
    //      AnyDrawSurf stldraw = {
    //        FileName = .FileName;
    //        ScaleXYZ = {1, 1, 1}/1000;
    //        AnyFunTransform3D &scale = .scale;
    //
    //        RGB = {0,1,0};
    //        Opacity = .....BonesOpacity.Thigh;
    //
    //      };
    //    };

//    AnySurfSTL ACFemurSTL =
//    {
//      FileName = "target/AC_Femur_R.stl";
//      ScaleXYZ = {1, 1, 1}/1000;
//      AnyFunTransform3D &scale = ..CustomMarkerScaling;
//      AnyDrawSurf stldraw = {
//        FileName = .FileName;
//        ScaleXYZ = {1, 1, 1}/1000;
//        AnyFunTransform3D &scale = .scale;
//        RGB = {1,1,1};
//        Opacity = 1.0;
//      };
//    };


  };
};


Main.Studies.HumanModel.BodyModel.Right.Leg.Seg.Shank = {
  AnyFunTransform3D &CustomMarkerScaling = Main.Studies.HumanModel.SubjectSpecificScaling.Right.Shank.RegistrationTransform;
  AnyRefNode SS_Shank = {
  //    AnySurfSTL ShankSTL =
  //    {
  //      FileName = "target\Tibia_target_R.stl";
  //      ScaleXYZ = {1, 1, 1}/1000;
  //
  //      AnyFunTransform3D &scale = ..CustomMarkerScaling;
  //      AnyDrawSurf stldraw = {
  //        FileName = .FileName;
  //        ScaleXYZ = {1, 1, 1}/1000;
  //        AnyFunTransform3D &scale = .scale;
  //
  //        RGB = {0,1,0};
  //        Opacity = .....BonesOpacity.Shank;
  //
  //      };
  //    };
  //
  //    AnySurfSTL SSFibula_STL =
  //    {
  //      FileName = "target\fibula_target_R.stl";
  //      ScaleXYZ = {1, 1, 1}/1000;
  //
  //      AnyFunTransform3D &scale = ..CustomMarkerScaling;
  //      AnyDrawSurf stldraw = {
  //        FileName = .FileName;
  //        ScaleXYZ = {1, 1, 1}/1000;
  //        AnyFunTransform3D &scale = .scale;
  //
  //        RGB = {0,1,0};
  //        Opacity = .....BonesOpacity.Shank;
  //
  //      };
  //    };


//    AnySurfSTL ACTibiaSTL_RM =
//    {
//      FileName = "target/AC_Tibia_RM.stl";
//      ScaleXYZ = {1, 1, 1}/1000;
//      AnyFunTransform3D &scale = ..CustomMarkerScaling;
//      AnyDrawSurf stldraw = {
//        FileName = .FileName;
//        ScaleXYZ = {1, 1, 1}/1000;
//        AnyFunTransform3D &scale = .scale;
//        RGB = {1,1,1};
//        Opacity = 1.0;
//      };
//    };
//
//    AnySurfSTL ACTibiaSTL_RL =
//    {
//      FileName = "target/AC_Tibia_RL.stl";
//      ScaleXYZ = {1, 1, 1}/1000;
//      AnyFunTransform3D &scale = ..CustomMarkerScaling;
//      AnyDrawSurf stldraw = {
//        FileName = .FileName;
//        ScaleXYZ = {1, 1, 1}/1000;
//        AnyFunTransform3D &scale = .scale;
//        RGB = {1,1,1};
//        Opacity = 1.0;
//      };
//    };
};
};


//Right Patella
Main.Studies.HumanModel.BodyModel.Right.Leg.Seg.Patella = {
  AnyFunTransform3D &CustomMarkerScaling = Main.Studies.HumanModel.SubjectSpecificScaling.Right.Patella.RegistrationTransform;
    AnyRefNode SS_Patella = {
  //    AnySurfSTL PatellaSTL =
  //    {
  //      FileName = "target\Patella_target_R.stl";
  //      ScaleXYZ = {1, 1, 1}/1000;
  //
  //      AnyFunTransform3D &scale = ..CustomMarkerScaling;
  //      AnyDrawSurf stldraw = {
  //        FileName = .FileName;
  //        ScaleXYZ = {1, 1, 1}/1000;
  //        AnyFunTransform3D &scale = .scale;
  //
  //        RGB = {0,1,0};
  //        Opacity = .....BonesOpacity.Shank;
  //
  //      };
  //    };


//
//    AnySurfSTL ACPatellaSTL =
//    {
//      FileName = "target/AC_Patella_R.stl";
//      ScaleXYZ = {1, 1, 1}/1000;
//      AnyFunTransform3D &scale = ..CustomMarkerScaling;
//      AnyDrawSurf stldraw = {
//        FileName = .FileName;
//        ScaleXYZ = {1, 1, 1}/1000;
//        AnyFunTransform3D &scale = .scale;
//        RGB = {1,1,1};
//        Opacity = 1.0;
//      };
//    };
};
};

Main.Studies.HumanModel.BodyModel.Right.Leg.Seg.Talus = {
  AnyFunTransform3D &CustomMarkerScaling = Main.Studies.HumanModel.SubjectSpecificScaling.Right.Talus.RegistrationTransform;
  AnyRefNode SS_Talus = {
    //    AnySurfSTL TalusSTL =
    //    {
    //      FileName = "target\Talus_target_R.stl";
    //      ScaleXYZ = {1, 1, 1}/1000;
    //
    //      AnyFunTransform3D &scale = ..CustomMarkerScaling;
    //      AnyDrawSurf stldraw = {
    //        FileName = .FileName;
    //        ScaleXYZ = {1, 1, 1}/1000;
    //        AnyFunTransform3D &scale = .scale;
    //
    //        RGB = {0,1,0};
    //        Opacity = .....BonesOpacity.Shank;
    //
    //      };
    //    };
    //
    //    AnySurfSTL TalusMorphedSourceSTL =
    //    {
    //      FileName = "source\Talus_source_R.stl";
    //      ScaleXYZ = {1, 1, 1};
    //
    //      AnyFunTransform3D &scale = ..Scale;
    //            AnyDrawSurf stldraw = {
    //              FileName = .FileName;
    //              ScaleXYZ = {1, 1, 1};
    //              AnyFunTransform3D &scale = .scale;
    //              RGB = {0,0,1};
    //
    //      };
    //    };

  };
};

// Right foot
Main.Studies.HumanModel.BodyModel.Right.Leg.Seg.Foot = {
  AnyFunTransform3D &CustomMarkerScaling = Main.Studies.HumanModel.SubjectSpecificScaling.Right.Foot.RegistrationTransform;
};


Main.Studies.HumanModel.BodyModel.Trunk.SegmentsLumbar.PelvisSeg = {
  AnyFunTransform3D &CustomMarkerScaling = Main.Studies.HumanModel.SubjectSpecificScaling.Trunk.Pelvis.RegistrationTransform;
  AnyRefNode SS_Pelvis = {
    //    AnySurfSTL PelvisSTL =
    //    {
    //      FileName = "target\Pelvis_target.stl";
    //      ScaleXYZ = {1, 1, 1}/1000;
    //
    //      AnyFunTransform3D &scale = ..CustomMarkerScaling;
    //            AnyDrawSurf stldraw = {
    //              FileName = .FileName;
    //              ScaleXYZ = {1, 1, 1}/1000;
    //              AnyFunTransform3D &scale = .scale;
    //              RGB = {0,1,0};
    //
    //            };
    //    };
    //
    //    AnySurfSTL PelvisMorphedSourceSTL =
    //    {
    //      FileName = "source\Pelvis_source.stl";
    //      ScaleXYZ = {1, 1, 1};
    //
    //      AnyFunTransform3D &scale = ..Right.Scale;
    //            AnyDrawSurf stldraw = {
    //              FileName = .FileName;
    //              ScaleXYZ = {1, 1, 1};
    //              AnyFunTransform3D &scale = .scale;
    //              RGB = {0,0,1};
    //
    //      };
    //    };
  };
};
