#define DEF_REFNODE_CUSTOM_SCALING_2arg(sRel_us,ARel_us)\
    sRel = .CustomMarkerScaling(sRel_us); \
    ARel = RotMat(sRel,.CustomMarkerScaling((ARel_us*{1.0,0.0,0.0}')'),.CustomMarkerScaling((ARel_us*{0.0,1.0,0.0}')'));

#define DEF_REFNODE_CUSTOM_SCALING_1arg(sRel_us)\
    sRel = .CustomMarkerScaling(sRel_us);

#define Calibration_Loadcell(vname,vvalue) AnyVar vname = vvalue*(-122.6744)+22.1612;
