// How it works:
//
// Marker on the Left Posterior Superior Iliac
// CreateMarkerDriver LPSI (                         // A marker on the skeleton is created!
// MarkerName= LPSI,                                 // Change the name here to the name of your Marker Protocol!:
// MarkerPlacement=Trunk.SegmentsLumbar.PelvisSeg,   // Marker is assigned to Pelvis Segment
// OptX="Off", OptY="Off", OptZ="On",                // Is the position of the Marker good, or does it need to be optimised?
//                                                   // Please be aware that having to many Markers optimised can lead to model failure
// WeightX=1.0,WeightY=1.0,WeightZ=1.0,              // If you are convinced of the position of this Marker, you an increase the importance of it (weight)
// Model1=MotionAndParameterOptimizationModel,
// Model2= InverseDynamicModel,
// sRelOptScalingOnOff="On"                          // Determine whether sRelOpt value will be scaled by the geometrical scaling funciton or not
// ) = {
//   sRelOpt ={-0.06727544, -0.03, -0.045};          // Position of the Marker on the skeleton, relativ to the segment. Please adjust!
//   sRelOptDelta = {0, 0, 0}                        // This value is optional. This value will be optimized and you can set the initial guess if you want.
// };

///// Hip/Pelvis Markers
//#if STATIC_DRIVERSET == 0
#include "<SIMPLIFIED_LEG_PATH>BonyLandmarksPnts\Markers\MRI_Markers.any"

// Marker on the Left Posterior Superior Iliac
#ifndef EXCLUDE_MARKER_LPSIS
CreateMarkerDriverEx LPSIS (
MarkerName= LPSIS,
MarkerPlacement=Trunk.SegmentsLumbar.PelvisSeg,
OptX="Off", OptY="Off", OptZ="Off",
WeightX=1.0,WeightY=1.0,WeightZ=1.0,
Model1=MotionAndParameterOptimizationModel, Model2= InverseDynamicModel,
sRelOptScalingOnOff="Off",
ReadsRelOptFromFile = "Off",
sRelCustomScalingOnOff = "On"
) = {
  AnyVec3 sRelOpt_1 =.LPSIS_MRI;
  AnyVec3 Offset = {-0.02,0.01,-0.05};
  sRelOpt = sRelOpt_1 + Offset;
};
#endif

#ifndef EXCLUDE_MARKER_RPSIS
// Marker on the Right Posterior Superior Iliac
CreateMarkerDriverEx RPSIS (
MarkerName= RPSIS,
MarkerPlacement=Trunk.SegmentsLumbar.PelvisSeg,
OptX="Off", OptY="Off", OptZ="Off",
WeightX=1.0,WeightY=1.0,WeightZ=1.0,
Model1=MotionAndParameterOptimizationModel, Model2= InverseDynamicModel,
sRelOptScalingOnOff="Off",
ReadsRelOptFromFile = "Off",
sRelCustomScalingOnOff = "On"
) = {
  AnyVec3 sRelOpt_1 =.RPSIS_MRI;
  AnyVec3 Offset = {0.035,-0.001,-0.05};
  sRelOpt = sRelOpt_1 + Offset;
};
#endif

#ifndef EXCLUDE_MARKER_LASIS
// Marker on the Left Anterior Superior Iliac
CreateMarkerDriverEx LASIS (
MarkerName= LASIS ,
MarkerPlacement=Trunk.SegmentsLumbar.PelvisSeg,
OptX="Off",OptY="Off",OptZ="Off",
WeightX=1.0,WeightY=1.0,WeightZ=1.0,
Model1=MotionAndParameterOptimizationModel, Model2= InverseDynamicModel,
sRelOptScalingOnOff="Off",
ReadsRelOptFromFile = "Off",
sRelCustomScalingOnOff = "On"
) = {
  AnyVec3 sRelOpt_1 =  .LASIS_MRI;
  AnyVec3 Offset = {-0.02,-0.01,-0.035};
  sRelOpt = sRelOpt_1 + Offset;
};
#endif

// Marker on the Right Anterior Superior Iliac
#ifndef EXCLUDE_MARKER_RASIS
CreateMarkerDriverEx RASIS (
MarkerName= RASIS,
MarkerPlacement=Trunk.SegmentsLumbar.PelvisSeg,
OptX="Off",OptY="Off",OptZ="Off",
WeightX=1.0,WeightY=1.0,WeightZ=1.0,
Model1=MotionAndParameterOptimizationModel, Model2= InverseDynamicModel,
sRelOptScalingOnOff="Off",
ReadsRelOptFromFile = "Off",
sRelCustomScalingOnOff = "On"
) = {
  AnyVec3 sRelOpt_1 = .RASIS_MRI;
  AnyVec3 Offset = {0.02,-0.02,-0.045};
  sRelOpt = sRelOpt_1 + Offset;
};
#endif

///// Lower Extremity Markers
#if STATIC_DRIVERSET == 0

// Marker on the Right Lateral Thigh
#ifndef EXCLUDE_MARKER_RTHIGHLATERAL
CreateMarkerDriverEx RTHIGHLATERAL (
MarkerName=  RTHIGHLATERAL,
MarkerPlacement =Right.Leg.Seg.Thigh,
OptX="Off",OptY="Off",OptZ="Off",
WeightX=0.1,WeightY=0.1,WeightZ=0.1,
Model1=MotionAndParameterOptimizationModel, Model2= InverseDynamicModel,
sRelOptScalingOnOff="Off",
ReadsRelOptFromFile = "On",
sRelCustomScalingOnOff = "Off"
)= {
  sRelOpt = {0.0, 0.0, 0.0}; // This is ignored when ReadsRelOptFromFile = "On"
};
#endif

// Marker on the Right Superior Thigh
#ifndef EXCLUDE_MARKER_RTHIGHSUPERIOR
CreateMarkerDriverEx RTHIGHSUPERIOR (
MarkerName=  RTHIGHSUPERIOR,
MarkerPlacement =Right.Leg.Seg.Thigh,
OptX="Off",OptY="Off",OptZ="Off",
WeightX=0.1,WeightY=0.1,WeightZ=0.1,
Model1=MotionAndParameterOptimizationModel, Model2= InverseDynamicModel,
sRelOptScalingOnOff="Off",
ReadsRelOptFromFile = "On",
sRelCustomScalingOnOff = "Off"
)= {
  sRelOpt = {0.0, 0.0, 0.0}; // This is ignored when ReadsRelOptFromFile = "On"
};
#endif

// Marker on the Right Inferior Thigh
#ifndef  EXCLUDE_MARKER_RTHIGHINFERIOR
CreateMarkerDriverEx RTHIGHINFERIOR(
MarkerName=  RTHIGHINFERIOR,
MarkerPlacement =Right.Leg.Seg.Thigh,
OptX="Off",OptY="Off",OptZ="Off",
WeightX=0.1,WeightY=0.1,WeightZ=0.1,
Model1=MotionAndParameterOptimizationModel, Model2= InverseDynamicModel,
sRelOptScalingOnOff="Off",
ReadsRelOptFromFile = "On",
sRelCustomScalingOnOff = "Off"
)= {
  sRelOpt = {0.0, 0.0, 0.0}; // This is ignored when ReadsRelOptFromFile = "On"
};
#endif
#endif


#if STATIC_DRIVERSET == 1
// Marker on the Right Medial Knee
CreateMarkerDriverEx RKNEEMEDIAL (
MarkerName= RKNEEMEDIAL,
MarkerPlacement=Right.Leg.Seg.Thigh,
OptX="Off",OptY="Off",OptZ="Off",
WeightX=1.0,WeightY=1.0,WeightZ=1.0,
Model1=MotionAndParameterOptimizationModel, Model2= InverseDynamicModel,
sRelOptScalingOnOff="Off",
ReadsRelOptFromFile = "Off",
sRelCustomScalingOnOff = "On"
) = {
  sRelOpt = .RKNEEMEDIAL_MRI;
  //  sRelOpt = {-0.263233,-2.16849, -45.6692}/1000.0;
  //  sRelOptDelta = {-0.01,0.0,-13.0}/1000;
};
#endif

// Marker on the Right Lateral Knee
CreateMarkerDriverEx RKNEELATERAL (
MarkerName= RKNEELATERAL,
MarkerPlacement=Right.Leg.Seg.Thigh,
OptX="Off",OptY="Off",OptZ="Off",
WeightX=1.0,WeightY=1.0,WeightZ=1.0,
Model1=MotionAndParameterOptimizationModel, Model2= InverseDynamicModel,
sRelOptScalingOnOff="Off",
ReadsRelOptFromFile = "Off",
sRelCustomScalingOnOff = "On"
) = {
  sRelOpt = .RKNEELATERAL_MRI;
  //  sRelOpt = {-3.73108,-5.31682,41.0013}/1000.0;
  //  sRelOptDelta = {-0.01,0.0,13.0+15.0}/1000;
};


#if STATIC_DRIVERSET == 0
// Marker on the Right Lateral Shank
#ifndef EXCLUDE_MARKER_RSHANKLATERAL
CreateMarkerDriverEx RSHANKLATERAL (
MarkerName= RSHANKLATERAL,
MarkerPlacement=Right.Leg.Seg.Shank,
OptX="Off",OptY="Off",OptZ="Off",
WeightX=0.1,WeightY=0.1,WeightZ=0.1,
Model1=MotionAndParameterOptimizationModel, Model2= InverseDynamicModel,
sRelOptScalingOnOff="Off",
ReadsRelOptFromFile = "On",
sRelCustomScalingOnOff = "Off"
) = {
  sRelOpt = {0.0, 0.0, 0.0}; // This is ignored when ReadsRelOptFromFile = "On"
};
#endif

// Marker on the Right Superior Shank
#ifndef EXCLUDE_MARKER_RSHANKSUPERIOR
CreateMarkerDriverEx RSHANKSUPERIOR (
MarkerName= RSHANKSUPERIOR,
MarkerPlacement=Right.Leg.Seg.Shank,
OptX="Off",OptY="Off",OptZ="Off",
WeightX=0.1,WeightY=0.1,WeightZ=0.1,
Model1=MotionAndParameterOptimizationModel, Model2= InverseDynamicModel,
sRelOptScalingOnOff="Off",
ReadsRelOptFromFile = "On",
sRelCustomScalingOnOff = "Off"
) = {
  sRelOpt = {0.0, 0.0, 0.0}; // This is ignored when ReadsRelOptFromFile = "On"
};
#endif

// Marker on the Right Inferior Shank
#ifndef EXCLUDE_MARKER_RSHANKINFERIOR
CreateMarkerDriverEx RSHANKINFERIOR (
MarkerName= RSHANKINFERIOR,
MarkerPlacement=Right.Leg.Seg.Shank,
OptX="Off",OptY="Off",OptZ="Off",
WeightX=0.1,WeightY=0.1,WeightZ=0.1,
Model1=MotionAndParameterOptimizationModel, Model2= InverseDynamicModel,
sRelOptScalingOnOff="Off",
ReadsRelOptFromFile = "On",
sRelCustomScalingOnOff = "Off"
) = {
  sRelOpt = {0.0, 0.0, 0.0}; // This is ignored when ReadsRelOptFromFile = "On"
};
#endif
#endif

#ifndef EXCLUDE_MARKER_RANKLELATERAL
// Marker on the Right Lateral Ankle
CreateMarkerDriverEx RANKLELATERAL (
MarkerName= RANKLELATERAL,
MarkerPlacement=Right.Leg.Seg.Shank,
OptX="Off",OptY="Off",OptZ="Off",
WeightX=1.0,WeightY=1.0,WeightZ=1.0,
Model1=MotionAndParameterOptimizationModel, Model2= InverseDynamicModel,
sRelOptScalingOnOff="Off",
ReadsRelOptFromFile = "Off",
sRelCustomScalingOnOff = "On"
) = {
  sRelOpt = .RANKLELATERAL_MRI;
  //  sRelOpt = {-28.6306,-401.411,30.2859}/1000.0;
  //  sRelOptDelta = {0,0.0,10.0+15}/1000;
};
#endif

#if STATIC_DRIVERSET == 1
//// Marker on the Right Medial Ankle
CreateMarkerDriverEx RANKLEMEDIAL (
MarkerName= RANKLEMEDIAL,
MarkerPlacement=Right.Leg.Seg.Shank,
OptX="Off",OptY="Off",OptZ="Off",
WeightX=1.0,WeightY=1.0,WeightZ=1.0,
Model1=MotionAndParameterOptimizationModel, Model2= InverseDynamicModel,
sRelOptScalingOnOff="Off",
ReadsRelOptFromFile = "Off",
sRelCustomScalingOnOff = "On"
) = {
  sRelOpt = .RANKLEMEDIAL_MRI;
  //  sRelOpt = {3.86233,-388.474,-30.0403}/1000.0;
  //  sRelOptDelta = {-10,0.0,-10.0}/1000;
};
#endif

#ifndef EXCLUDE_MARKER_RTOEMEDIAL
// Marker on the Right Toe medial
CreateMarkerDriverEx RTOEMEDIAL (
MarkerName= RTOEMEDIAL,
MarkerPlacement=Right.Leg.Seg.Foot,
OptX="Off", OptY="Off", OptZ="Off",
WeightX=1.0,WeightY=1.0,WeightZ=1.0,
Model1=MotionAndParameterOptimizationModel, Model2= InverseDynamicModel,
sRelOptScalingOnOff="Off",
ReadsRelOptFromFile = "Off",
sRelCustomScalingOnOff = "On"
) = {
  sRelOpt = .RTOEMEDIAL_MRI;
};
#endif

#ifndef EXCLUDE_MARKER_RTOELATERAL
// Marker on the Right Toe lateral
CreateMarkerDriverEx RTOELATERAL (
MarkerName= RTOELATERAL,
MarkerPlacement=Right.Leg.Seg.Foot,
OptX="Off", OptY="Off", OptZ="Off",
WeightX=1.0,WeightY=1.0,WeightZ=1.0,
Model1=MotionAndParameterOptimizationModel, Model2= InverseDynamicModel,
sRelOptScalingOnOff="Off",
ReadsRelOptFromFile = "Off",
sRelCustomScalingOnOff = "On"
) = {
  sRelOpt = .RTOELATERAL_MRI;
};
#endif

// Marker on the Right Heel
#ifndef EXCLUDE_MARKER_RHEEL
CreateMarkerDriverEx RHEEL (
MarkerName= RHEEL ,
MarkerPlacement=Right.Leg.Seg.Foot,
OptX="Off", OptY="Off", OptZ="Off",
WeightX=1.0,WeightY=1.0,WeightZ=1.0,
Model1=MotionAndParameterOptimizationModel, Model2= InverseDynamicModel,
sRelOptScalingOnOff="Off",
ReadsRelOptFromFile = "Off",
sRelCustomScalingOnOff = "On"
) = {
  sRelOpt =  .RHEEL_MRI;
};
#endif

// Marker on the Right Toe
#ifndef EXCLUDE_MARKER_RTOE
CreateMarkerDriverEx RTOE (
MarkerName= RTOE ,
MarkerPlacement=Right.Leg.Seg.Foot,
OptX="Off", OptY="Off", OptZ="Off",
WeightX=1.0,WeightY=1.0,WeightZ=1.0,
Model1=MotionAndParameterOptimizationModel, Model2= InverseDynamicModel,
sRelOptScalingOnOff="Off",
ReadsRelOptFromFile = "Off",
sRelCustomScalingOnOff = "On"
) = {
  sRelOpt =  .RTOE_MRI;
};

#endif

///// Left Side Markers

#if STATIC_DRIVERSET == 0
// Marker on the Left Lateral Thigh
#ifndef EXCLUDE_MARKER_LTHIGHLATERAL
CreateMarkerDriverEx LTHIGHLATERAL (
MarkerName=  LTHIGHLATERAL,
MarkerPlacement =Left.Leg.Seg.Thigh,
OptX="Off",OptY="Off",OptZ="Off",
WeightX=0.1,WeightY=0.1,WeightZ=0.1,
Model1=MotionAndParameterOptimizationModel, Model2= InverseDynamicModel,
sRelOptScalingOnOff="Off",
ReadsRelOptFromFile = "On",
sRelCustomScalingOnOff = "Off"
)= {
  sRelOpt = {0.0, 0.0, 0.0}; // This is ignored when ReadsRelOptFromFile = "On"
};
#endif

// Marker on the Left Superior Thigh
#ifndef EXCLUDE_MARKER_LTHIGHSUPERIOR
CreateMarkerDriverEx LTHIGHSUPERIOR (
MarkerName=  LTHIGHSUPERIOR,
MarkerPlacement =Left.Leg.Seg.Thigh,
OptX="Off",OptY="Off",OptZ="Off",
WeightX=0.1,WeightY=0.1,WeightZ=0.1,
Model1=MotionAndParameterOptimizationModel, Model2= InverseDynamicModel,
sRelOptScalingOnOff="Off",
ReadsRelOptFromFile = "On",
sRelCustomScalingOnOff = "Off"
)= {
  sRelOpt = {0.0, 0.0, 0.0}; // This is ignored when ReadsRelOptFromFile = "On"
};
#endif

// Marker on the Left Inferior Thigh
#ifndef EXCLUDE_MARKER_LTHIGHINFERIOR
CreateMarkerDriverEx LTHIGHINFERIOR (
MarkerName=  LTHIGHINFERIOR,
MarkerPlacement =Left.Leg.Seg.Thigh,
OptX="Off",OptY="Off",OptZ="Off",
WeightX=0.1,WeightY=0.1,WeightZ=0.1,
Model1=MotionAndParameterOptimizationModel, Model2= InverseDynamicModel,
sRelOptScalingOnOff="Off",
ReadsRelOptFromFile = "On",
sRelCustomScalingOnOff = "Off"
)= {
  sRelOpt = {0.0, 0.0, 0.0}; // This is ignored when ReadsRelOptFromFile = "On"
};
#endif
#endif

#if STATIC_DRIVERSET == 1
//// Marker on the Left Medial Knee
CreateMarkerDriverEx LKNEEMEDIAL (
MarkerName= LKNEEMEDIAL,
MarkerPlacement=Left.Leg.Seg.Thigh,
OptX="Off",OptY="Off",OptZ="Off",
WeightX=1.0,WeightY=1.0,WeightZ=1.0,
Model1=MotionAndParameterOptimizationModel, Model2= InverseDynamicModel,
sRelOptScalingOnOff="Off",
ReadsRelOptFromFile = "Off",
sRelCustomScalingOnOff = "On"
) = {
  sRelOpt =  .LKNEEMEDIAL_MRI;
  //    sRelOpt = {-0.263233,-2.16849, 45.6692}/1000.0;
  //    sRelOptDelta = {-0.01,0.0,13.0}/1000;
};
#endif

//// Marker on the Left Lateral Knee
CreateMarkerDriverEx LKNEELATERAL (
MarkerName= LKNEELATERAL,
MarkerPlacement=Left.Leg.Seg.Thigh,
OptX="Off",OptY="Off",OptZ="Off",
WeightX=1.0,WeightY=1.0,WeightZ=1.0,
Model1=MotionAndParameterOptimizationModel, Model2= InverseDynamicModel,
sRelOptScalingOnOff="Off",
ReadsRelOptFromFile = "Off",
sRelCustomScalingOnOff = "On"
) = {
  sRelOpt =  .LKNEELATERAL_MRI;
  //  sRelOpt = {-3.73108,-5.31682,-41.0013}/1000.0;
  //  sRelOptDelta = {-0.01,0.0,-13.0-15.0}/1000;
};


#if STATIC_DRIVERSET == 0
// Marker on the Left Lateral Shank
#ifndef EXCLUDE_MARKER_LSHANKLATERAL
CreateMarkerDriverEx LSHANKLATERAL (
MarkerName= LSHANKLATERAL,
MarkerPlacement=Left.Leg.Seg.Shank,
OptX="Off",OptY="Off",OptZ="Off",
WeightX=0.1,WeightY=0.1,WeightZ=0.1,
Model1=MotionAndParameterOptimizationModel, Model2= InverseDynamicModel,
sRelOptScalingOnOff="Off",
ReadsRelOptFromFile = "On",
sRelCustomScalingOnOff = "Off"
) = {
  sRelOpt = {0.0, 0.0, 0.0}; // This is ignored when ReadsRelOptFromFile = "On"
};
#endif

// Marker on the Right Superior Shank
#ifndef EXCLUDE_MARKER_LSHANKSUPERIOR
CreateMarkerDriverEx LSHANKSUPERIOR (
MarkerName= LSHANKSUPERIOR,
MarkerPlacement=Left.Leg.Seg.Shank,
OptX="Off",OptY="Off",OptZ="Off",
WeightX=0.1,WeightY=0.1,WeightZ=0.1,
Model1=MotionAndParameterOptimizationModel, Model2= InverseDynamicModel,
sRelOptScalingOnOff="Off",
ReadsRelOptFromFile = "On",
sRelCustomScalingOnOff = "Off"
) = {
  sRelOpt = {0.0, 0.0, 0.0}; // This is ignored when ReadsRelOptFromFile = "On"
};
#endif

// Marker on the Left Inferior Shank
#ifndef EXCLUDE_MARKER_LSHANKINFERIOR
CreateMarkerDriverEx LSHANKINFERIOR (
MarkerName= LSHANKINFERIOR,
MarkerPlacement=Left.Leg.Seg.Shank,
OptX="Off",OptY="Off",OptZ="Off",
WeightX=0.1,WeightY=0.1,WeightZ=0.1,
Model1=MotionAndParameterOptimizationModel, Model2= InverseDynamicModel,
sRelOptScalingOnOff="Off",
ReadsRelOptFromFile = "On",
sRelCustomScalingOnOff = "Off"
) = {
  sRelOpt = {0.0, 0.0, 0.0}; // This is ignored when ReadsRelOptFromFile = "On"
};
#endif
#endif

#ifndef EXCLUDE_MARKER_LANKLELATERAL
// Marker on the Left Lateral Ankle
CreateMarkerDriverEx LANKLELATERAL (
MarkerName= LANKLELATERAL,
MarkerPlacement=Left.Leg.Seg.Shank,
OptX="Off",OptY="Off",OptZ="Off",
WeightX=1.0,WeightY=1.0,WeightZ=1.0,
Model1=MotionAndParameterOptimizationModel, Model2= InverseDynamicModel,
sRelOptScalingOnOff="Off",
ReadsRelOptFromFile = "Off",
sRelCustomScalingOnOff = "On"
) = {
  sRelOpt =  .LANKLELATERAL_MRI;
  //      sRelOpt = {-28.6306,-401.411,-30.2859}/1000.0;
  //  sRelOptDelta = {0,0.0,-10.0-15.0}/1000;
};
#endif

#if STATIC_DRIVERSET == 1
// Marker on the Left Medial Ankle
CreateMarkerDriverEx LANKLEMEDIAL (
MarkerName= LANKLEMEDIAL,
MarkerPlacement=Left.Leg.Seg.Shank,
OptX="Off",OptY="Off",OptZ="Off",
WeightX=1.0,WeightY=1.0,WeightZ=1.0,
Model1=MotionAndParameterOptimizationModel, Model2= InverseDynamicModel,
sRelOptScalingOnOff="Off",
ReadsRelOptFromFile = "Off",
sRelCustomScalingOnOff = "On"
) = {
  sRelOpt =  .LANKLEMEDIAL_MRI;
  //  sRelOpt = {3.86233,-388.474,30.0403}/1000.0;
  //  sRelOptDelta = {-10.0,0.0,10.0}/1000;
};
#endif

#ifndef EXCLUDE_MARKER_LTOEMEDIAL
// Marker on the Left Toe medial
CreateMarkerDriverEx LTOEMEDIAL (
MarkerName= LTOEMEDIAL,
MarkerPlacement=Left.Leg.Seg.Foot ,
OptX="Off", OptY="Off", OptZ="Off",
WeightX=1.0,WeightY=1.0,WeightZ=1.0,
Model1=MotionAndParameterOptimizationModel, Model2= InverseDynamicModel,
sRelOptScalingOnOff="Off",
ReadsRelOptFromFile = "Off",
sRelCustomScalingOnOff = "On"
) = {
  sRelOpt = .LTOEMEDIAL_MRI;
};
#endif

#ifndef EXCLUDE_MARKER_LTOELATERAL
// Marker on the Left Toe lateral
CreateMarkerDriverEx LTOELATERAL (
MarkerName= LTOELATERAL,
MarkerPlacement=Left.Leg.Seg.Foot ,
OptX="Off", OptY="Off", OptZ="Off",
WeightX=1.0,WeightY=1.0,WeightZ=1.0,
Model1=MotionAndParameterOptimizationModel, Model2= InverseDynamicModel,
sRelOptScalingOnOff="Off",
ReadsRelOptFromFile = "Off",
sRelCustomScalingOnOff = "On"
) = {
  sRelOpt = .LTOELATERAL_MRI;
};
#endif

// Marker on the Left Heel
#ifndef EXCLUDE_MARKER_LHEEL
CreateMarkerDriverEx LHEEL (
MarkerName= LHEEL ,
MarkerPlacement=Left.Leg.Seg.Foot,
OptX="Off", OptY="Off", OptZ="Off",
WeightX=1.0,WeightY=1.0,WeightZ=1.0,
Model1=MotionAndParameterOptimizationModel, Model2= InverseDynamicModel,
sRelOptScalingOnOff="Off",
ReadsRelOptFromFile = "Off",
sRelCustomScalingOnOff = "On"
) = {
  sRelOpt =  .LHEEL_MRI;
};
#endif
// Marker on the Left Toe
#ifndef EXCLUDE_MARKER_LTOE
CreateMarkerDriverEx LTOE (
MarkerName= LTOE ,
MarkerPlacement=Left.Leg.Seg.Foot,
OptX="Off", OptY="Off", OptZ="Off",
WeightX=1.0,WeightY=1.0,WeightZ=1.0,
Model1=MotionAndParameterOptimizationModel, Model2= InverseDynamicModel,
sRelOptScalingOnOff="Off",
ReadsRelOptFromFile = "Off",
sRelCustomScalingOnOff = "On"
) = {
  sRelOpt =  .LTOE_MRI;
};
#endif

//#endif
