#ifndef DEFINE_LOCAL_COORDINATE
#define DEFINE_LOCAL_COORDINATE(rNode) sRel = (..CustomMarkerScaling(rNode)-.rOffset)*.AOffset;
#endif

#ifndef PATIENT_SPECIFIC_HIP_JOINT
#define PATIENT_SPECIFIC_HIP_JOINT 1
#endif

// 0: Not patient-specific, 1: Anatomical landmark-based, 2: Surface fit.
#ifndef PATIENT_SPECIFIC_KNEE_JOINTAXIS
#define PATIENT_SPECIFIC_KNEE_JOINTAXIS 2
#endif

#ifndef PATIENT_SPECIFIC_PATELLAFEMORAL_JOINTAXIS
#define PATIENT_SPECIFIC_PATELLAFEMORAL_JOINTAXIS 2
#endif

#ifndef PATIENT_SPECIFIC_PATELLATENDON
#define PATIENT_SPECIFIC_PATELLATENDON 1
#endif

#ifndef PATIENT_SPECIFIC_ANKLE_JOINTAXIS
#define PATIENT_SPECIFIC_ANKLE_JOINTAXIS 1
#endif

#ifndef PATIENT_SPECIFIC_SUBTALAR_JOINTAXIS
#define PATIENT_SPECIFIC_SUBTALAR_JOINTAXIS 1
#endif

#define LABEL ""

#define PATELLA_TENDON_INFINITE_STIFFNESS 1


/*** Moving axis knee model definitions ***/
#define TF_MOVING_AXIS_KNEE 1
#define PF_MOVING_AXIS_KNEE 1

#include "Classes.any"
