AnyFolder Right = {

AnyFileVar FilenameThigh = "source/Femur_source_R";

AnyFileVar FilenameShank = "source/Tibia_source_R";

AnyFileVar FilenameFibula = "source/Fibula_source_R";

AnyFileVar FilenamePatella= "source/Patella_source_R";

AnyFileVar FilenameTalus= "source/Talus_source_R";

AnyFileVar FilenameFoot= "source/Foot_source_R";

AnyFileVar FilenamePelvis= "source/Pelvis_source";


};
