AnyFolder Right = {
  AnyFolder R_FemurLandmarks ={
      AnyVec3 HipJointCenter = {-0.0258779700392,0.0256017103055,0.4545872434864};
      AnyVec3 LateralDistalFemurEdge = {-0.0510847000000,0.0053248800000,0.0427153000000};
      AnyVec3 MedialDistalFemurEdge = {0.0161349000000,0.0072123200000,0.0421007000000};
      AnyVec3 FemurNotch = {-0.0151415000000,-0.0047503500000,0.0457404000000};
      AnyVec3 MedEpicondyle = {0.0227924000000,0.0052553900000,0.0615513000000};
      AnyVec3 LatEpicondyle = {-0.0565869000000,0.0097099600000,0.0650495000000};

    AnyFolder FemurRegistration = {
      AnyVec3 Lateral_TF_EFC = {-0.0439855480051,-0.0001082747404,0.0886801905317};
      AnyVec3 Lateral_TF_FFC = {-0.0494751740270,0.0140096373214,0.0543089264993};
      AnyVec3 Medial_TF_EFC = {0.0005899411412,0.0073783626620,0.0592012568775};
      AnyVec3 Medial_TF_FFC = {-0.0011606907326,0.0245072356712,0.0549778473714};
      AnyVec3 Medial_PF_EFC = {-0.0165489043526,-0.0218350318775,0.0607127362589};
      AnyVec3 Medial_PF_FFC = {-0.0159856109272,-0.0065934515913,0.0583402174809};
      AnyVec3 Lateral_PF_EFC = {-0.0310575398754,-0.0252453418677,0.0605913987938};
      AnyVec3 Lateral_PF_FFC = {-0.0306014609597,-0.0104598656439,0.0583771158669};
    };

    AnyFolder TibiaRegistration = {
      AnyVec3 Lateral_TF_FFC = {-0.0492531524562,0.0226660158604,0.0517736278037};
      AnyVec3 Medial_TF_FFC = {-0.0017663571754,0.0099745708735,0.0464007575447};
      AnyVec3 Lateral_TF = {-0.0457175426484,-0.0016809486302,0.0719099971306};
      AnyVec3 Medial_TF = {0.0000489464739,-0.0026888016024,0.0754069167661};
    };
    AnyFolder PatellaRegistration = {
      AnyVec3 Medial_PF_FFC = {-0.0158342169387,-0.0162636345875,0.0849217571987};
      AnyVec3 Lateral_PF_FFC = {-0.0308062568508,-0.0173863941157,0.0866968519434};
      AnyVec3 Medial_PF = {-0.0322265386374,0.0167308160760,0.0799875837435};
      AnyVec3 Lateral_PF = {-0.0180160147549,0.0139950492362,0.0792642899071};
    };

    Main.Studies.HumanModel.BodyModel.Right.Leg.Seg.Thigh = {
    AnyRefNode HipJointCenter = {
      AnyVec3 sRel_us = {-0.0258779700392,0.0256017103055,0.4545872434864};
      DEF_REFNODE_CUSTOM_SCALING_1arg(sRel_us)
    };

    AnyRefNode LateralDistalFemurEdge = {
      AnyVec3 sRel_us = {-0.0510847000000,0.0053248800000,0.0427153000000};
      DEF_REFNODE_CUSTOM_SCALING_1arg(sRel_us)
//      AnyDrawNode drw ={ScaleXYZ=0.002*{1,1,1};RGB={0,1,0};};
    };

    AnyRefNode MedialDistalFemurEdge = {
      AnyVec3 sRel_us = {0.0161349000000,0.0072123200000,0.0421007000000};
      DEF_REFNODE_CUSTOM_SCALING_1arg(sRel_us)
//      AnyDrawNode drw ={ScaleXYZ=0.002*{1,1,1};RGB={0,1,0};};
    };

    AnyRefNode FemurNotch = {
      AnyVec3 sRel_us = {-0.0151415000000,-0.0047503500000,0.0457404000000};
      DEF_REFNODE_CUSTOM_SCALING_1arg(sRel_us)
//      AnyDrawNode drw ={ScaleXYZ=0.002*{1,1,1};RGB={0,1,0};};
    };

    AnyRefNode MedEpicondyle = {
      AnyVec3 sRel_us = {0.0227924000000,0.0052553900000,0.0615513000000};
      DEF_REFNODE_CUSTOM_SCALING_1arg(sRel_us)
    };

    AnyRefNode LatEpicondyle = {
      AnyVec3 sRel_us = {-0.0565869000000,0.0097099600000,0.0650495000000};
      DEF_REFNODE_CUSTOM_SCALING_1arg(sRel_us)
    };
    AnyRefNode Medial_PF  = {
      sRel = {-0.0147455259994,-0.0087010674107,0.0635152440498};
    };
    AnyRefNode Medial_TF  = {
      sRel = {-0.0023607442865,0.0117389452950,0.0606572434627};
    };
    AnyRefNode Lateral_PF  = {
      sRel = {-0.0289351508146,-0.0112636326641,0.0620889273355};
    };
    AnyRefNode Lateral_TF  = {
      sRel = {-0.0480435977039,0.0090692134960,0.0569469109825};
    };
  };
};

  AnyFolder R_TalusLandmarks = {
  Main.Studies.HumanModel.BodyModel.Right.Leg.Seg.Talus = {
    AnyRefNode Talocrural_MED = {
      AnyVec3 sRel_us = {-0.0028345528307,0.0182813601873,-0.3327339674512};
      DEF_REFNODE_CUSTOM_SCALING_1arg(sRel_us)
    };

    AnyRefNode Talocrural_LAT = {
      AnyVec3 sRel_us = {-0.0165819857461,0.0252407970095,-0.3330948550264};
      DEF_REFNODE_CUSTOM_SCALING_1arg(sRel_us)
    };

    AnyRefNode TalocruralJoint_Origin = {
      AnyVec3 sRel_us = {-0.0097082692884,0.0217610785984,-0.3329144112388};
      DEF_REFNODE_CUSTOM_SCALING_1arg(sRel_us)
    };

    AnyRefNode Calcaneal_facet = {
      AnyVec3 sRel_us = {-0.0102589569342,0.0342583644848,-0.3601505608620};
      DEF_REFNODE_CUSTOM_SCALING_1arg(sRel_us)
    };

    AnyRefNode Sustentalculum_facet = {
      AnyVec3 sRel_us = {-0.0105282917798,0.0018500236965,-0.3316213704756};
      DEF_REFNODE_CUSTOM_SCALING_1arg(sRel_us)
    };

    AnyRefNode SubtalarJoint_Origin = {
      AnyVec3 sRel_us = {-0.0103936243570,0.0180541940906,-0.3458859656688};
      DEF_REFNODE_CUSTOM_SCALING_1arg(sRel_us)
    };
  };
};

  AnyFolder R_ShankLandmarks = {
  Main.Studies.HumanModel.BodyModel.Right.Leg.Seg.Shank = {
    AnyRefNode LateralTibiaPlateau = {
      AnyVec3 sRel_us = {-0.0404877000000,0.0141594000000,0.0346725000000};
      DEF_REFNODE_CUSTOM_SCALING_1arg(sRel_us)
    };

    AnyRefNode MedialTibiaPlateau = {
      AnyVec3 sRel_us = {0.0018845900000,0.0097249100000,0.0328693000000};
      DEF_REFNODE_CUSTOM_SCALING_1arg(sRel_us)
    };

    AnyRefNode MedialTibiaEdge = {
      AnyVec3 sRel_us = {0.0179988000000,0.0125078000000,0.0320846000000};
      DEF_REFNODE_CUSTOM_SCALING_1arg(sRel_us)
    };

    AnyRefNode LateralTibiaEdge = {
      AnyVec3 sRel_us = {-0.0546362000000,0.0118405000000,0.0353680000000};
      DEF_REFNODE_CUSTOM_SCALING_1arg(sRel_us)
    };

    AnyRefNode MedialTibiaIntercondylar = {
      AnyVec3 sRel_us = {-0.0105552000000,0.0164353000000,0.0435961000000};
      DEF_REFNODE_CUSTOM_SCALING_1arg(sRel_us)
    };

    AnyRefNode Talocrural_MED = {
      AnyVec3 sRel_us = {-0.0028345528307,0.0182813601873,-0.3327339674512};
      DEF_REFNODE_CUSTOM_SCALING_1arg(sRel_us)
    };

    AnyRefNode Talocrural_LAT = {
      AnyVec3 sRel_us = {-0.0165819857461,0.0252407970095,-0.3330948550264};
      DEF_REFNODE_CUSTOM_SCALING_1arg(sRel_us)
    };

    AnyRefNode TalocruralJoint_Origin = {
      AnyVec3 sRel_us = {-0.0097082692884,0.0217610785984,-0.3329144112388};
      DEF_REFNODE_CUSTOM_SCALING_1arg(sRel_us)
    };

    AnyRefNode PT_Tibia = {
      AnyVec3 sRel_us = {-0.0327840000000,-0.0173400000000,-0.0058918500000};
      DEF_REFNODE_CUSTOM_SCALING_1arg(sRel_us)
    };
  };
};

  AnyFolder R_PatellaLandmarks = {
  Main.Studies.HumanModel.BodyModel.Right.Leg.Seg.Patella = {
    AnyRefNode PatellaOrigin = {
      AnyVec3 sRel_us = {-0.0216226900000,-0.0420166000000,0.0708088500000};
      DEF_REFNODE_CUSTOM_SCALING_1arg(sRel_us)
    };

    AnyRefNode MedNodeBL = {
      AnyVec3 sRel_us = {-0.0011371600000,-0.0477915000000,0.0698259000000};
      DEF_REFNODE_CUSTOM_SCALING_1arg(sRel_us)
      AnyDrawNode drw ={ScaleXYZ=0.002*{1,1,1};RGB={0,0,0};};
    };

    AnyRefNode LatNodeBL = {
      AnyVec3 sRel_us = {-0.0433815000000,-0.0386723000000,0.0726099000000};
      DEF_REFNODE_CUSTOM_SCALING_1arg(sRel_us)
      AnyDrawNode drw ={ScaleXYZ=0.002*{1,1,1};RGB={0,0,0};};
    };

    AnyRefNode SupNodeBL = {
      AnyVec3 sRel_us = {-0.0207499000000,-0.0407174000000,0.0918082000000};
      DEF_REFNODE_CUSTOM_SCALING_1arg(sRel_us)
      AnyDrawNode drw ={ScaleXYZ=0.002*{1,1,1};RGB={0,0,0};};
    };

    AnyRefNode InfNodeBL = {
      AnyVec3 sRel_us = {-0.0212222000000,-0.0408852000000,0.0489914000000};
      DEF_REFNODE_CUSTOM_SCALING_1arg(sRel_us)
      AnyDrawNode drw ={ScaleXYZ=0.002*{1,1,1};RGB={0,0,0};};
    };

    AnyRefNode PT_Patella = {
      AnyVec3 sRel_us = {-0.0217087000000,-0.0446653000000,0.0527742000000};
      DEF_REFNODE_CUSTOM_SCALING_1arg(sRel_us)
    };
  };
};
};

AnyFolder Left = {
  AnyFolder L_FemurLandmarks ={
    AnyFolder FemurRegistration = {
      AnyVec3 Lateral_TF_EFC = {0.1829212865461,-0.0537018016803,0.0609831001460};
      AnyVec3 Lateral_TF_FFC = {0.1975057517170,-0.0346689745703,0.0586113984269};
      AnyVec3 Medial_TF_EFC = {0.1476937081977,-0.0258187765643,0.0639344898252};
      AnyVec3 Medial_TF_FFC = {0.1507201672483,-0.0141827822351,0.0628292107355};
      AnyVec3 Medial_PF_EFC = {0.1511782590087,-0.0566880523480,0.0641170620970};
      AnyVec3 Medial_PF_FFC = {0.1510541049029,-0.0405462035139,0.0628048625572};
      AnyVec3 Lateral_PF_EFC = {0.1727246336497,-0.0660047973522,0.0653987292355};
      AnyVec3 Lateral_PF_FFC = {0.1790845685175,-0.0596310734398,0.0522503571555};
    };
  Main.Studies.HumanModel.BodyModel.Left.Leg.Seg.Thigh = {
    AnyRefNode HipJointCenter = {
      AnyVec3 sRel_us = {0.1434450102707,-0.0111723197651,0.4677525065697};
      DEF_REFNODE_CUSTOM_SCALING_1arg(sRel_us)
    };

    AnyRefNode LateralDistalFemurEdge = {
      AnyVec3 sRel_us = {0.2020450000000,-0.0530014000000,0.0510902000000};
      DEF_REFNODE_CUSTOM_SCALING_1arg(sRel_us)
    };

    AnyRefNode MedialDistalFemurEdge = {
      AnyVec3 sRel_us = {0.1447750000000,-0.0224891000000,0.0437455000000};
      DEF_REFNODE_CUSTOM_SCALING_1arg(sRel_us)
    };

    AnyRefNode FemurNotch = {
      AnyVec3 sRel_us = {0.1689820000000,-0.0424174000000,0.0526749000000};
      DEF_REFNODE_CUSTOM_SCALING_1arg(sRel_us)
    };

    AnyRefNode MedEpicondyle = {
      AnyVec3 sRel_us = {0.1350540000000,-0.0206753000000,0.0682663000000};
      DEF_REFNODE_CUSTOM_SCALING_1arg(sRel_us)
    };

    AnyRefNode LatEpicondyle = {
      AnyVec3 sRel_us = {0.2050370000000,-0.0522412000000,0.0776738000000};
      DEF_REFNODE_CUSTOM_SCALING_1arg(sRel_us)
    };
    AnyRefNode Lateral_TF = {
      sRel = {0.1822097050906,-0.0472658952066,0.0754934838718};
    };
    AnyRefNode Lateral_PF = {
      sRel = {0.1773947149783,-0.0559607717747,0.0702484792172};
    };
    AnyRefNode Medial_TF = {
      sRel = {0.1452942778303,-0.0229863283019,0.0674350537795};
    };
    AnyRefNode Medial_PF = {
      sRel = {0.1546826933501,-0.0425349276022,0.0676911894534};
    };
  };
};

  AnyFolder R_TalusLandmarks = {
  Main.Studies.HumanModel.BodyModel.Left.Leg.Seg.Talus = {
    AnyRefNode Talocrural_MED = {
      AnyVec3 sRel_us = {0.2173168165649,-0.0402111884589,-0.3274477062010};
      DEF_REFNODE_CUSTOM_SCALING_1arg(sRel_us)
    };

    AnyRefNode Talocrural_LAT = {
      AnyVec3 sRel_us = {0.2305805011651,-0.0382609399482,-0.3259247249563};
      DEF_REFNODE_CUSTOM_SCALING_1arg(sRel_us)
    };

    AnyRefNode TalocruralJoint_Origin = {
      AnyVec3 sRel_us = {0.2239486588650,-0.0392360642035,-0.3266862155787};
      DEF_REFNODE_CUSTOM_SCALING_1arg(sRel_us)
    };

    AnyRefNode Calcaneal_facet = {
      AnyVec3 sRel_us = {0.2314495587636,-0.0282219366651,-0.3498253927912};
      DEF_REFNODE_CUSTOM_SCALING_1arg(sRel_us)
    };

    AnyRefNode Sustentalculum_facet = {
      AnyVec3 sRel_us = {0.2168818867860,-0.0583421642955,-0.3250108435974};
      DEF_REFNODE_CUSTOM_SCALING_1arg(sRel_us)
    };

    AnyRefNode SubtalarJoint_Origin = {
      AnyVec3 sRel_us = {0.2241657227748,-0.0432820504803,-0.3374181181943};
      DEF_REFNODE_CUSTOM_SCALING_1arg(sRel_us)
    };
  };
};

  AnyFolder R_ShankLandmarks = {
  Main.Studies.HumanModel.BodyModel.Left.Leg.Seg.Shank = {
    AnyRefNode MedialTibiaEdge = {
      AnyVec3 sRel_us = {0.1465440000000,-0.0191367000000,0.0354162000000};
      DEF_REFNODE_CUSTOM_SCALING_1arg(sRel_us)
    };

    AnyRefNode LateralTibiaEdge = {
      AnyVec3 sRel_us = {0.2116880000000,-0.0430017000000,0.0435132000000};
      DEF_REFNODE_CUSTOM_SCALING_1arg(sRel_us)
    };

    AnyRefNode MedialTibiaIntercondylar = {
      AnyVec3 sRel_us = {0.1705580000000,-0.0277029000000,0.0494032000000};
      DEF_REFNODE_CUSTOM_SCALING_1arg(sRel_us)
    };

    AnyRefNode Talocrural_MED = {
      AnyVec3 sRel_us = {0.2173168165649,-0.0402111884589,-0.3274477062010};
      DEF_REFNODE_CUSTOM_SCALING_1arg(sRel_us)
    };

    AnyRefNode Talocrural_LAT = {
      AnyVec3 sRel_us = {0.2305805011651,-0.0382609399482,-0.3259247249563};
      DEF_REFNODE_CUSTOM_SCALING_1arg(sRel_us)
    };

    AnyRefNode TalocruralJoint_Origin = {
      AnyVec3 sRel_us = {0.2239486588650,-0.0392360642035,-0.3266862155787};
      DEF_REFNODE_CUSTOM_SCALING_1arg(sRel_us)
    };

    AnyRefNode PT_Tibia = {
      AnyVec3 sRel_us = {0.1784160000000,-0.0653781000000,0.0048915800000};
      DEF_REFNODE_CUSTOM_SCALING_1arg(sRel_us)
    };
  };
};

  AnyFolder R_PatellaLandmarks = {
  Main.Studies.HumanModel.BodyModel.Left.Leg.Seg.Patella = {
    AnyRefNode PatellaOrigin = {
      AnyVec3 sRel_us = {0.1539182500000,-0.0795269750000,0.0811961750000};
      DEF_REFNODE_CUSTOM_SCALING_1arg(sRel_us)
    };

    AnyRefNode MedNodeBL = {
      AnyVec3 sRel_us = {0.1332480000000,-0.0736482000000,0.0778699000000};
      DEF_REFNODE_CUSTOM_SCALING_1arg(sRel_us)
    };

    AnyRefNode LatNodeBL = {
      AnyVec3 sRel_us = {0.1731200000000,-0.0873571000000,0.0865987000000};
      DEF_REFNODE_CUSTOM_SCALING_1arg(sRel_us)
    };

    AnyRefNode SupNodeBL = {
      AnyVec3 sRel_us = {0.1555700000000,-0.0760795000000,0.1009970000000};
      DEF_REFNODE_CUSTOM_SCALING_1arg(sRel_us)
    };

    AnyRefNode InfNodeBL = {
      AnyVec3 sRel_us = {0.1537350000000,-0.0810231000000,0.0593191000000};
      DEF_REFNODE_CUSTOM_SCALING_1arg(sRel_us)
    };

    AnyRefNode PT_Patella = {
      AnyVec3 sRel_us = {0.1501250000000,-0.0862284000000,0.0673938000000};
      DEF_REFNODE_CUSTOM_SCALING_1arg(sRel_us)
    };
  };
};
};
AnyFolder MRI_Markers = {
AnyVec3 LPSIS_MRI = {0.1262861141415,0.0622671160102,0.6111118063687};
AnyVec3 RPSIS_MRI = {-0.0155129178933,0.0949435354297,0.6056271979447};
AnyVec3 LASIS_MRI = {0.1594174844788,-0.0867154131267,0.5715557640946};
AnyVec3 RASIS_MRI = {-0.0942234590251,-0.0241074751209,0.5552576021599};
AnyVec3 LKNEELATERAL_MRI = {0.2247044555241,-0.0459591392048,0.0799320612801};
AnyVec3 RKNEELATERAL_MRI = {-0.0700062895959,0.0171374660584,0.0605091564313};
AnyVec3 LKNEEMEDIAL_MRI = {0.1172052328394,-0.0127994774672,0.0712787133490};
AnyVec3 RKNEEMEDIAL_MRI = {0.0447438138448,0.0174583498400,0.0705183580410};
AnyVec3 LANKLELATERAL_MRI = {0.2591289160284,-0.0217940268604,-0.3084554946469};
AnyVec3 RANKLELATERAL_MRI = {-0.0433884301650,0.0457339877903,-0.3296551739190};
AnyVec3 LANKLEMEDIAL_MRI = {0.1890826936391,-0.0296917956522,-0.3066373138620};
AnyVec3 RANKLEMEDIAL_MRI = {0.0230523488412,0.0138282395625,-0.3105293269454};
AnyVec3 LTOELATERAL_MRI = {0.2482223237420,-0.1579380947379,-0.3782455473836};
AnyVec3 RTOELATERAL_MRI = {-0.0847687469033,-0.0609784472175,-0.3862113223807};
AnyVec3 LTOEMEDIAL_MRI = {0.1760678029089,-0.1467129711119,-0.3685569830515};
AnyVec3 RTOEMEDIAL_MRI= {-0.0236612637189,-0.1082649110511,-0.3658465778684};
AnyVec3 LTOE_MRI = {0.1798086727470,-0.2101951030352,-0.3707416869078};
AnyVec3 RTOE_MRI = {-0.0500132203628,-0.1620359658681,-0.3681877581492};
AnyVec3 LHEEL_MRI = {0.2365390227101,0.0134632234635,-0.3669265339618};
AnyVec3 RHEEL_MRI = {0.0123025789024,0.0713962383500,-0.3778828555004};
};
