AnyFolder FemurLandmarks_CT ={
  AnyVec3 FemurNotch = {-0.0782275778876,-0.1242571183946,-0.6990866021050};
  AnyVec3 MedialDistalFemurEdge = {-0.0409529593497,-0.1294362208049,-0.7068784179688};
  AnyVec3 LateralDistalFemurEdge = {-0.1067931956185,-0.0985403368208,-0.7020032204522};

  AnyVec3 Medial_TF_EFC = {-0.0523224265415,-0.1389426177273,-0.6646435778297};
  AnyVec3 Lateral_TF_EFC = {-0.1022763297901,-0.1082005446281,-0.6718952397203};
  AnyVec3 Medial_TF_FFC = {-0.0499095861167,-0.1233558169730,-0.6878427312280};
  AnyVec3 Lateral_TF_FFC = {-0.0979927714110,-0.1031628030180,-0.6839668274202};

  AnyVec3 TF_Med_Axis = {-0.0523400786583,-0.1297261759580,-0.6865757923698};
  AnyVec3 TF_Lat_Axis = {-0.0992606168906,-0.1050761572658,-0.6832951960544};

  AnyFolder UnitVectors_CT = {
    //      // Length between Tibiofemoral EFCs m->l (Femur Registration)
    //      // Unit Vector directed along Tibiofemoral FFCs m->l (Femur Registration)
    AnyVar L1 = vnorm(Main.HumanModel.FemurLandmarks_CT.Lateral_TF_EFC - Main.HumanModel.FemurLandmarks_CT.Medial_TF_EFC,2.0);
    AnyVec3 e1 = (Main.HumanModel.FemurLandmarks_CT.Lateral_TF_FFC - Main.HumanModel.FemurLandmarks_CT.Medial_TF_FFC)/vnorm(Main.HumanModel.FemurLandmarks_CT.Lateral_TF_FFC - Main.HumanModel.FemurLandmarks_CT.Medial_TF_FFC);
        //      // Length between Tibiofemoral ECFs m->l (Femur Registration)
      //      // Unit Vector directed along Tibiofemoral FFCs m->l (Tibia Registration)
      //      AnyVar L3 = vnorm(Main.MRI_Data.Right.R_FemurLandmarks.FemurRegistration.Lateral_TF_EFC - Main.MRI_Data.Right.R_FemurLandmarks.FemurRegistration.Medial_TF_EFC,2.0);
      //      AnyVec3 e3 = (Main.MRI_Data.Right.R_FemurLandmarks.TibiaRegistration.Lateral_TF_FFC - Main.MRI_Data.Right.R_FemurLandmarks.TibiaRegistration.Medial_TF_FFC)/vnorm(Main.MRI_Data.Right.R_FemurLandmarks.TibiaRegistration.Lateral_TF_FFC -Main.MRI_Data.Right.R_FemurLandmarks.TibiaRegistration.Medial_TF_FFC);
  };
};

AnyFolder TibiaLandmarks_CT = {
  AnyVec3 MedialTibiaEdge = {-0.0464461399792,-0.1334283314527,-0.7157406154726};
  AnyVec3 LateralTibiaEdge = {-0.1117166328680,-0.0965482460969,-0.7086902174607};
  AnyVec3 MedialTibiaIntercondylar = {-0.0722786413741,-0.1191424513865,-0.7042187187857};
  AnyVec3 LateralTibiaIntercondylar = {-0.0830348823184,-0.1121301544322,-0.7026012850675};
  //      // Length between Tibiofemoral ECFs m->l (Femur Registration)
  //      // Unit Vector directed along Tibiofemoral FFCs m->l (Tibia Registration)
  //      AnyVar L3 = vnorm(Main.MRI_Data.Right.R_FemurLandmarks.FemurRegistration.Lateral_TF_EFC - Main.MRI_Data.Right.R_FemurLandmarks.FemurRegistration.Medial_TF_EFC,2.0);
  //      AnyVec3 e3 = (Main.MRI_Data.Right.R_FemurLandmarks.TibiaRegistration.Lateral_TF_FFC - Main.MRI_Data.Right.R_FemurLandmarks.TibiaRegistration.Medial_TF_FFC)/vnorm(Main.MRI_Data.Right.R_FemurLandmarks.TibiaRegistration.Lateral_TF_FFC -Main.MRI_Data.Right.R_FemurLandmarks.TibiaRegistration.Medial_TF_FFC);
};


Main.HumanModel.BodyModel.Right.Leg.Seg.Thigh = {

  AnyRefNode LateralDistalFemurEdge = {
    sRel = .CustomMarkerScaling(Main.HumanModel.FemurLandmarks_CT.LateralDistalFemurEdge);
//    AnyDrawNode drw ={ScaleXYZ=0.002*{1,1,1};RGB={0,1,0};};
  };
  AnyRefNode MedialDistalFemurEdge = {
    sRel = .CustomMarkerScaling(Main.HumanModel.FemurLandmarks_CT.MedialDistalFemurEdge);
//    AnyDrawNode drw ={ScaleXYZ=0.002*{1,1,1};RGB={0,1,0};};
  };
  AnyRefNode FemurNotch = {
    sRel = .CustomMarkerScaling(Main.HumanModel.FemurLandmarks_CT.FemurNotch);
//    AnyDrawNode drw ={ScaleXYZ=0.002*{1,1,1};RGB={0,1,0};};
  };

  AnyRefNode Medial_TF_CT ={
    sRel=.CustomMarkerScaling(Main.HumanModel.FemurLandmarks_CT.TF_Med_Axis);
    //      AnyDrawNode drw ={ScaleXYZ=0.002*{1,1,1};RGB={0,1,0};};
  };
  AnyRefNode Lateral_TF_CT ={
    sRel=.CustomMarkerScaling(Main.HumanModel.FemurLandmarks_CT.TF_Lat_Axis);
    //      AnyDrawNode drw ={ScaleXYZ=0.002*{1,1,1};RGB={0,1,0};};
  };

  AnyRefNode Medial_TF_EFC_CT = {
    sRel=.CustomMarkerScaling(Main.HumanModel.FemurLandmarks_CT.Medial_TF_EFC);
    //      AnyDrawNode drw ={ScaleXYZ=0.002*{1,1,1};RGB={0,0,1};};

  };
  AnyRefNode Medial_TF_FFC_CT = {
    sRel= .CustomMarkerScaling(Main.HumanModel.FemurLandmarks_CT.Medial_TF_FFC);
    //      AnyDrawNode drw ={ScaleXYZ=0.002*{1,1,1};RGB={1,0,0};};

  };
  AnyRefNode Lateral_TF_EFC_CT = {
    sRel= .CustomMarkerScaling(Main.HumanModel.FemurLandmarks_CT.Lateral_TF_EFC);
    //      AnyDrawNode drw ={ScaleXYZ=0.002*{1,1,1};RGB={0,0,1};};

  };
  AnyRefNode TEMP_Lateral_TF_FFC_CT = {
    sRel= .CustomMarkerScaling(Main.HumanModel.FemurLandmarks_CT.Lateral_TF_FFC);
    //      AnyDrawNode drw ={ScaleXYZ=0.002*{1,1,1};RGB={0,0,0};};

  };
  AnyRefNode Lateral_TF_FFC_CT = {
    AnyVec3 sRel_us = (Main.HumanModel.FemurLandmarks_CT.Medial_TF_FFC)+(Main.HumanModel.FemurLandmarks_CT.UnitVectors_CT.e1*Main.HumanModel.FemurLandmarks_CT.UnitVectors_CT.L1);
    sRel= .CustomMarkerScaling(sRel_us);
    //      AnyDrawNode drw ={ScaleXYZ=0.002*{1,1,1};RGB={1,0,0};};
  };
};

Main.HumanModel.BodyModel.Right.Leg.Seg.Shank = {

  AnyRefNode MedialTibiaEdge = {
    sRel = .CustomMarkerScaling(Main.HumanModel.TibiaLandmarks_CT.MedialTibiaEdge);
    //        AnyDrawNode drw ={ScaleXYZ=0.002*{1,1,1};RGB={0,1,0};};
  };
  AnyRefNode LateralTibiaEdge = {
    sRel = .CustomMarkerScaling(Main.HumanModel.TibiaLandmarks_CT.LateralTibiaEdge);
    //        AnyDrawNode drw ={ScaleXYZ=0.002*{1,1,1};RGB={0,1,0};};
  };
  AnyRefNode MedialTibiaIntercondylar = {
    sRel = .CustomMarkerScaling(Main.HumanModel.TibiaLandmarks_CT.MedialTibiaIntercondylar);
//            AnyDrawNode drw ={ScaleXYZ=0.002*{1,1,1};RGB={0,1,0};};
  };

  AnyRefNode Medial_TF_CT ={
    sRel=.CustomMarkerScaling(Main.HumanModel.FemurLandmarks_CT.TF_Med_Axis);
    //      AnyDrawNode drw ={ScaleXYZ=0.002*{1,1,1};RGB={0,1,0};};
  };
  AnyRefNode Lateral_TF_CT ={
    sRel=.CustomMarkerScaling(Main.HumanModel.FemurLandmarks_CT.TF_Lat_Axis);
    //      AnyDrawNode drw ={ScaleXYZ=0.002*{1,1,1};RGB={0,1,0};};
  };

  AnyRefNode Medial_TF_EFC_CT = {
    sRel =.CustomMarkerScaling(Main.HumanModel.FemurLandmarks_CT.Medial_TF_EFC);
    //      AnyDrawNode drw ={ScaleXYZ=0.002*{1,1,1};RGB={0,0,1};};
  };
  AnyRefNode Medial_TF_FFC_CT = {
    sRel =.CustomMarkerScaling(Main.HumanModel.FemurLandmarks_CT.Medial_TF_FFC);
    //            AnyDrawNode drw ={ScaleXYZ=0.002*{1,1,1};RGB={1,0,0};};
  };

  AnyRefNode Lateral_TF_EFC_CT = {
    sRel =.CustomMarkerScaling(Main.HumanModel.FemurLandmarks_CT.Lateral_TF_EFC);
    //      AnyDrawNode drw ={ScaleXYZ=0.002*{1,1,1};RGB={0,0,1};};
  };

  AnyRefNode TEMP_Lateral_TF_FFC = {
    sRel =.CustomMarkerScaling(Main.HumanModel.FemurLandmarks_CT.Lateral_TF_FFC);
    //            AnyDrawNode drw ={ScaleXYZ=0.002*{1,1,1};RGB={1,1,1};};
  };

//  AnyRefNode Lateral_TF_FFC_CT = {
//    AnyVec3 sRel_us = (Main.HumanModel.FemurLandmarks_CT.Medial_TF_FFC)+(...UnitVectors.e1*...UnitVectors.L1);
//    //            AnyDrawNode drw ={ScaleXYZ=0.002*{1,1,1};RGB={1,0,0};};
//  };
}; // close shank segment
