Main = {
  HumanModel ={
    #include "SubjectSpecificScaling.any"
    AnyFolder FemurLandmarks ={
      AnyVec3 FemurNotch = {-0.0782275778876,-0.1242571183946,-0.6990866021050};
      AnyVec3 MedialDistalFemurEdge = {-0.0409529593497,-0.1294362208049,-0.7068784179688};
      AnyVec3 LateralDistalFemurEdge = {-0.1067931956185,-0.0985403368208,-0.7020032204522};
      AnyVec3 Medial_TF_EFC = {-0.0537430267342,-0.1357053491196,-0.6759613152415};
      AnyVec3 Lateral_TF_EFC = {-0.1032494567368,-0.1095677559825,-0.6729997522967};
      AnyVec3 Medial_TF_FFC = {-0.0505623199525,-0.1254990725733,-0.6877848109503};
      AnyVec3 Lateral_TF_FFC = {-0.0981284556701,-0.1037984756503,-0.6836942389028};
      AnyVec3 TF_Med_Axis = {-0.0523400786583,-0.1297261759580,-0.6865757923698};
      AnyVec3 TF_Lat_Axis = {-0.0992606168906,-0.1050761572658,-0.6832951960544};
    };
    AnyFolder TibiaLandmarks = {
      AnyVec3 MedialTibiaEdge = {-0.0464461399792,-0.1334283314527,-0.7157406154726};
      AnyVec3 LateralTibiaEdge = {-0.1117166328680,-0.0965482460969,-0.7086902174607};
      AnyVec3 MedialTibiaIntercondylar = {-0.0722786413741,-0.1191424513865,-0.7042187187857};
      AnyVec3 LateralTibiaIntercondylar = {-0.0830348823184,-0.1121301544322,-0.7026012850675};
    };

    Main.HumanModel.BodyModel.Right.Leg.Seg.Thigh = {
      AnyFunTransform3D &CustomMarkerScaling = Main.HumanModel.SubjectSpecificScaling.Right.Thigh.RegTransform;
      AnyRefNode Medial_TF_EFC = {
        sRel = .CustomMarkerScaling(Main.HumanModel.FemurLandmarks.Medial_TF_EFC);
        AnyDrawNode drw ={ScaleXYZ=0.002*{1,1,1};RGB={0,0,1};};
      };
      AnyRefNode Lateral_TF_EFC = {
        sRel = .CustomMarkerScaling(Main.HumanModel.FemurLandmarks.Lateral_TF_EFC);
        AnyDrawNode drw ={ScaleXYZ=0.002*{1,1,1};RGB={0,0,1};};
      };
      AnyRefNode Medial_TF_FFC = {
        sRel = .CustomMarkerScaling(Main.HumanModel.FemurLandmarks.Medial_TF_FFC);
        AnyDrawNode drw ={ScaleXYZ=0.002*{1,1,1};RGB={0,1,0};};
      };
      AnyRefNode Lateral_TF_FFC = {
        sRel = .CustomMarkerScaling(Main.HumanModel.FemurLandmarks.Lateral_TF_FFC);
        AnyDrawNode drw ={ScaleXYZ=0.002*{1,1,1};RGB={0,1,0};};
      };
    };

    Main.HumanModel.BodyModel.Right.Leg.Seg.Shank = {
      AnyFunTransform3D &CustomMarkerScaling = Main.HumanModel.SubjectSpecificScaling.Right.Shank.RegTransform;
      AnyRefNode Medial_TF_EFC = {
        sRel = .CustomMarkerScaling(Main.HumanModel.FemurLandmarks.Medial_TF_EFC);
        AnyDrawNode drw ={ScaleXYZ=0.002*{1,1,1};RGB={1,0,0};};
      };
      AnyRefNode Lateral_TF_EFC = {
        sRel = .CustomMarkerScaling(Main.HumanModel.FemurLandmarks.Lateral_TF_EFC);
        AnyDrawNode drw ={ScaleXYZ=0.002*{1,1,1};RGB={1,0,0};};
      };
    };
  };
};
