Main.ModelSetup.LabSpecificData = {

 // Switch to enable Inertial MoCap functionality
 #define MOCAP_INPUT_DATA_TYPE "BVH"
 #path MOCAP_BVHSETTINGS "BVHSettings.any"

 #path BODY_MODEL_CONFIG_FILE "BodyModelConfig.any"

 #path MOCAP_MARKER_PROTOCOL_FILE "MarkerProtocol_BVH.any"
 #path MOCAP_EXTRA_DRIVERS_FILE "ExtraDrivers.any"

 #define MOCAP_USE_GRF_PREDICTION ON
 #path MOCAP_FORCE_PLATE_FILE "ForcePlates.any"

 Gravity = -9.81*{0,1,0};

 Main.Studies.InverseDynamicStudy.InverseDynamics.Criterion.UpperBoundOnOff = Off;


//  OptimizeAnthropometricsOnOff OptimizeAntropometricsOnOff (
//    PELVIS_WIDTH = OFF ,
//    HEAD_HEIGHT = OFF,
//    TRUNK_HEIGHT= OFF,
//    RIGHT_THIGH_LENGTH= OFF,
//    LEFT_THIGH_LENGTH = OFF,
//    RIGHT_SHANK_LENGTH= OFF,
//    LEFT_SHANK_LENGTH = OFF,
//    RIGHT_FOOT_LENGTH= OFF,
//    LEFT_FOOT_LENGTH = OFF,
//    RIGHT_UPPERARM_LENGTH= OFF,
//    LEFT_UPPERARM_LENGTH = OFF,
//    RIGHT_LOWERARM_LENGTH= OFF,
//    LEFT_LOWERARM_LENGTH = OFF,
//    RIGHT_HAND_LENGTH= OFF,
//    LEFT_HAND_LENGTH = OFF,
//    LEFT_RIGHT_SYMMETRY = OFF
//  ) ={};

};
