Main.ModelSetup.BVHFileData =
{
    FileName = MOCAP_C3D_DATA_PATH +"/"+ Main.ModelSetup.TrialSpecificData.TrialFileName + ".bvh"; //add the extension to the file name here

    ModelDrawOnOff = On;
    ModelDrawScale =0.15;
    ModelDrawRGBs={{212,49,117}/256,{0.2,0.1,0.3},{49,171,212}/256};


     // Positions in BVH file are in centi meters
     TranslationScale = 0.01;
     // Angles are in degrees.
     RotationScale = pi/180.0;


    InitialPos_FrameNo=Main.ModelSetup.TrialSpecificData.FirstFrame;

    TranslationalDataFilterIndex = -1;//no filter becuase neg number
    RotationalDataFilterIndex = -1; //no filter becuase neg number

    Rotation2PiFixOnOff = On;
    Rotation1PiFixOnOff = Off;

    InterPolType = PiecewiseLinear ;

};
