#define BVH_MODEL Main.ModelSetup.BVHFileData.Model

//Main.HumanModel.Anthropometrics.SegmentScaleFactors ={
//  AnyFolder& StdPar = Main.HumanModel.Scaling.StandardParameters;
//  Pelvis =   {
//    AnyVar bvh_pelvis_width = vnorm(BVH_MODEL.Hips.Seg.RightUpLeg.sRel-
//    BVH_MODEL.Hips.Seg.LeftUpLeg.sRel); ///< distance between hip joints
//
//    WidthScale = bvh_pelvis_width/0.1631771;  // This distance is the distance of the hip joint center of a model with height 1.724318181818. This is the height of the person for a standard pelvis width (0.1686071)//.StdPar.Pelvis.Width;
//    DepthScale = WidthScale;
//    LengthScale = WidthScale;
//  };
//
//  Thorax =  {
//    AnyVar bvh_trunk_height =
//    vnorm(   Main.ModelSetup.BVHFileData.Model.Hips.Seg.Spine.sRel) +
//    vnorm(    Main.ModelSetup.BVHFileData.Model.Hips.Spine.Seg.Spine1.sRel) +
//    vnorm(    Main.ModelSetup.BVHFileData.Model.Hips.Spine.Spine1.Seg.Spine2.sRel) +
//    vnorm(    Main.ModelSetup.BVHFileData.Model.Hips.Spine.Spine1.Spine2.Seg.Spine3.sRel)+
//    vnorm(    Main.ModelSetup.BVHFileData.Model.Hips.Spine.Spine1.Spine2.Spine3.Seg.Neck.sRel);
//
//    AnyVar bvh_shoulder_width =
//    vnorm( Main.ModelSetup.BVHFileData.Model.Hips.Spine.Spine1.Spine2.Spine3.Seg.RightShoulder.sRel-
//    Main.ModelSetup.BVHFileData.Model.Hips.Spine.Spine1.Spine2.Spine3.Seg.LeftShoulder.sRel)+
//    vnorm( Main.ModelSetup.BVHFileData.Model.Hips.Spine.Spine1.Spine2.Spine3.LeftShoulder.Seg.LeftArm.sRel)+
//    vnorm( Main.ModelSetup.BVHFileData.Model.Hips.Spine.Spine1.Spine2.Spine3.RightShoulder.Seg.RightArm.sRel);
//
//    LengthScale = bvh_trunk_height/0.571014; // Distance for subject with height 1.8 .StdPar.Trunk.Height;
//    WidthScale = bvh_shoulder_width /0.3715324; // Distance for subject with height 1.8
//    DepthScale = WidthScale;
//  };
//
//  Lumbar =   {
//    LengthScale = .Thorax.LengthScale;
//    WidthScale = .Thorax.WidthScale;
//    DepthScale = .Thorax.DepthScale;
//  };
//
//  Head =   {
//    AnyVar bvh_head_height = vnorm(Main.ModelSetup.BVHFileData.Model.Hips.Spine.Spine1.Spine2.Spine3.Neck.Head.Seg.End_Site.sRel);
//    LengthScale = bvh_head_height /0.20197; // Distance for subject with height 1.8 .StdPar.Head.Height;
//    WidthScale = LengthScale;
//    DepthScale = LengthScale;
//  };
//  Right.Clavicula =    {
//    LengthScale = ..Thorax.WidthScale;
//    DepthScale = LengthScale;
//    WidthScale = LengthScale;
//  };
//  Left.Clavicula =    {
//    LengthScale = ..Thorax.WidthScale;
//    DepthScale = LengthScale;
//    WidthScale = LengthScale;
//  };
//  Right.Scapula =    {
//    LengthScale = ..Thorax.WidthScale;
//    DepthScale = LengthScale;
//    WidthScale = LengthScale;
//  };
//  Left.Scapula =    {
//    LengthScale = ..Thorax.WidthScale;
//    DepthScale = LengthScale;
//    WidthScale = LengthScale;
//  };
//  Right.Humerus =   {
//    AnyVar bvh_upperarm_length = vnorm(Main.ModelSetup.BVHFileData.Model.Hips.Spine.Spine1.Spine2.Spine3.RightShoulder.RightArm.Seg.RightForeArm.sRel);
//    LengthScale = bvh_upperarm_length/0.335480637; //Distance for subject with height 1.8; //..StdPar.Humerus.Length;
//    DepthScale = LengthScale;
//    WidthScale = LengthScale;
//  };
//  Left.Humerus =  {
//    AnyVar bvh_upperarm_length = vnorm(Main.ModelSetup.BVHFileData.Model.Hips.Spine.Spine1.Spine2.Spine3.LeftShoulder.LeftArm.Seg.LeftForeArm.sRel);
//    LengthScale = bvh_upperarm_length/0.335480637; //Distance for subject with height 1.8 ..StdPar.Humerus.Length;
//    DepthScale = LengthScale;
//    WidthScale = LengthScale;
//  };
//  Right.Ulna =   {
//   AnyVar bvh_lowerarm_length =   vnorm(Main.ModelSetup.BVHFileData.Model.Hips.Spine.Spine1.Spine2.Spine3.RightShoulder.RightArm.RightForeArm.Seg.RightHand.sRel);
//    LengthScale = bvh_lowerarm_length/0.271635; // Distance for subject with height 1.8//..StdPar.Ulna.Length;
//    DepthScale = LengthScale;
//    WidthScale = LengthScale;
//  };
//  Left.Ulna =  {
//    AnyVar bvh_lowerarm_length =  vnorm(Main.ModelSetup.BVHFileData.Model.Hips.Spine.Spine1.Spine2.Spine3.LeftShoulder.LeftArm.LeftForeArm.Seg.LeftHand.sRel);
//    LengthScale = bvh_lowerarm_length/0.271635; //Distance for subject with height 1.8 ..StdPar.Ulna.Length;
//    DepthScale = LengthScale;
//    WidthScale = LengthScale;
//  };
//  Right.Radius =   {
//    LengthScale = .Ulna.LengthScale;
//    DepthScale = .Ulna.DepthScale;
//    WidthScale = .Ulna.WidthScale;
//  };
//  Left.Radius =   {
//    LengthScale = .Ulna.LengthScale;
//    DepthScale = .Ulna.DepthScale;
//    WidthScale = .Ulna.WidthScale;
//  };
//  Right.Hand =   {
//    AnyVar bvh_hand_length =  vnorm(Main.ModelSetup.BVHFileData.Model.Hips.Spine.Spine1.Spine2.Spine3.LeftShoulder.LeftArm.LeftForeArm.LeftHand.Seg.LeftInHandMiddle.sRel)
//    +vnorm(Main.ModelSetup.BVHFileData.Model.Hips.Spine.Spine1.Spine2.Spine3.LeftShoulder.LeftArm.LeftForeArm.LeftHand.LeftInHandMiddle.Seg.LeftHandMiddle1.sRel)
//    +vnorm(Main.ModelSetup.BVHFileData.Model.Hips.Spine.Spine1.Spine2.Spine3.LeftShoulder.LeftArm.LeftForeArm.LeftHand.LeftInHandMiddle.LeftHandMiddle1.Seg.LeftHandMiddle2.sRel)
//    +vnorm(Main.ModelSetup.BVHFileData.Model.Hips.Spine.Spine1.Spine2.Spine3.LeftShoulder.LeftArm.LeftForeArm.LeftHand.LeftInHandMiddle.LeftHandMiddle1.LeftHandMiddle2.Seg.LeftHandMiddle3.sRel)
//    +vnorm(Main.ModelSetup.BVHFileData.Model.Hips.Spine.Spine1.Spine2.Spine3.LeftShoulder.LeftArm.LeftForeArm.LeftHand.LeftInHandMiddle.LeftHandMiddle1.LeftHandMiddle2.LeftHandMiddle3.Seg.End_Site.sRel);
//    LengthScale = bvh_hand_length/0.16536859;  // This is the standard hand length for a subject with height 1.72
//    DepthScale = LengthScale;
//    WidthScale = LengthScale;
//  };
//  Left.Hand =   {
//    AnyVar bvh_hand_length =  vnorm(Main.ModelSetup.BVHFileData.Model.Hips.Spine.Spine1.Spine2.Spine3.LeftShoulder.LeftArm.LeftForeArm.LeftHand.Seg.LeftInHandMiddle.sRel)
//    +vnorm(Main.ModelSetup.BVHFileData.Model.Hips.Spine.Spine1.Spine2.Spine3.LeftShoulder.LeftArm.LeftForeArm.LeftHand.LeftInHandMiddle.Seg.LeftHandMiddle1.sRel)
//    +vnorm(Main.ModelSetup.BVHFileData.Model.Hips.Spine.Spine1.Spine2.Spine3.LeftShoulder.LeftArm.LeftForeArm.LeftHand.LeftInHandMiddle.LeftHandMiddle1.Seg.LeftHandMiddle2.sRel)
//    +vnorm(Main.ModelSetup.BVHFileData.Model.Hips.Spine.Spine1.Spine2.Spine3.LeftShoulder.LeftArm.LeftForeArm.LeftHand.LeftInHandMiddle.LeftHandMiddle1.LeftHandMiddle2.Seg.LeftHandMiddle3.sRel)
//    +vnorm(Main.ModelSetup.BVHFileData.Model.Hips.Spine.Spine1.Spine2.Spine3.LeftShoulder.LeftArm.LeftForeArm.LeftHand.LeftInHandMiddle.LeftHandMiddle1.LeftHandMiddle2.LeftHandMiddle3.Seg.End_Site.sRel);
//    LengthScale = bvh_hand_length/0.16536859;
//    DepthScale = LengthScale;
//    WidthScale = LengthScale;
//  };
//  Right.Thigh =  {
//    AnyVar bvh_thigh_length= vnorm(Main.ModelSetup.BVHFileData.Model.Hips.RightUpLeg.Seg.RightLeg.sRel);
//    LengthScale = bvh_thigh_length/0.36168; // Distance for subject with height 1.6163..StdPar.Right.Thigh.Length;
//    DepthScale = 1;
//    WidthScale = 1;
//  };
//  Left.Thigh =   {
//    AnyVar bvh_thigh_length= vnorm(Main.ModelSetup.BVHFileData.Model.Hips.LeftUpLeg.Seg.LeftLeg.sRel);
//    LengthScale = bvh_thigh_length/0.36168; // Distance for subject with height 1.6163..StdPar.Left.Thigh.Length;
//    DepthScale = 1;
//    WidthScale = 1;
//  };
//  Right.Shank =   {
//    AnyVar bvh_shank_length=vnorm(Main.ModelSetup.BVHFileData.Model.Hips.RightUpLeg.RightLeg.Seg.RightFoot.sRel);
//    LengthScale = bvh_shank_length/0.36784; // Distance for subject with height 1.57298 ..StdPar.Right.Shank.Length;
//    DepthScale = 1;
//    WidthScale = 1;
//  };
//  Left.Shank =  {
//    AnyVar bvh_shank_length=vnorm(Main.ModelSetup.BVHFileData.Model.Hips.LeftUpLeg.LeftLeg.Seg.LeftFoot.sRel);
//    LengthScale = bvh_shank_length/0.36784; // Distance for subject with height 1.57298 ..StdPar.Left.Shank.Length;
//    DepthScale = 1;
//    WidthScale = 1;
//  };
//  Right.Foot =   {
//    AnyVar  bvh_foot_length =vnorm(Main.ModelSetup.BVHFileData.Model.Hips.RightUpLeg.RightLeg.RightFoot.Seg.End_Site.sRel[2]);
//    AnyVar  bvh_foot_height =vnorm(Main.ModelSetup.BVHFileData.Model.Hips.RightUpLeg.RightLeg.RightFoot.Seg.End_Site.sRel[1]);
//    LengthScale = bvh_foot_length/0.15954434; // ..StdPar.Right.Foot.Length;
//    DepthScale = bvh_foot_height/0.07558622;
//    WidthScale = DepthScale;
//  };
//  Left.Foot =   {
//    AnyVar  bvh_foot_length =vnorm(Main.ModelSetup.BVHFileData.Model.Hips.LeftUpLeg.LeftLeg.LeftFoot.Seg.End_Site.sRel[2]);
//    AnyVar  bvh_foot_height =vnorm(Main.ModelSetup.BVHFileData.Model.Hips.LeftUpLeg.LeftLeg.LeftFoot.Seg.End_Site.sRel[1]);
//    LengthScale = bvh_foot_length/0.15954434; //..StdPar.Left.Foot.Length;
//    DepthScale = bvh_foot_height/0.07558622;
//    WidthScale = DepthScale;
//  };
//};
