Main.ModelSetup.SubjectSpecificData =
{

  Main.HumanModel.Anthropometrics =
  {
     BodyMass = 75.4;
     BodyHeight = 1.73;
  };

 // This calculates the segment dimensions from the BVH rig
 // The will have to be modified if a different type of BVH
 // file is used.
   #include "../CalculateSegmentDimensionsFromBVH.any"
   //#include "../CalculateSegmentScaleFactorsFromBVH.any"

};
