//AnyInputC3D
Main.ModelSetup.C3DFileData = {

   FileName = MOCAP_C3D_DATA_PATH +"/"+ Main.ModelSetup.TrialSpecificData.TrialFileName + ".c3d"; //add the extension to the file name here

   // Search/replace in marker names.
   // This option can be used to remove
   // prefixes from marker name, or replace
   // characters from which are illegal in AnyScript
   SearchAndReplace = {
     /*{"old", "new"},*/
       {"WeirdMarkerPrefix", ""}
   };

   PointsScaleFactor = 1/1000;
   MarkerUseAllPointsOnOff = On;
   MarkerUseCamMaskOnOff = Off;

   AnyInt MarkerFilterOrder = 1;
   AnyInt AnalogFilterOrder = 1;

   MarkerFilter = &Filter;
   AnalogFilter = &LowPassFilter;

   Filter =  {
     N = .MarkerFilterOrder;
     Fc = {5};
     Type = LowPass;
   };

   /// This filter is used for the analog data
   AnyFunButterworthFilter LowPassFilter = {
     AutomaticInitialConditionOnOff = On;
     N = .AnalogFilterOrder  ;
     AnyVar CutOffFrequency=12;
     AnyVar SampleFreq=.Header.VideoFrameRate* .Header.NoAnalogSamplesPer3DFrame   ;
     W = {CutOffFrequency/(iffun(eqfun(SampleFreq,0),100.0,SampleFreq)*0.5)};
     Type = LowPass;
   };
¨
};
