#define BVH_MODEL Main.ModelSetup.BVHFileData.Model

Main.HumanModel.Anthropometrics.SegmentScaleFactors =
{
  AnyFolder& StdPar = Main.HumanModel.Scaling.StandardParameters;
  Pelvis =
  {
     AnyVar bvh_pelvis_width = vnorm(BVH_MODEL.Hips.RightHip.Seg.r0
                                     - BVH_MODEL.Hips.LeftHip.Seg.r0); ///< distance between hip joints
     WidthScale = bvh_pelvis_width/.StdPar.Pelvis.Width;
     DepthScale = WidthScale;
     LengthScale = WidthScale;
   };

   Trunk =
   {
     AnyVar bvh_trunk_height = 1.04*(
                   vnorm(BVH_MODEL.Hips.Chest.Seg.Chest2.sRel)
                 + vnorm(BVH_MODEL.Hips.Chest.Chest2.Seg.Chest3.sRel)
                 + vnorm(BVH_MODEL.Hips.Chest.Chest2.Chest3.Seg.Chest4.sRel)
                 + vnorm(BVH_MODEL.Hips.Chest.Chest2.Chest3.Chest4.Seg.Neck.sRel)
                 + vnorm(BVH_MODEL.Hips.Chest.Chest2.Chest3.Chest4.Neck.Seg.Head.sRel));
     AnyVar bvh_shoulder_width = vnorm(
                   BVH_MODEL.Hips.Chest.Chest2.Chest3.Chest4.RightCollar.RightShoulder.Seg.r0
                   - BVH_MODEL.Hips.Chest.Chest2.Chest3.Chest4.LeftCollar.LeftShoulder.Seg.r0);
     LengthScale = bvh_trunk_height/.StdPar.Trunk.Height;
     WidthScale = bvh_shoulder_width /0.37;
     DepthScale = WidthScale;
   };

   Lumbar =
   {
    LengthScale = .Trunk.LengthScale;
    WidthScale = .Trunk.WidthScale;
    DepthScale = .Trunk.DepthScale;
   };

   Head =
   {
     AnyVar bvh_head_height = 0.75*vnorm( BVH_MODEL.Hips.Chest.Chest2.Chest3.Chest4.Neck.Head.Seg.End_Site.sRel);///< height in neutral position from  C1HatNode to top of head
     LengthScale = bvh_head_height / .StdPar.Head.Height;
     WidthScale = LengthScale;
     DepthScale = LengthScale;
   };
   Right.Clavicula =
   {
      LengthScale = ..Trunk.WidthScale;
      DepthScale = LengthScale;
      WidthScale = LengthScale;
   };
   Left.Clavicula =
   {
      LengthScale = ..Trunk.WidthScale;
      DepthScale = LengthScale;
      WidthScale = LengthScale;
   };
   Right.Scapula =
   {
      LengthScale = ..Trunk.WidthScale;
      DepthScale = LengthScale;
      WidthScale = LengthScale;
   };
   Left.Scapula =
   {
      LengthScale = ..Trunk.WidthScale;
      DepthScale = LengthScale;
      WidthScale = LengthScale;
   };
   Right.Humerus =
   {
      AnyVar bvh_upperarm_length = vnorm(BVH_MODEL.Hips.Chest.Chest2.Chest3.Chest4.RightCollar.RightShoulder.Seg.RightElbow.sRel);
      LengthScale = bvh_upperarm_length/..StdPar.Humerus.Length;
      DepthScale = LengthScale;
      WidthScale = LengthScale;
   };
   Left.Humerus =
   {
      AnyVar bvh_upperarm_length = vnorm(BVH_MODEL.Hips.Chest.Chest2.Chest3.Chest4.LeftCollar.LeftShoulder.Seg.LeftElbow.sRel);
      LengthScale = bvh_upperarm_length/..StdPar.Humerus.Length;
      DepthScale = LengthScale;
      WidthScale = LengthScale;
   };
   Right.Ulna =
   {
      AnyVar bvh_lowerarm_length = vnorm(BVH_MODEL.Hips.Chest.Chest2.Chest3.Chest4.RightCollar.RightShoulder.RightElbow.Seg.RightWrist.sRel);
      LengthScale = bvh_lowerarm_length/..StdPar.Ulna.Length;
      DepthScale = LengthScale;
      WidthScale = LengthScale;
   };
   Left.Ulna =
   {
      AnyVar bvh_lowerarm_length = vnorm(BVH_MODEL.Hips.Chest.Chest2.Chest3.Chest4.LeftCollar.LeftShoulder.LeftElbow.Seg.LeftWrist.sRel);
      LengthScale = bvh_lowerarm_length/..StdPar.Ulna.Length;
      DepthScale = LengthScale;
      WidthScale = LengthScale;
   };
   Right.Radius =
   {
      LengthScale = .Ulna.LengthScale;
      DepthScale = .Ulna.DepthScale;
      WidthScale = .Ulna.WidthScale;
    };
   Left.Radius =
   {
      LengthScale = .Ulna.LengthScale;
      DepthScale = .Ulna.DepthScale;
      WidthScale = .Ulna.WidthScale;
   };
   Right.Hand =
   {
      LengthScale = .Ulna.LengthScale;
      DepthScale = .Ulna.DepthScale;
      WidthScale = .Ulna.WidthScale;
    };
   Left.Hand =
   {
      LengthScale = .Ulna.LengthScale;
      DepthScale = .Ulna.DepthScale;
      WidthScale = .Ulna.WidthScale;
   };
   Right.Thigh =
   {
      AnyVar bvh_thigh_length = vnorm(BVH_MODEL.Hips.RightHip.Seg.RightKnee.sRel);
      LengthScale = bvh_thigh_length/..StdPar.Right.Thigh.Length;
      DepthScale = LengthScale;
      WidthScale = LengthScale;
   };
   Left.Thigh =
   {
      AnyVar bvh_thigh_length = vnorm(BVH_MODEL.Hips.LeftHip.Seg.LeftKnee.sRel);
      LengthScale = bvh_thigh_length/..StdPar.Left.Thigh.Length;
      DepthScale = LengthScale;
      WidthScale = LengthScale;
   };
   Right.Shank =
   {
      AnyVar bvh_shank_length = vnorm(BVH_MODEL.Hips.RightHip.RightKnee.Seg.RightAnkle.sRel);
      LengthScale = bvh_shank_length/..StdPar.Right.Shank.Length;
      DepthScale = LengthScale;
      WidthScale = LengthScale;
   };
   Left.Shank =
   {
      AnyVar bvh_shank_length = vnorm(BVH_MODEL.Hips.LeftHip.LeftKnee.Seg.LeftAnkle.sRel);
      LengthScale = bvh_shank_length/..StdPar.Left.Shank.Length;
      DepthScale = LengthScale;
      WidthScale = LengthScale;
   };
   Right.Foot =
   {
      AnyVar bvh_foot_length = vnorm(BVH_MODEL.Hips.RightHip.RightKnee.RightAnkle.Seg.RightToe.sRel)
                             + vnorm(BVH_MODEL.Hips.RightHip.RightKnee.RightAnkle.RightToe.Seg.End_Site.sRel);
      LengthScale = bvh_foot_length/..StdPar.Right.Foot.Length;
      DepthScale = LengthScale;
      WidthScale = LengthScale;
   };
   Left.Foot =
   {
      AnyVar bvh_foot_length = vnorm(BVH_MODEL.Hips.LeftHip.LeftKnee.LeftAnkle.Seg.LeftToe.sRel)
                             + vnorm(BVH_MODEL.Hips.LeftHip.LeftKnee.LeftAnkle.LeftToe.Seg.End_Site.sRel);
      LengthScale = bvh_foot_length/..StdPar.Left.Foot.Length;
      DepthScale = LengthScale;
      WidthScale = LengthScale;
   };

};
