Main.EnvironmentModel.ForcePlates =
{


  //-------- Predictive forceplate for the right leg
  // See ( #include "<ANYMOCAP_MODEL_PATH>/GRFPrediction/FootPlateConditionalContact.any" )
  FootPlateConditionalContact GRF_Prediction_Right(
  NORMAL_DIRECTION = "Y",
  NUMBER_OF_NODES = 25,
  NODES_FOLDER = FootNodes,
  PLATE_BASE_FRAME = Main.EnvironmentModel.GlobalRef,
  SHOW_TRIGGER_VOLUME = ON
  ) =
  {
    CreateFootContactNodes25 FootNodes(foot_ref =
    Main.HumanModel.BodyModel.Right.Leg.Seg.Foot) = {};

    // Additional force plate settings
    Settings =
    {
      LimitDistHigh = 0.075; // Vertical height
      FrictionCoefficient = 0.8;
    };
  };


  //-------- Predictive forceplate for the left leg (see documentation to learn more: https://github.com/AnyBody/GRF-prediction) ----------------
  FootPlateConditionalContact GRF_Prediction_Left(
  NORMAL_DIRECTION = "Y",
  NUMBER_OF_NODES = 25,
  NODES_FOLDER = FootNodes,
  PLATE_BASE_FRAME = Main.EnvironmentModel.GlobalRef,
  SHOW_TRIGGER_VOLUME = ON
  ) =
  {
    CreateFootContactNodes25 FootNodes(foot_ref =
    Main.HumanModel.BodyModel.Left.Leg.Seg.Foot) = {};

    Settings =
    {
      LimitDistHigh = 0.075;
      FrictionCoefficient = 0.8;
    };
  };


};
