Main.ModelSetup.BVHFileData =
{
    FileName = MOCAP_C3D_DATA_PATH +"/"+ Main.ModelSetup.TrialSpecificData.TrialFileName + ".bvh"; //add the extension to the file name here

    ModelDrawOnOff = On;
    ModelDrawScale =0.15;
    ModelDrawRGBs={{212,49,117}/256,{0.2,0.1,0.3},{49,171,212}/256};

    #ifdef MOCAP_FUTURE_BVH_READER_73
    CompatibilityMode_72 = Off;
    #endif

    // Positions in BVH file are in centimeters
    TranslationScale = 0.01;
    // Angles are in degrees.
    RotationScale = pi/180.0;

    Filter.Fc = {Main.ModelSetup.LabSpecificData.LowPassFilterSettings.MarkerFilterCutOffFrequency};
    Filter.N = Main.ModelSetup.LabSpecificData.LowPassFilterSettings.MarkerFilterOrder;

    // Can be used to only read in parts of the BVH file
    // StartFrame = 0;
    // EndFrame = -1;

//    #ifdef MOCAP_FUTURE_BVH_READER_73
//    #define InitialPos_FrameNo InitialPosFrameOffset
//    #endif

    InitialPos_FrameNo = Main.ModelSetup.TrialSpecificData.FirstFrame;


    InterPolType = PiecewiseLinear ;

};
