// EXAMPLE of MarkerProcol file for the plug-in-gait protocol.

 // Marker names must be declared explicitly since the BVH reader needs the
 // names to create marker trajectories.
 Main.ModelSetup.BVHFileData.MarkerNames = {
   "HEAD",
   "HEAD_R",
   "HEAD_L",
   "SACR",
   "RHJC",
   "LHJC",
   "T1C7Jnt",
   "SPINE",
   "L3",
   "CHEST",
   "RSJC",
   "REJC",
   "RALE",
   "RWRB",
   "RWJC",
   "RHT1",
   "RHT2",
   "LSJC",
   "LEJC",
   "LALE",
   "LWRB",
   "LWJC",
   "LHT1",
   "LHT2",
   "RKJC",
   "RKNE",
   "RAJC",
   "RTOE",
   "RTOE2",
   "LKJC",
   "LKNE",
   "LAJC",
   "LTOE",
   "LTOE2"
};


CreateMarkerDriver  HEAD(
MarkerName = HEAD,
MarkerPlacement=Trunk.SegmentsThorax.SkullSeg,
MarkerPlacementBVH= Main.ModelSetup.BVHFileData.Model.Hips.Chest.Chest2.Chest3.Chest4.Neck.Head.Seg,
OptX=OFF,OptY=OFF,OptZ=OFF,
WeightX=0.3,WeightY=0.3,WeightZ=0.3,
ScaleMarkerPosOnOff =OFF,
USE_BVH_INPUT = ON) =
{
  sRelOpt =  {0.05, 0.16, 0};
  sRelOnBVH = {0.0,0,0}+Main.ModelSetup.BVHFileData.Model.Hips.Chest.Chest2.Chest3.Chest4.Neck.Head.Seg.End_Site.sRel;
};


CreateMarkerDriver  HEAD_R(
MarkerName = HEAD_R,
MarkerPlacement=Trunk.SegmentsThorax.SkullSeg,
MarkerPlacementBVH= Main.ModelSetup.BVHFileData.Model.Hips.Chest.Chest2.Chest3.Chest4.Neck.Head.Seg,
OptX=OFF,OptY=OFF,OptZ=OFF,
WeightX=0.3,WeightY=0.3,WeightZ=0.3,
ScaleMarkerPosOnOff =OFF,
USE_BVH_INPUT = ON
) =
{
  sRelOpt =  {0.05, 0.160, 0.1};
  sRelOnBVH = {-0.1,0,0}+Main.ModelSetup.BVHFileData.Model.Hips.Chest.Chest2.Chest3.Chest4.Neck.Head.Seg.End_Site.sRel;
};


CreateMarkerDriver  HEAD_L(
MarkerName = HEAD_L,
MarkerPlacement=Trunk.SegmentsThorax.SkullSeg,
MarkerPlacementBVH= Main.ModelSetup.BVHFileData.Model.Hips.Chest.Chest2.Chest3.Chest4.Neck.Head.Seg,
OptX=OFF,OptY=OFF,OptZ=OFF,
WeightX=0.3,WeightY=0.3,WeightZ=0.3,
ScaleMarkerPosOnOff =OFF,
USE_BVH_INPUT = ON
) =
{
  sRelOpt =  {0.05, 0.16, -0.1};
  sRelOnBVH = {0.1,0,0}+Main.ModelSetup.BVHFileData.Model.Hips.Chest.Chest2.Chest3.Chest4.Neck.Head.Seg.End_Site.sRel;
};


CreateMarkerDriver SACR(
MarkerName= SACR,
MarkerPlacement=Trunk.SegmentsLumbar.PelvisSeg,
PlaceMarkerAt=PelvisSacrumJntNode,
MarkerPlacementBVH=Main.ModelSetup.BVHFileData.Model.Hips.Seg,
OptX=OFF, OptY=OFF, OptZ=OFF,
WeightX=1,WeightY=1,WeightZ=1,
ScaleMarkerPosOnOff =OFF,
USE_BVH_INPUT = ON
) = {
  sRelOpt ={0.035, 0.0, 0.0};
  sRelOnBVH = Main.ModelSetup.BVHFileData.Model.Hips.Seg.Chest.sRel;
};


CreateMarkerDriver RHJC(
MarkerName = RHJC,
MarkerPlacement=Trunk.SegmentsLumbar.PelvisSeg,
PlaceMarkerAt=Right.HipJoint,
MarkerPlacementBVH= Main.ModelSetup.BVHFileData.Model.Hips.RightHip.Seg,
OptX=OFF,OptY=OFF,OptZ=OFF,
WeightX=1,WeightY=1,WeightZ=1,
ScaleMarkerPosOnOff =OFF,
USE_BVH_INPUT = ON
) =
{
  sRelOpt = {0, 0, 0};
  sRelOnBVH = {0, 0, 0};
};


CreateMarkerDriver LHJC(
MarkerName = LHJC,
MarkerPlacement=Trunk.SegmentsLumbar.PelvisSeg,
PlaceMarkerAt=Left.HipJoint,
MarkerPlacementBVH= Main.ModelSetup.BVHFileData.Model.Hips.LeftHip.Seg,
OptX=OFF,OptY=OFF,OptZ=OFF,
WeightX=1,WeightY=1,WeightZ=1,
ScaleMarkerPosOnOff =OFF,
USE_BVH_INPUT = ON
) =
{
  sRelOpt = {0, 0, 0};
  sRelOnBVH = {0, 0, 0};
};


CreateMarkerDriver T1C7Jnt(
MarkerName = T1C7Jnt,
MarkerPlacement= Trunk.SegmentsThorax.ThoraxSeg,
PlaceMarkerAt=T1C7JntNode,
MarkerPlacementBVH= Main.ModelSetup.BVHFileData.Model.Hips.Chest.Chest2.Chest3.Chest4.Neck.Seg,
OptX=OFF,OptY=OFF,OptZ=OFF,
WeightX=1,WeightY=1,WeightZ=1,
ScaleMarkerPosOnOff =OFF,
USE_BVH_INPUT = ON
) =
{
  sRelOpt =  {-0.00, 0, 0};
  sRelOnBVH = {0, 0, 0 };
};


CreateMarkerDriver SPINE(
MarkerName = SPINE,
MarkerPlacement= Trunk.SegmentsThorax.ThoraxSeg,
PlaceMarkerAt=T1C7JntNode,
MarkerPlacementBVH= Main.ModelSetup.BVHFileData.Model.Hips.Chest.Chest2.Chest3.Chest4.Seg,
OptX=OFF,OptY=OFF,OptZ=OFF,
WeightX=2,WeightY=0,WeightZ=2,
ScaleMarkerPosOnOff =OFF,
USE_BVH_INPUT = ON
) =
{
  sRelOpt =  {-0.03,-0.15,0};
  sRelOnBVH = {0, 0, 0 };
};


CreateMarkerDriver L3(
MarkerName= L3,
MarkerPlacement=Trunk.SegmentsLumbar.L3Seg,
PlaceMarkerAt = L2L3JntNode,
MarkerPlacementBVH=Main.ModelSetup.BVHFileData.Model.Hips.Chest.Seg.Chest2,
OptX=OFF, OptY=OFF, OptZ=OFF,
WeightX=2,WeightY=0,WeightZ=2,
ScaleMarkerPosOnOff =OFF,
USE_BVH_INPUT = ON
) = {
  sRelOpt ={-0.00, 0.0, 0.0};
  sRelOnBVH = {0,0,0};
};


CreateMarkerDriver CHEST(
MarkerName = CHEST,
MarkerPlacement= Trunk.SegmentsThorax.ThoraxSeg,
PlaceMarkerAt=ij,
MarkerPlacementBVH= Main.ModelSetup.BVHFileData.Model.Hips.Chest.Chest2.Chest3.Chest4.Seg,
OptX=OFF,OptY=OFF,OptZ=OFF,
WeightX=2,WeightY=2,WeightZ=2,
ScaleMarkerPosOnOff =OFF,
USE_BVH_INPUT = ON
) =
{
  sRelOpt =  {0.1, 0.00 ,0.0};
  sRelOnBVH = {0,0,0.2}+{0,Main.ModelSetup.BVHFileData.Model.Hips.Chest.Chest2.Chest3.Chest4.Seg.RightCollar.sRel[1],0};
};


CreateMarkerDriver RSJC(
MarkerName = RSJC,
MarkerPlacement= Right.ShoulderArm.Seg.Scapula,
PlaceMarkerAt =gh,
MarkerPlacementBVH= Main.ModelSetup.BVHFileData.Model.Hips.Chest.Chest2.Chest3.Chest4.RightCollar.RightShoulder.Seg,
OptX=OFF,OptY=OFF,OptZ=OFF,
WeightX=1,WeightY=1,WeightZ=1,
ScaleMarkerPosOnOff =OFF,
USE_BVH_INPUT = ON
) =
{
  sRelOpt =  {0, 0, 0};
  sRelOnBVH = {0, 0, 0 };
};


CreateMarkerDriver REJC(
MarkerName = REJC,
MarkerPlacement= Right.ShoulderArm.Seg.Humerus,
PlaceMarkerAt=fe,
MarkerPlacementBVH= Main.ModelSetup.BVHFileData.Model.Hips.Chest.Chest2.Chest3.Chest4.RightCollar.RightShoulder.RightElbow.Seg,
OptX=OFF,OptY=OFF,OptZ=OFF,
WeightX=1,WeightY=1,WeightZ=1,
ScaleMarkerPosOnOff =OFF,
USE_BVH_INPUT = ON
) =
{
  sRelOpt =  {0, 0, 0};
  sRelOnBVH = {0, 0, 0};
};


CreateMarkerDriver RALE(
MarkerName = RALE,
MarkerPlacement= Right.ShoulderArm.Seg.Humerus,
PlaceMarkerAt=REJC,
MarkerPlacementBVH= Main.ModelSetup.BVHFileData.Model.Hips.Chest.Chest2.Chest3.Chest4.RightCollar.RightShoulder.Seg,
OptX=OFF,OptY=OFF,OptZ=OFF,
WeightX=1,WeightY=1,WeightZ=1,
ScaleMarkerPosOnOff =OFF,
USE_BVH_INPUT = ON
) =
{
  sRelOpt =  {0.1, 0, 0};
  sRelOnBVH = {Main.ModelSetup.BVHFileData.Data.Hips.Chest.Chest2.Chest3.Chest4.RightCollar.RightShoulder.RightElbow.OFFSET[0]*Main.ModelSetup.BVHFileData.TranslationScale, 0.1, 0};
};


CreateMarkerDriver RWRB(
MarkerName = RWRB,
MarkerPlacement= Right.ShoulderArm.Seg.Radius,
PlaceMarkerAt=wj,
MarkerPlacementBVH= Main.ModelSetup.BVHFileData.Model.Hips.Chest.Chest2.Chest3.Chest4.RightCollar.RightShoulder.RightElbow.Seg,
OptX=OFF,OptY=OFF,OptZ=OFF,
WeightX=1,WeightY=1,WeightZ=1,
ScaleMarkerPosOnOff =OFF,
USE_BVH_INPUT = ON
) =
{
  sRelOpt =  {0.0, -0.1, 0};
  sRelOnBVH = {0,0,0.1}+Main.ModelSetup.BVHFileData.Model.Hips.Chest.Chest2.Chest3.Chest4.RightCollar.RightShoulder.RightElbow.Seg.RightWrist.sRel;
};


CreateMarkerDriver RWJC(
MarkerName = RWJC,
MarkerPlacement= Right.ShoulderArm.Seg.Hand,
PlaceMarkerAt =Ref.wj,
MarkerPlacementBVH= Main.ModelSetup.BVHFileData.Model.Hips.Chest.Chest2.Chest3.Chest4.RightCollar.RightShoulder.RightElbow.RightWrist.Seg,
OptX=OFF,OptY=OFF,OptZ=OFF,
WeightX=1,WeightY=1,WeightZ=1,
ScaleMarkerPosOnOff =OFF,
USE_BVH_INPUT = ON
) =
{
 sRelOpt =  {0, 0, 0};
 sRelOnBVH = {0, 0, 0 };
};


CreateMarkerDriver RHT1(
MarkerName = RHT1,
MarkerPlacement= Right.ShoulderArm.Seg.Hand,
PlaceMarkerAt =Ref.wj,
MarkerPlacementBVH= Main.ModelSetup.BVHFileData.Model.Hips.Chest.Chest2.Chest3.Chest4.RightCollar.RightShoulder.RightElbow.RightWrist.Seg,
OptX=OFF,OptY=OFF,OptZ=OFF,
WeightX=1,WeightY=1,WeightZ=1,
ScaleMarkerPosOnOff =OFF,
USE_BVH_INPUT = ON
) =
{
 sRelOpt =  {-0.18, -0.1, 0};
 sRelOnBVH = {-0.18, 0, 0.1 };
};


CreateMarkerDriver RHT2(
MarkerName = RHT2,
MarkerPlacement= Right.ShoulderArm.Seg.Hand,
PlaceMarkerAt =Ref.wj,
MarkerPlacementBVH= Main.ModelSetup.BVHFileData.Model.Hips.Chest.Chest2.Chest3.Chest4.RightCollar.RightShoulder.RightElbow.RightWrist.Seg,
OptX=OFF,OptY=OFF,OptZ=OFF,
WeightX=1,WeightY=1,WeightZ=1,
ScaleMarkerPosOnOff =OFF,
USE_BVH_INPUT = ON
) =
{
 sRelOpt =  {-0.18, 0.05, 0};
 sRelOnBVH = {-0.18, 0, -0.05 };
};


CreateMarkerDriver LSJC(
MarkerName = LSJC,
MarkerPlacement= Left.ShoulderArm.Seg.Scapula,
PlaceMarkerAt=gh,
MarkerPlacementBVH= Main.ModelSetup.BVHFileData.Model.Hips.Chest.Chest2.Chest3.Chest4.LeftCollar.LeftShoulder.Seg,
OptX=OFF,OptY=OFF,OptZ=OFF,
WeightX=1,WeightY=1,WeightZ=1,
ScaleMarkerPosOnOff =OFF,
USE_BVH_INPUT = ON
) =
{
 sRelOpt =  {0, 0, 0};
 sRelOnBVH = {0, 0, 0 };
};


CreateMarkerDriver LEJC(
MarkerName = LEJC,
MarkerPlacement= Left.ShoulderArm.Seg.Humerus,
PlaceMarkerAt =fe,
MarkerPlacementBVH= Main.ModelSetup.BVHFileData.Model.Hips.Chest.Chest2.Chest3.Chest4.LeftCollar.LeftShoulder.LeftElbow.Seg,
OptX=OFF,OptY=OFF,OptZ=OFF,
WeightX=1,WeightY=1,WeightZ=1,
ScaleMarkerPosOnOff =OFF,
USE_BVH_INPUT = ON
) =
{
 sRelOpt =  {0, 0, 0};
 sRelOnBVH = {0, 0, 0 };
};


CreateMarkerDriver LALE(
MarkerName = LALE,
MarkerPlacement= Left.ShoulderArm.Seg.Humerus,
PlaceMarkerAt =fe,
MarkerPlacementBVH= Main.ModelSetup.BVHFileData.Model.Hips.Chest.Chest2.Chest3.Chest4.LeftCollar.LeftShoulder.Seg,
OptX=OFF,OptY=OFF,OptZ=OFF,
WeightX=1,WeightY=1,WeightZ=1,
ScaleMarkerPosOnOff =OFF,
USE_BVH_INPUT = ON
) =
{
 sRelOpt =  {-0.1, 0, 0};
 sRelOnBVH = {Main.ModelSetup.BVHFileData.Data.Hips.Chest.Chest2.Chest3.Chest4.LeftCollar.LeftShoulder.LeftElbow.OFFSET[0]*Main.ModelSetup.BVHFileData.TranslationScale, 0.1, 0};
};


CreateMarkerDriver LWRB(
MarkerName = LWRB,
MarkerPlacement= Left.ShoulderArm.Seg.Radius,
PlaceMarkerAt=wj,
MarkerPlacementBVH= Main.ModelSetup.BVHFileData.Model.Hips.Chest.Chest2.Chest3.Chest4.LeftCollar.LeftShoulder.LeftElbow.Seg,
OptX=OFF,OptY=OFF,OptZ=OFF,
WeightX=1,WeightY=1,WeightZ=1,
ScaleMarkerPosOnOff =OFF,
USE_BVH_INPUT = ON
) =
{
  sRelOpt =  {0.0, 0.1, 0};
  sRelOnBVH = {0,0,0.1}+Main.ModelSetup.BVHFileData.Model.Hips.Chest.Chest2.Chest3.Chest4.LeftCollar.LeftShoulder.LeftElbow.Seg.LeftWrist.sRel;
};


CreateMarkerDriver LWJC(
MarkerName = LWJC,
MarkerPlacement= Left.ShoulderArm.Seg.Hand,
PlaceMarkerAt =Ref.wj,
MarkerPlacementBVH= Main.ModelSetup.BVHFileData.Model.Hips.Chest.Chest2.Chest3.Chest4.LeftCollar.LeftShoulder.LeftElbow.LeftWrist.Seg,
OptX=OFF,OptY=OFF,OptZ=OFF,
WeightX=1,WeightY=1,WeightZ=1,
ScaleMarkerPosOnOff =OFF,
USE_BVH_INPUT = ON
) =
{
 sRelOpt =  {0, 0, 0};
 sRelOnBVH = {0, 0, 0 };
};


CreateMarkerDriver LHT1(
MarkerName = LHT1,
MarkerPlacement= Left.ShoulderArm.Seg.Hand,
PlaceMarkerAt =Ref.wj,
MarkerPlacementBVH= Main.ModelSetup.BVHFileData.Model.Hips.Chest.Chest2.Chest3.Chest4.LeftCollar.LeftShoulder.LeftElbow.LeftWrist.Seg,
OptX=OFF,OptY=OFF,OptZ=OFF,
WeightX=1,WeightY=1,WeightZ=1,
ScaleMarkerPosOnOff =OFF,
USE_BVH_INPUT = ON
) =
{
 sRelOpt =  {-0.18, -0.1, 0};

 sRelOnBVH = {0.18, 0, 0.1 };
};


CreateMarkerDriver LHT2(
MarkerName = LHT2,
MarkerPlacement= Left.ShoulderArm.Seg.Hand,
PlaceMarkerAt =Ref.wj,
MarkerPlacementBVH= Main.ModelSetup.BVHFileData.Model.Hips.Chest.Chest2.Chest3.Chest4.LeftCollar.LeftShoulder.LeftElbow.LeftWrist.Seg,
OptX=OFF,OptY=OFF,OptZ=OFF,
WeightX=1,WeightY=1,WeightZ=1,
ScaleMarkerPosOnOff =OFF,
USE_BVH_INPUT = ON
) =
{
 sRelOpt =  {-0.18, 0.05, 0};
 sRelOnBVH = {0.18, 0, -0.05 };
};


CreateMarkerDriver RKJC(
MarkerName = RKJC,
MarkerPlacement= Right.Leg.Seg.Thigh,
PlaceMarkerAt =KneeJoint,
MarkerPlacementBVH= Main.ModelSetup.BVHFileData.Model.Hips.RightHip.RightKnee.Seg,
OptX=OFF,OptY=OFF,OptZ=OFF,
WeightX=1,WeightY=1,WeightZ=1,
ScaleMarkerPosOnOff =OFF,
USE_BVH_INPUT = ON
) =
{
 sRelOpt =  {0, 0, 0};
 sRelOnBVH = {0, 0, 0 };
};


CreateMarkerDriver RKNE(
MarkerName = RKNE,
MarkerPlacement= Right.Leg.Seg.Thigh,
PlaceMarkerAt =KneeJoint,
MarkerPlacementBVH= Main.ModelSetup.BVHFileData.Model.Hips.RightHip.Seg,
OptX=OFF,OptY=OFF,OptZ=OFF,
WeightX=1,WeightY=1,WeightZ=1,
ScaleMarkerPosOnOff =OFF,
USE_BVH_INPUT = ON
) =
{
 sRelOpt =  {0, 0, 0.1};
 sRelOnBVH = {-0.1, Main.ModelSetup.BVHFileData.Data.Hips.RightHip.RightKnee.OFFSET[1]*Main.ModelSetup.BVHFileData.TranslationScale, 0 };
};


CreateMarkerDriver RAJC(
MarkerName = RAJC,
MarkerPlacement= Right.Leg.Seg.Shank,
PlaceMarkerAt =AnkleJoint,
MarkerPlacementBVH= Main.ModelSetup.BVHFileData.Model.Hips.RightHip.RightKnee.RightAnkle.Seg,
OptX=OFF,OptY=OFF,OptZ=OFF,
WeightX=1,WeightY=1,WeightZ=1,
ScaleMarkerPosOnOff =OFF,
USE_BVH_INPUT = ON
) =
{
 sRelOpt =  {0, 0.00, 0.01};
 sRelOnBVH = {0, 0.0, 0 };
};


CreateMarkerDriver RTOE(
MarkerName = RTOE,
MarkerPlacement= Right.Leg.Seg.Foot,
MarkerPlacementBVH= Main.ModelSetup.BVHFileData.Model.Hips.RightHip.RightKnee.RightAnkle.RightToe.Seg,
OptX=OFF,OptY=OFF,OptZ=OFF,
WeightX=1,WeightY=1,WeightZ=1,
ScaleMarkerPosOnOff =ON,
USE_BVH_INPUT = ON
) =
{
 sRelOpt =  {0.14, -0.095, -0.02};
 sRelOnBVH = {0.02, 0, 0 };
};


CreateMarkerDriver RTOE2(
MarkerName = RTOE2,
MarkerPlacement= Right.Leg.Seg.Foot,
MarkerPlacementBVH= Main.ModelSetup.BVHFileData.Model.Hips.RightHip.RightKnee.RightAnkle.RightToe.Seg,
OptX=OFF,OptY=OFF,OptZ=OFF,
WeightX=1,WeightY=1,WeightZ=0,
ScaleMarkerPosOnOff =ON,
USE_BVH_INPUT = ON
) =
{
 sRelOpt =  {0.14, -0.095, 0.05};
 sRelOnBVH = {-0.05, 0, 0 };
};


CreateMarkerDriver LKJC(
MarkerName = LKJC,
MarkerPlacement= Left.Leg.Seg.Thigh,
PlaceMarkerAt=KneeJoint,
MarkerPlacementBVH= Main.ModelSetup.BVHFileData.Model.Hips.LeftHip.LeftKnee.Seg,
OptX=OFF,OptY=OFF,OptZ=OFF,
WeightX=1,WeightY=1,WeightZ=1,
ScaleMarkerPosOnOff =OFF,
USE_BVH_INPUT = ON
) =
{
 sRelOpt =  {0, 0, 0};
 sRelOnBVH = {0, 0, 0};
};


CreateMarkerDriver LKNE(
MarkerName = LKNE,
MarkerPlacement= Left.Leg.Seg.Thigh,
PlaceMarkerAt=KneeJoint,
MarkerPlacementBVH= Main.ModelSetup.BVHFileData.Model.Hips.LeftHip.Seg,
OptX=OFF,OptY=OFF,OptZ=OFF,
WeightX=1,WeightY=1,WeightZ=0,
ScaleMarkerPosOnOff =OFF,
USE_BVH_INPUT = ON
) =
{
 sRelOpt =  {0, 0, -0.1};
 sRelOnBVH = {0.1, Main.ModelSetup.BVHFileData.Data.Hips.LeftHip.LeftKnee.OFFSET[1]*Main.ModelSetup.BVHFileData.TranslationScale, 0 };
};


CreateMarkerDriver LAJC(
MarkerName = LAJC,
MarkerPlacement= Left.Leg.Seg.Shank,
PlaceMarkerAt=AnkleJoint,
MarkerPlacementBVH= Main.ModelSetup.BVHFileData.Model.Hips.LeftHip.LeftKnee.LeftAnkle.Seg,
OptX=OFF,OptY=OFF,OptZ=OFF,
WeightX=1,WeightY=1,WeightZ=1,
ScaleMarkerPosOnOff =OFF,
USE_BVH_INPUT = ON
) =
{
 sRelOpt =  {0, 0.00, -0.01};
 sRelOnBVH = {0, 0, 0};
};


CreateMarkerDriver LTOE(
MarkerName = LTOE,
MarkerPlacement= Left.Leg.Seg.Foot,
MarkerPlacementBVH= Main.ModelSetup.BVHFileData.Model.Hips.LeftHip.LeftKnee.LeftAnkle.LeftToe.Seg,
OptX=OFF,OptY=OFF,OptZ=OFF,
WeightX=1,WeightY=1,WeightZ=1,
ScaleMarkerPosOnOff =ON,
USE_BVH_INPUT = ON
) =
{
 sRelOpt =  {0.14, -0.095, 0.02};
 sRelOnBVH = {-0.02, 0, 0 };
};


CreateMarkerDriver LTOE2(
MarkerName = LTOE2,
MarkerPlacement= Left.Leg.Seg.Foot,
MarkerPlacementBVH= Main.ModelSetup.BVHFileData.Model.Hips.LeftHip.LeftKnee.LeftAnkle.LeftToe.Seg,
OptX=OFF,OptY=OFF,OptZ=OFF,
WeightX=1,WeightY=1,WeightZ=1,
ScaleMarkerPosOnOff =ON,
USE_BVH_INPUT = ON
) =
{
 sRelOpt =  {0.14, -0.095, -0.05};
 sRelOnBVH = {0.05, 0, 0 };
};
