// This file contains a set of auxillary drivers. They are usefull/necessary
// in some cases where the marker protocol doesn't provide enough information
// to specify all degrees of freedom. Hence, these drivers complement a
// specific driver protocol. Many of these drivers are soft, and an only serve
// to stabalize the solver in postures where the markers doesn't provide unique
// kinematic solution.

AnyFolder ExtraDrivers = {


  // --------------------------------------------------------------------------
  // The BM_MANNEQUIN drivers are used to support the degrees of freedom where
  // the markers do not provide enough information.
  // See this file for options: #path HTML_DOC "<AMMR_PATH_DOC>/bm_config/index.html"
  // --------------------------------------------------------------------------

  #define BM_MANNEQUIN_DRIVER_WEAK_SWITCH ON

  // Add drivers for extension of toe drivers: Only for Right side.
  // Left foot toes are driven by the toe tip marker!
  #if BM_FOOT_MODEL == _FOOT_MODEL_TOE_FLEX_GM_
  RotationPenetrationCombiDriver ToeDriverRight (
      TARGET_FRAME = Main.HumanModel.BodyModel.Right.Leg.Seg.Foot.Toe1.DistalPhalange1.ToeTip,
      NEUTRAL_ANGLE_MEASURE = Main.HumanModel.BodyModel.Interface.Right.MetatarsoPhalangeal1DorsiFlexion
      ) = {
            Corners = {
                        {2.8,0.035,-3},
                        {2.8,0.04,-3.9},
                        {2.2,0.04,-3.9},
                        {2.2,0.04,-3},
                      };
          };

  RotationPenetrationCombiDriver ToeDriver2Right (
      TARGET_FRAME = Main.HumanModel.BodyModel.Right.Leg.Seg.Foot.Toe1.DistalPhalange1.ToeTip,
      NEUTRAL_ANGLE_MEASURE = Main.HumanModel.BodyModel.Interface.Right.MetatarsoPhalangeal1DorsiFlexion
      ) = {
            Corners = {
                        {2.8,0.04,-4.5},
                        {2.8,0.04,-5.5},
                        {2.2,0.04,-5.5},
                        {2.2,0.04,-4.5},
                      };
          };
  #endif


  #define BM_MANNEQUIN_DRIVER_NECK OFF


  // This link to the mannequin drivers ensures they are picked up by the study.
  AnyFolder& MannequinDrivers = Main.HumanModel.DefaultMannequinDrivers;

};
