#include "libdef.any"

// ----------------------------RUHM HAND MODEL----------------------------
//                 Lucas Engelhardt and Maximilian Melzner
//
//
//                       Regensburg Ulm Hand Model
//
//        Example for Mocap Analysis with Right Hand Marker Protocol
// -----------------------------------------------------------------------

#define RUHM_ENABLE_JOINT_MUSCLES OFF


// Enter and edit Trial Specific Data in this file:
#path MOCAP_TRIAL_SPECIFIC_DATA "Setup/TrialSpecificData_FullBody.any"

// Enter and edit Subject-Spcific Data in this file:
#path MOCAP_SUBJECT_SPECIFIC_DATA "Setup/SubjectSpecificData_DetailedHand.any"

// Enter and edit Lab-Specific Data in this file:
#path MOCAP_LAB_SPECIFIC_DATA "Setup/LabSpecificData.any"

// Include the AnyMoCap Framwork
#include "<ANYMOCAP_MODEL>"
