// ----------------------------RUHM HAND MODEL----------------------------
//                 Lucas Engelhardt and Maximilian Melzner
//
//
//                       Regensburg Ulm Hand Model
// -----------------------------------------------------------------------

Main.ModelSetup.LabSpecificData = {

 System.Compatibility.AnyBody73_ExperimentalShortestPathSolver = On;


 #path BODY_MODEL_CONFIG_FILE "BodyModelConfig.any"

 #path MOCAP_MARKER_PROTOCOL_FILE "MarkerProtocolDetailedHand.any"
 #path MOCAP_EXTRA_DRIVERS_FILE "ExtraDrivers.any"

 #path MOCAP_C3DSETTINGS "C3DSettings.any"

// #ifdef USE_GRF_PREDICTION
//  // This switch ensure that the AnyMoCap sets the appropriate settings
//  // for the GRF prediction (e.g. residuals, solvers etc.)
//  #define MOCAP_USE_GRF_PREDICTION ON
//  // Include the GRF prediction force plates.
//  #path MOCAP_FORCE_PLATE_FILE "ForcePlates_GRFPrediction.any"
// #else
//  // Use normal force plates
//  #path MOCAP_FORCE_PLATE_FILE "ForcePlates.any"
// #endif

 Gravity = 9.81*{0,0,-1};


  // This adds different segment length as design variables to
  // to the parameter identification study (Main.Studies.ParameterIdentification)
  // This allows the segment length to be optimized in based on the markers/motion
  OptimizeAnthropometricsOnOff OptimizeAntropometricsOnOff (
    PELVIS_WIDTH = ON ,
    HEAD_HEIGHT = OFF,
    TRUNK_HEIGHT= ON,
    RIGHT_THIGH_LENGTH= OFF,
    LEFT_THIGH_LENGTH = OFF,
    RIGHT_SHANK_LENGTH= OFF,
    LEFT_SHANK_LENGTH = OFF,
    RIGHT_FOOT_LENGTH= OFF,
    LEFT_FOOT_LENGTH = OFF,
    RIGHT_UPPERARM_LENGTH= INCLUDE_UPPERBODY,
    LEFT_UPPERARM_LENGTH = OFF,
    RIGHT_LOWERARM_LENGTH= INCLUDE_UPPERBODY,
    LEFT_LOWERARM_LENGTH = OFF,
    RIGHT_HAND_LENGTH= INCLUDE_UPPERBODY,
    LEFT_HAND_LENGTH = OFF,
    LEFT_RIGHT_SYMMETRY = OFF,

    //Scaling of all fingers on the right hand
    RIGHT_CARPALS_LENGTH= OFF,

    RIGHT_THUMB_MC_LENGTH= OFF,
    RIGHT_THUMB_PP_LENGTH= OFF,
    RIGHT_THUMB_DP_LENGTH= OFF,

    RIGHT_FINGER2_MC_LENGTH= OFF,
    RIGHT_FINGER2_PP_LENGTH= OFF,
    RIGHT_FINGER2_MP_LENGTH= OFF,
    RIGHT_FINGER2_DP_LENGTH= OFF,

    RIGHT_FINGER3_MC_LENGTH= OFF,
    RIGHT_FINGER3_PP_LENGTH= OFF,
    RIGHT_FINGER3_MP_LENGTH= OFF,
    RIGHT_FINGER3_DP_LENGTH= OFF,

    RIGHT_FINGER4_MC_LENGTH= OFF,
    RIGHT_FINGER4_PP_LENGTH= OFF,
    RIGHT_FINGER4_MP_LENGTH= OFF,
    RIGHT_FINGER4_DP_LENGTH= OFF,

    RIGHT_FINGER5_MC_LENGTH= OFF,
    RIGHT_FINGER5_PP_LENGTH= OFF,
    RIGHT_FINGER5_MP_LENGTH= OFF,
    RIGHT_FINGER5_DP_LENGTH= OFF

  ) ={};


//  AnyFolder OptimizeAntropometrics =
//  {
//   CreateDesVar PelvisWidth( ENABLE = ON,
//     NAME = PelvisWidth,
//     PARAMETER = Main.HumanModel.Anthropometrics.SegmentDimensions.PelvisWidth
//   ) = {};
//
//  };


};
