// EXAMPLE of MarkerProcol file for the Hand protocol.

// ----------------------------RUHM HAND MODEL----------------------------
//                 Lucas Engelhardt and Maximilian Melzner
//
//
//                       Regensburg Ulm Hand Model
// -----------------------------------------------------------------------
#define _LPSI
#define _RPSI
#define _RASI
#define _LASI
//#define _RFHD
//#define _LFHD
//#define _RBHD
//#define _LBHD
#define _STRN
#define _CLAV
#define _T10
#define _C7

//#define _C3
//#define _T3
//#define _T6
//#define _L2
//#define _L4

//#define _RTHI
//#define _RKNE
//#define _RTIB
//#define _RANK
//#define _RTOE
//#define _RHEE
//#define _RMT5
//#define _LTHI
//#define _LKNE
//#define _LTIB
//#define _LANK
//#define _LTOE
//#define _LHEE
//#define _LMT5

#if INCLUDE_UPPERBODY == ON
#define _RSHO
#define _RUPA
#define _RELL
#define _RELP
#define _RELM
#define _RFRA
#define _RRS
#define _RUS

//#if BM_ARM_DETAILED == ON
#define _RMCP1
#define _RMCP2
#define _RMCP3
#define _RMCP4
#define _RMCP5
#define _RPIP2
#define _RPIP3
#define _RPIP4
#define _RPIP5
#define _RDIP1
#define _RDIP2
#define _RDIP3
#define _RDIP4
#define _RDIP5
#define _RTIP1
#define _RTIP2
#define _RTIP3
#define _RTIP4
#define _RTIP5
#define _RTRA
#define _RTRI
#define _RDOR
//#endif
//#define _RFIN
//#define _LSHO
//#define _LUPA
//#define _LELB
//#define _LFRA
//#define _LWRA
//#define _LWRB
//#define _LFIN
#endif

//-----This has to be fixed in the future ------------------------------------------------------------------------------------
AnyVar Height = -0.0;
AnyVar Radius = -0.002;

AnyVar DistalPhalanx2_x = -Main.HumanModel.BodyModel.Right.ShoulderArm.Seg.Hand.Finger2.MiddlePhalanxParameters.Radius*2+Radius;
AnyVar MiddlePhalanx2_x = -Main.HumanModel.BodyModel.Right.ShoulderArm.Seg.Hand.Finger2.MiddlePhalanxParameters.Radius*2+Radius;
AnyVar ProximalPhalanx2_x = -Main.HumanModel.BodyModel.Right.ShoulderArm.Seg.Hand.Finger2.ProximalPhalanxParameters.Radius*2+Radius;
AnyVar MetacarpalPhalanx2_x = -Main.HumanModel.BodyModel.Right.ShoulderArm.Seg.Hand.Finger2.MetacarpalParameters.Radius*2+Radius;
AnyVar DistalPhalanx3_x = -Main.HumanModel.BodyModel.Right.ShoulderArm.Seg.Hand.Finger3.MiddlePhalanxParameters.Radius*2+Radius;
AnyVar MiddlePhalanx3_x = -Main.HumanModel.BodyModel.Right.ShoulderArm.Seg.Hand.Finger3.MiddlePhalanxParameters.Radius*2+Radius;
AnyVar ProximalPhalanx3_x = -Main.HumanModel.BodyModel.Right.ShoulderArm.Seg.Hand.Finger3.ProximalPhalanxParameters.Radius*2+Radius;
AnyVar MetacarpalPhalanx3_x = -Main.HumanModel.BodyModel.Right.ShoulderArm.Seg.Hand.Finger3.MetacarpalParameters.Radius*2+Radius;

AnyVar DistalPhalanx4_x = -Main.HumanModel.BodyModel.Right.ShoulderArm.Seg.Hand.Finger4.MiddlePhalanxParameters.Radius*2+Radius;
AnyVar MiddlePhalanx4_x = -Main.HumanModel.BodyModel.Right.ShoulderArm.Seg.Hand.Finger4.MiddlePhalanxParameters.Radius*2+Radius;
AnyVar ProximalPhalanx4_x = -Main.HumanModel.BodyModel.Right.ShoulderArm.Seg.Hand.Finger4.ProximalPhalanxParameters.Radius*2+Radius;
AnyVar MetacarpalPhalanx4_x = -Main.HumanModel.BodyModel.Right.ShoulderArm.Seg.Hand.Finger4.MetacarpalParameters.Radius*2+Radius;
AnyVar DistalPhalanx5_x = -Main.HumanModel.BodyModel.Right.ShoulderArm.Seg.Hand.Finger5.MiddlePhalanxParameters.Radius*2+Radius;
AnyVar MiddlePhalanx5_x = -Main.HumanModel.BodyModel.Right.ShoulderArm.Seg.Hand.Finger5.MiddlePhalanxParameters.Radius*2+Radius;
AnyVar ProximalPhalanx5_x = -Main.HumanModel.BodyModel.Right.ShoulderArm.Seg.Hand.Finger5.ProximalPhalanxParameters.Radius*2+Radius;
AnyVar MetacarpalPhalanx5_x = -Main.HumanModel.BodyModel.Right.ShoulderArm.Seg.Hand.Finger5.MetacarpalParameters.Radius*2+Radius;

AnyVar MetacarpalPhalanx1_y = Main.HumanModel.Anthropometrics.SegmentDimensions.Right.Hand.Finger1.MCLength/2;
AnyVar ProximalPhalanx1_y = Main.HumanModel.Anthropometrics.SegmentDimensions.Right.Hand.Finger1.PPLength/2;
AnyVar DistalPhalanx1_y = Main.HumanModel.Anthropometrics.SegmentDimensions.Right.Hand.Finger1.DPLength/2;

AnyVar DistalPhalanx2_y = Main.HumanModel.Anthropometrics.SegmentDimensions.Right.Hand.Finger2.DPLength/2;
AnyVar MiddlePhalanx2_y = Main.HumanModel.Anthropometrics.SegmentDimensions.Right.Hand.Finger2.MPLength/2;
AnyVar ProximalPhalanx2_y = Main.HumanModel.Anthropometrics.SegmentDimensions.Right.Hand.Finger2.PPLength/2;
AnyVar MetacarpalPhalanx2_y = Main.HumanModel.Anthropometrics.SegmentDimensions.Right.Hand.Finger2.MCLength/2;

AnyVar DistalPhalanx3_y = Main.HumanModel.Anthropometrics.SegmentDimensions.Right.Hand.Finger3.DPLength/2;
AnyVar MiddlePhalanx3_y = Main.HumanModel.Anthropometrics.SegmentDimensions.Right.Hand.Finger3.MPLength/2;
AnyVar ProximalPhalanx3_y = Main.HumanModel.Anthropometrics.SegmentDimensions.Right.Hand.Finger3.PPLength/2;
AnyVar MetacarpalPhalanx3_y = Main.HumanModel.Anthropometrics.SegmentDimensions.Right.Hand.Finger3.MCLength/2;

AnyVar DistalPhalanx4_y = Main.HumanModel.Anthropometrics.SegmentDimensions.Right.Hand.Finger4.DPLength/2;
AnyVar MiddlePhalanx4_y = Main.HumanModel.Anthropometrics.SegmentDimensions.Right.Hand.Finger4.MPLength/2;
AnyVar ProximalPhalanx4_y = Main.HumanModel.Anthropometrics.SegmentDimensions.Right.Hand.Finger4.PPLength/2;
AnyVar MetacarpalPhalanx4_y = Main.HumanModel.Anthropometrics.SegmentDimensions.Right.Hand.Finger4.MCLength/2;

AnyVar DistalPhalanx5_y = Main.HumanModel.Anthropometrics.SegmentDimensions.Right.Hand.Finger5.DPLength/2;
AnyVar MiddlePhalanx5_y = Main.HumanModel.Anthropometrics.SegmentDimensions.Right.Hand.Finger5.MPLength/2;
AnyVar ProximalPhalanx5_y = Main.HumanModel.Anthropometrics.SegmentDimensions.Right.Hand.Finger5.PPLength/2;
AnyVar MetacarpalPhalanx5_y = Main.HumanModel.Anthropometrics.SegmentDimensions.Right.Hand.Finger5.MCLength/2;

//--------------------------------------------------------------------------------------------------------------------------------

#ifdef _LPSI
// Marker on the Left Posterior Superior Iliac
CreateMarkerDriver LPSI (
MarkerName= LPSI,
UseC3DWeightResiduals = ON,
MarkerPlacement=Trunk.SegmentsLumbar.PelvisSeg,
OptX=OFF, OptY=ON, OptZ=OFF,
WeightX=100,WeightY=100,WeightZ=100

) = {
  sRelOpt = {-0.145,0.02, -0.04};
};
#endif

#ifdef _RPSI
// Marker on the Right Posterior Superior Iliac
CreateMarkerDriver RPSI (
MarkerName= RPSI,
UseC3DWeightResiduals = ON,
MarkerPlacement=Trunk.SegmentsLumbar.PelvisSeg,
OptX=OFF, OptY=ON, OptZ=OFF,
WeightX=100,WeightY=100,WeightZ=100
) = {
  sRelOpt = {-0.145,0.02, 0.04};
};
#endif

#ifdef _RASI
// Marker on the Right Anterior Superior Iliac
CreateMarkerDriver RASI (
MarkerName= RASI,
UseC3DWeightResiduals = ON,
MarkerPlacement=Trunk.SegmentsLumbar.PelvisSeg,
OptX=OFF, OptY=OFF, OptZ=OFF,
WeightX=100,WeightY=100,WeightZ=100
) = {
  sRelOpt = {0.035, 0.005, 0.125};
};
#endif

#ifdef _LASI
// Marker on the Left Anterior Superior Iliac
CreateMarkerDriver LASI (
MarkerName= LASI ,
UseC3DWeightResiduals = ON,
MarkerPlacement=Trunk.SegmentsLumbar.PelvisSeg,
OptX=OFF, OptY=OFF, OptZ=OFF,
WeightX=100,WeightY=100,WeightZ=100
) = {
  sRelOpt = {0.035,0.005, -0.125};
};
#endif

//// Head

#ifdef _RFHD
// Marker on the Right Front Head
CreateMarkerDriver RFHD (
MarkerName= RFHD,
MarkerPlacement=Trunk.SegmentsThorax.SkullSeg,
OptX=OFF,OptY=OFF,OptZ=OFF
) = {
  sRelOpt = {0.135,0.075,0.045};
};
#endif

#ifdef _LFHD
// Marker on the Left Front Head
CreateMarkerDriver LFHD (
MarkerName= LFHD,
MarkerPlacement=Trunk.SegmentsThorax.SkullSeg,
OptX=OFF,OptY=OFF,OptZ=OFF
) = {
  sRelOpt = {0.12,0.065,-0.045};
};
#endif

#ifdef _RBHD
// Marker on the Right Back Head
CreateMarkerDriver RBHD (
MarkerName= RBHD,
MarkerPlacement=Trunk.SegmentsThorax.SkullSeg,
OptX=ON ,OptY=OFF ,OptZ=ON
) = {
  sRelOpt = {-0.07,0.09,0.08};
};
#endif

#ifdef _LBHD
// Marker on the Left Back Head
CreateMarkerDriver LBHD (
MarkerName= LBHD,
MarkerPlacement=Trunk.SegmentsThorax.SkullSeg,
OptX=ON,OptY=OFF,OptZ= ON ,
WeightX=1.0,WeightY=1.0,WeightZ=1.0
) = {
  sRelOpt = {-0.07,0.09,-0.08};
};
#endif

//// Thorax

#ifdef _STRN
// Marker on the Sternum
CreateMarkerDriver STRN (
MarkerName= STRN,
UseC3DWeightResiduals = ON,
MarkerPlacement=Trunk.SegmentsThorax.ThoraxSeg,
OptX=ON,OptY=ON,OptZ=OFF,
WeightX=200,WeightY=200,WeightZ=200
) = {
  sRelOpt = {0.18,0.24,0.0};
};
#endif

#ifdef _CLAV
// Marker on the Clavicle
CreateMarkerDriver CLAV (
MarkerName= CLAV,
UseC3DWeightResiduals = ON,
MarkerPlacement=Trunk.SegmentsThorax.ThoraxSeg,
OptX=OFF,OptY=OFF,OptZ=OFF,
WeightX=200,WeightY=200,WeightZ=200
) = {
  sRelOpt = {0.12,0.42,0.0};
};
#endif

#ifdef _T10
// Marker on the Thoracic Vertebra 10
CreateMarkerDriver T10 (
MarkerName= T10,
UseC3DWeightResiduals = ON,
MarkerPlacement=Trunk.SegmentsThorax.ThoraxSeg,
OptX=OFF,OptY=ON,OptZ=OFF,
WeightX=200,WeightY=200,WeightZ=200
) = {
  sRelOpt = {-0.03,0.187,0};
};
#endif


#ifdef _C3
// Marker on the Cervical Vertebra 3
CreateMarkerDriver C3 (
MarkerName= C3,

MarkerPlacement=Trunk.SegmentsThorax.ThoraxSeg,
OptX=OFF,OptY=OFF,OptZ=OFF,
WeightX=5.0,WeightY=5.0,WeightZ=5.0
//Model1=MotionAndParameterOptimizationModel,Model2= InverseDynamicModel,
//sRelOptScalingOnOff="On"
) = {
  sRelOpt = {0.00,0.50,0};
};
#endif

#ifdef _C7
// Marker on the Cervical Vertebra 10
CreateMarkerDriver C7 (
MarkerName= C7,
UseC3DWeightResiduals = ON,
MarkerPlacement=Trunk.SegmentsThorax.ThoraxSeg,
PlaceMarkerAt = T1C7JntNode,
OptX=ON,OptY=ON,OptZ=OFF,
WeightX=200,WeightY=200,WeightZ=200
) = {
  sRelOpt = {-0.075,0.05,0};
};
#endif

#ifdef _T3
// Marker on the Thoracic Vertebra 3
CreateMarkerDriver T3 (
MarkerName= T3,
MarkerPlacement=Trunk.SegmentsThorax.ThoraxSeg,
OptX=OFF,OptY=OFF,OptZ=OFF,
WeightX=10.0,WeightY=10.0,WeightZ=10.0
//Model1=MotionAndParameterOptimizationModel,Model2= InverseDynamicModel,
//sRelOptScalingOnOff="On"
) = {
  sRelOpt = {-0.022,0.4,0};
};
#endif

#ifdef _T6
// Marker on the Thoracic Vertebra 6
CreateMarkerDriver T6 (
MarkerName= T6,
MarkerPlacement=Trunk.SegmentsThorax.ThoraxSeg,
OptX=OFF,OptY=ON,OptZ=OFF,
WeightX=10.0,WeightY=10.0,WeightZ=10.0
//Model1=MotionAndParameterOptimizationModel,Model2= InverseDynamicModel,
//sRelOptScalingOnOff="On"
) = {
  sRelOpt = {-0.032,0.30,0};
};
#endif

#ifdef _L2
 //Marker on the Lumbar Vertebra 2
CreateMarkerDriver L2 (
MarkerName= L2,
MarkerPlacement=Main.HumanModel.BodyModel.Trunk.SegmentsLumbar.L2Seg,
OptX=ON,OptY=ON,OptZ=ON,
WeightX=10.0,WeightY=10.0,WeightZ=10.0
//Model1=MotionAndParameterOptimizationModel,Model2= InverseDynamicModel,
//sRelOptScalingOnOff=ON
) = {
  sRelOpt = {-0.02,0.09,0};
};
#endif

#ifdef _L4
// Marker on the Lumbar Vertebra 4
CreateMarkerDriver L4 (
MarkerName= L4,
MarkerPlacement=Trunk.SegmentsLumbar.L4Seg,
OptX=ON,OptY=ON,OptZ=OFF,
WeightX=10.0,WeightY=10.0,WeightZ=10.0
//Model1=MotionAndParameterOptimizationModel,Model2= InverseDynamicModel,
//sRelOptScalingOnOff="On"
) = {
  sRelOpt = {-0.03,0.03,0};
};
#endif

//// Lower Extremity Markers
#ifdef _RTHI
// Marker on the Right Thigh
CreateMarkerDriver RTHI (
MarkerName=  RTHI,
OptX=ON,OptY=ON,OptZ=ON,
MarkerPlacement =Right.Leg.Seg.Thigh)= {
  sRelOpt = {0.00, -0.15, 0.1};
};
#endif

#ifdef _RKNE
// Marker on the Right Knee
CreateMarkerDriver RKNE (
MarkerName= RKNE,
MarkerPlacement= Right.Leg.Seg.Thigh,
PlaceMarkerAt = EpicondylusFemorisLateralis,
OptX=OFF,OptY=OFF,OptZ=OFF,
WeightX=1.0,WeightY=1.0,WeightZ=1.0

) = {
  sRelOpt = {0.01, 0.0, 0.015};
};
#endif

#ifdef _RTIB
// Marker on the Right Tibia
CreateMarkerDriver RTIB (
MarkerName= RTIB,
MarkerPlacement=Right.Leg.Seg.Shank,
OptX=ON,OptY=ON,OptZ=ON
) = {
  sRelOpt = {0.0, -0.1, 0.05};
};
#endif

#ifdef _RANK
// Marker on the Right Lateral Ankle
CreateMarkerDriver RANK (
MarkerName= RANK ,
MarkerPlacement=Right.Leg.Seg.Shank,
PlaceMarkerAt = LateralMalleolus,
OptX=ON,OptY=ON,OptZ=ON
) = {
  sRelOpt = {-0.00, -0.0, 0.015};
};
#endif

#ifdef _RTOE
// Marker on the Right Toe
CreateMarkerDriver RTOE (
MarkerName= RTOE,
MarkerPlacement=Right.Leg.Seg.Foot,
PlaceMarkerAt = MetatarsalJoint1Node,
OptX=OFF , OptY=OFF , OptZ=OFF,
WeightX=1.0,WeightY=1.0,WeightZ=1.0
) = {
  sRelOpt = {0.014, 0.02, 0.00};
};
#endif

#ifdef _RHEE
// Marker on the Right Heel
CreateMarkerDriver RHEE (
MarkerName= RHEE ,
MarkerPlacement=Right.Leg.Seg.Foot,
PlaceMarkerAt = HeelNode,
OptX=OFF, OptY=OFF , OptZ=OFF,
WeightX=1.0,WeightY=1.0,WeightZ=1.0
) = {
  sRelOpt =  {-0.025, 0.01, -0.0};
};
#endif


// Marker on the Right Metatarsel 5
#ifdef _RMT5
CreateMarkerDriver RMT5 (
MarkerName= RMT5,
MarkerPlacement=Right.Leg.Seg.Foot,
PlaceMarkerAt = MetatarsalJoint5Node,
OptX=ON,OptY=OFF,OptZ=OFF,
WeightX=1.0,WeightY=1.0,WeightZ=1.0) = {
  sRelOpt =  {0.0, 0.01, 0.015};
};
#endif

#ifdef _LTHI
// Marker on the Left Thigh
CreateMarkerDriver LTHI (
MarkerName= LTHI ,
MarkerPlacement=Left.Leg.Seg.Thigh,
OptX=ON,OptY=ON,OptZ=ON
) = {
  sRelOpt = {0.0, -0.28, -0.1};
};
#endif

#ifdef _LKNE
// Marker on the Left Knee
CreateMarkerDriver LKNE (
MarkerName= LKNE ,
MarkerPlacement=Left.Leg.Seg.Thigh,
PlaceMarkerAt = EpicondylusFemorisLateralis,
OptX=OFF,OptY=OFF,OptZ=OFF
) = {
  sRelOpt = {0.01, -0.0, -0.015};
};
#endif

#ifdef _LTIB
// Marker on the Left Tibia
CreateMarkerDriver LTIB (
MarkerName= LTIB,
MarkerPlacement=Left.Leg.Seg.Shank,
OptX=ON,OptY=ON,OptZ=ON
) = {
  sRelOpt = {0.0, -0.1, -0.05};
};
#endif

#ifdef _LANK
// Marker on the Left Ankle
CreateMarkerDriver LANK (
MarkerName= LANK,
MarkerPlacement=Left.Leg.Seg.Shank,
PlaceMarkerAt = LateralMalleolus,
OptX=ON,OptY=ON,OptZ=ON
) = {
  sRelOpt = {-0.0, -0.0, -0.015};
};
#endif

#ifdef _LTOE
// Marker on the Left Toe
CreateMarkerDriver LTOE (
MarkerName= LTOE,
MarkerPlacement=Left.Leg.Seg.Foot,
PlaceMarkerAt = MetatarsalJoint1Node,
OptX=OFF,OptY=OFF ,OptZ=OFF
) = {
  sRelOpt = {0.014, 0.02, 0.00};
};
#endif

#ifdef _LHEE
// Marker on the Left Heel
CreateMarkerDriver LHEE(
MarkerName= LHEE,
MarkerPlacement=Left.Leg.Seg.Foot,
PlaceMarkerAt = HeelNode,
OptX=OFF, OptY=OFF, OptZ=OFF,
WeightX=1.0,WeightY=1.0,WeightZ=1.0
) = {
  sRelOpt =  {-0.025, 0.01, 0.0};
};
#endif

#ifdef _LMT5
// Marker on the Right Metatarsel 5
CreateMarkerDriver LMT5 (
MarkerName= LMT5,
MarkerPlacement=Left.Leg.Seg.Foot,
PlaceMarkerAt = MetatarsalJoint5Node,
OptX=ON,OptY=OFF,OptZ=OFF,
WeightX=1.0,WeightY=1.0,WeightZ=1.0) = {
  sRelOpt =  {0.0, 0.01, -0.015};
};
#endif

//// Trunk markers

#ifdef _RSHO
CreateMarkerDriver RSHO (
MarkerName= RSHO,
MarkerPlacement=Right.ShoulderArm.Seg.Scapula,
OptX=OFF,OptY=OFF,OptZ=OFF,
WeightX=100,WeightY=100,WeightZ=100
) = {
  sRelOpt = {0.03,-0.0,-0.04};
};
#endif

#ifdef _LSHO
// Marker on the Left Acromio-clavicular joint
CreateMarkerDriver LSHO (
MarkerName= LSHO,
MarkerPlacement=Left.ShoulderArm.Seg.Scapula,
OptX=ON,OptY=OFF,OptZ=OFF
) = {
  sRelOpt = {0.00,0.005,0.015};
};
#endif


#ifdef _RUPA
// Marker on the Right Upper Arm
CreateMarkerDriver RUPA (
MarkerName= RUPA,
MarkerPlacement=Right.ShoulderArm.Seg.Humerus,
OptX=ON,OptY=ON,OptZ=ON
) = {
  sRelOpt ={0.02,-0.17,0.005};
};
#endif


#ifdef _LUPA
// Marker on the Left Upper Arm
CreateMarkerDriver LUPA (
MarkerName= LUPA,
MarkerPlacement=Left.ShoulderArm.Seg.Humerus,
OptX=ON,OptY=ON,OptZ=ON
) = {
  sRelOpt ={-0.03,-0.19,0.01};
};
#endif


#ifdef _RELL
// Marker on the Right Elbow
CreateMarkerDriver RELL (
MarkerName= RELL,
MarkerPlacement=Right.ShoulderArm.Seg.Humerus,
OptX=OFF,OptY=OFF,OptZ=OFF,
WeightX=10,WeightY=10,WeightZ=10
) = {
  sRelOpt = {0.045,-0.345, 0.010};
};
#endif


#ifdef _RELP
// Marker on the Right Elbow
CreateMarkerDriver RELP (
MarkerName= RELP,
MarkerPlacement=Right.ShoulderArm.Seg.Ulna,
OptX=OFF,OptY=OFF,OptZ=OFF,
WeightX=10,WeightY=10,WeightZ=10
) = {
  sRelOpt = {0.015,-0.0, 0.035};
};
#endif


#ifdef _RELM
// Marker on the Right Elbow
CreateMarkerDriver RELM (
MarkerName= RELM,
MarkerPlacement=Right.ShoulderArm.Seg.Humerus,
OptX=OFF,OptY=OFF,OptZ=OFF,
WeightX=10,WeightY=10,WeightZ=10
) = {
  sRelOpt = {-0.045,-0.345, 0.010};
};
#endif


#ifdef _LELB
// Marker on the Left Elbow
CreateMarkerDriver LELB (
MarkerName= LELB,
MarkerPlacement=Left.ShoulderArm.Seg.Humerus,
OptX=OFF,OptY=OFF,OptZ=OFF
) = {
  sRelOpt = {-0.045,-0.325, 0.010};
};
#endif


#ifdef _LFRA
// Marker on the Left Radius
CreateMarkerDriver LFRA (
MarkerName= LFRA,
MarkerPlacement=Left.ShoulderArm.Seg.Radius,
OptX=ON,OptY=ON,OptZ=ON
) = {
  sRelOpt = {-0.13, 0.03, 0.01};
};
#endif

#ifdef _RFRA
// Marker on the Right Radius
CreateMarkerDriver RFRA (
MarkerName= RFRA,
MarkerPlacement=Right.ShoulderArm.Seg.Radius,
OptX=ON,OptY=ON,OptZ=ON
) = {
  sRelOpt = {-0.1, -0.035, 0.00};
};
#endif

#ifdef _RRS
// Marker on the Right Wrist A
CreateMarkerDriver RRS (
MarkerName= RRS,
MarkerPlacement=Right.ShoulderArm.Seg.Radius,
OptX=ON,OptY=ON,OptZ=ON
//WeightX=10,WeightY=10,WeightZ=10
) = {
  sRelOpt = {-0.22, -0.05, 0.025};
};
#endif

#ifdef _RUS
// Marker on the Right Wrist B
CreateMarkerDriver RUS (
MarkerName= RUS,
MarkerPlacement=Right.ShoulderArm.Seg.Radius,
OptX=ON ,OptY=ON,OptZ=ON
//WeightX=10,WeightY=10,WeightZ=10
) = {
  sRelOpt = {-0.21, 0.05, 0.01};
};
#endif


#ifdef _RMCP1
// Marker on the Right Thumb MC
CreateMarkerDriver RMCP1 (
MarkerName= RMCP1,
MarkerPlacement=Right.ShoulderArm.Seg.Hand.Finger1.Seg.Metacarpal,
OptX=OFF ,OptY=OFF,OptZ=OFF,
WeightX=20,WeightY=30,WeightZ=20,
DRAW_SCALE=0.5
) = {
  sRelOpt = {.MetacarpalPhalanx2_x+0.002, -.MetacarpalPhalanx1_y+0.005, 0};
};
#endif


#ifdef _RDIP1
// Marker on the Right Thumb DP
CreateMarkerDriver RDIP1 (
MarkerName= RDIP1,
MarkerPlacement=Right.ShoulderArm.Seg.Hand.Finger1.Seg.ProximalPhalanx,
OptX=OFF ,OptY=OFF,OptZ=OFF ,
WeightX=20,WeightY=30,WeightZ=20,
DRAW_SCALE =0.5
) = {
  sRelOpt = {.ProximalPhalanx2_x-0.003, -.ProximalPhalanx1_y+0.008, 0};
};
#endif


#ifdef _RTIP1
// Marker on the Thumb Tip
CreateMarkerDriver RTIP1 (
MarkerName= RTIP1,
MarkerPlacement=Right.ShoulderArm.Seg.Hand.Finger1.Seg.DistalPhalanx,
OptX=OFF ,OptY=OFF,OptZ=OFF,
WeightX=20,WeightY=30,WeightZ=20,
DRAW_SCALE =0.5
) = {
  sRelOpt = {.DistalPhalanx2_x+0.005, -.DistalPhalanx1_y-0.00, 0};
};
#endif


#ifdef _RMCP2
// Marker on the Right Wrist B
CreateMarkerDriver RMCP2 (
MarkerName= RMCP2,
MarkerPlacement=Right.ShoulderArm.Seg.Hand.Finger2.Seg.Metacarpal,
OptX=OFF ,OptY=OFF,OptZ=OFF,
WeightX=20,WeightY=30,WeightZ=20,
DRAW_SCALE =0.5
) = {
  sRelOpt = {.MetacarpalPhalanx2_x, -.MetacarpalPhalanx2_y+0.002, 0};
};
#endif


#ifdef _RMCP3
// Marker on the Right Wrist B
CreateMarkerDriver RMCP3 (
MarkerName= RMCP3,
MarkerPlacement=Right.ShoulderArm.Seg.Hand.Finger3.Seg.Metacarpal,
OptX=OFF ,OptY=OFF,OptZ=OFF,
WeightX=20,WeightY=30,WeightZ=20,
DRAW_SCALE =0.5
) = {
  sRelOpt = {.MetacarpalPhalanx3_x, -.MetacarpalPhalanx3_y+0.005, 0};
};
#endif


#ifdef _RMCP4
// Marker on the Right Wrist B
CreateMarkerDriver RMCP4 (
MarkerName= RMCP4,
MarkerPlacement=Right.ShoulderArm.Seg.Hand.Finger4.Seg.Metacarpal,
OptX=OFF ,OptY=OFF,OptZ=OFF,
WeightX=20,WeightY=30,WeightZ=20,
DRAW_SCALE =0.5
) = {
  sRelOpt = {.MetacarpalPhalanx4_x, -.MetacarpalPhalanx4_y+0.003, 0};
};
#endif


#ifdef _RMCP5
// Marker on the Right Wrist B
CreateMarkerDriver RMCP5 (
MarkerName= RMCP5,
MarkerPlacement=Right.ShoulderArm.Seg.Hand.Finger5.Seg.Metacarpal,
OptX=OFF ,OptY=OFF,OptZ=OFF,
WeightX=20,WeightY=30,WeightZ=20,
DRAW_SCALE =0.5
) = {
  sRelOpt = {.MetacarpalPhalanx5_x+0.003, -.MetacarpalPhalanx5_y, 0};
};
#endif


#ifdef _RPIP2
// Marker on the Right Wrist B
CreateMarkerDriver RPIP2 (
MarkerName= RPIP2,
MarkerPlacement=Right.ShoulderArm.Seg.Hand.Finger2.Seg.ProximalPhalanx,
OptX=OFF ,OptY=OFF,OptZ=OFF,
WeightX=20,WeightY=20,WeightZ=40,
DRAW_SCALE =0.5
) = {
  sRelOpt = {.ProximalPhalanx2_x, -.ProximalPhalanx2_y+0.005, 0};
};
#endif


#ifdef _RPIP3
// Marker on the Right Wrist B
CreateMarkerDriver RPIP3 (
MarkerName= RPIP3,
MarkerPlacement=Right.ShoulderArm.Seg.Hand.Finger3.Seg.ProximalPhalanx,
OptX=OFF ,OptY=OFF,OptZ=OFF,
WeightX=10,WeightY=10,WeightZ=10,
DRAW_SCALE =0.5
) = {
  sRelOpt = {.ProximalPhalanx3_x, -.ProximalPhalanx3_y+0.005, 0};
};
#endif


#ifdef _RPIP4
// Marker on the Right Wrist B
CreateMarkerDriver RPIP4 (
MarkerName= RPIP4,
MarkerPlacement=Right.ShoulderArm.Seg.Hand.Finger4.Seg.ProximalPhalanx,
OptX=OFF ,OptY=OFF,OptZ=OFF ,
WeightX=10,WeightY=10,WeightZ=10,
DRAW_SCALE =0.5
) = {
  sRelOpt = {.ProximalPhalanx4_x, -.ProximalPhalanx4_y+0.005, 0};
};
#endif


#ifdef _RPIP5
// Marker on the Right Wrist B
CreateMarkerDriver RPIP5 (
MarkerName= RPIP5,
MarkerPlacement=Right.ShoulderArm.Seg.Hand.Finger5.Seg.ProximalPhalanx,
OptX=OFF ,OptY=OFF,OptZ=OFF ,
WeightX=10,WeightY=10,WeightZ=10,
DRAW_SCALE =0.5
) = {
  sRelOpt = {.ProximalPhalanx5_x+0.005, -.ProximalPhalanx5_y+0.005, 0};
};
#endif


#ifdef _RDIP2
// Marker on the Right Wrist B
CreateMarkerDriver RDIP2 (
MarkerName= RDIP2,
MarkerPlacement=Right.ShoulderArm.Seg.Hand.Finger2.Seg.MiddlePhalanx,
OptX=OFF ,OptY=OFF,OptZ=OFF,
WeightX=20,WeightY=20,WeightZ=20,
DRAW_SCALE =0.5
) = {
  sRelOpt = {.MiddlePhalanx2_x, -.MiddlePhalanx2_y+0.005, 0};
};
#endif


#ifdef _RDIP3
// Marker on the Right Wrist B
CreateMarkerDriver RDIP3 (
MarkerName= RDIP3,
MarkerPlacement=Right.ShoulderArm.Seg.Hand.Finger3.Seg.MiddlePhalanx,
OptX=OFF ,OptY=OFF,OptZ=OFF,
WeightX=10,WeightY=10,WeightZ=10,
DRAW_SCALE =0.5
) = {
  sRelOpt = {.MiddlePhalanx3_x, -.MiddlePhalanx3_y+0.005, 0};
};
#endif


#ifdef _RDIP4
// Marker on the Right Wrist B
CreateMarkerDriver RDIP4 (
MarkerName= RDIP4,
MarkerPlacement=Right.ShoulderArm.Seg.Hand.Finger4.Seg.MiddlePhalanx,
OptX=OFF ,OptY=OFF,OptZ=OFF ,
WeightX=10,WeightY=10,WeightZ=10,
DRAW_SCALE =0.5
) = {
  sRelOpt = {.MiddlePhalanx4_x, -.MiddlePhalanx4_y+0.005, 0};
};
#endif


#ifdef _RDIP5
// Marker on the Right Wrist B
CreateMarkerDriver RDIP5 (
MarkerName= RDIP5,
MarkerPlacement=Right.ShoulderArm.Seg.Hand.Finger5.Seg.MiddlePhalanx,
OptX=OFF ,OptY=OFF,OptZ=OFF ,
WeightX=10,WeightY=10,WeightZ=10,
DRAW_SCALE =0.5
) = {
  sRelOpt = {.MiddlePhalanx5_x, -.MiddlePhalanx5_y+0.005, 0};
};
#endif


#ifdef _RTIP2
// Marker on the Right Wrist B
CreateMarkerDriver RTIP2 (
MarkerName= RTIP2,
MarkerPlacement=Right.ShoulderArm.Seg.Hand.Finger2.Seg.DistalPhalanx,
OptX=OFF ,OptY=OFF,OptZ=OFF ,
WeightX=20,WeightY=20,WeightZ=20,
DRAW_SCALE =0.5
) = {
  sRelOpt = {.DistalPhalanx2_x, -.DistalPhalanx2_y+0.005, 0};
};
#endif


#ifdef _RTIP3
// Marker on the Right Wrist B
CreateMarkerDriver RTIP3 (
MarkerName= RTIP3,
MarkerPlacement=Right.ShoulderArm.Seg.Hand.Finger3.Seg.DistalPhalanx,
OptX=OFF ,OptY=OFF,OptZ=OFF,
WeightX=20,WeightY=20,WeightZ=20,
DRAW_SCALE =0.5
) = {
  sRelOpt = {.DistalPhalanx3_x, -.DistalPhalanx3_y+0.005, 0};
};
#endif


#ifdef _RTIP4
// Marker on the Right Wrist B
CreateMarkerDriver RTIP4 (
MarkerName= RTIP4,
MarkerPlacement=Right.ShoulderArm.Seg.Hand.Finger4.Seg.DistalPhalanx,
OptX=OFF ,OptY=OFF,OptZ=OFF ,
WeightX=20,WeightY=20,WeightZ=20,
DRAW_SCALE =0.5
) = {
  sRelOpt = {.DistalPhalanx4_x, -.DistalPhalanx4_y+0.005, 0};
};
#endif


#ifdef _RTIP5
// Marker on the Right Wrist B
CreateMarkerDriver RTIP5 (
MarkerName= RTIP5,
MarkerPlacement=Right.ShoulderArm.Seg.Hand.Finger5.Seg.DistalPhalanx,
OptX=OFF ,OptY=OFF,OptZ=OFF ,
WeightX=20,WeightY=20,WeightZ=20,
DRAW_SCALE =0.5
) = {
  sRelOpt = {.DistalPhalanx5_x, -.DistalPhalanx5_y+0.005, 0};
};
#endif


#ifdef _RTRA
// Marker on the
CreateMarkerDriver RTRA (
MarkerName= RTRA,
MarkerPlacement=Right.ShoulderArm.Seg.Hand.Carpals,
OptX=OFF ,OptY=OFF,OptZ=OFF,
WeightX=20,WeightY=20,WeightZ=20,
DRAW_SCALE =0.5
) = {
  sRelOpt = {.0, -0.015, 0.045};
};
#endif

#ifdef _RTRI
// Marker on the
CreateMarkerDriver RTRI (
MarkerName= RTRI,
MarkerPlacement=Right.ShoulderArm.Seg.Hand.Carpals,
OptX=OFF ,OptY=OFF,OptZ=ON,
WeightX=20,WeightY=20,WeightZ=20,
DRAW_SCALE =0.5
) = {
  sRelOpt = {.0, -0.0025, -0.040};
};
#endif


#ifdef _RDOR
// Marker on the
CreateMarkerDriver RDOR (
MarkerName= RDOR,
MarkerPlacement=Right.ShoulderArm.Seg.Hand.Carpals,
OptX=OFF ,OptY=ON,OptZ=ON,
WeightX=10,WeightY=10,WeightZ=10,
DRAW_SCALE =0.5
) = {
  sRelOpt = {.MetacarpalPhalanx3_x,-0.05,-0.008};
};
#endif


#ifdef _LWRA
// Marker on the Left Wrist A
CreateMarkerDriver LWRA (
MarkerName= LWRA,
MarkerPlacement=Left.ShoulderArm.Seg.Radius,
OptX=ON,OptY=ON,OptZ=OFF
) = {
  sRelOpt = {-0.21, 0.05, 0.01};
};
#endif

#ifdef _LWRB
// Marker on the Left Wrist B
CreateMarkerDriver LWRB (
MarkerName= LWRB,
MarkerPlacement=Left.ShoulderArm.Seg.Radius,
OptX=ON  ,OptY=ON ,OptZ=OFF,
WeightX=0.1,WeightY=0.1,WeightZ=0.1
) = {
  sRelOpt = {-0.22, -0.05, 0.025};
};
#endif


#ifdef _RFIN
// Marker on the Right Finger
CreateMarkerDriver RFIN (
MarkerName= RFIN,
MarkerPlacement=Right.ShoulderArm.Seg.Hand,
OptX=OFF ,OptY=OFF,OptZ=OFF
) = {
  sRelOpt = {-0.065,-0.03,0.02};
};
#endif


#ifdef _LFIN
// Marker on the Left Finger
CreateMarkerDriver LFIN (
MarkerName= LFIN,
MarkerPlacement=Left.ShoulderArm.Seg.Hand,
OptX=OFF ,OptY=OFF,OptZ=OFF
) = {
  sRelOpt = {-0.065,-0.03,-0.02};
};
#endif
