//#define _WRIST
//#define _THUMB1
//#define _THUMB2
//#define _THUMB3
//#define _THUMB4
//#define _INDEX1
//#define _INDEX2
//#define _INDEX3
//#define _INDEX4
//#define _MIDDLE1
//#define _MIDDLE2
//#define _MIDDLE3
//#define _MIDDLE4
//#define _RING1
//#define _RING2
//#define _RING3
//#define _RING4
//#define _LITTLE1
//#define _LITTLE2
//#define _LITTLE3
//#define _LITTLE4
//


#ifdef _WRIST
CreateMarkerDriver WRIST (
MarkerName = WRIST,
UseC3DWeightResiduals = OFF,
MarkerPlacement=Right.ShoulderArm.Seg.Hand.Carpals,
PlaceMarkerAt=wj,
WeightX=1, WeightY=1, WeightZ=0.3,
OptY=0,
DRAW_SCALE = 0.4,
) = {
  sRelOpt = {-0.015,0.013,0.01};
};
#endif


#ifdef _THUMB1
CreateMarkerDriver THUMB1 (
MarkerName = THUMB1,
UseC3DWeightResiduals = OFF,
MarkerPlacement=Main.HumanModel.BodyModel.Right.ShoulderArm.Seg.Hand.Finger1.Seg.Metacarpal,
PlaceMarkerAt=ProximalJointNode,
//WeightX=0.0, WeightY=0.0, WeightZ=0.0,
DRAW_SCALE = 0.3,
) = {
  sRelOpt = {0,0,0.0};
};
#endif


#ifdef _THUMB2
CreateMarkerDriver THUMB2 (
MarkerName = THUMB2,
UseC3DWeightResiduals = OFF,
MarkerPlacement=Main.HumanModel.BodyModel.Right.ShoulderArm.Seg.Hand.Finger1.Seg.ProximalPhalanx,
PlaceMarkerAt=ProximalJointNode,
//WeightX=0.0, WeightY=0.0, WeightZ=0.0,
DRAW_SCALE = 0.3
) = {
  sRelOpt = {0,0,0.0};
};
#endif


#ifdef _THUMB3
CreateMarkerDriver THUMB3 (
MarkerName = THUMB3,
UseC3DWeightResiduals = OFF,
MarkerPlacement=Main.HumanModel.BodyModel.Right.ShoulderArm.Seg.Hand.Finger1.Seg.DistalPhalanx,
PlaceMarkerAt=ProximalJointNode,
//WeightX=0.0, WeightY=0.0, WeightZ=0.0,
DRAW_SCALE = 0.3,
) = {
  sRelOpt = {0,0,0.0};
};
#endif

#ifdef _THUMB4
CreateMarkerDriver THUMB4 (
MarkerName = THUMB4,
UseC3DWeightResiduals = OFF,
MarkerPlacement=Main.HumanModel.BodyModel.Right.ShoulderArm.Seg.Hand.Finger1.Seg.DistalPhalanx,
PlaceMarkerAt=DistalJointSurfaceNode,
//WeightX=0.0, WeightY=0.0, WeightZ=0.0,
DRAW_SCALE = 0.3,
) = {
  sRelOpt = {0,0,0.0};
};
#endif

#ifdef _INDEX1
CreateMarkerDriver INDEX1 (
MarkerName = INDEX1,
UseC3DWeightResiduals = OFF,
MarkerPlacement=Main.HumanModel.BodyModel.Right.ShoulderArm.Seg.Hand.Finger2.Seg.Metacarpal,
PlaceMarkerAt=DistalJointNode,
//WeightX=0.0, WeightY=0.0, WeightZ=0.0,
DRAW_SCALE = 0.3,
) = {
  sRelOpt = {0,0,0.0};
};
#endif

#ifdef _INDEX2
CreateMarkerDriver INDEX2 (
MarkerName = INDEX2,
UseC3DWeightResiduals = OFF,
MarkerPlacement=Main.HumanModel.BodyModel.Right.ShoulderArm.Seg.Hand.Finger2.Seg.ProximalPhalanx,
PlaceMarkerAt=DistalJointNode,
//WeightX=0.0, WeightY=0.0, WeightZ=0.0,
DRAW_SCALE = 0.3,
) = {
  sRelOpt = {0,0,0.0};
};
#endif

#ifdef _INDEX3
CreateMarkerDriver INDEX3 (
MarkerName = INDEX3,
UseC3DWeightResiduals = OFF,
MarkerPlacement=Main.HumanModel.BodyModel.Right.ShoulderArm.Seg.Hand.Finger2.Seg.MiddlePhalanx,
PlaceMarkerAt=DistalJointNode,
//WeightX=0.0, WeightY=0.0, WeightZ=0.0,
DRAW_SCALE = 0.3,
) = {
  sRelOpt = {0,0,0.0};
};
#endif

#ifdef _INDEX4
CreateMarkerDriver INDEX4 (
MarkerName = INDEX4,
UseC3DWeightResiduals = OFF,
MarkerPlacement=Main.HumanModel.BodyModel.Right.ShoulderArm.Seg.Hand.Finger2.Seg.DistalPhalanx,
PlaceMarkerAt=DistalJointSurfaceNode,
//WeightX=0.0, WeightY=0.0, WeightZ=0.0,
DRAW_SCALE = 0.3,
) = {
  sRelOpt = {0,0,0.0};
};
#endif


#ifdef _MIDDLE1
CreateMarkerDriver MIDDLE1 (
MarkerName = MIDDLE1,
UseC3DWeightResiduals = OFF,
MarkerPlacement=Main.HumanModel.BodyModel.Right.ShoulderArm.Seg.Hand.Finger3.Seg.Metacarpal,
PlaceMarkerAt=DistalJointNode,
//WeightX=0.0, WeightY=0.0, WeightZ=0.0,
DRAW_SCALE = 0.3,
) = {
  sRelOpt = {0,0,0.0};
};
#endif

#ifdef _MIDDLE2
CreateMarkerDriver MIDDLE2 (
MarkerName = MIDDLE2,
UseC3DWeightResiduals = OFF,
MarkerPlacement=Main.HumanModel.BodyModel.Right.ShoulderArm.Seg.Hand.Finger3.Seg.ProximalPhalanx,
PlaceMarkerAt=DistalJointNode,
//WeightX=0.0, WeightY=0.0, WeightZ=0.0,
DRAW_SCALE = 0.3,
) = {
  sRelOpt = {0,0,0.0};
};
#endif

#ifdef _MIDDLE3
CreateMarkerDriver MIDDLE3 (
MarkerName = MIDDLE3,
UseC3DWeightResiduals = OFF,
MarkerPlacement=Main.HumanModel.BodyModel.Right.ShoulderArm.Seg.Hand.Finger3.Seg.MiddlePhalanx,
PlaceMarkerAt=DistalJointNode,
//WeightX=0.0, WeightY=0.0, WeightZ=0.0,
DRAW_SCALE = 0.3,
) = {
  sRelOpt = {0,0,0.0};
};
#endif

#ifdef _MIDDLE4
CreateMarkerDriver MIDDLE4 (
MarkerName = MIDDLE4,
UseC3DWeightResiduals = OFF,
MarkerPlacement=Main.HumanModel.BodyModel.Right.ShoulderArm.Seg.Hand.Finger3.Seg.DistalPhalanx,
PlaceMarkerAt=DistalJointSurfaceNode,
//WeightX=0.0, WeightY=0.0, WeightZ=0.0,
DRAW_SCALE = 0.3,
) = {
  sRelOpt = {0,0,0.0};
};
#endif

#ifdef _RING1
CreateMarkerDriver RING1 (
MarkerName = RING1,
UseC3DWeightResiduals = OFF,
MarkerPlacement=Main.HumanModel.BodyModel.Right.ShoulderArm.Seg.Hand.Finger4.Seg.Metacarpal,
PlaceMarkerAt=DistalJointNode,
//WeightX=0.0, WeightY=0.0, WeightZ=0.0,
DRAW_SCALE = 0.3,
) = {
  sRelOpt = {0,0,0.0};
};
#endif

#ifdef _RING2
CreateMarkerDriver RING2 (
MarkerName = RING2,
UseC3DWeightResiduals = OFF,
MarkerPlacement=Main.HumanModel.BodyModel.Right.ShoulderArm.Seg.Hand.Finger4.Seg.ProximalPhalanx,
PlaceMarkerAt=DistalJointNode,
//WeightX=0.0, WeightY=0.0, WeightZ=0.0,
DRAW_SCALE = 0.3,
) = {
  sRelOpt = {0,0,0.0};
};
#endif

#ifdef _RING3
CreateMarkerDriver RING3 (
MarkerName = RING3,
UseC3DWeightResiduals = OFF,
MarkerPlacement=Main.HumanModel.BodyModel.Right.ShoulderArm.Seg.Hand.Finger4.Seg.MiddlePhalanx,
PlaceMarkerAt=DistalJointNode,
//WeightX=0.0, WeightY=0.0, WeightZ=0.0,
DRAW_SCALE = 0.3,
) = {
  sRelOpt = {0,0,0.0};
};
#endif

#ifdef _RING4
CreateMarkerDriver RING4 (
MarkerName = RING4,
UseC3DWeightResiduals = OFF,
MarkerPlacement=Main.HumanModel.BodyModel.Right.ShoulderArm.Seg.Hand.Finger4.Seg.DistalPhalanx,
PlaceMarkerAt=DistalJointSurfaceNode,
//WeightX=0.0, WeightY=0.0, WeightZ=0.0,
DRAW_SCALE = 0.3,
) = {
  sRelOpt = {0,0,0.0};
};
#endif

#ifdef _LITTLE1
CreateMarkerDriver LITTLE1 (
MarkerName = LITTLE1,
UseC3DWeightResiduals = OFF,
MarkerPlacement=Main.HumanModel.BodyModel.Right.ShoulderArm.Seg.Hand.Finger5.Seg.Metacarpal,
PlaceMarkerAt=DistalJointNode,
//WeightX=0.0, WeightY=0.0, WeightZ=0.0,
DRAW_SCALE = 0.3,
) = {
  sRelOpt = {0,0,0.0};
};
#endif

#ifdef _LITTLE2
CreateMarkerDriver LITTLE2 (
MarkerName = LITTLE2,
UseC3DWeightResiduals = OFF,
MarkerPlacement=Main.HumanModel.BodyModel.Right.ShoulderArm.Seg.Hand.Finger5.Seg.ProximalPhalanx,
PlaceMarkerAt=DistalJointNode,
//WeightX=0.0, WeightY=0.0, WeightZ=0.0,
DRAW_SCALE = 0.3,
) = {
  sRelOpt = {0,0,0.0};
};
#endif

#ifdef _LITTLE3
CreateMarkerDriver LITTLE3 (
MarkerName = LITTLE3,
UseC3DWeightResiduals = OFF,
MarkerPlacement=Main.HumanModel.BodyModel.Right.ShoulderArm.Seg.Hand.Finger5.Seg.MiddlePhalanx,
PlaceMarkerAt=DistalJointNode,
//WeightX=0.0, WeightY=0.0, WeightZ=0.0,
DRAW_SCALE = 0.3,
) = {
  sRelOpt = {0,0,0.0};
};
#endif

#ifdef _LITTLE4
CreateMarkerDriver LITTLE4 (
MarkerName = LITTLE4,
UseC3DWeightResiduals = OFF,
MarkerPlacement=Main.HumanModel.BodyModel.Right.ShoulderArm.Seg.Hand.Finger5.Seg.DistalPhalanx,
PlaceMarkerAt=DistalJointSurfaceNode,
//WeightX=0.0, WeightY=0.0, WeightZ=0.0,
DRAW_SCALE = 0.3,
) = {
  sRelOpt = {0,0,0.0};
};
#endif
