#define BUG_EXMAMPLE 1

#include "HandMocap.main.any"


Main = {

  #if BUG_EXMAMPLE == 1
  Main.HumanModel.BodyModel.Right.ShoulderArm.Mus.Hand = {
    Flexor_Digitorum_Superficialis_Finger2_1.SPLine.SolverVersion = 4;
    Flexor_Digitorum_Superficialis_Finger2_1.Torus1.viewSurface.Visible = On;
    Flexor_Digitorum_Superficialis_Finger2_1.Torus2.viewSurface.Visible = On;
  };
  #endif

  #if BUG_EXMAMPLE == 2
  Main.HumanModel.BodyModel.Right.ShoulderArm.Mus.Hand = {
    Adductor_Pollicis_Caput_Obliquum_1.SPLine.SolverVersion = 4;
    Adductor_Pollicis_Caput_Obliquum_1.Surf.viewSurface.Visible = On;
  };
  #endif

Main.DrawSettings.Muscle.Bulging = 1;

 AnyOperationSequence RunTest =
 {
    AnyOperation& LoadParam = Main.RunAnalysis.LoadParameters;
    AnyOperation& RunKinematics = Main.Studies.InverseDynamicStudy.Kinematics;

 };

 };
