#include "../libdef.any"

 #define BM_TRUNK_THORACIC_MODEL _THORACIC_MODEL_FLEXIBLE_
//// #define BM_TRUNK_LUMBAR_THORACIC_LINK OFF
#define BM_TRUNK_LUMBAR_RHYTHM _RHYTHM_SOFT_
#define BM_TRUNK_THORACIC_RHYTHM _RHYTHM_SOFT_
#define BM_TRUNK_CERVICAL_RHYTHM _RHYTHM_SOFT_

//#define SCOLIOSIS_DRIVERS_SETUP
#define SPINE_MARKERS_SINGLE
#define USE_GRF_PREDICTION
//UNDEF when running parameter identification
//#define BM_TRUNK_RIBCAGE_CONSTRAINTS _CONSTRAINTS_SOFT_

// Enter and edit Trial Specific Data in this file:
#path MOCAP_TRIAL_SPECIFIC_DATA "Setup/TrialSpecificData_FullBody.any"

// Enter and edit Subject-Spcific Data in this file:
#path MOCAP_SUBJECT_SPECIFIC_DATA "Setup/SubjectSpecificData.any"

// Enter and edit Lab-Specific Data in this file:
#path MOCAP_LAB_SPECIFIC_DATA "Setup/LabSpecificData.any"

// Include the AnyMoCap Framwork
#include "<ANYMOCAP_MODEL>"
