#include "../../../libdef.any"

// Enter and edit Trial Specific Data in this file:
#path MOCAP_TRIAL_SPECIFIC_DATA "TrialSpecificData.any"

// Enter and edit Subject-Spcific Data in this file:
#path MOCAP_SUBJECT_SPECIFIC_DATA "../SubjectSpecificData.any"

// Enter and edit Lab-Specific Data in this file:
#path MOCAP_LAB_SPECIFIC_DATA "../../../LabSpecificData.any"


////// Exclude right knee joint
#define BM_JOINT_TYPE_KNEE_RIGHT _JOINT_TYPE_USERDEFINED_

// Include the AnyMoCap Framwork
#include "<ANYMOCAP_MODEL>"

//Include Subject-specific Moving-axis knee
#include "<ANYBODY_PATH_MODELUTILS>/MovingAxisKnee/AddOnKnee.any"
