Main.ModelSetup.TrialSpecificData =
{

  // These weak mannequin drivers are needed to control the right
  // shoulder due to dropout of RSHO marker
  #define BM_MANNEQUIN_DRIVER_STERNOCLAVICULAR_ELEVATION_RIGHT ON
  #define BM_MANNEQUIN_DRIVER_STERNOCLAVICULAR_PROTRACTION_RIGHT ON

  // The trial(s) from which segment scaling and marker parameters are
  // loaded from. This default to the current trial itself, if nothing is
  // specififed.
  LoadParametersFrom = {"S1_StandingRef"};

  // This is the name of the trial c3d file without extension.
  // Here we assume the c3d file has the same name as the mainfile directory.
  TrialFileName = MOCAP_NAME_MAINFILEDIR;

  // This the C3D frame where the analysis starts
  // If not specified it defaults to the first frame of the C3D file
  FirstFrame = .C3DFileData.Header.FirstFrameNo+10;

  // This the C3D frame where the analysis ends
  // If not specified it defaults the first frame of the C3D file
  LastFrame = .C3DFileData.Header.LastFrameNo-10;

  // tStart specifies the time of the analysis. Setting this overrides
  // the 'FirstFrame' value
  //tStart = ;

  // tEnd specifies the tEnd time of the analysis. Setting this overrides
  // the 'LastFrame' value
  //tEnd = ;

  // nStep specifies the number of steps used in the analysis.
  // If not specified it defaults to: 1+(tEnd-tStart)*C3D_video_frame_rate
  //nStep = ;

  // The switch MOCAP_OUTPUT_FILENAME_PREFIX can be used to specify
  // a prefix to all output files. Useful in some cases
  // to differentiate trials. Defautls to nothing ""
  //#define MOCAP_OUTPUT_FILENAME_PREFIX ""


  /// The following settings define the initial posture of the
  /// model (e.g. at load time)
  Main.HumanModel.Mannequin.Posture = {

    // Helper class template to calcualate intial posture/rotation
    // based on markers
    SegmentPosFromMarkers PelvisMarkerPos = {
      Markers = {"RASI", "LASI", "RPSI", "LPSI"};
      Time = Main.Studies.MarkerTracking.tStart;
    };

    PelvisPosX = PelvisMarkerPos.xPos;
    PelvisPosY = PelvisMarkerPos.yPos;
    PelvisPosZ = PelvisMarkerPos.zPos;

    PelvisRotZ = PelvisMarkerPos.zRot;
    PelvisRotY = PelvisMarkerPos.yRot;
    PelvisRotX =  PelvisMarkerPos.xRot;


    PelvisThoraxExtension = 0;
    PelvisThoraxLateralBending = 0;
    PelvisThoraxRotation = 0;

    NeckExtension = 0;
    NeckLateralBending = 0;
    NeckRotation = 0;

    Right = {

      HipFlexion = 60;
      HipAbduction = 0;
      HipExternalRotation = 0;
      KneeFlexion = 40;
      AnklePlantarFlexion = 0;
      SubTalarEversion = 0;


////    These Values are configure from the SubjectSpecificData.any
////    since it is shared by all trials
//      GlenohumeralFlexion = 0;
//      GlenohumeralAbduction = 0;
//      GlenohumeralExternalRotation = 0;
//      ElbowFlexion = 0;
//      ElbowPronation = 0;
//      WristFlexion = 0;
//      WristAbduction = 0;

  };
    Left = {

      HipFlexion = 40;
      HipAbduction = 0;
      HipExternalRotation = 0;
      KneeFlexion = 40;
      AnklePlantarFlexion = 0;
      SubTalarEversion = 0;

////    These Values are configure from the SubjectSpecificData.any
////    since it is shared by all trials
//      GlenohumeralFlexion = 0;
//      GlenohumeralAbduction = 0;
//      GlenohumeralExternalRotation = 0;
//      ElbowFlexion = 0;
//      ElbowPronation = 0;
//      WristFlexion = 0;
//      WristAbduction = 0;

  };


  }; // InitialPositionOfBody

};
