Main.EnvironmentModel.ForcePlates =
{

  //-------- Predictive forceplate for the right leg
  // See ( #include "<ANYMOCAP_MODEL_PATH>/GRFPrediction/FootPlateConditionalContact.any" )
  FootPlateConditionalContact GRF_Prediction_Right(
  NORMAL_DIRECTION = "Y",
  NUMBER_OF_NODES = 25,
  NODES_FOLDER = FootNodes,
  SHOW_TRIGGER_VOLUME = ON,
  PLATE_BASE_FRAME = Main.EnvironmentModel.GlobalRef) =
  {
    CreateFootContactNodes25 FootNodes(foot_ref =
    Main.HumanModel.BodyModel.Right.Leg.Seg.Foot) = {};

    // Additional force plate settings
    Settings =
    {
      Radius = 8; // Circular force plate of radius 8m, covers entire MoCap lab area
      LimitDistHigh = 0.015; // Vertical height
    };
  };


  //-------- Predictive forceplate for the left leg (see documentation to learn more: https://github.com/AnyBody/GRF-prediction) ----------------
  FootPlateConditionalContact GRF_Prediction_Left(
  NORMAL_DIRECTION = "Y",
  NUMBER_OF_NODES = 25,
  NODES_FOLDER = FootNodes,
  SHOW_TRIGGER_VOLUME = ON,
  PLATE_BASE_FRAME = Main.EnvironmentModel.GlobalRef) =
  {
    CreateFootContactNodes25 FootNodes(foot_ref =
    Main.HumanModel.BodyModel.Left.Leg.Seg.Foot) = {};

    Settings =
    {
      Radius = 8;
      LimitDistHigh = 0.015;
    };
  };


};
