Main.ModelSetup.LabSpecificData = {


 #if INCLUDE_UPPERBODY == ON
 #path BODY_MODEL_CONFIG_FILE "BodyModelConfigFullBody.any"
 #else
 #path BODY_MODEL_CONFIG_FILE "BodyModelConfig.any"
 #endif

 #path MOCAP_MARKER_PROTOCOL_FILE "MarkerProtocol.any"
 #path MOCAP_EXTRA_DRIVERS_FILE "ExtraDrivers.any"

 #path MOCAP_C3DSETTINGS "C3DSettings.any"

 #ifdef USE_GRF_PREDICTION
  // This switch ensure that the AnyMoCap sets the appropriate settings
  // for the GRF prediction (e.g. residuals, solvers etc.)
  #define MOCAP_USE_GRF_PREDICTION ON
  // Include the GRF prediction force plates.
  #path MOCAP_FORCE_PLATE_FILE "ForcePlates_GRFPrediction.any"

  // GRF prediction models run with more numerical stability using a second order
  // criterion. This is due to the big difference in strength of recruited actuators
  // (artificial muscles) which is used as contract element under the feet
  // (high strength) and human-ground residuals (low strength)
  Main.Studies.InverseDynamicStudy.InverseDynamics.Criterion.Power = 2;

 #else
  // Use normal force plates
  #path MOCAP_FORCE_PLATE_FILE "ForcePlates.any"
 #endif

 Gravity = 9.81*{0,-1,0};


  // This adds different segment length as design variables to
  // to the parameter identification study (Main.Studies.ParameterIdentification)
  // This allows the segment length to be optimized in based on the markers/motion
  OptimizeAnthropometricsOnOff OptimizeAntropometricsOnOff (
    PELVIS_WIDTH = ON ,
    HEAD_HEIGHT = OFF,
    TRUNK_HEIGHT= ON,
    RIGHT_THIGH_LENGTH= ON,
    LEFT_THIGH_LENGTH = ON,
    RIGHT_SHANK_LENGTH= ON,
    LEFT_SHANK_LENGTH = ON,
    RIGHT_FOOT_LENGTH= ON,
    LEFT_FOOT_LENGTH = ON,
    RIGHT_UPPERARM_LENGTH= INCLUDE_UPPERBODY,
    LEFT_UPPERARM_LENGTH = INCLUDE_UPPERBODY,
    RIGHT_LOWERARM_LENGTH= INCLUDE_UPPERBODY,
    LEFT_LOWERARM_LENGTH = INCLUDE_UPPERBODY,
    RIGHT_HAND_LENGTH= OFF,
    LEFT_HAND_LENGTH = OFF,
    LEFT_RIGHT_SYMMETRY = ON
  ) ={};


//  AnyFolder OptimizeAntropometrics =
//  {
//   CreateDesVar PelvisWidth( ENABLE = ON,
//     NAME = PelvisWidth,
//     PARAMETER = Main.HumanModel.Anthropometrics.SegmentDimensions.PelvisWidth
//   ) = {};
//
//  };

  // Include functions to generate a video:
  // -> Run `Study.VideoTool.Preview` to preview the camera view.
  // -> Run `Study.VideoTool.Create_Video` to generate video from the analysis.
  #include "CreateVideo.any"


 Main.RunAnalysis.SaveOutput = {
  AnyOperationShellExec UploadResults = {
      FileName = "cmd.exe";
      WorkDir = ANYBODY_PATH_MAINFILEDIR;
      AnyString Cmd = strquote(ANYBODY_PATH_INSTALLDIR +"\Python\Python.exe") + " MyUploadScipt.py";

      #if 1
      // For debugging problems with the command
      Arguments = "/C "+ Cmd + " || set /p=Command failed: Hit ENTER to continue..";
      Show = On;
      #else
      Arguments = "/C" + Cmd;
      #endif

  };
};

   #define CHANGE_SREL(SEG, OBJ) \
    AnyOperationSetValue ChangeMuscleIns##OBJ= {\
      AnyFloat PertubationVectorInSegmentalRef={0.01637556, 0.3168638, 0.03283635}-{0.00, 0.01, 0.02};\
      Target = {&SEG.OBJ.sRel};\
      Source = {&PertubationVectorInSegmentalRef};\
    }
    CHANGE_SREL( Main.HumanModel.BodyModel.Right.Leg.Seg.Shank, TensorFasciaeLatae2Node );


};
