AnyFolder ModelOutputQA ={

  AnyFolder Ligaments ={

    AnyFolder OutputPhasia  ={
      AnyFloat PhasiaTotal =
      Main.HumanModel.BodyModel.Right.Leg.Ligaments.PlantarFascia.PlantarFascia1Ph.LigMuscleAndTendonTogther+
      Main.HumanModel.BodyModel.Right.Leg.Ligaments.PlantarFascia.PlantarFascia1Mt.LigMuscleAndTendonTogther+
      Main.HumanModel.BodyModel.Right.Leg.Ligaments.PlantarFascia.PlantarFascia2Ph.LigMuscleAndTendonTogther+
      Main.HumanModel.BodyModel.Right.Leg.Ligaments.PlantarFascia.PlantarFascia2Mt.LigMuscleAndTendonTogther+
      Main.HumanModel.BodyModel.Right.Leg.Ligaments.PlantarFascia.PlantarFascia3Ph.LigMuscleAndTendonTogther+
      Main.HumanModel.BodyModel.Right.Leg.Ligaments.PlantarFascia.PlantarFascia3Mt.LigMuscleAndTendonTogther+
      Main.HumanModel.BodyModel.Right.Leg.Ligaments.PlantarFascia.PlantarFascia4Ph.LigMuscleAndTendonTogther+
      Main.HumanModel.BodyModel.Right.Leg.Ligaments.PlantarFascia.PlantarFascia4Mt.LigMuscleAndTendonTogther+
      Main.HumanModel.BodyModel.Right.Leg.Ligaments.PlantarFascia.PlantarFascia5Ph.LigMuscleAndTendonTogther+
      Main.HumanModel.BodyModel.Right.Leg.Ligaments.PlantarFascia.PlantarFascia5Mt.LigMuscleAndTendonTogther;
      AnyFloat PlantarPhasiaBW=-PhasiaTotal/(Main.HumanModel.Anthropometrics.BodyMass*9.81);
    };


    AnyFolder AchillesTendon  ={
      AnyFloat AchillesTendonTotal =
      Main.HumanModel.BodyModel.Right.Leg.Mus.SoleusMedialis1.Ft+
      Main.HumanModel.BodyModel.Right.Leg.Mus.SoleusMedialis2.Ft+
      Main.HumanModel.BodyModel.Right.Leg.Mus.SoleusMedialis3.Ft+
      Main.HumanModel.BodyModel.Right.Leg.Mus.SoleusLateralis1.Ft+
      Main.HumanModel.BodyModel.Right.Leg.Mus.SoleusLateralis2.Ft+
      Main.HumanModel.BodyModel.Right.Leg.Mus.SoleusLateralis3.Ft+
      Main.HumanModel.BodyModel.Right.Leg.Mus.GastrocnemiusLateralis1.Ft+
      Main.HumanModel.BodyModel.Right.Leg.Mus.GastrocnemiusMedialis1.Ft;
      AnyFloat AchillesTendonBW=AchillesTendonTotal/(Main.HumanModel.Anthropometrics.BodyMass*9.81);
    };
  };


  AnyFolder Joints ={

    AnyVar CalCuboid = vnorm(Main.HumanModel.BodyModel.Right.Leg.Jnt.FootJnt.CalCuboid.Constraints.Reaction.Fout,2);
    AnyVar CalCuboid_BW= CalCuboid/(Main.HumanModel.Anthropometrics.BodyMass*9.81);

    AnyVar SubTalar=vnorm(Main.HumanModel.BodyModel.Right.Leg.Jnt.SubTalar.Constraints.Reaction.Fout,2);
    AnyVar SubTalar_BW= SubTalar/(Main.HumanModel.Anthropometrics.BodyMass*9.81);


    AnyVar MtProxPh1= vnorm(Main.HumanModel.BodyModel.Right.Leg.Jnt.FootJnt.MtProxPh1.Constraints.Reaction.Fout,2);
    AnyVar MtProxPh1_BW= MtProxPh1/(Main.HumanModel.Anthropometrics.BodyMass*9.81);


  };


};
