//Main.Studies.InverseDynamicStudy.ModelEnvironmentConnection.JointsAndDrivers.JntDriverRighDetailedFoot.Reaction.Type=


//{
//  On,On,On,On,On, //cuboid and navicular
//  On,On,On,On, //cuneiforms
//  On,On,
//  On,On,On,On, //TarsoMeta
//  On,On,On,On,On,On,On,On,On,On, //Metatarsal-Phalanges joint
//  On,On,On,On,On,On,On,On,On // Phallanges
//
//
//};


// List of reactions
//    AnyKinMeasureOrg &CalcaneoCuboidDorsiFlexion = ...BodyModel.Interface.Right.CalcaneoCuboidDorsiFlexion;
//      AnyKinMeasureOrg &CalcaneoCuboidEversion = ...BodyModel.Interface.Right.CalcaneoCuboidEversion;
//      AnyKinMeasureOrg &TaloNavicularDorsiFlexion = ...BodyModel.Interface.Right.TaloNavicularDorsiFlexion;
//      AnyKinMeasureOrg &TaloNavicularAbduction = ...BodyModel.Interface.Right.TaloNavicularAbduction;
//      AnyKinMeasureOrg &TaloNavicularEversion = ...BodyModel.Interface.Right.TaloNavicularEversion;

//      AnyKinMeasureOrg &NaviculoMedialCuneiformDorsiFlexion = ...BodyModel.Interface.Right.NaviculoMedialCuneiformDorsiFlexion;
//      AnyKinMeasureOrg &NaviculoMedialCuneiformAbduction = ...BodyModel.Interface.Right.NaviculoMedialCuneiformAbduction;
//      AnyKinMeasureOrg &NaviculoIntermediateCuneiformDorsiFlexion = ...BodyModel.Interface.Right.NaviculoIntermediateCuneiformDorsiFlexion;
//      AnyKinMeasureOrg &NaviculoLateralCuneiformDorsiFlexion = ...BodyModel.Interface.Right.NaviculoLateralCuneiformDorsiFlexion;
//
//
//         AnyKinMeasureOrg &TarsoMetatarsal1DorsiFlexion = ...BodyModel.Interface.Right.TarsoMetatarsal1DorsiFlexion;
//         AnyKinMeasureOrg &TarsoMetatarsal1Abduction = ...BodyModel.Interface.Right.TarsoMetatarsal1Abduction;
//
//
//      AnyKinMeasureOrg &TarsoMetatarsal2DorsiFlexion = ...BodyModel.Interface.Right.TarsoMetatarsal2DorsiFlexion;
//      AnyKinMeasureOrg &TarsoMetatarsal3DorsiFlexion = ...BodyModel.Interface.Right.TarsoMetatarsal3DorsiFlexion;
//      AnyKinMeasureOrg &TarsoMetatarsal4DorsiFlexion = ...BodyModel.Interface.Right.TarsoMetatarsal4DorsiFlexion;
//      AnyKinMeasureOrg &TarsoMetatarsal5SkewDorsiFlexion = ...BodyModel.Interface.Right.TarsoMetatarsal5SkewDorsiFlexion;

//      AnyKinMeasureOrg &MetatarsoPhalangeal1DorsiFlexion = ...BodyModel.Interface.Right.MetatarsoPhalangeal1DorsiFlexion;
//      AnyKinMeasureOrg &MetatarsoPhalangeal1Abduction = ...BodyModel.Interface.Right.MetatarsoPhalangeal1Abduction;
//      AnyKinMeasureOrg &MetatarsoPhalangeal2DorsiFlexion = ...BodyModel.Interface.Right.MetatarsoPhalangeal2DorsiFlexion;
//      AnyKinMeasureOrg &MetatarsoPhalangeal2Abduction = ...BodyModel.Interface.Right.MetatarsoPhalangeal2Abduction;
//      AnyKinMeasureOrg &MetatarsoPhalangeal3DorsiFlexion = ...BodyModel.Interface.Right.MetatarsoPhalangeal3DorsiFlexion;
//      AnyKinMeasureOrg &MetatarsoPhalangeal3Abduction = ...BodyModel.Interface.Right.MetatarsoPhalangeal3Abduction;
//      AnyKinMeasureOrg &MetatarsoPhalangeal4DorsiFlexion = ...BodyModel.Interface.Right.MetatarsoPhalangeal4DorsiFlexion;
//      AnyKinMeasureOrg &MetatarsoPhalangeal4Abduction = ...BodyModel.Interface.Right.MetatarsoPhalangeal4Abduction;
//      AnyKinMeasureOrg &MetatarsoPhalangeal5DorsiFlexion = ...BodyModel.Interface.Right.MetatarsoPhalangeal5DorsiFlexion;
//      AnyKinMeasureOrg &MetatarsoPhalangeal5Abduction = ...BodyModel.Interface.Right.MetatarsoPhalangeal5Abduction;

//      AnyKinMeasureOrg &ProximoDistalPhalange1DorsiFlexion = ...BodyModel.Interface.Right.ProximoDistalPhalange1DorsiFlexion;
//      AnyKinMeasureOrg &ProximoMedialPhalange2DorsiFlexion = ...BodyModel.Interface.Right.ProximoMedialPhalange2DorsiFlexion;
//      AnyKinMeasureOrg &ProximoMedialPhalange3DorsiFlexion = ...BodyModel.Interface.Right.ProximoMedialPhalange3DorsiFlexion;
//      AnyKinMeasureOrg &ProximoMedialPhalange4DorsiFlexion = ...BodyModel.Interface.Right.ProximoMedialPhalange4DorsiFlexion;
//      AnyKinMeasureOrg &ProximoMedialPhalange5DorsiFlexion = ...BodyModel.Interface.Right.ProximoMedialPhalange5DorsiFlexion;
//      AnyKinMeasureOrg &MedioDistalPhalange2DorsiFlexion = ...BodyModel.Interface.Right.MedioDistalPhalange2DorsiFlexion;
//      AnyKinMeasureOrg &MedioDistalPhalange3DorsiFlexion = ...BodyModel.Interface.Right.MedioDistalPhalange3DorsiFlexion;
//      AnyKinMeasureOrg &MedioDistalPhalange4DorsiFlexion = ...BodyModel.Interface.Right.MedioDistalPhalange4DorsiFlexion;
//      AnyKinMeasureOrg &MedioDistalPhalange5DorsiFlexion = ...BodyModel.Interface.Right.MedioDistalPhalange5DorsiFlexion;
//


ModelEnvironmentConnection = {
  AnyFolder DiagnosticRecruitedReactions = {
AnyRecruitedActuator RecruitedReactions = {

  AnyKinMeasure &TaloNavi = ...BodyModel.Right.Leg.Jnt.Foot.TaloNavi;
  AnyKinMeasure &CuneiNaviMed = ...BodyModel.Right.Leg.Jnt.Foot.CuneiNaviMed;
  AnyKinMeasure &CuneiNaviInt = ...BodyModel.Right.Leg.Jnt.Foot.CuneiNaviInt;
  AnyKinMeasure &CuneiNaviLat = ...BodyModel.Right.Leg.Jnt.Foot.CuneiNaviLat;
  AnyKinMeasure &CalCuboid = ...BodyModel.Right.Leg.Jnt.Foot.CalCuboid;
  AnyKinMeasure &MedCuneiMt1 = ...BodyModel.Right.Leg.Jnt.Foot.MedCuneiMt1;
  AnyKinMeasure &IntCuneiMt2 = ...BodyModel.Right.Leg.Jnt.Foot.IntCuneiMt2;
  AnyKinMeasure &LatCuneiMt3 = ...BodyModel.Right.Leg.Jnt.Foot.LatCuneiMt3;
  AnyKinMeasure &CuboidMt4 = ...BodyModel.Right.Leg.Jnt.Foot.CuboidMt4;
  AnyKinMeasure &CuboidMt5 = ...BodyModel.Right.Leg.Jnt.Foot.CuboidMt5;

  AnyKinMeasure &MtProxPh1 = ...BodyModel.Right.Leg.Jnt.Foot.MtProxPh1;
  AnyKinMeasure &MtProxPh2 = ...BodyModel.Right.Leg.Jnt.Foot.MtProxPh2;
  AnyKinMeasure &MtProxPh3 = ...BodyModel.Right.Leg.Jnt.Foot.MtProxPh3;
  AnyKinMeasure &MtProxPh4 = ...BodyModel.Right.Leg.Jnt.Foot.MtProxPh4;
  AnyKinMeasure &MtProxPh5 = ...BodyModel.Right.Leg.Jnt.Foot.MtProxPh5;

  AnyKinMeasure &ProxPhDistPh1 = ...BodyModel.Right.Leg.Jnt.Foot.ProxPhDistPh1;
  AnyKinMeasure &ProxPhMidPh2 = ...BodyModel.Right.Leg.Jnt.Foot.ProxPhMidPh2;
  AnyKinMeasure &ProxPhMidPh3 = ...BodyModel.Right.Leg.Jnt.Foot.ProxPhMidPh3;
  AnyKinMeasure &ProxPhMidPh4 = ...BodyModel.Right.Leg.Jnt.Foot.ProxPhMidPh4;
  AnyKinMeasure &ProxPhMidPh5 = ...BodyModel.Right.Leg.Jnt.Foot.ProxPhMidPh5;
  AnyKinMeasure &MidPhDistPh2 = ...BodyModel.Right.Leg.Jnt.Foot.MidPhDistPh2;
  AnyKinMeasure &MidPhDistPh3 = ...BodyModel.Right.Leg.Jnt.Foot.MidPhDistPh3;
  AnyKinMeasure &MidPhDistPh4 = ...BodyModel.Right.Leg.Jnt.Foot.MidPhDistPh4;
  AnyKinMeasure &MidPhDistPh5 = ...BodyModel.Right.Leg.Jnt.Foot.MidPhDistPh5;


//      AnyKinMeasureOrg &CalcaneoCuboidDorsiFlexion = ...BodyModel.Interface.Right.CalcaneoCuboidDorsiFlexion;
//      AnyKinMeasureOrg &CalcaneoCuboidEversion = ...BodyModel.Interface.Right.CalcaneoCuboidEversion;
//      AnyKinMeasureOrg &TaloNavicularDorsiFlexion = ...BodyModel.Interface.Right.TaloNavicularDorsiFlexion;
//      AnyKinMeasureOrg &TaloNavicularAbduction = ...BodyModel.Interface.Right.TaloNavicularAbduction;
//      AnyKinMeasureOrg &TaloNavicularEversion = ...BodyModel.Interface.Right.TaloNavicularEversion;
//
//      AnyKinMeasureOrg &NaviculoMedialCuneiformDorsiFlexion = ...BodyModel.Interface.Right.NaviculoMedialCuneiformDorsiFlexion;
//      AnyKinMeasureOrg &NaviculoMedialCuneiformAbduction = ...BodyModel.Interface.Right.NaviculoMedialCuneiformAbduction;
//      AnyKinMeasureOrg &NaviculoIntermediateCuneiformDorsiFlexion = ...BodyModel.Interface.Right.NaviculoIntermediateCuneiformDorsiFlexion;
//      AnyKinMeasureOrg &NaviculoLateralCuneiformDorsiFlexion = ...BodyModel.Interface.Right.NaviculoLateralCuneiformDorsiFlexion;
//
//
//         AnyKinMeasureOrg &TarsoMetatarsal1DorsiFlexion = ...BodyModel.Interface.Right.TarsoMetatarsal1DorsiFlexion;
//         AnyKinMeasureOrg &TarsoMetatarsal1Abduction = ...BodyModel.Interface.Right.TarsoMetatarsal1Abduction;
//
//
//      AnyKinMeasureOrg &TarsoMetatarsal2DorsiFlexion = ...BodyModel.Interface.Right.TarsoMetatarsal2DorsiFlexion;
//      AnyKinMeasureOrg &TarsoMetatarsal3DorsiFlexion = ...BodyModel.Interface.Right.TarsoMetatarsal3DorsiFlexion;
//      AnyKinMeasureOrg &TarsoMetatarsal4DorsiFlexion = ...BodyModel.Interface.Right.TarsoMetatarsal4DorsiFlexion;
//      AnyKinMeasureOrg &TarsoMetatarsal5SkewDorsiFlexion = ...BodyModel.Interface.Right.TarsoMetatarsal5SkewDorsiFlexion;
//
//      AnyKinMeasureOrg &MetatarsoPhalangeal1DorsiFlexion = ...BodyModel.Interface.Right.MetatarsoPhalangeal1DorsiFlexion;
//      AnyKinMeasureOrg &MetatarsoPhalangeal1Abduction = ...BodyModel.Interface.Right.MetatarsoPhalangeal1Abduction;
//      AnyKinMeasureOrg &MetatarsoPhalangeal2DorsiFlexion = ...BodyModel.Interface.Right.MetatarsoPhalangeal2DorsiFlexion;
//      AnyKinMeasureOrg &MetatarsoPhalangeal2Abduction = ...BodyModel.Interface.Right.MetatarsoPhalangeal2Abduction;
//      AnyKinMeasureOrg &MetatarsoPhalangeal3DorsiFlexion = ...BodyModel.Interface.Right.MetatarsoPhalangeal3DorsiFlexion;
//      AnyKinMeasureOrg &MetatarsoPhalangeal3Abduction = ...BodyModel.Interface.Right.MetatarsoPhalangeal3Abduction;
//      AnyKinMeasureOrg &MetatarsoPhalangeal4DorsiFlexion = ...BodyModel.Interface.Right.MetatarsoPhalangeal4DorsiFlexion;
//      AnyKinMeasureOrg &MetatarsoPhalangeal4Abduction = ...BodyModel.Interface.Right.MetatarsoPhalangeal4Abduction;
//      AnyKinMeasureOrg &MetatarsoPhalangeal5DorsiFlexion = ...BodyModel.Interface.Right.MetatarsoPhalangeal5DorsiFlexion;
//      AnyKinMeasureOrg &MetatarsoPhalangeal5Abduction = ...BodyModel.Interface.Right.MetatarsoPhalangeal5Abduction;
//
//      AnyKinMeasureOrg &ProximoDistalPhalange1DorsiFlexion = ...BodyModel.Interface.Right.ProximoDistalPhalange1DorsiFlexion;
//      AnyKinMeasureOrg &ProximoMedialPhalange2DorsiFlexion = ...BodyModel.Interface.Right.ProximoMedialPhalange2DorsiFlexion;
//      AnyKinMeasureOrg &ProximoMedialPhalange3DorsiFlexion = ...BodyModel.Interface.Right.ProximoMedialPhalange3DorsiFlexion;
//      AnyKinMeasureOrg &ProximoMedialPhalange4DorsiFlexion = ...BodyModel.Interface.Right.ProximoMedialPhalange4DorsiFlexion;
//      AnyKinMeasureOrg &ProximoMedialPhalange5DorsiFlexion = ...BodyModel.Interface.Right.ProximoMedialPhalange5DorsiFlexion;
//      AnyKinMeasureOrg &MedioDistalPhalange2DorsiFlexion = ...BodyModel.Interface.Right.MedioDistalPhalange2DorsiFlexion;
//      AnyKinMeasureOrg &MedioDistalPhalange3DorsiFlexion = ...BodyModel.Interface.Right.MedioDistalPhalange3DorsiFlexion;
//      AnyKinMeasureOrg &MedioDistalPhalange4DorsiFlexion = ...BodyModel.Interface.Right.MedioDistalPhalange4DorsiFlexion;
//      AnyKinMeasureOrg &MedioDistalPhalange5DorsiFlexion = ...BodyModel.Interface.Right.MedioDistalPhalange5DorsiFlexion;

      Strength = 10000;
      Type = Bilateral;
      Volume = 1;
    };
  };
};


//ModelEnvironmentConnection = {
//  AnyFolder DiagnosticRecruitedReactions = {
//AnyRecruitedActuator RecruitedReactions = {
//      AnyKinMeasureOrg &CalcaneoCuboidDorsiFlexion = ...BodyModel.Interface.Right.CalcaneoCuboidDorsiFlexion;
//      AnyKinMeasureOrg &CalcaneoCuboidEversion = ...BodyModel.Interface.Right.CalcaneoCuboidEversion;
//      AnyKinMeasureOrg &TaloNavicularDorsiFlexion = ...BodyModel.Interface.Right.TaloNavicularDorsiFlexion;
//      AnyKinMeasureOrg &TaloNavicularAbduction = ...BodyModel.Interface.Right.TaloNavicularAbduction;
//      AnyKinMeasureOrg &TaloNavicularEversion = ...BodyModel.Interface.Right.TaloNavicularEversion;
//
//      AnyKinMeasureOrg &NaviculoMedialCuneiformDorsiFlexion = ...BodyModel.Interface.Right.NaviculoMedialCuneiformDorsiFlexion;
//      AnyKinMeasureOrg &NaviculoMedialCuneiformAbduction = ...BodyModel.Interface.Right.NaviculoMedialCuneiformAbduction;
//      AnyKinMeasureOrg &NaviculoIntermediateCuneiformDorsiFlexion = ...BodyModel.Interface.Right.NaviculoIntermediateCuneiformDorsiFlexion;
//      AnyKinMeasureOrg &NaviculoLateralCuneiformDorsiFlexion = ...BodyModel.Interface.Right.NaviculoLateralCuneiformDorsiFlexion;
//
//
//         AnyKinMeasureOrg &TarsoMetatarsal1DorsiFlexion = ...BodyModel.Interface.Right.TarsoMetatarsal1DorsiFlexion;
//         AnyKinMeasureOrg &TarsoMetatarsal1Abduction = ...BodyModel.Interface.Right.TarsoMetatarsal1Abduction;
//
//
//      AnyKinMeasureOrg &TarsoMetatarsal2DorsiFlexion = ...BodyModel.Interface.Right.TarsoMetatarsal2DorsiFlexion;
//      AnyKinMeasureOrg &TarsoMetatarsal3DorsiFlexion = ...BodyModel.Interface.Right.TarsoMetatarsal3DorsiFlexion;
//      AnyKinMeasureOrg &TarsoMetatarsal4DorsiFlexion = ...BodyModel.Interface.Right.TarsoMetatarsal4DorsiFlexion;
//      AnyKinMeasureOrg &TarsoMetatarsal5SkewDorsiFlexion = ...BodyModel.Interface.Right.TarsoMetatarsal5SkewDorsiFlexion;
//
//      AnyKinMeasureOrg &MetatarsoPhalangeal1DorsiFlexion = ...BodyModel.Interface.Right.MetatarsoPhalangeal1DorsiFlexion;
//      AnyKinMeasureOrg &MetatarsoPhalangeal1Abduction = ...BodyModel.Interface.Right.MetatarsoPhalangeal1Abduction;
//      AnyKinMeasureOrg &MetatarsoPhalangeal2DorsiFlexion = ...BodyModel.Interface.Right.MetatarsoPhalangeal2DorsiFlexion;
//      AnyKinMeasureOrg &MetatarsoPhalangeal2Abduction = ...BodyModel.Interface.Right.MetatarsoPhalangeal2Abduction;
//      AnyKinMeasureOrg &MetatarsoPhalangeal3DorsiFlexion = ...BodyModel.Interface.Right.MetatarsoPhalangeal3DorsiFlexion;
//      AnyKinMeasureOrg &MetatarsoPhalangeal3Abduction = ...BodyModel.Interface.Right.MetatarsoPhalangeal3Abduction;
//      AnyKinMeasureOrg &MetatarsoPhalangeal4DorsiFlexion = ...BodyModel.Interface.Right.MetatarsoPhalangeal4DorsiFlexion;
//      AnyKinMeasureOrg &MetatarsoPhalangeal4Abduction = ...BodyModel.Interface.Right.MetatarsoPhalangeal4Abduction;
//      AnyKinMeasureOrg &MetatarsoPhalangeal5DorsiFlexion = ...BodyModel.Interface.Right.MetatarsoPhalangeal5DorsiFlexion;
//      AnyKinMeasureOrg &MetatarsoPhalangeal5Abduction = ...BodyModel.Interface.Right.MetatarsoPhalangeal5Abduction;
//
//      AnyKinMeasureOrg &ProximoDistalPhalange1DorsiFlexion = ...BodyModel.Interface.Right.ProximoDistalPhalange1DorsiFlexion;
//      AnyKinMeasureOrg &ProximoMedialPhalange2DorsiFlexion = ...BodyModel.Interface.Right.ProximoMedialPhalange2DorsiFlexion;
//      AnyKinMeasureOrg &ProximoMedialPhalange3DorsiFlexion = ...BodyModel.Interface.Right.ProximoMedialPhalange3DorsiFlexion;
//      AnyKinMeasureOrg &ProximoMedialPhalange4DorsiFlexion = ...BodyModel.Interface.Right.ProximoMedialPhalange4DorsiFlexion;
//      AnyKinMeasureOrg &ProximoMedialPhalange5DorsiFlexion = ...BodyModel.Interface.Right.ProximoMedialPhalange5DorsiFlexion;
//      AnyKinMeasureOrg &MedioDistalPhalange2DorsiFlexion = ...BodyModel.Interface.Right.MedioDistalPhalange2DorsiFlexion;
//      AnyKinMeasureOrg &MedioDistalPhalange3DorsiFlexion = ...BodyModel.Interface.Right.MedioDistalPhalange3DorsiFlexion;
//      AnyKinMeasureOrg &MedioDistalPhalange4DorsiFlexion = ...BodyModel.Interface.Right.MedioDistalPhalange4DorsiFlexion;
//      AnyKinMeasureOrg &MedioDistalPhalange5DorsiFlexion = ...BodyModel.Interface.Right.MedioDistalPhalange5DorsiFlexion;
//
//      Strength = 10000;
//      Type = Bilateral;
//      Volume = 1;
//    };
//  };
//};
