Main.ModelSetup.LabSpecificData = {


 #if INCLUDE_UPPERBODY == ON
 #path BODY_MODEL_CONFIG_FILE "BodyModelConfigFullBody.any"
 #else
 #path BODY_MODEL_CONFIG_FILE "BodyModelConfig.any"
 #endif

 #path MOCAP_MARKER_PROTOCOL_FILE "MarkerProtocolFoot.any"
 #path MOCAP_EXTRA_DRIVERS_FILE "ExtraDriversFoot.any"

 #path MOCAP_C3DSETTINGS "C3DSettings.any"

 #ifdef USE_GRF_PREDICTION
  // This switch ensure that the AnyMoCap sets the appropriate settings
  // for the GRF prediction (e.g. residuals, solvers etc.)
  #define MOCAP_USE_GRF_PREDICTION ON
  // Include the GRF prediction force plates.
  #path MOCAP_FORCE_PLATE_FILE "ForcePlates_GRFPrediction.any"
 #else
  // Use normal force plates
  #path MOCAP_FORCE_PLATE_FILE "ForcePlates.any"
 #endif

 Gravity = 9.81*{0,0,-1};


  // This adds different segment length as design variables to
  // to the parameter identification study (Main.Studies.ParameterIdentification)
  // This allows the segment length to be optimized in based on the markers/motion
  OptimizeAnthropometricsOnOff OptimizeAntropometricsOnOff (
    PELVIS_WIDTH = ON ,
    HEAD_HEIGHT = OFF,
    TRUNK_HEIGHT= OFF,
    RIGHT_THIGH_LENGTH= ON,
    LEFT_THIGH_LENGTH = OFF,
    RIGHT_SHANK_LENGTH= ON,
    LEFT_SHANK_LENGTH = OFF,
    RIGHT_FOOT_LENGTH= OFF,
    LEFT_FOOT_LENGTH = OFF,
    RIGHT_UPPERARM_LENGTH= INCLUDE_UPPERBODY,
    LEFT_UPPERARM_LENGTH = INCLUDE_UPPERBODY,
    RIGHT_LOWERARM_LENGTH= INCLUDE_UPPERBODY,
    LEFT_LOWERARM_LENGTH = INCLUDE_UPPERBODY,
    RIGHT_HAND_LENGTH= OFF,
    LEFT_HAND_LENGTH = OFF,
    LEFT_RIGHT_SYMMETRY = ON
  ) ={};


//  AnyFolder OptimizeAntropometrics =
//  {
//   CreateDesVar PelvisWidth( ENABLE = ON,
//     NAME = PelvisWidth,
//     PARAMETER = Main.HumanModel.Anthropometrics.SegmentDimensions.PelvisWidth
//   ) = {};
//
//  };


};
