Main.ModelSetup.SubjectSpecificData =
{

  AnyStringVar SubjectID = "2014046";
  #define SUBJECT_ID "2014046"
  AnyInt Gender = 1;
  AnyIntVar Age =  40;
  AnyFloat RightLegLength = 0.85;
  AnyFloat LeftLegLength = 0.85;

};

Main.HumanModel.Anthropometrics =
{
     BodyMass = DesignVar(79.0);
     BodyHeight = DesignVar(1.73);

};
