Main.ModelSetup.SubjectSpecificData =
{

  AnyStringVar SubjectID = "2014052";
  #define SUBJECT_ID "2014052"
  AnyInt Gender = 1;
  AnyIntVar Age =  25;
  AnyFloat RightLegLength = 0.87;
  AnyFloat LeftLegLength = 0.86;

};

Main.HumanModel.Anthropometrics =
{
     BodyMass = DesignVar(79.5);
     BodyHeight = DesignVar(1.82);

};
