#include "DrawSettings.any"
// These are the attachment positions of the skull to the global reference frame
AnyFixedRefFrame GlobalRef = {
  AnyRefNode GroundNode = {
    sRel = {0.0,0.0,0.0};
  };
  AnyDrawRefFrame DrwGlobalRef = {
    ScaleXYZ = {0.05,0.05,0.05};
    RGB = {0,0,1};
    Opacity = 1.0;
  };
};  // Global reference frame


AnyFolder Model = {

  AnyFolder HumanModel={

    //#include  "..\..\..\BRep\Aalborg\NormalMandibleModel\NormalMandibleHill.root.any" //Model with 3 element Hill muscles
    //#include  "..\..\..\BRep\Aalborg\NormalMandibleModel\NormalMandibleHill2EPlusPE.root.any" //Model with 2 element Hill muscles plus a PE modelled as a ligament
    //#include  "..\..\..\BRep\Aalborg\NormalMandibleModel\NormalMandibleHill2E.root.any" //Model with 2 element Hill muscles
    #include  "..\..\..\BRep\Aalborg\NormalMandibleModel\NormalMandible.root.any" //Model with the simple muscle model

    AnyFolder StrengthParameters={
      AnyVar SpecificMuscleTension = 90; //N/cm^2
    };

    // The orientation of the constraining plane in the TMJ
    AnyFolder AngleConstrainingPlane = {
      AnyVar AngleYaxisR = 30*pi/180; //From Langenbach and Hannam, Archives of Oral Biology 44 (1999) 557-573
      AnyVar AngleYaxisL = 30*pi/180;

      //AnyVar AngleYaxis = -30*pi/180; //From Langenbach and Hannam, Archives of Oral Biology 44 (1999) 557-573

      AnyVar AngleXaxisR = 5*pi/180;  //From Langenbach and Hannam, Archives of Oral Biology 44 (1999) 557-573
      AnyVar AngleXaxisL = -5*pi/180;  //From Langenbach and Hannam, Archives of Oral Biology 44 (1999) 557-573

    };

    /*
    Choice of Scaling
    */
    #include "..\..\..\BRep\Aalborg\Scaling\ScalingStandard.any"


  };

  //#include "ModelEnvironmentConnection.any"


};
