AnyFolder &MandibleBrace = Main.Model.Study.ModelEnvironmentConnection.Environment.MandibleBrace;


MandibleBrace = {
  AnyRefNode Lower_BL = {
    sRel = {114.618,6.55305,-119.569}/1000.0+{-0.5,0.9,-0.8}/1000.0;
    //AnyDrawRefFrame drw ={ScaleXYZ=0.01*{1,1,1};};
    AnyDrawNode drw ={ScaleXYZ=0.0015*{1,1,1};RGB={0,1,0};};
  };

 AnyRefNode Lower_BR = {
    sRel = {74.3428,5.60259,-122.46}/1000.0+{-0.0,0.9,-1}/1000.0;
    //AnyDrawRefFrame drw2 ={ScaleXYZ=0.01*{1,1,1};};
    AnyDrawNode drw ={ScaleXYZ=0.0015*{1,1,1};RGB={0,1,0};};
  };


  AnyRefNode Lower_FL = {
    sRel = {116.512,-13.6446,-151.577}/1000.0+{-0.0,0.5,-1.4}/1000.0;
    //AnyDrawRefFrame drw ={ScaleXYZ=0.01*{1,1,1};};
    AnyDrawNode drw ={ScaleXYZ=0.0015*{1,1,1};RGB={0,1,0};};
  };

 AnyRefNode Lower_FR = {
    sRel = {77.3652,-14.9834,-156.016}/1000.0+{-0.2,0.2,-1.1}/1000.0;
    //AnyDrawRefFrame drw ={ScaleXYZ=0.01*{1,1,1};};
    AnyDrawNode drw ={ScaleXYZ=0.0015*{1,1,1};RGB={0,1,0};};
  };

};

AnyFolder &SkullBrace = Main.Model.Study.ModelEnvironmentConnection.Environment.SkullBrace;
SkullBrace = {
  AnyRefNode Upper_BR = {
    sRel = {72.0829,10.6747,-111.572}/1000.0+{0,0.8,0.7}/1000.0;
    //AnyDrawRefFrame drw ={ScaleXYZ=0.01*{1,1,1};};
    AnyDrawNode drw ={ScaleXYZ=0.0015*{1,1,1};RGB={0,1,0};};
  };

 AnyRefNode Upper_BL = {
    sRel = {112.132,13.9287,-110.941}/1000.0+{-0.0,0.7,0.8}/1000.0;
    //AnyDrawRefFrame drw2 ={ScaleXYZ=0.01*{1,1,1};};
    AnyDrawNode drw ={ScaleXYZ=0.0015*{1,1,1};RGB={0,1,0};};
  };


  AnyRefNode Upper_FL = {
    sRel = {113.874,-20.1156,-87.8583}/1000.0+{-0.0,0.8,0.8}/1000.0;
    //AnyDrawRefFrame drw ={ScaleXYZ=0.01*{1,1,1};};
    AnyDrawNode drw ={ScaleXYZ=0.0015*{1,1,1};RGB={0,1,0};};
  };

 AnyRefNode Upper_FR = {
    sRel = {74.9338,-22.358,-89.2898}/1000.0+{0.0,0.3,1.3}/1000.0;
    //AnyDrawRefFrame drw ={ScaleXYZ=0.01*{1,1,1};};
    AnyDrawNode drw ={ScaleXYZ=0.0015*{1,1,1};RGB={0,1,0};};
  };

Main.Model.Study.ModelEnvironmentConnection.Drivers = {
  AnyKinDriverMarker Lower_FL =
  {
    AnyRefFrame &point = Main.Model.Study.ModelEnvironmentConnection.Environment.MandibleBrace.Lower_FL;
    AnyParamFun &data = Main.ModelSetup.C3DFileData.Points.Markers.Lower_FL.PosInterpol;
    AnyDrawKinMeasure drw =
    {
      Label = Off;
      Size = 0.002;
      Line = On;
    };
  };

  AnyKinDriverMarker Lower_FR =
  {
    AnyRefFrame &point = Main.Model.Study.ModelEnvironmentConnection.Environment.MandibleBrace.Lower_FR;
    AnyParamFun &data = Main.ModelSetup.C3DFileData.Points.Markers.Lower_FR.PosInterpol;
    AnyDrawKinMeasure drw =
    {
      Label = Off;
      Size = 0.002;
      Line = On;
    };
  };

 AnyKinDriverMarker Lower_BL =
  {
    AnyRefFrame &point = Main.Model.Study.ModelEnvironmentConnection.Environment.MandibleBrace.Lower_BL;
    AnyParamFun &data = Main.ModelSetup.C3DFileData.Points.Markers.Lower_BL.PosInterpol;
    AnyDrawKinMeasure drw =
    {
      Label = Off;
      Size = 0.002;
      Line = On;
    };
  };

 AnyKinDriverMarker Lower_BR =
  {
    AnyRefFrame &point = Main.Model.Study.ModelEnvironmentConnection.Environment.MandibleBrace.Lower_BR;
    AnyParamFun &data = Main.ModelSetup.C3DFileData.Points.Markers.Lower_BR.PosInterpol;
    AnyDrawKinMeasure drw =
    {
      Label = Off;
      Size = 0.002;
      Line = On;
    };
  };

 AnyKinDriverMarker Upper_FL =
  {
    AnyRefFrame &point = Main.Model.Study.ModelEnvironmentConnection.Environment.SkullBrace.Upper_FL;
    AnyParamFun &data = Main.ModelSetup.C3DFileData.Points.Markers.Upper_FL.PosInterpol;
    AnyDrawKinMeasure drw =
    {
      Label = Off;
      Size = 0.002;
      Line = On;
    };
  };

 AnyKinDriverMarker Upper_FR =
  {
    AnyRefFrame &point = Main.Model.Study.ModelEnvironmentConnection.Environment.SkullBrace.Upper_FR;
    AnyParamFun &data = Main.ModelSetup.C3DFileData.Points.Markers.Upper_FR.PosInterpol;
    AnyDrawKinMeasure drw =
    {
      Label = Off;
      Size = 0.002;
      Line = On;
    };
  };

 AnyKinDriverMarker Upper_BL =
  {
    AnyRefFrame &point = Main.Model.Study.ModelEnvironmentConnection.Environment.SkullBrace.Upper_BL;
    AnyParamFun &data = Main.ModelSetup.C3DFileData.Points.Markers.Upper_BL.PosInterpol;
    AnyDrawKinMeasure drw =
    {
      Label = Off;
      Size = 0.002;
      Line = On;
    };
  };

AnyKinDriverMarker Upper_BR =
  {
    AnyRefFrame &point = Main.Model.Study.ModelEnvironmentConnection.Environment.SkullBrace.Upper_BR;
    AnyParamFun &data = Main.ModelSetup.C3DFileData.Points.Markers.Upper_BR.PosInterpol;

    AnyDrawKinMeasure drw =
    {
      Label = Off;
      Size = 0.002;
      Line = On;
    };

  };

#ifdef USE_STATIC_DRIVERS
AnyKinDriverMarker ForeHead =
  {
    AnyRefFrame &point = Main.Model.HumanModel.Seg.Skull.ForeHead.Offset;
    AnyParamFun &data = Main.ModelSetup.C3DFileData.Points.Markers.Forehead.PosInterpol;

    AnyDrawKinMeasure drw =
    {
      Label = Off;
      Size = 0.002;
      Line = On;
    };

  };

//AnyKinDriverMarker Nose =
//  {
//    AnyRefFrame &point = Main.Model.HumanModel.Seg.Skull.Nose.Offset;
//    AnyParamFun &data = Main.ModelSetup.C3DFileData.Points.Markers.Nose.PosInterpol;
//
//    AnyDrawKinMeasure drw =
//    {
//      Label = Off;
//      Size = 0.002;
//      Line = On;
//    };
//
//  };

AnyKinDriverMarker LeftEye =
  {
    AnyRefFrame &point = Main.Model.HumanModel.Seg.Skull.LeftEye.Offset;
    AnyParamFun &data = Main.ModelSetup.C3DFileData.Points.Markers.Eye_L.PosInterpol;

    AnyDrawKinMeasure drw =
    {
      Label = Off;
      Size = 0.002;
      Line = On;
    };

  };

AnyKinDriverMarker RightEye =
  {
    AnyRefFrame &point = Main.Model.HumanModel.Seg.Skull.RightEye.Offset;
    AnyParamFun &data = Main.ModelSetup.C3DFileData.Points.Markers.Eye_R.PosInterpol;

    AnyDrawKinMeasure drw =
    {
      Label = Off;
      Size = 0.002;
      Line = On;
    };

  };

AnyKinDriverMarker ChinTip =
  {
    AnyRefFrame &point = Main.Model.HumanModel.Seg.Mandible.ChinTip.Offset;
    AnyParamFun &data = Main.ModelSetup.C3DFileData.Points.Markers.Chin_Tip.PosInterpol;

    AnyDrawKinMeasure drw =
    {
      Label = Off;
      Size = 0.002;
      Line = On;
    };

  };

//AnyKinDriverMarker LeftChin =
//  {
//    AnyRefFrame &point = Main.Model.HumanModel.Seg.Mandible.ChinLeft.Offset;
//    AnyParamFun &data = Main.ModelSetup.C3DFileData.Points.Markers.Chin_L.PosInterpol;
//
//    AnyDrawKinMeasure drw =
//    {
//      Label = Off;
//      Size = 0.002;
//      Line = On;
//    };
//
//  };
//
//AnyKinDriverMarker RightChin =
//  {
//    AnyRefFrame &point = Main.Model.HumanModel.Seg.Mandible.ChinRight.Offset;
//    AnyParamFun &data = Main.ModelSetup.C3DFileData.Points.Markers.Chin_R.PosInterpol;
//
//    AnyDrawKinMeasure drw =
//    {
//      Label = Off;
//      Size = 0.002;
//      Line = On;
//    };
//
//  };

AnyKinDriverMarker LeftMandible =
  {
    AnyRefFrame &point = Main.Model.HumanModel.Seg.Mandible.MandibleLeft.Offset;
    AnyParamFun &data = Main.ModelSetup.C3DFileData.Points.Markers.Mandible_L.PosInterpol;

    AnyDrawKinMeasure drw =
    {
      Label = Off;
      Size = 0.002;
      Line = On;
    };

  };

AnyKinDriverMarker RightMandible =
  {
    AnyRefFrame &point = Main.Model.HumanModel.Seg.Mandible.MandibleRight.Offset;
    AnyParamFun &data = Main.ModelSetup.C3DFileData.Points.Markers.Mandible_R.PosInterpol;

    AnyDrawKinMeasure drw =
    {
      Label = Off;
      Size = 0.002;
      Line = On;
    };

  };

#endif

};


};
