    Study = {

      AnyOutputFile OutputFile =
      {
        FileName = ..NamePrefix+"_LigamentStrains.txt";
        AnyVar L_TMJ_1 = Main.Model.HumanModel.Lig.Left.TemporomandibularLig1.eps;
        AnyVar L_TMJ_2 = Main.Model.HumanModel.Lig.Left.TemporomandibularLig2.eps;
        AnyVar L_TMJ_3 = Main.Model.HumanModel.Lig.Left.TemporomandibularLig3.eps;

        AnyVar R_TMJ_1 = Main.Model.HumanModel.Lig.Right.TemporomandibularLig1.eps;
        AnyVar R_TMJ_2 = Main.Model.HumanModel.Lig.Right.TemporomandibularLig2.eps;
        AnyVar R_TMJ_3 = Main.Model.HumanModel.Lig.Right.TemporomandibularLig3.eps;

        SepSign = " ";

      };


      };
