// Right side muscles
AnyOutputFun SuperFicialMasseterR =
{
  Val = Main.Model.HumanModel.Mus.Right.SuperficialMasseter.Ft;
};

AnyOutputFun DeepAnteriorMasseterR =
{
  Val = Main.Model.HumanModel.Mus.Right.DeepAnteriorMasseter.Ft;
};

AnyOutputFun DeepPosteriorMasseterR =
{
  Val = Main.Model.HumanModel.Mus.Right.DeepPosteriorMasseter.Ft;
};

AnyOutputFun DeepPosteriorMasseterR =
{
  Val = Main.Model.HumanModel.Mus.Right.DeepPosteriorMasseter.Ft;
};
