// maximum muscle forces
    AnyOutputFun MaxMuscleAct =
    {
      Val = Main.Study.MaxMuscleActivity;
    };

// Joint reaction forces
    AnyOutputFun TMJ_L_x =
    {
      Val = Main.Study.TMJ_ReactionForces.TML_L_ReacMeasure_Flocal[0];
    };

    AnyOutputFun TMJ_L_y =
    {
      Val = Main.Study.TMJ_ReactionForces.TML_L_ReacMeasure_Flocal[1];
    };

    AnyOutputFun TMJ_L_z =
    {
      Val = Main.Study.TMJ_ReactionForces.TML_L_ReacMeasure_Flocal[2];
    };

    AnyOutputFun TMJ_R_x =
    {
      Val = Main.Study.TMJ_ReactionForces.TML_R_ReacMeasure_Flocal[0];
    };

    AnyOutputFun TMJ_R_y =
    {
      Val = Main.Study.TMJ_ReactionForces.TML_R_ReacMeasure_Flocal[1];
    };

    AnyOutputFun TMJ_R_z =
    {
      Val = Main.Study.TMJ_ReactionForces.TML_R_ReacMeasure_Flocal[2];
    };

   // Joint movements
   AnyOutputFun TMJ_MoveZ_L =
    {
      Val = Main.Model.HumanModel.Jnt.TMJ_JntR_Z.Pos[0];
    };

   AnyOutputFun TMJ_MoveZ_R =
    {
      Val = Main.Model.HumanModel.Jnt.TMJ_JntR_Z.Pos[0];
    };


   // Ligament forces
   AnyOutputFun TMJ_Lig_L_1 =
    {
      Val = Main.Model.HumanModel.Lig.Left.TemporomandibularLig1.F[0];
    };

   AnyOutputFun TMJ_Lig_L_2 =
    {
      Val = Main.Model.HumanModel.Lig.Left.TemporomandibularLig2.F[0];
    };

    AnyOutputFun TMJ_Lig_L_3 =
    {
      Val = Main.Model.HumanModel.Lig.Left.TemporomandibularLig3.F[0];
    };


   AnyOutputFun TMJ_Lig_R_1 =
    {
      Val = Main.Model.HumanModel.Lig.Right.TemporomandibularLig1.F[0];
    };

   AnyOutputFun TMJ_Lig_R_2 =
    {
      Val = Main.Model.HumanModel.Lig.Right.TemporomandibularLig2.F[0];
    };

    AnyOutputFun TMJ_Lig_R_3 =
    {
      Val = Main.Model.HumanModel.Lig.Right.TemporomandibularLig3.F[0];
    };
