#include "../libdef.any"

// This model shows how to enable the built-in studies to evaluate
// joint strength. The studies are enabled by setting the switch:
// #define EVALUATE_JOINT_STRENGTH
// The studies will appear in the `HumanModel.EvaluateJointStrength`
// folder.
// Note, this will include a lot of studies (two per DOF) so they will
// affect perfomance when loading and switching between tabs/operations.


#define EVALUATE_JOINT_STRENGTH 1

// Setting for how many steps to evaluate the joint strength
// within the range of motion.
#define EVALUATE_JOINT_STRENGTH_NSTEP 8

#ifndef BM_LEG_MODEL
#define BM_LEG_MODEL _LEG_MODEL_TLEM2_
#endif

Main =
{
  // Model configuration:
  // #path HTML_DOC "<AMMR_PATH_DOC>/bm_config/index.html"

  #define BM_ARM_SHOULDER_RHYTHM ON

  #include "<ANYBODY_PATH_BODY>\HumanModel.any"

  AnyOperation& RunApplication = Main.HumanModel.EvalulateJointStrength.Run_all_studies;
};
