#include "../libdef.any"
#include "../../../Tests/tools.any"

// This model shows how to enable the built-in studies to evaluate
// muscle moment arms. The studies are enabled by setting the switch:
// #define EVALUATE_MOMENT_ARMS
// The studies will appear in the `HumanModel.EvaluateMomentArms
// folder.
// Note, this will include a lot of studies (one per DOF) so it will
// affect perfomance when loading and switching between tabs/operations.

//#define AMMR_VERSION 4
#define BM_TRUNK_THORACIC_MODEL _THORACIC_MODEL_FLEXIBLE_

#define EVALUATE_MOMENT_ARMS_IVJs 1
#ifndef EVALUATE_MOMENT_ARMS_IVJs
  #define EVALUATE_MOMENT_ARMS_IVJs 0
#endif

#if EVALUATE_MOMENT_ARMS_IVJs
#define BM_TRUNK_LUMBAR_RHYTHM OFF
#define BM_TRUNK_THORACIC_RHYTHM OFF
#define BM_TRUNK_CERVICAL_RHYTHM OFF
#endif


#define BM_LEG_MODEL OFF
#define BM_ARM_LEFT OFF
#define BM_ARM_RIGHT OFF


#define EVALUATE_MOMENT_ARMS 1
#define EVALUATE_MOMENT_ARMS_NSTEP 2


Main =
{

  #include "BodyModelConfiguration.any"
  #include "<ANYBODY_PATH_BODY>\HumanModel.any"

  AnyOperation& RunApplication = Main.HumanModel.EvaluateMomentArms.Run_all_studies;

};
