#ifdef THORACIC_CAVITY_PRESSURE
AnyReacForce PressureThoracic ={       AnyKinVolumeCylMesh &ref1=Main.HumanModel.BodyModel.Trunk.ThoracicCavity.Volume;    };
#endif

//Size of total force in the L5 Sacrum joint
AnyVar L5SacrumReac = (Main.Model.BodyModel.Trunk.Joints.Lumbar.L5Sacrum.Constraints.Reaction.Fout[0]^2+
Main.Model.BodyModel.Trunk.Joints.Lumbar.L5Sacrum.Constraints.Reaction.Fout[1]^2+
Main.Model.BodyModel.Trunk.Joints.Lumbar.L5Sacrum.Constraints.Reaction.Fout[2]^2)^0.5;
//InitialConditions.KinematicTol = 1e-2;

//Size of total force in the L4L5 joint
AnyVar L4L5Reac = (Main.Model.BodyModel.Trunk.Joints.Lumbar.L4L5.Constraints.Reaction.Fout[0]^2+
Main.Model.BodyModel.Trunk.Joints.Lumbar.L4L5.Constraints.Reaction.Fout[1]^2+
Main.Model.BodyModel.Trunk.Joints.Lumbar.L4L5.Constraints.Reaction.Fout[2]^2)^0.5;

#ifdef Muscle_Volume_Recruitment
InverseDynamics.Criterion.WeightingType = MR_Volume;
#endif
