//Include all the markers in the model
AnyFolder Markers = {

  // Global Reference Frame
  AnyFixedRefFrame GlobalRef = {
    AnyDrawRefFrame ref ={ScaleXYZ={0.4,0.4,0.4};};
  };  // Global reference frame

  AnyFolder p1={
    AnyString datafile="../Input/P1.txt";
    #include "MarkerMover.any"
  };


  AnyFolder p2={
    AnyString datafile="../Input/P2.txt";
    #include "MarkerMover.any"
  };

  AnyFolder p3={
    AnyString datafile="../Input/P3.txt";

    #include "MarkerMover.any"
  };


  AnyFolder p4={
    AnyString datafile="../Input/P4.txt";
    #include "MarkerMover.any"
  };


  AnyFolder p5={
    AnyString datafile="../Input/P5.txt";
    #include "MarkerMover.any"
  };


  AnyFolder p6={
    AnyString datafile="../Input/P6.txt";
    #include "MarkerMover.any"
  };


  AnyFolder p7={
    AnyString datafile="../Input/P7.txt";
    #include "MarkerMover.any"
  };


  AnyFolder p8={
    AnyString datafile="../Input/P8.txt";
    #include "MarkerMover.any"
  };


  AnyFolder p9={
    AnyString datafile="../Input/P9.txt";
    #include "MarkerMover.any"
  };


  AnyFolder p10={
    AnyString datafile="../Input/P10.txt";
    #include "MarkerMover.any"
  };


  AnyFolder p11={
    AnyString datafile="../Input/P11.txt";
    #include "MarkerMover.any"
  };


  AnyFolder p12={
    AnyString datafile="../Input/P12.txt";
    #include "MarkerMover.any"
  };


  AnyFolder p13={
    AnyString datafile="../Input/P13.txt";
    #include "MarkerMover.any"
  };


  AnyFolder p14={
    AnyString datafile="../Input/P14.txt";
    #include "MarkerMover.any"
  };

  AnyFolder p15={
    AnyString datafile="../Input/P15.txt";
    #include "MarkerMover.any"
  };


}; // MyModel
