AnyFolder PostProcessing ={

  AnyVar StepSize=(Main.Study.tEnd-Main.Study.tStart)/(Main.Study.nStep-1);
  AnyVar IndexTemp =(Main.PostStudy.t-Main.Study.tStart)/StepSize;
  AnyInt IndexTemp1=floor(IndexTemp);

  AnyInt Index = iffun(ltfun(IndexTemp1,0),0,IndexTemp1);

  AnyFolder TibialisAnterior={
    AnyFloat ModelNormalize=Main.Study.EMGComparison.TibialisAnterior.ModelFun()[.Index]/(max(Main.Study.EMGComparison.TibialisAnterior.ModelFun())+0.000001);
    AnyFloat MeasuredNormalize=Main.Study.EMGComparison.TibialisAnterior.MeasuredFun()[.Index]/(max(max(Main.Study.EMGComparison.TibialisAnterior.MeasuredFun())+0.000001));
  };

  AnyFolder GluteusMaximus ={
    AnyFloat ModelNormalize=Main.Study.EMGComparison.GluteusMaximus.ModelFun()[.Index]/(max(Main.Study.EMGComparison.GluteusMaximus.ModelFun())+0.000001);
    AnyFloat MeasuredNormalize=Main.Study.EMGComparison.GluteusMaximus.MeasuredFun()[.Index]/(max(max(Main.Study.EMGComparison.GluteusMaximus.MeasuredFun())+0.000001));
  };

   AnyFolder GluteusMedius ={
    AnyFloat ModelNormalize=Main.Study.EMGComparison.GluteusMedius.ModelFun()[.Index]/(max(Main.Study.EMGComparison.GluteusMedius.ModelFun())+0.000001);
    AnyFloat MeasuredNormalize=Main.Study.EMGComparison.GluteusMedius.MeasuredFun()[.Index]/(max(max(Main.Study.EMGComparison.GluteusMedius.MeasuredFun())+0.000001));
  };
   AnyFolder RectusFemoris ={
    AnyFloat ModelNormalize=Main.Study.EMGComparison.RectusFemoris .ModelFun()[.Index]/(max(Main.Study.EMGComparison.RectusFemoris .ModelFun())+0.000001);
    AnyFloat MeasuredNormalize=Main.Study.EMGComparison.RectusFemoris .MeasuredFun()[.Index]/(max(max(Main.Study.EMGComparison.RectusFemoris .MeasuredFun())+0.000001));
  };
   AnyFolder AdductorLongus ={
    AnyFloat ModelNormalize=Main.Study.EMGComparison.AdductorLongus.ModelFun()[.Index]/(max(Main.Study.EMGComparison.AdductorLongus.ModelFun())+0.000001);
    AnyFloat MeasuredNormalize=Main.Study.EMGComparison.AdductorLongus.MeasuredFun()[.Index]/(max(max(Main.Study.EMGComparison.AdductorLongus.MeasuredFun())+0.000001));
  };

  AnyFolder Hamstrings={
    AnyFloat ModelNormalize=Main.Study.EMGComparison.Hamstrings.ModelFun()[.Index]/(max(Main.Study.EMGComparison.Hamstrings.ModelFun())+0.000001);
    AnyFloat MeasuredNormalize=Main.Study.EMGComparison.Hamstrings.MeasuredFun()[.Index]/(max(max(Main.Study.EMGComparison.Hamstrings.MeasuredFun())+0.000001));
  };


};
