//Connects the Skull with the ground with a fixed connection
AnyStdJoint GroundSkullJnt = {
  AnyRefNode &GroundRef = Main.GlobalRef.GroundNode;
  AnyRefNode &SkullRef = ..HumanModel.Seg.Skull.GroundNode;
};


//Defines the movement of the mandible

AnyKinLinear LowerIncisorDistance = {
  AnyRefNode &SkullRef = ..HumanModel.Seg.Skull.MiddleTMJ_Nodes;
  AnyRefNode &MandibleRef = ..HumanModel.Seg.Mandible.LowerIncisorMiddleNode;
  Ref=0;
};


AnyKinEqInterPolDriver ChewingMovement = {
  AnyKinMeasure& ref = .LowerIncisorDistance;
  Type = Bspline;
  BsplineOrder = 4;
  //T = ;
  //Data = ;
  FileName = "..\Input\ChewingRight.txt";
  Reaction.Type = {Off,Off,Off};
};

AnyKinMeasureOrg TMJ_JntL_Y={
  AnyKinLinear &ref = ..HumanModel.Jnt.TMJ_JntL;
  MeasureOrganizer={1};
};

AnyKinEqSimpleDriver TMJ_JntL_Y_Driver = {
  AnyKinMeasure& ref = .TMJ_JntL_Y;
  DriverPos = {0.0};
  DriverVel = {0.0};
  Reaction.Type = {Off};
};
