/**
Definition of the external force on the front teeth of the mandible
*/
AnyForce3D BiteForce = {

  AnyRefNode &ForceNode = ..HumanModel.Seg.Mandible.FirstPreMolarNodeR;

  AnyFunInterpol force ={
    Type=Bspline;
    BsplineOrder = 4;
    FileName = "SimulatedChewingForce.txt";
  };

  Flocal = force(t);

};
