//-------------------------------------------------------
// Definition of the points which are used by the arm for various attachements on thorax segment
// Adding geometry for wrapping to the throax segment
//-------------------------------------------------------

AnyFolder &L1SegRef=.L1Ref;
AnyFolder &L3SegRef=.L3Ref;
AnyFolder &PelvisSegRef=.PelvisRef;
AnyFolder &ThoraxSegRef=.ShoulderRef;

AnyFolder &SkullSegRef=.SkullSegRef;
//
AnyFolder &C1SegRef=.C1SegRef;
AnyFolder &C2SegRef=.C2SegRef;
AnyFolder &C3SegRef=.C3SegRef;
AnyFolder &C4SegRef=.C4SegRef;
AnyFolder &C5SegRef=.C5SegRef;
AnyFolder &C6SegRef=.C6SegRef;
AnyFolder &C7SegRef=.C7SegRef;

ThoraxSegRef ={

  #include "../DrawSettings/Nodes.any"
  //These nodes are made as nodes in nodes, i.e. AnyRefNodes inserted in the reference frame of other nodes.
  //The reason for using this procedure instead of putting the nodes directly on the
  //thorax where they eventually will end up, is that it makes it possible to have the arm as a self-contained block.
  //The nodes defined in the lines below are used by the shoulder and arm model for muscle attachements on the thorax.


  //The content of this folder has to be scaled in a special way because the node in which this
  //the nodes in this folder is inserted in are rotated wrt. to thorax
  //This means that when scaling, the nodes should scale together with thorax but since the reference system they are
  //made in is rotated wrt. to thorax the vector has to be rotated back into the thorax ref frame, then scaled and rotated back again


  AnyRefNode O_latissimus_dorsi_1             =  {sRel = ((.Scale(({-0.155280, -0.122570, 0.032720}*.M)*.ARel'+.sRelStd)*.Mirror-.sRel)*.ARel);       };
  AnyRefNode O_latissimus_dorsi_2              = {sRel = (.Scale(({-0.156440, -0.179700 , 0.036900}*.M)*.ARel'+.sRelStd)*.Mirror-.sRel)*.ARel; };
  AnyRefNode O_latissimus_dorsi_3              = {sRel = (.Scale(({-0.143590, -0.260870 , 0.053870}*.M)*.ARel'+.sRelStd)*.Mirror-.sRel)*.ARel; };
  AnyRefNode O_latissimus_dorsi_4              = {sRel = (.Scale(({-0.110870, -0.334540 , 0.085290}*.M)*.ARel'+.sRelStd)*.Mirror-.sRel)*.ARel; };
  AnyRefNode O_latissimus_dorsi_5              = {sRel = (.Scale(({-0.073690, -0.381800 , 0.117760}*.M)*.ARel'+.sRelStd)*.Mirror-.sRel)*.ARel; };

  AnyRefNode O_trapezius_clavicular_part_1        = {sRel = (.Scale(({-0.112990, 0.086220 , 0.006930}*.M)*.ARel'+.sRelStd)*.Mirror-.sRel)*.ARel; };
  AnyRefNode O_trapezius_clavicular_part_2        = {sRel = (.Scale(({-0.112320, 0.088620 , 0.006650}*.M)*.ARel'+.sRelStd)*.Mirror-.sRel)*.ARel; };
  AnyRefNode O_trapezius_clavicular_part_3        = {sRel = (.Scale(({-0.111460, 0.092010 , 0.006240}*.M)*.ARel'+.sRelStd)*.Mirror-.sRel)*.ARel; };
  AnyRefNode O_trapezius_clavicular_part_4        = {sRel = (.Scale(({-0.110460, 0.096850 , 0.005650}*.M)*.ARel'+.sRelStd)*.Mirror-.sRel)*.ARel; };
  AnyRefNode O_trapezius_clavicular_part_5        = {sRel = (.Scale(({-0.109560, 0.103610 , 0.004830}*.M)*.ARel'+.sRelStd)*.Mirror-.sRel)*.ARel; };
  AnyRefNode O_trapezius_clavicular_part_6        = {sRel = (.Scale(({-0.109380, 0.112810 , 0.003690}*.M)*.ARel'+.sRelStd)*.Mirror-.sRel)*.ARel; };

  AnyRefNode O_trapezius_scapular_part_1          = {sRel = (.Scale(({-0.155970, -0.222180 , 0.022540}*.M)*.ARel'+.sRelStd)*.Mirror-.sRel)*.ARel; };
  AnyRefNode O_trapezius_scapular_part_2          = {sRel = (.Scale(({-0.164270, -0.140550 , 0.018790}*.M)*.ARel'+.sRelStd)*.Mirror-.sRel)*.ARel; };
  AnyRefNode O_trapezius_scapular_part_3          = {sRel = (.Scale(({-0.166070, -0.045060 , 0.016950}*.M)*.ARel'+.sRelStd)*.Mirror-.sRel)*.ARel; };
  AnyRefNode O_trapezius_scapular_part_4          = {sRel = (.Scale(({-0.139710, 0.026940 , 0.012960}*.M)*.ARel'+.sRelStd)*.Mirror-.sRel)*.ARel; };
  AnyRefNode O_trapezius_scapular_part_5          = {sRel = (.Scale(({-0.120240, 0.066790 , 0.009150}*.M)*.ARel'+.sRelStd)*.Mirror-.sRel)*.ARel; };
  AnyRefNode O_trapezius_scapular_part_6          = {sRel = (.Scale(({-0.114440, 0.081650 , 0.007470}*.M)*.ARel'+.sRelStd)*.Mirror-.sRel)*.ARel; };

  AnyRefNode O_rhomboideus_1                      = {sRel = (.Scale(({-0.166810,-0.025580, 0.016450}*.M)*.ARel'+.sRelStd)*.Mirror-.sRel)*.ARel; };
  AnyRefNode O_rhomboideus_2                      = {sRel = (.Scale(({-0.145790, 0.022420 , 0.014450}*.M)*.ARel'+.sRelStd)*.Mirror-.sRel)*.ARel; };
  AnyRefNode O_rhomboideus_3                      = {sRel = (.Scale(({-0.124770, 0.070420 , 0.012450}*.M)*.ARel'+.sRelStd)*.Mirror-.sRel)*.ARel; };
  AnyRefNode O_levator_scapulae_1                 = {sRel = (.Scale(({-0.062910, 0.089410 , 0.028230}*.M)*.ARel'+.sRelStd)*.Mirror-.sRel)*.ARel; };
  AnyRefNode O_levator_scapulae_2                 = {sRel = (.Scale(({-0.060420, 0.112760 , 0.025670}*.M)*.ARel'+.sRelStd)*.Mirror-.sRel)*.ARel; };
  AnyRefNode O_levator_scapulae_3                 = {sRel = (.Scale(({-0.057920, 0.136100 , 0.023100}*.M)*.ARel'+.sRelStd)*.Mirror-.sRel)*.ARel; };

  AnyRefNode O_pectoralis_major_thoracic_part_1   = {sRel = (.Scale(({0.036200, -0.141390 , 0.079970}*.M)*.ARel'+.sRelStd)*.Mirror-.sRel)*.ARel; };
  AnyRefNode O_pectoralis_major_thoracic_part_2   = {sRel = (.Scale(({0.047100, -0.130130 , 0.012940}*.M)*.ARel'+.sRelStd)*.Mirror-.sRel)*.ARel; };
  AnyRefNode O_pectoralis_major_thoracic_part_3   = {sRel = (.Scale(({0.030340, -0.067150 , -0.002550}*.M)*.ARel'+.sRelStd)*.Mirror-.sRel)*.ARel; };
  AnyRefNode O_pectoralis_major_thoracic_part_4   = {sRel = (.Scale(({0.009390, -0.015400 , 0.012720}*.M)*.ARel'+.sRelStd)*.Mirror-.sRel)*.ARel; };
  AnyRefNode O_pectoralis_major_thoracic_part_5   = {sRel = (.Scale(({-0.005220, 0.011990 , 0.036040}*.M)*.ARel'+.sRelStd)*.Mirror-.sRel)*.ARel; };

  AnyRefNode O_pectoralis_minor_1                 = {sRel = (.Scale(({0.003110, -0.031140 , 0.055520}*.M)*.ARel'+.sRelStd)*.Mirror-.sRel)*.ARel; };
  AnyRefNode O_pectoralis_minor_2                 = {sRel = (.Scale(({0.010080, -0.061220 , 0.068410}*.M)*.ARel'+.sRelStd)*.Mirror-.sRel)*.ARel; };
  AnyRefNode O_pectoralis_minor_3                 = {sRel = (.Scale(({0.005300, -0.084470 , 0.087410}*.M)*.ARel'+.sRelStd)*.Mirror-.sRel)*.ARel; };
  AnyRefNode O_pectoralis_minor_4                 = {sRel = (.Scale(({-0.011250, -0.100900 , 0.112520}*.M)*.ARel'+.sRelStd)*.Mirror-.sRel)*.ARel; };

  AnyVec3 correction2 ={0.0,0.0,0};
  AnyRefNode O_serratus_anterior_1                = {sRel = (.Scale(({0.043730, -0.224850 , 0.150810}*.M)*.ARel'+.sRelStd)*.Mirror-.sRel)*.ARel; };
  AnyRefNode O_serratus_anterior_2                = {sRel = (.Scale(({ 0.011390, -0.160650 , 0.108850}*.M)*.ARel'+.sRelStd)*.Mirror-.sRel)*.ARel; };
  AnyRefNode O_serratus_anterior_3                = {sRel = (.Scale(({-0.007660, -0.093810 , 0.104800}*.M)*.ARel'+.sRelStd)*.Mirror-.sRel)*.ARel; };
  AnyRefNode O_serratus_anterior_4                = {sRel = (.Scale(({-0.041050, -0.043890 , 0.112270}*.M)*.ARel'+.sRelStd)*.Mirror-.sRel)*.ARel; };
  AnyRefNode O_serratus_anterior_5                = {sRel = (.Scale(({-0.056390, -0.015300 , 0.106520}*.M)*.ARel'+.sRelStd)*.Mirror-.sRel)*.ARel; };
  AnyRefNode O_serratus_anterior_6                = {sRel = (.Scale(({-0.058720, -0.005190 , 0.099190}*.M)*.ARel'+.sRelStd)*.Mirror-.sRel)*.ARel; };

  AnyRefNode SternocleidomastoidNode = {sRel = (.Scale(({-0.025, 0.002, 0.018}*.M)*.ARel'+.sRelStd)*.Mirror-.sRel)*.ARel;  };

  // Ellipsoid which are used for wrapping of serratus anterior.
  AnyRefNode EllipsoidOrigin = {
    sRel = (.Scale(({0, -0.2960, 0.07780})*.ARel'+.sRelStd)*.Mirror-.sRel)*.ARel;  // Helm 1992 subject k2.

    //This is the standard values of the elipsoid before any scaling
    AnyVec3 Radius =  {0.1530, 0.365,0.13 };

    //Creating three "points" using the original sizes of the elipsoid
    //standard scaling are used on these points
    AnyVec3 P1 = sRel+(.Scale(({Radius[0],0,0})*.ARel'+.sRelStd)*.Mirror-.sRel)*.ARel;
    AnyVec3 P2 = sRel+(.Scale(({0,Radius[1],0})*.ARel'+.sRelStd)*.Mirror-.sRel)*.ARel;
    AnyVec3 P3 = sRel+(.Scale(({0,0,Radius[2]})*.ARel'+.sRelStd)*.Mirror-.sRel)*.ARel;

    AnySurfEllipsoid EllipsoidSurf = {
      //The length of the three axis are calculated using the scaled points
      AnyVar R1=((.sRel[0]-.P1[0])^2+(.sRel[1]-.P1[1])^2+(.sRel[2]-.P1[2])^2)^0.5;
      AnyVar R2=((.sRel[0]-.P2[0])^2+(.sRel[1]-.P2[1])^2+(.sRel[2]-.P2[2])^2)^0.5;
      AnyVar R3=((.sRel[0]-.P3[0])^2+(.sRel[1]-.P3[1])^2+(.sRel[2]-.P3[2])^2)^0.5;
      Radius = {R1,R2,R3 };

    };
  };

  // Ellipsoid which are used for wrapping of pectoralis.
  AnyRefNode EllipsoidPectoralisOrigin = {

    sRel = (.Scale(({0.00, -0.12, 0.07})*.ARel'+.sRelStd)*.Mirror-.sRel)*.ARel;  // Helm 1992 subject k2.

    //This is the standard values of the elipsoid before any scaling
    AnyVec3 Radius = {0.15, 0.145, 0.10};

    //Creating three "points" using the original sizes of the elipsoid
    //standard scaling are used on these points
    AnyVec3 P1 = sRel+(.Scale(({Radius[0],0,0})*.ARel'+.sRelStd)*.Mirror-.sRel)*.ARel;
    AnyVec3 P2 = sRel+(.Scale(({0,Radius[1],0})*.ARel'+.sRelStd)*.Mirror-.sRel)*.ARel;
    AnyVec3 P3 = sRel+(.Scale(({0,0,Radius[2]})*.ARel'+.sRelStd)*.Mirror-.sRel)*.ARel;

    AnySurfEllipsoid EllipsoidSurf = {
      //The length of the three axis are calculated using the scaled points
      AnyVar R1=((.sRel[0]-.P1[0])^2+(.sRel[1]-.P1[1])^2+(.sRel[2]-.P1[2])^2)^0.5;
      AnyVar R2=((.sRel[0]-.P2[0])^2+(.sRel[1]-.P2[1])^2+(.sRel[2]-.P2[2])^2)^0.5;
      AnyVar R3=((.sRel[0]-.P3[0])^2+(.sRel[1]-.P3[1])^2+(.sRel[2]-.P3[2])^2)^0.5;
      Radius = {R1,R2,R3 };
      //AnyDrawParamSurf drw={  RGB={0,1,0};      };
    };
  };


  // Ellipsoid which are used for wrapping of serratus anterior.
  AnyRefNode EllipsoidSerratusAnteriorOrigin = {
    //These three points are sued for controlling the elipsoid
    AnyVec3 P1 = (.Scale(({-0.165000, -0.296000, 0.037000})*.ARel'+.sRelStd)*.Mirror-.sRel)*.ARel;
    AnyVec3 P2 = (.Scale(({0.000000, -0.278635, -0.061481})*.ARel'+.sRelStd)*.Mirror-.sRel)*.ARel;
    AnyVec3 P3 = (.Scale(({0.000000, 0.038835+0.025,0.096040})*.ARel'+.sRelStd)*.Mirror-.sRel)*.ARel;

    sRel = (.Scale(({0.0, -0.2960, 0.037})*.ARel'+.sRelStd)*.Mirror-.sRel)*.ARel;

    ARel = RotMat(sRel,P1,P3);

    AnySurfEllipsoid EllipsoidSurf = {
      AnyVar R1=((.sRel[0]-.P1[0])^2+(.sRel[1]-.P1[1])^2+(.sRel[2]-.P1[2])^2)^0.5;
      AnyVar R2=((.sRel[0]-.P2[0])^2+(.sRel[1]-.P2[1])^2+(.sRel[2]-.P2[2])^2)^0.5;
      AnyVar R3=((.sRel[0]-.P3[0])^2+(.sRel[1]-.P3[1])^2+(.sRel[2]-.P3[2])^2)^0.5;
      Radius={R1,R3,R2};
      //AnyDrawParamSurf drw={RGB={1,0,0};};
    };

  };


  // Ellipsoid which are used for wrapping of Latisimus dorsi
  AnyRefNode EllipsoidLatissimusOrigin = {
    AnyVar A=0.05;
    AnyVec3 P1 = (.Scale(({0.160000,-0.200000+A, 0.050000})*.ARel'+.sRelStd)*.Mirror-.sRel)*.ARel;
    AnyVec3 P2 = (.Scale(({0.0150000,-0.050000+A, 0.050000})*.ARel'+.sRelStd)*.Mirror-.sRel)*.ARel;
    AnyVec3 P3 = (.Scale(({0.0150000,-0.200000+A,0.1550000})*.ARel'+.sRelStd)*.Mirror-.sRel)*.ARel;

    ARel = RotMat(sRel,P1,P3);
    sRel = (.Scale(({0.015, -0.2+A, 0.05})*.ARel'+.sRelStd)*.Mirror-.sRel)*.ARel;

    AnySurfEllipsoid EllipsoidSurf = {
      //The length of the three axis are calculated using the scaled points
      AnyVar R1=((.sRel[0]-.P1[0])^2+(.sRel[1]-.P1[1])^2+(.sRel[2]-.P1[2])^2)^0.5;
      AnyVar R2=((.sRel[0]-.P2[0])^2+(.sRel[1]-.P2[1])^2+(.sRel[2]-.P2[2])^2)^0.5;
      AnyVar R3=((.sRel[0]-.P3[0])^2+(.sRel[1]-.P3[1])^2+(.sRel[2]-.P3[2])^2)^0.5;
      Radius = {R1,R3,R2 };
      //AnyDrawParamSurf drw={RGB={0,0,1};};
    };
  };


};


PelvisSegRef={
  AnyFunTransform3D &Scale=..Scaling.GeometricalScaling.Pelvis.ScaleFunction;
  AnyRefNode O_latissimus_dorsi_5  = {
    sRel = .Scale({0.03, 0.05, ...Sign*0.09});
  };
};

L1SegRef={
  AnyFunTransform3D &Scale=..Scaling.GeometricalScaling.Lumbar.ScaleFunction;
  AnyRefNode O_latissimus_dorsi_3  = {
    sRel= .Scale({-0.02000, 0.1385, 0.000000});
  };
};

L3SegRef={
  AnyFunTransform3D &Scale=..Scaling.GeometricalScaling.Lumbar.ScaleFunction;
  AnyRefNode O_latissimus_dorsi_4 = {
    sRel=.Scale(0.5*{0.0340000, 0.155, 0.000000});
  };
};


SkullSegRef={
    AnyFunTransform3D &Scale =....Trunk.SegmentsThorax.SkullSeg.Scale;
    AnyMat33 Mirror ={{1,0,0},{0,1,0},{0,0,..Sign}};
    AnyRefNode O_trapezius_clavicular_part_6        = {
      sRel = (.Scale(({-0.06, -0.02, 0.020})*.Mirror));
    };
   AnyRefNode SternocleidomastoidNode = {sRel = .Scale({-0.034+0.018+0.01,-0.025+0.005,0.074})*.Mirror;};
};


C1SegRef={
  AnyMat33 MirrorC1 ={{1,0,0},{0,1,0},{0,0,..Sign}};
  AnyFunTransform3D &ScaleC1 =....Trunk.SegmentsCervicalSpine.C1Seg.Scale;
  AnyRefNode O_levator_scapulae_1 = {
    sRel = (.ScaleC1(({0.025, 0.575 , 0.039}))*.MirrorC1);
  };

  AnyRefNode O_trapezius_clavicular_part_5 = {
      sRel = (.ScaleC1(({-0.01, 0.57 , 0.005}))*.MirrorC1);
  };
};


C2SegRef={

  AnyFunTransform3D &ScaleC2 =....Trunk.SegmentsCervicalSpine.C2Seg.Scale;

  AnyMat33 MirrorC2 ={{1,0,0},{0,1,0},{0,0,..Sign}};

  AnyRefNode O_levator_scapulae_2                 = {
    sRel = (.ScaleC2(({0.025, 0.565 , 0.025670}))*.MirrorC2);
  };

  AnyRefNode O_trapezius_clavicular_part_4        = {
     sRel = (.ScaleC2(({-0.01, 0.545 , 0.005}))*.MirrorC2);
  };

};


C3SegRef={
  AnyFunTransform3D &ScaleC3 =....Trunk.SegmentsCervicalSpine.C3Seg.Scale;

  AnyMat33 MirrorC3 ={{1,0,0},{0,1,0},{0,0,..Sign}};

  AnyRefNode O_levator_scapulae_3                 = {
    sRel = (.ScaleC3(({0.024, 0.55 , 0.023100}))*.MirrorC3);
  };
  AnyRefNode O_trapezius_clavicular_part_3        = {
    sRel = (.ScaleC3(({-0.012, 0.535 , 0.005}))*.MirrorC3);
  };
};


C4SegRef={
  AnyFunTransform3D &ScaleC4 =....Trunk.SegmentsCervicalSpine.C4Seg.Scale;

  AnyMat33 MirrorC4 ={{1,0,0},{0,1,0},{0,0,..Sign}};

  AnyRefNode O_levator_scapulae_4                 = {
    sRel = (.ScaleC4(({0.023, 0.535 , 0.023100}))*.MirrorC4);
  };

  AnyRefNode O_trapezius_clavicular_part_2        = {
    sRel = (.ScaleC4(({-0.014, 0.522 , 0.005}))*.MirrorC4);
  };
};

C5SegRef={
  AnyFunTransform3D &ScaleC5 =....Trunk.SegmentsCervicalSpine.C5Seg.Scale;

  AnyMat33 MirrorC5 ={{1,0,0},{0,1,0},{0,0,..Sign}};

  AnyRefNode O_trapezius_clavicular_part_1        = {
    sRel = (.ScaleC5(({-0.022, 0.513 , 0.005}))*.MirrorC5);
  };

};

C6SegRef={
  AnyFunTransform3D &ScaleC6 =....Trunk.SegmentsCervicalSpine.C6Seg.Scale;

  AnyMat33 MirrorC6 ={{1,0,0},{0,1,0},{0,0,..Sign}};

  AnyRefNode O_trapezius_clavicular_part_7 = {
     sRel = (.ScaleC6(({-0.026, 0.495 , 0.005}))*.MirrorC6);
  };

};

C7SegRef={

  AnyFunTransform3D &ScaleC7 =....Trunk.SegmentsCervicalSpine.C7Seg.Scale;

  AnyVar Sign=1;
  AnyMat33 MirrorC7 ={{1,0,0},{0,1,0},{0,0,Sign}};
  AnyRefNode O_trapezius_clavicular_part_8 = {
     sRel = (.ScaleC7(({-0.030, 0.47 , 0.005}))*.MirrorC7);
  };
  AnyRefNode O_rhomboideus_1 = {
    sRel = (.ScaleC7(({-0.027, 0.47 , 0.005}))*.MirrorC7);
  };

};
