AnyFolder Humerus = {


  AnyVar Length = ((gh_pos[1]-fe_pos[1])^2)^0.5; // Find the length using bonylandmark x coordinates!

  AnyFloat sCoM_pos ={0,-0.18*Length,0};

  AnyFloat OffSet =-{-0.001379, 0.008999 , -0.009119};
  // Wrapping objects
  AnyVar art_gh_hum_Radius=0.0266;
  AnyFloat  art_gh_hum_pos = {-0.003444, 0.009615 , -0.008172}+OffSet;
  AnyVec3 art_gh_hum_P1_pos={(-0.003444+art_gh_hum_Radius), 0.009615 , -0.008172}+OffSet;
  AnyVec3 art_gh_hum_P2_pos={(-0.003444), 0.009615+art_gh_hum_Radius , -0.008172}+OffSet;
  AnyVec3 art_gh_hum_P3_pos={(-0.003444), 0.009615 , -0.008172+art_gh_hum_Radius}+OffSet;

  AnyFloat art_tub_minus_tub_majus_Radius = 0.036;
  AnyFloat art_tub_minus_tub_majus_pos = {-0.001379, 0.008999 , -0.009119}+OffSet;
  AnyFloat art_tub_minus_tub_majus_P1_pos = {(-0.001379+art_tub_minus_tub_majus_Radius), 0.008999 , -0.009119}+OffSet;
  AnyFloat art_tub_minus_tub_majus_P2_pos = {(-0.001379), 0.008999 , -0.009119+art_tub_minus_tub_majus_Radius}+OffSet;

  AnyFloat collum_hum_pos = {0.0, -0.35 , 0.0}+OffSet;
  AnyFloat collum_hum_P2_pos ={-0.011698, -0.350000, -0.000157}+OffSet; ////Point used for radius
  AnyFloat collum_hum_P3_pos ={0.000000, 0.030000, 0.000000}+OffSet; //End point

  AnyFloat collum_hum_teres_minor_pos = {0.0, -0.1 , 0.0}+OffSet;	//{0.001379000, -0.1089990, 0.009119000};
  AnyFloat collum_hum_teres_minor_P2_pos= {0.0, 0.04 , 0.0}+{0,-0.02,0}+OffSet;//End point
  AnyFloat collum_hum_teres_minor_P3_pos= {0.0, -0.1 , 0.01885}+OffSet;//Point used for radius

  AnyFloat collum_hum_teres_minor_new_pos = {0.002122180, 0.06807196, 0.006301948};

  AnyVar  condylus_hum_Radius=0.012;
  AnyVar  condylus_hum_Length=0.08;
  AnyFloat condylus_hum_pos = {-0.024, -0.344210 , -0.0040000}+{-0.02,0,0}+OffSet;
  AnyFloat condylus_hum_P2_pos ={(-0.024+condylus_hum_Length), -0.344210 , -0.0040000}+OffSet; //End point
  AnyFloat condylus_hum_P3_pos ={-0.024, -0.34421 , condylus_hum_Radius-0.0040000}+{-0.02,0,0}+OffSet; //Point used for radius


  AnyVar  condylus_humT_Radius=0.012;
  AnyVar  condylus_humT_Length=0.08;
  AnyFloat condylus_humT_P2_pos ={(-0.030510+condylus_humT_Length), -0.344210 , -0.0040000}+OffSet; //End point
  AnyFloat condylus_humT_P3_pos ={-0.030510, -0.34421 , condylus_humT_Radius-0.0040000}+OffSet; //Point used for radius
  AnyFloat condylus_humT_pos ={-0.030510, -0.344210 , -0.0040000}+OffSet;

  AnyMatrix HumerusWrapLandmarks = {
	{0,0,0},                       								//gh node
	({0.013072-.01, -0.331048 , -0.007917}+OffSet ), 			//fe node
	({-0.003235, -0.112511 , -0.018594}+correction4+OffSet), 	// I_Pectoralis_major_clavicular_part1
	({(-0.014390+x1), 0.035979+y1 , -0.007855+z1}+OffSet), 	// I_supraspinatus_1 node
	({(0.013689+xt), -0.016225+yt , 0.002468+zt}+OffSet) 	// I_teres_minor_5 node
  };


  // This is a collum which visually has been fitted to the distal end of humerus
  // it is used for wrapping of elbow flexor muscles.
  // comes from ARM_MUSCLE_UPDATE_V16 statement
  AnyFloat condylus_hum_landmarks = {
      {-0.013, -0.350 , -0.013 },
      {0.023, -0.348 , -0.007},
      { 0.0, -0.348 , -0.010},
      {0.0, -0.366 , 0.01},
      { 0.0, -0.335 , -0.002}
    };					//dn(20120614): checked that scaling is outside of WrappingCylinder5PointFit.any


  AnyVar x1=0.03; //this is a correction !!
  AnyVar y1=-0.008;
  AnyVar z1=-0.005;

  AnyVar xi=0.015; //this is a correction !!
  AnyVar yi=-0.01;
  AnyVar zi=-0.005;


  AnyVar xt=0.008; //this is a correction !!
  AnyVar yt=0.005;
  AnyVar zt=-0.003;


  AnyVec3 ds1={0.005,-0.03,0.00}+OffSet;
  AnyVec3 ds2={-0.002,0,-0.001}+OffSet;

  AnyVec3 correction0 ={0,0.0,-0.005};
  AnyVec3 correction ={0,0,0.007}; //To avoid that points are located inside coloumn
  AnyVector Correction ={0,-0.015,-0.015};
  AnyVec3 correction1={-0.01,0.0,0.01};
  AnyVec3 correction2 ={0,0,-0.005};
  AnyVec3 correction3 ={-0.005,0,-0.005};
  AnyVec3 correction4 ={0,0.02,0};
  AnyVec3 correction5={0,0.018,0};


  AnyFloat AnatomicalFrame_pos = {0.0000000, 0.0000000, 0.0000000};
  AnyFloat HumerusBoneGeometryNode_pos = {0.001379000, -0.008999000, 0.009119000};
  AnyFloat DeltoidConnectorCenter_pos = {0.0000000, 0.0000000, 0.0000000};
  AnyFloat gh_pos = {0.0000000, 0.0000000, 0.0000000};
  AnyFloat em_pos = {-0.030510, -0.311210 , 0.000000}+OffSet;
  AnyFloat el_pos = {0.030510, -0.306605 , 0.000000}+OffSet;
  AnyFloat fe_pos = {(0.013072-.01), -0.331048 , -0.007917}+OffSet;


  AnyFloat art_tub_minus_pos = {0.014, 0.009 , -0.03}+OffSet;
  AnyFloat art_tub_majus_pos = {0.021, 0.009 , -0.02}+OffSet;
  AnyFloat sulcus_intertubercularis_pos = {0.017500, -0.023000, -0.0175000}+OffSet; // 0.5*(.art_tub_majus.sRel+.art_tub_minus.sRel)+.Scale({...Sign*0.003,0.0,0.0}); // midpoint
  AnyFloat sulcus_intertubercularisTop_pos = {0.017, 0.023000, -0.02650}+OffSet; //.sulcus_intertubercularis.sRel+.Scale({...Sign*-0.005,0.015,0.003});

#if BM_ARM_DELTOID_WRAPPING == _DELTOID_WRAPPING_RAKE_
  AnyFloat I_deltoideus_scapular_part_1_pos         = {0.009442, -0.095031 , -0.005209}+{0,0,0.005}+ds1;
  AnyFloat I_deltoideus_scapular_part_2_pos         = {0.010509, -0.109575 , -0.001490}+ds1;
  AnyFloat I_deltoideus_scapular_part_3_pos         = {0.006940, -0.081782 , -0.013010}+{0,0,0.015}+ds1;
  AnyFloat I_deltoideus_scapular_part_4_pos         = {0.009462, -0.116191 , -0.004216}+ds1;
  AnyFloat I_deltoideus_scapular_part_5_pos         = {0.005849, -0.085435 , -0.016010}+ds1;
  AnyFloat I_deltoideus_scapular_part_6_pos         = {0.008066, -0.115681 , -0.008272}+ds1;
  AnyFloat I_deltoideus_clavicular_part_1_pos       = {0.004982, -0.088709 , -0.018372}+ds1;
  AnyFloat I_deltoideus_clavicular_part_2_pos       = {0.007234, -0.119509 , -0.010489}+ds1;
  AnyFloat I_deltoideus_clavicular_part_3_pos       = {0.004818, -0.093455 , -0.018628}+ds1;
  AnyFloat I_deltoideus_clavicular_part_4_pos       = {0.006682, -0.118890 , -0.012126}+ds1;
  AnyFloat I_deltoideus_clavicular_part_5_pos       = {0.004941, -0.104487 , -0.017775}+ds1;
  AnyFloat I_deltoideus_clavicular_part_6_pos       = {0.005662, -0.114302 , -0.015263}+ds1;
#else
  AnyFloat I_deltoideus_posterior_part_1_pos         = {0.002442, -0.095031 , -0.005209}+{0,0,0.016}+ds1;
  AnyFloat I_deltoideus_posterior_part_2_pos        = {0.002442, -0.095031 , -0.005209}+{0.004,-0.005,0.011}+ds1;
  AnyFloat I_deltoideus_posterior_part_3_pos         = {0.002442, -0.095031 , -0.005209}+{0.007,-0.009,0.007}+ds1;
  AnyFloat I_deltoideus_posterior_part_4_pos        = {0.010509, -0.109575 , -0.001490}+ds1;
  AnyFloat I_deltoideus_lateral_part_1_pos         = {0.009462, -0.114191 , -0.004216}+ds1;
  AnyFloat I_deltoideus_lateral_part_3_pos         = {0.008062, -0.118191 , -0.008216}+ds1;
  AnyFloat I_deltoideus_lateral_part_2_pos        = {0.009462, -0.116191 , -0.006216}+ds1;
  AnyFloat I_deltoideus_lateral_part_4_pos         = {0.007066, -0.116681 , -0.010010}+ds1;

  AnyFloat I_deltoideus_anterior_part_1_pos       = {0.006682, -0.114890 , -0.012126}+ds1;
  AnyFloat I_deltoideus_anterior_part_2_pos       = {0.003682, -0.109890 , -0.014126}+ds1;
  AnyFloat I_deltoideus_anterior_part_3_pos       = {0.002682, -0.108890 , -0.015126}+ds1;
  AnyFloat I_deltoideus_anterior_part_4_pos       = {0.000682, -0.098890 , -0.015126}+ds1;
#endif
  AnyFloat I_subscapularis_1_pos                    = {-0.013538, 0.013190 , -0.033056} +ds2;
  AnyFloat I_subscapularis_2_pos                    = {-0.013538, 0.013190 , -0.033056} +ds2;
  AnyFloat I_subscapularis_3_pos                    = {-0.013162, 0.002403 , -0.035777} +ds2;
  AnyFloat I_subscapularis_4_pos                    = {-0.013162, 0.002403 , -0.035777} +ds2;
  AnyFloat I_subscapularis_5_pos                    = {-0.012987, -0.002479 , -0.037019}+ds2;
  AnyFloat I_subscapularis_6_pos                    = {-0.012987, -0.002479 , -0.037019}+ds2;


  AnyFloat I_supraspinatus_1_pos                    = {(-0.014390+x1), 0.035979+y1 , -0.007855+z1}+OffSet;
  AnyFloat I_supraspinatus_2_pos                    = {(-0.014390+x1), 0.035979+y1 , -0.007855+z1}+OffSet;
  AnyFloat I_supraspinatus_3_pos                    = {(-0.012505+x1), 0.034910+y1 , -0.000163+z1}+OffSet;
  AnyFloat I_supraspinatus_4_pos                    = {(-0.012505+x1), 0.034910+y1 , -0.000163+z1}+OffSet;
  AnyFloat I_supraspinatus_5_pos                    = {(-0.010693+x1), 0.033878+y1 ,  0.007226+z1}+OffSet;
  AnyFloat I_supraspinatus_6_pos                    = {(-0.010693+x1), 0.033878+y1 ,  0.007226+z1}+OffSet;


  AnyFloat I_infraspinatus_1_pos                    = {(-0.000091+xi), 0.029001+yi , 0.014576+zi}+OffSet;
  AnyFloat I_infraspinatus_2_pos                    = {(-0.000091+xi), 0.029001+yi , 0.014576+zi}+OffSet;
  AnyFloat I_infraspinatus_3_pos                    = {(0.002343+xi), 0.021655+yi , 0.016554+zi}+OffSet;
  AnyFloat I_infraspinatus_4_pos                    = {(0.002343+xi), 0.021655+yi , 0.016554+zi}+OffSet;
  AnyFloat I_infraspinatus_5_pos                    = {(0.004975+xi), 0.013755+yi , 0.018686+zi}+OffSet;
  AnyFloat I_infraspinatus_6_pos                    = {(0.004975+xi), 0.013755+yi , 0.018686+zi}+OffSet;

  AnyFloat I_teres_minor_1_pos                      = {(0.012979+xt), -0.001188+yt , 0.008916+zt}+OffSet;
  AnyFloat I_teres_minor_2_pos                      = {(0.012979+xt), -0.001188+yt , 0.008916+zt}+OffSet;
  AnyFloat I_teres_minor_3_pos                      = {(0.013360+xt), -0.009360+yt , 0.005409+zt}+OffSet;
  AnyFloat I_teres_minor_4_pos                      = {(0.013360+xt), -0.009360+yt , 0.005409+zt}+OffSet;
  AnyFloat I_teres_minor_5_pos                      = {(0.013689+xt), -0.016225+yt , 0.002468+zt}+OffSet;
  AnyFloat I_teres_minor_6_pos                      = {(0.013689+xt), -0.016225+yt , 0.002468+zt}+OffSet;

  AnyFloat I_teres_major_1_pos                      = {-0.009281, -0.043713 , -0.018597}+correction5+OffSet;
  AnyFloat I_teres_major_2_pos                      = {-0.009281, -0.043713 , -0.018597}+correction5+OffSet;
  AnyFloat I_teres_major_3_pos                      = {-0.008416, -0.059459 , -0.017509}+correction5+OffSet;
  AnyFloat I_teres_major_4_pos                      = {-0.008416, -0.059459 , -0.017509}+correction5+OffSet;
  AnyFloat I_teres_major_5_pos                      = {-0.007840, -0.070873 , -0.016625}+correction5+OffSet;
  AnyFloat I_teres_major_6_pos                      = {-0.007840, -0.070873 , -0.016625}+correction5+OffSet;


  AnyFloat I_coracobrachialis_1_pos                 = {-0.010924, -0.118511 , -0.009192}+OffSet;
  AnyFloat I_coracobrachialis_2_pos                 = {-0.008645, -0.121593 , -0.010523}+OffSet;
  AnyFloat I_coracobrachialis_3_pos                 = {-0.013514, -0.123634 , -0.007823}+OffSet;
  AnyFloat I_coracobrachialis_4_pos                 = {-0.010512, -0.127681 , -0.009574}+OffSet;
  AnyFloat I_coracobrachialis_5_pos                 = {-0.012786, -0.133910 , -0.008395}+OffSet;
  AnyFloat I_coracobrachialis_6_pos                 = {-0.010900, -0.136470 , -0.009495}+OffSet;
  AnyFloat I_triceps_brachii_1_pos                  = {-0.011696, -0.302289 , 0.020455}+ OffSet;
  AnyFloat I_triceps_brachii_2_pos                  = {-0.011696, -0.302289 , 0.020455}+ OffSet;

  AnyFloat I_latissimus_dorsi_1_pos                 = {-0.001126, -0.045131 , -0.020042}+OffSet;
  AnyFloat I_latissimus_dorsi_2_pos                 = {-0.0013578, -0.0420138, -0.020713}+OffSet;
  AnyFloat I_latissimus_dorsi_3_pos                 = {-0.0015896, -0.0388966, -0.021384 }+OffSet;
  AnyFloat I_latissimus_dorsi_4_pos                 = {-0.0018214, -0.0357794, -0.022055 }+OffSet;
  AnyFloat I_latissimus_dorsi_5_pos                 = {-0.0020532, -0.0326622, -0.022726 }+OffSet;
  AnyFloat I_latissimus_dorsi_6_pos                 = {-0.002285 , -0.029545 , -0.023397 }+OffSet;
  AnyFloat I_latissimus_dorsi_7_pos                 = {-0.0025168, -0.0264278, -0.024068 }+OffSet;
  AnyFloat I_latissimus_dorsi_8_pos                 = {-0.0027486, -0.0233106, -0.024739 }+OffSet;
  AnyFloat I_latissimus_dorsi_9_pos                 = {-0.0029804, -0.0201934, -0.02541 }+OffSet;
  AnyFloat I_latissimus_dorsi_10_pos                = {-0.0032122, -0.0170762, -0.026081 }+OffSet;
  AnyFloat I_latissimus_dorsi_11_pos                = {-0.003444, -0.013959 , -0.026752}+OffSet;

  AnyFloat I_pectoralis_major_thoracic_part_1_pos   = {0.007396, -0.020684 , -0.024098}+correction4+{0,-0.02,0}+OffSet;
  AnyFloat I_pectoralis_major_thoracic_part_2_pos   = {0.006496, -0.030684 , -0.0235}+correction4+{0,-0.02,0}+OffSet;
  AnyFloat I_pectoralis_major_thoracic_part_3_pos   = {0.005396, -0.039684 , -0.023}+correction4+{0,-0.02,0}+OffSet;
  AnyFloat I_pectoralis_major_thoracic_part_4_pos   = {0.004202, -0.048333 , -0.022443}+correction4+OffSet;
  AnyFloat I_pectoralis_major_thoracic_part_5_pos   = {0.003602, -0.054333 , -0.022043}+correction4+OffSet;
  AnyFloat I_pectoralis_major_thoracic_part_6_pos   = {0.002902, -0.059333 , -0.021743}+correction4+OffSet;
  AnyFloat I_pectoralis_major_thoracic_part_7_pos   = {0.002697, -0.062772 , -0.021551}+correction4+OffSet;
  AnyFloat I_pectoralis_major_thoracic_part_8_pos   = {0.002297, -0.064772 , -0.021451}+correction4+OffSet;
  AnyFloat I_pectoralis_major_thoracic_part_9_pos   = {0.000253, -0.082460 , -0.020396}+correction4+OffSet;
  AnyFloat I_pectoralis_major_thoracic_part_10_pos   = {-0.002051, -0.102370 , -0.019200}+correction4+OffSet;

  AnyFloat I_pectoralis_major_clavicular_part_1_pos = {-0.003235, -0.112511 , -0.018594}+correction4+OffSet;
  AnyFloat I_pectoralis_major_clavicular_part_2_pos = {-0.003403, -0.113954 , -0.018506}+correction4+OffSet;
  AnyFloat I_pectoralis_major_clavicular_part_3_pos = {-0.002941, -0.109969 , -0.018743}+correction4+OffSet;
  AnyFloat I_pectoralis_major_clavicular_part_4_pos = {-0.001603, -0.098394 , -0.019439}+correction4+OffSet;
  AnyFloat I_pectoralis_major_clavicular_part_5_pos = {0.000904, -0.076809 , -0.020738} +correction4+OffSet;

#if BM_HAND_MODEL == _HAND_MODEL_RUHM_

  AnyFloat O_Brachioradialis_pos_1 = {0.01395, -0.2636, -0.00193};
  AnyFloat O_Brachioradialis_pos_2 = {0.01535, -0.2774, -0.002612};
  AnyFloat O_Brachioradialis_pos_3 = {0.01968, -0.2992, -0.004099};
  AnyFloat O_Brachioradialis_pos_4 = {0.0223, -0.3085, -0.005186};
  AnyFloat O_Brachioradialis_pos_5 = {0.01721, -0.2892, -0.003473};

  #ifndef RUHM_DETAILED_MODEL
  #define RUHM_DETAILED_MODEL OFF
  #endif

  #if RUHM_DETAILED_MODEL == ON
  AnyFloat O_Extensor_Carpi_Radialis_Brevis_pos_1 = {0.03731, -0.3284, -0.0008345};
  AnyFloat O_Extensor_Carpi_Radialis_Brevis_pos_2 = {0.03856, -0.3323, -0.001414};
  AnyFloat O_Extensor_Carpi_Radialis_Brevis_pos_3 = {0.03741, -0.3356, -0.001454};
  AnyFloat O_Extensor_Carpi_Radialis_Brevis_pos_4 = {0.04082, -0.3364, -0.006169};
  AnyFloat O_Extensor_Carpi_Radialis_Brevis_pos_5 = {0.004066, -0.3207, -0.003643};
  AnyFloat O_Extensor_Carpi_Radialis_Brevis_pos_6 = {0.04098, -0.334, -0.004334};
  AnyFloat O_Extensor_Carpi_Radialis_Brevis_pos_7 = {0.03872, -0.3372, -0.003211};
  AnyFloat O_Extensor_Carpi_Radialis_Brevis_pos_8 = {0.03608, -0.3332, 0.000008248};
  AnyFloat O_Extensor_Carpi_Radialis_Brevis_pos_9 = {0.0385, -0.3387, -0.00448};
  #else
  AnyFloat O_Extensor_Carpi_Radialis_Brevis_pos_1 = {0.0395, -0.3340, -0.0030};
  #endif

  #if RUHM_DETAILED_MODEL == ON
  AnyFloat O_Extensor_Carpi_Radialis_Longus_pos_1 = {0.02998, -0.3485, 0.002403};
  AnyFloat O_Extensor_Carpi_Radialis_Longus_pos_2 = {0.02399, -0.3118, 0.002218};
  AnyFloat O_Extensor_Carpi_Radialis_Longus_pos_3 = {0.03512, -0.3504, 0.000265};
  AnyFloat O_Extensor_Carpi_Radialis_Longus_pos_4 = {0.03606, -0.344, -0.00003465};
  AnyFloat O_Extensor_Carpi_Radialis_Longus_pos_5 = {0.02872, -0.3207, 0.001567};
  AnyFloat O_Extensor_Carpi_Radialis_Longus_pos_6 = {0.03116, -0.3294, 0.001877};
  AnyFloat O_Extensor_Carpi_Radialis_Longus_pos_7 = {0.02211, -0.319, 0.002884};
  AnyFloat O_Extensor_Carpi_Radialis_Longus_pos_8 = {0.02851, -0.342, 0.002486};
  AnyFloat O_Extensor_Carpi_Radialis_Longus_pos_9 = {0.02907, -0.337, 0.002386};
  AnyFloat O_Extensor_Carpi_Radialis_Longus_pos_10 = {0.02595, -0.3323, 0.002577};
  AnyFloat O_Extensor_Carpi_Radialis_Longus_pos_11 = {0.02505, -0.3265, 0.002663};
  AnyFloat O_Extensor_Carpi_Radialis_Longus_pos_12 = {0.03405, -0.3382, 0.001134};
  #else
  AnyFloat O_Extensor_Carpi_Radialis_Longus_pos_1 = {0.028785, -0.33125, 0.0022};
  #endif

  #if RUHM_DETAILED_MODEL == ON
  AnyFloat O_Extensor_Carpi_Ulnaris_pos_1 = {0.02954, -0.3447, 0.0005925};
  AnyFloat O_Extensor_Carpi_Ulnaris_pos_2 = {0.02494, -0.3474, -0.000207};
  AnyFloat O_Extensor_Carpi_Ulnaris_pos_3 = {0.03318, -0.3405, 0.001709};
  AnyFloat O_Extensor_Carpi_Ulnaris_pos_4 = {0.0239, -0.3452, 0.001268};
  AnyFloat O_Extensor_Carpi_Ulnaris_pos_5 = {0.02159, -0.3493, -0.0002274};
  AnyFloat O_Extensor_Carpi_Ulnaris_pos_6 = {0.02792, -0.3421, 0.0025};
  #else
  AnyFloat O_Extensor_Carpi_Ulnaris_pos_1 = {0.027535, -0.3442, 0.00135465};
  #endif

  AnyFloat O_Extensor_Digiti_Minimi_Finger4_pos = {0.02615, -0.3411, -0.003214};

  AnyFloat O_Extensor_Digiti_Minimi_Finger5_pos = {0.02389, -0.341, -0.002115};

  #if RUHM_DETAILED_MODEL == ON
  AnyFloat O_Extensor_Digitorum_Finger2_pos_1 = {0.03434, -0.3404, -0.005229};
  AnyFloat O_Extensor_Digitorum_Finger2_pos_2 = {0.02891, -0.3419, -0.004937};
  AnyFloat O_Extensor_Digitorum_Finger2_pos_3 = {0.03235, -0.341, 0.005405};
  AnyFloat O_Extensor_Digitorum_Finger2_pos_4 = {0.03081, -0.3415, -0.00545};
  AnyFloat O_Extensor_Digitorum_Finger2_pos_5 = {0.03138, -0.3398, -0.00405};
  AnyFloat O_Extensor_Digitorum_Finger2_pos_6 = {0.03311, -0.339, -0.003921};
  AnyFloat O_Extensor_Digitorum_Finger2_pos_7 = {0.03587, -0.3376, -0.002112};
  AnyFloat O_Extensor_Digitorum_Finger2_pos_8 = {0.03344, -0.3381, -0.002801};
  AnyFloat O_Extensor_Digitorum_Finger2_pos_9 = {0.03703, -0.3401, -0.00497};
  AnyFloat O_Extensor_Digitorum_Finger2_pos_10 = {0.03487, -0.3391, -0.003738};
  #else
  AnyFloat O_Extensor_Digitorum_Finger2_pos_1 = {0.03268,-0.34,-0.004257};
  #endif

  #if RUHM_DETAILED_MODEL == ON
  AnyFloat O_Extensor_Digitorum_Finger3_pos_1 = {0.03029, -0.3372, -0.001896};
  AnyFloat O_Extensor_Digitorum_Finger3_pos_2 = {0.03313, -0.3351, 0.0001358};
  AnyFloat O_Extensor_Digitorum_Finger3_pos_3 = {0.03494, -0.3335, 0.0004221};
  AnyFloat O_Extensor_Digitorum_Finger3_pos_4 = {0.03497, -0.3465, -0.001096};
  AnyFloat O_Extensor_Digitorum_Finger3_pos_5 = {0.03565, -0.3454, -0.0004988};
  AnyFloat O_Extensor_Digitorum_Finger3_pos_6 = {0.0349, -0.3458, -0.0006279};
  AnyFloat O_Extensor_Digitorum_Finger3_pos_7 = {0.03311, -0.3462, -0.0006531};
  AnyFloat O_Extensor_Digitorum_Finger3_pos_8 = {0.03394, -0.3475, -0.002154};
  AnyFloat O_Extensor_Digitorum_Finger3_pos_9 = {0.02878, -0.3495, -0.0003053};
  AnyFloat O_Extensor_Digitorum_Finger3_pos_10 = {0.02878, -0.3495, -0.0003053};
  #else
  AnyFloat O_Extensor_Digitorum_Finger3_pos_1 = {0.03138, -0.34195, -0.0002446};
  #endif

  #if RUHM_DETAILED_MODEL == ON
  AnyFloat O_Flexor_Carpi_Radialis_pos_1 = {-0.01347, -0.3379, -0.01538};
  AnyFloat O_Flexor_Carpi_Radialis_pos_2 = {-0.008709, -0.335, -0.01418};
  AnyFloat O_Flexor_Carpi_Radialis_pos_3 = {-0.01168, -0.3412, -0.01762};
  AnyFloat O_Flexor_Carpi_Radialis_pos_4 = {-0.01484, -0.3363, -0.01335};
  AnyFloat O_Flexor_Carpi_Radialis_pos_5 = {-0.01073, -0.3383, -0.01758};
  AnyFloat O_Flexor_Carpi_Radialis_pos_6 = {-0.01142, -0.3355, -0.01583};
  AnyFloat O_Flexor_Carpi_Radialis_pos_7 = {-0.01585, -0.339, -0.01407};
  AnyFloat O_Flexor_Carpi_Radialis_pos_8 = {-0.01449, -0.3403, -0.01561};
  AnyFloat O_Flexor_Carpi_Radialis_pos_9 = {-0.01445, -0.3344, -0.0124};
  #else
  AnyFloat O_Flexor_Carpi_Radialis_pos_1 = {-0.01328, -0.3575, -0.015145};
  #endif

  #if RUHM_DETAILED_MODEL == ON
  AnyFloat O_Flexor_Carpi_Ulnaris_pos_1 = {-0.01726, -0.3379, -0.01224};
  AnyFloat O_Flexor_Carpi_Ulnaris_pos_2 = {-0.01711, -0.3346, -0.01986};
  AnyFloat O_Flexor_Carpi_Ulnaris_pos_3 = {-0.02195, -0.3393, -0.01905};
  AnyFloat O_Flexor_Carpi_Ulnaris_pos_4 = {-0.02027, -0.3361, -0.01784};
  AnyFloat O_Flexor_Carpi_Ulnaris_pos_5 = {-0.01947, -0.3378, -0.01016};
  AnyFloat O_Flexor_Carpi_Ulnaris_pos_6 = {-0.01935, -0.03499, -0.01184};
  AnyFloat O_Flexor_Carpi_Ulnaris_pos_7 = {-0.02191, -0.3408, -0.01044};
  #else
  AnyFloat O_Flexor_Carpi_Ulnaris_pos_1 = {-0.019175, -0.35745, -0.020235};
  #endif

  #if RUHM_DETAILED_MODEL == ON
  AnyFloat O_Flexor_Digitorum_Superficialis_Finger4_1 = {-0.01695, -0.3397, -0.02436};
  AnyFloat O_Flexor_Digitorum_Superficialis_Finger4_2 = {-0.01982, -0.3385, -0.02416};
  AnyFloat O_Flexor_Digitorum_Superficialis_Finger4_3 = {-0.01926, -0.3366, -0.02442};
  AnyFloat O_Flexor_Digitorum_Superficialis_Finger4_4 = {-0.01574, -0.3388, -0.02491};
  AnyFloat O_Flexor_Digitorum_Superficialis_Finger4_5 = {-0.01691, -0.3382, -0.02471};
  AnyFloat O_Flexor_Digitorum_Superficialis_Finger4_6 = {-0.0184, -0.3392, -0.02419};
  AnyFloat O_Flexor_Digitorum_Superficialis_Finger4_7 = {-0.01894, -0.341, -0.02356};
  AnyFloat O_Flexor_Digitorum_Superficialis_Finger4_8 = {-0.01934, -0.3399, -0.02386};
  AnyFloat O_Flexor_Digitorum_Superficialis_Finger4_9 = {-0.01796, -0.3406, -0.02386};
  #else
  AnyFloat O_Flexor_Digitorum_Superficialis_Finger4_1 = {-0.018445, -0.33425, -0.02415};
  #endif

  #if RUHM_DETAILED_MODEL == ON
  AnyFloat O_Flexor_Digitorum_Superficialis_Finger5_1 = {-0.02234, -0.3405, -0.02371};
  AnyFloat O_Flexor_Digitorum_Superficialis_Finger5_2 = {-0.02103, -0.3377, -0.02422};
  AnyFloat O_Flexor_Digitorum_Superficialis_Finger5_3 = {-0.02131, -0.3411, -0.02343};
  AnyFloat O_Flexor_Digitorum_Superficialis_Finger5_4 = {-0.02188, -0.3403, -0.02371};
  AnyFloat O_Flexor_Digitorum_Superficialis_Finger5_5 = {-0.0067, -0.3413, -0.02335};
  AnyFloat O_Flexor_Digitorum_Superficialis_Finger5_6 = {-0.02278, -0.3394, -0.02401};
  AnyFloat O_Flexor_Digitorum_Superficialis_Finger5_7 = {-0.02339, -0.3375, -0.02423};
  AnyFloat O_Flexor_Digitorum_Superficialis_Finger5_8 = {-0.02090, -0.3402, -0.02372};
  AnyFloat O_Flexor_Digitorum_Superficialis_Finger5_9 = {-0.02014, -0.341, -0.02347};
  #else
  AnyFloat O_Flexor_Digitorum_Superficialis_Finger5_1 = {-0.021675, -0.3693, -0.023885};
  #endif

  AnyFloat I_Pronator_Teres_Humerus_1 = {-0.01162, -0.3465, -0.0181};
  AnyFloat I_Pronator_Teres_Humerus_2 = {-0.009568, -0.3443, -0.01834};
  AnyFloat I_Pronator_Teres_Humerus_3 = {-0.01117, -0.3442, -0.0169};

#endif //_HAND_MODEL_RUHM

  // This file contains muscle attachment points for the humerus segment data from MAYO sub 2
  // The original coordinates have been transformed from global coordinates to the segment local
  // coordinate system
  AnyFloat O_Brachialis_1_pos                   = {-0.003424, -0.207198 , -0.012998}+correction0+OffSet;
  AnyFloat O_Brachialis_2_pos                   = {-0.004418, -0.243815 , -0.008691}+correction0+OffSet;

  AnyFloat Via_Triceps_LH_1_pos                   = {-0.009, -0.17 , 0.020}+correction+OffSet;
  AnyFloat Via_Triceps_LH_2_pos                   = {-0.015, -0.17 , 0.020}+correction+OffSet;

  AnyFloat O_Triceps_ME_1_pos                   = {-0.015238, -0.161544 , -0.001821}+OffSet;
  AnyFloat O_Triceps_ME_2_pos                   = {-0.014055, -0.256366 , 0.000249}+OffSet;

  AnyFloat O_Triceps_LA_1_pos                   = {-0.004730, -0.136631 , 0.003461}+correction+OffSet;
  AnyFloat O_Triceps_LA_2_pos                   = {0.001537, -0.249976 , 0.008110}+correction+OffSet;

  AnyFloat O_Brach_rad_1_pos                    = {0.006551, -0.256586 , 0.006249}+Correction+OffSet;
  AnyFloat O_Brach_rad_2_pos                    = {0.014044, -0.281510 , 0.007781}+Correction+OffSet;

  AnyFloat O_Anconeus_1_pos                     = {0.028771, -0.339539 , -0.000896}+correction1+OffSet;
  AnyFloat O_Anconeus_2_pos                     = {0.028771, -0.339539 , -0.000896}+correction1+OffSet;
  AnyFloat O_Pronator_teres_caput_humeral_1_pos = {-0.021174, -0.314668 , -0.005204}+correction2+OffSet;
  AnyFloat O_Pronator_teres_caput_humeral_2_pos = {-0.028689, -0.328224 , -0.003659}+correction2+OffSet;

  AnyFloat O_Supinator_humerus_part_1_pos       = {0.033931, -0.320036 , -0.002443}+correction3+OffSet;
  AnyFloat O_Supinator_humerus_part_2_pos       = {0.033931, -0.320036 , -0.002443}+correction3+OffSet;
  AnyFloat I_Cor_brach_1_pos                    = {-0.015079, -0.122245 , -0.012023}+OffSet;
  AnyFloat I_Cor_brach_2_pos                    = {-0.017158, -0.162619 , -0.008395}+OffSet;


  AnyFloat O_Extensor_Carpi_Ulnaris_pos         = {0.0313, -0.35 , 0.00};
  AnyFloat O_Extensor_Carpi_Radialis_Brevis_pos = O_Extensor_Carpi_Ulnaris_pos;

  AnyFloat O_Extensor_Carpi_Radialis_Longus_pos = {0.0313, -0.33 , 0.00};
  AnyFloat O_Flexor_Carpi_Ulnaris_pos           = {-0.038, -0.345 , 0.00};
  AnyFloat O_Flexor_Carpi_Radialis_pos          = {-0.038, -0.345 , 0.00};
#if BM_HAND_MODEL == _HAND_MODEL_RUHM_
  AnyFloat O_Palmaris_Longus_pos             = {-0.01852, -0.3639, -0.02439};
#else
  AnyFloat O_Palmaris_Longus_pos                = {-0.038, -0.345 , 0.00};
#endif

  AnyFloat O_Flexor_Digitorum_Superficialis_pos = {-0.038, -0.345 , 0.00};
  AnyFloat O_Extensor_Digitorum_pos             = {0.03, -0.33 , 0.00};
  AnyFloat O_Extensor_Digiti_Minimi_pos         = {0.03, -0.33 , 0.005};


  AnyFloat gh_rotated_pos = {0.0000000, 0.0000000, 0.0000000};
  AnyFloat gh_RotNode_pos = {0.0000000, 0.0000000, 0.0000000};
  AnyFloat fe_RotNode_pos = {0.0000000, 0.0000000, 0.0000000};
  AnyFloat collum_hum_p2_pos = {-0.009319000, -0.3589990, 0.008962000};
  AnyFloat collum_hum_p3_pos = {0.001379000, 0.02100100, 0.009119000};
};


AnyFolder Radius = {
  //begin: not used, but taken from NeutralPositionOnUlna
  AnyVec3 Radius_R = {0.110509, 0.020415, 0.280149};
  AnyVec3 Ulna_R = {0.098238, 0.059976, 0.261779};
  AnyMat33 Radius_Axes = {{-0.279448, -0.020684, -0.959938}, {0.956474, -0.093525, -0.276425}, {-0.084061, -0.995402, 0.045919}};
  AnyMat33 Ulna_Axes = {{0.020302, 0.279477, -0.959938}, {-0.232048, -0.932600, -0.276425}, {-0.972492, 0.228363, 0.045919}};
  //end: not used, but taken from NeutralPositionOnUlna

  AnyFloat sCoM_pos ={-0.43*.Ulna.Length,0,0};


  AnyFloat NeutralPositionOnUlna_pos = {0.04281200, 0.01483900, 0.0000000};
  AnyFloat NeutralPositionOnUlna_rot = {{-0.145873, -0.989303, -0.000001}, {0.989303, -0.145873, 0.000001}, {-0.000001, -0.000000, 1.000000}};


  AnyFloat us_pos = {0.02487800, 0.2704510, 0.0000000};
  AnyFloat ol_pos = {0.01966500, -0.005124000, 0.03300000};

  AnyFloat AnatomicalFrame_pos = {0.0000000, 0.0000000, 0.0000000};
  AnyFloat PointPS2_pos = {0.04500000, 0.0000000, 0.0000000};
  AnyFloat PS2Reac_pos = PointPS2_pos + {0.025,0,0}*RotMat(PointPS2_pos, PS_pos, rs_pos)';
  AnyFloat PointHumeroRadialJoint_pos = {0.034825784562340679, 0.00019172179329118557, 0.00057516537987355664};

  AnyFloat rs_pos = {-0.2366530, -0.04134900, 0.0000000};
  AnyFloat wj_pos = {-0.2350000, -0.01500000, 0.01000000};
  AnyFloat wj_rot = -15*pi/180;
  AnyFloat PS_pos = {-0.2203380, 0.005000000, 0.01500000};


  AnyFloat BicepsCyl_pos = {-0.019648-0.05, -0.006444-0.002, -0.002267+0.00};//{-0.06964800, -0.008444000, -0.002267000};
  AnyFloat BicepsCyl_P2_pos ={0.040000, 0.000000, 0.007000};//sRel+VZ*Length;
  AnyFloat BicepsCyl_P3_pos = BicepsCyl_pos+{0,0,0.01};//sRel-VX*Radius;

  AnyFloat PronatorTeresCyl_pos = {0.007470000, 0.007642000, -0.007487000};
  AnyFloat PronatorTeresCyl_P2_pos= {-0.137880, -0.028696, -0.000219}; // sRel+VZ*Length;
  AnyFloat PronatorTeresCyl_P3_pos= {0.007141, 0.007560, -0.014478}; //sRel+VX*Radius;


  AnyFloat SupinatorCyl_pos = {-0.1821030, -0.02722700, 0.005000000};
  AnyFloat SupinatorCyl_P2_pos = {0.0406227,-0.000, 0.008321};//sRel+VZ*Length;
  AnyFloat SupinatorCyl_P3_pos = {-0.182219,-0.027245, -0.002};//sRel+VX*Radius;
  //    == previous definition
  //    AnyVec3 P1 =sRel;
  //    AnyVec3 P2 =.Scale( {0.006227,-0.001842, 0.002321})*.Mirror;//sRel+VZ*Length;
  //    AnyVec3 P3 =.Scale({-0.132219,-0.023245, -0.000939})*.Mirror;//sRel+VX*Radius;
  //

  AnyFloat MedialExtensorCyl_pos = wj_pos + {0.005, 0.001000, 0.00000};
  AnyFloat MedialExtensorCyl_P3_pos = MedialExtensorCyl_pos + {0.0,0.0,0.0120};
  AnyFloat MedialExtensorCyl_P2_pos = MedialExtensorCyl_pos + {0.004, 0.025,0.0};

  AnyFloat WristFlexorCyl_pos = wj_pos + {0.007, 0, 0.00000};
  AnyFloat WristFlexorCyl_P3_pos = WristFlexorCyl_pos + {0.0,0.0,-0.0130};
  AnyFloat WristFlexorCyl_P2_pos = WristFlexorCyl_pos + {0.003, 0.025,0.0};

  AnyVec3 correction ={0,-0.005,0.00};

  AnyFloat I_Biceps_LH_pos                      = {-0.004634000, 0.01056600, -0.006213000};
  AnyFloat I_Biceps_SH_pos                      = {-0.004634000, 0.01056600, -0.006213000};
  AnyFloat I_Brach_rad_1_pos                    = {-0.2193890, -0.03859000, -0.002705000};
  AnyFloat I_Brach_rad_2_pos                    = {-0.2193890, -0.03859000, -0.002705000};
  AnyFloat I_Pronator_teres_caput_humeral_1_pos = {-0.09049500, -0.02641100, 0.0009360000};
  AnyFloat I_Pronator_teres_caput_humeral_2_pos = {-0.09049500, -0.02641100, 0.0009360000};
  AnyFloat I_Pronator_teres_caput_ulnare_1_pos  = {-0.09049500, -0.02641100, 0.0009360000};
  AnyFloat I_Supinator_humerus_part_1_pos       = {-0.028773, -0.006842, -0.007679}+correction;
  AnyFloat I_Supinator_humerus_part_2_pos       = {-0.070989, -0.018006, -0.000749}+correction;
  AnyFloat I_Supinator_ulna_part_1_pos          = {-0.028773, -0.006842, -0.007679}+correction;
  AnyFloat I_Supinator_ulna_part_2_pos          = {-0.070989, -0.018006, -0.000749}+correction;

  AnyFloat I_Pron_quadr_1_pos = {-0.1926390, -0.02953800, -0.005120000};          // corrected value
  AnyFloat I_Pron_quadr_2_pos = {-0.2143840, -0.02441400, -0.006305000};          // corrected value
  AnyFloat O_Extensor_Pollicis_Brevis_pos = {-0.1800000, -0.02000000, 0.01500000};// estimate
  AnyFloat Via_Extensor_Indicis_pos = {-0.2100000, -0.01200000, 0.01800000};
  AnyFloat Via_Extensor_Pollicis_Longus_pos = {-0.2230000, -0.03000000, 0.02500000};
  AnyFloat Via_Extensor_Pollicis_Brevis_pos = {-0.2230000, -0.03000000, 0.02500000};
  AnyFloat Via_Abductor_Pollicis_Longus_pos = {-0.2230000, -0.03000000, 0.02500000};
  AnyFloat Via_Flexor_Carpi_Ulnaris_pos = {-0.217000, 0.005000, -0.00300000};
#if BM_HAND_MODEL == _HAND_MODEL_RUHM_
  AnyFloat Via_Flexor_Carpi_Radialis_pos = {-0.2230000, -0.02000000, -0.005000000};
#else
  AnyFloat Via_Flexor_Carpi_Radialis_pos = {-0.2180000, -0.02000000, -0.005000000};
#endif
  AnyFloat Via_Extensor_Carpi_Ulnaris_pos = {-0.212, 0.01200, 0.01900000};
  AnyFloat O_Flexor_Pollicis_Longus_pos = {-0.1000000, -0.01500000, -0.01000000};
  AnyFloat p1_pos = {0.0000000, 0.0000000, 0.0000000};
  AnyFloat p2_pos = {-0.2000000, -0.03000000, 0.01100000};
  AnyFloat p3_pos = {0.0000000, 0.0000000, 0.01400000};

  AnyFloat RadiusMuscleCyl_pos = {0.0000000, 0.0000000, 0.0000000};
  AnyFloat RadiusMuscleCyl_P3_pos =RadiusMuscleCyl_pos+ {0.0,0.0,0.014};
  AnyFloat RadiusMuscleCyl_P2_pos =RadiusMuscleCyl_pos+ {-0.2, -0.03,0.011};


  AnyFloat O_Flexor_Digitorum_Superficialis_pos = {-0.07000000, -0.02641100, -0.005000000};
#if BM_HAND_MODEL == _HAND_MODEL_RUHM_
  //AnyFloat Via_Extensor_Carpi_Radialis_Brevis_pos = {-0.2180000, -0.02800000, 0.02000000};
  AnyFloat Via_Extensor_Carpi_Radialis_Longus_pos = {-0.2230000, -0.02800000, 0.02500000};
#else
  AnyFloat Via_Extensor_Carpi_Radialis_Brevis_pos = {-0.2180000, -0.03000000, 0.02000000};
  AnyFloat Via_Extensor_Carpi_Radialis_Longus_pos = {-0.2230000, -0.03000000, 0.02500000};
#endif
  AnyFloat Via_Flexor_Digitorum_Superficialis_Digit2_pos = {-0.220000, -0.02800000, -0.005000000};
  AnyFloat Via_Flexor_Digitorum_Superficialis_Digit3_pos = {-0.2200000, -0.02400000, -0.005000000};
  AnyFloat Via_Flexor_Digitorum_Superficialis_Digit4_pos = {-0.2200000, -0.02000000, -0.006000000};
  AnyFloat Via_Flexor_Digitorum_Superficialis_Digit5_pos = {-0.2270000, -0.01600000, -0.006000000};
  AnyFloat Via_Flexor_Digitorum_Profundus_Digit2_pos = {-0.2200000, -0.02000000, -0.005000000};
  AnyFloat Via_Flexor_Digitorum_Profundus_Digit3_pos = {-0.2200000, -0.01800000, -0.005000000};
  AnyFloat Via_Flexor_Digitorum_Profundus_Digit4_pos = {-0.2200000, -0.01600000, -0.005000000};
  AnyFloat Via_Flexor_Digitorum_Profundus_Digit5_pos = {-0.2200000, -0.01400000, -0.005000000};
#if BM_HAND_MODEL == _HAND_MODEL_RUHM_
  AnyFloat Via_Extensor_Digitorum_Digit2_pos = {-0.2160000, -0.02800000, 0.02500000};
#else
  AnyFloat Via_Extensor_Digitorum_Digit2_pos = {-0.2160000, -0.03000000, 0.02500000};
#endif
  AnyFloat Via_Extensor_Digitorum_Digit3_pos = {-0.2160000, -0.02800000, 0.02500000};
  AnyFloat Via_Extensor_Digitorum_Digit4_pos = {-0.2160000, -0.02600000, 0.02500000};
  AnyFloat Via_Extensor_Digitorum_Digit5_pos = {-0.2160000, -0.02400000, 0.02500000};
  AnyFloat Via_Extensor_Digiti_Minimi_pos = {-0.2160000, -0.01500000, 0.02500000}; // estimate
  AnyFloat Via_Flexor_Pollicis_Longus_pos = {-0.2160000, -0.02500000, -0.01000000};// estimate
  AnyFloat Via_Palmaris_Longus_pos = {-0.2100000, -0.01000000, -0.006000000};      // estimate
  AnyFloat PointPS2_PointPS2Rot_pos = {0.0000000, 0.0000000, 0.0000000};
  AnyFloat PointPS2_RotNode_pos = {0.0000000, 0.0000000, 0.0000000};
  AnyFloat PointPS2_PointPS2Rot_PS2Reac_pos = {0.02500000, 0.0000000, 0.0000000};
  AnyFloat wj_RotNode_pos = {0.0000000, 0.0000000, 0.0000000};

#if BM_HAND_MODEL == _HAND_MODEL_RUHM_

  #if RUHM_DETAILED_MODEL == ON
  AnyFloat Via_Abductor_Pollicis_Longus_pos_1 = {-0.08611, 0.01184, 0.009748};
  AnyFloat Via_Abductor_Pollicis_Longus_pos_2 = {-0.08212, 0.0007379, 0.008514};
  AnyFloat Via_Abductor_Pollicis_Longus_pos_3 = {-0.08169, -0.00004634, 0.006077};
  AnyFloat Via_Abductor_Pollicis_Longus_pos_4 = {-0.08119, -0.001955, 0.007811};
  AnyFloat Via_Abductor_Pollicis_Longus_pos_5 = {-0.08054, -0.00382, 0.007384};
  AnyFloat Via_Abductor_Pollicis_Longus_pos_6 = {-0.08304, 0.00318, 0.009602};
  AnyFloat Via_Abductor_Pollicis_Longus_pos_7 = {-0.08444, 0.007321, 0.008117};
  AnyFloat Via_Abductor_Pollicis_Longus_pos_8 = {-0.08291, 0.003271, 0.006915};
  #else
  AnyFloat Via_Abductor_Pollicis_Longus_pos_1 = {-0.0828, 0.0091, 0.0052};
  #endif


  #if RUHM_DETAILED_MODEL == ON
  AnyFloat O_Abductor_Pollicis_Longus_pos_3 = {-0.08071, -0.001144, 0.003914};
  AnyFloat O_Abductor_Pollicis_Longus_pos_4 = {-0.06812, 0.00148, 0.004362};
  AnyFloat O_Abductor_Pollicis_Longus_pos_5 = {-0.05435, 0.001351, 0.00579};
  AnyFloat O_Abductor_Pollicis_Longus_pos_8 = {-0.09277, -0.002143, 0.00332};
  #else
  AnyFloat O_Abductor_Pollicis_Longus_pos_1 = {-0.0678,  0.0059, 0.0044};
  #endif

  AnyFloat I_Brachioradialis_pos_1 = {-0.2257, -0.003289, -0.02715};
  AnyFloat I_Brachioradialis_pos_2 = {-0.2259, -0.001927, -0.02667};
  AnyFloat I_Brachioradialis_pos_3 = {-0.2277, -0.004271, -0.02712};
  AnyFloat I_Brachioradialis_pos_4 = {-0.2297, -0.003372, -0.02651};
  AnyFloat I_Brachioradialis_pos_5 = {-0.2273, -0.002479, -0.02695};

  AnyFloat Via_Brachioradialis_pos_1 = {-0.003964, -0.01095, -0.01268};
  AnyFloat Via_Brachioradialis_pos_2 = {-0.003928, -0.06549, -0.01346};
  AnyFloat Via_Brachioradialis_pos_3 = {-0.003704, -0.0135, -0.08413};
  AnyFloat Via_Brachioradialis_pos_4 = {-0.00358, -0.01339, -0.05308};
  AnyFloat Via_Brachioradialis_pos_5 = {-0.003706, -0.09013, -0.08336};

  #if RUHM_DETAILED_MODEL == ON
  AnyFloat Via_Extensor_Carpi_Radialis_Brevis_pos_1 = {-0.03287, -0.01072, 0.01992};
  AnyFloat Via_Extensor_Carpi_Radialis_Brevis_pos_2 = {-0.03333, -0.01075, 0.01572};
  AnyFloat Via_Extensor_Carpi_Radialis_Brevis_pos_3 = {-0.03343, -0.01487, 0.01355};
  AnyFloat Via_Extensor_Carpi_Radialis_Brevis_pos_4 = {-0.03458, -0.01717, 0.008646};
  AnyFloat Via_Extensor_Carpi_Radialis_Brevis_pos_5 = {-0.03419, -0.01918, 0.01361};
  AnyFloat Via_Extensor_Carpi_Radialis_Brevis_pos_6 = {-0.0338, -0.01411, 0.01337};
  AnyFloat Via_Extensor_Carpi_Radialis_Brevis_pos_7 = {-0.03406, -0.01203, 0.01021};
  AnyFloat Via_Extensor_Carpi_Radialis_Brevis_pos_8 = {-0.03287, -0.01413, 0.01752};
  AnyFloat Via_Extensor_Carpi_Radialis_Brevis_pos_9 = {-0.03345, -0.01485, 0.01724};
  #else
  AnyFloat Via_Extensor_Carpi_Radialis_Brevis_pos_1 = {-0.03369, -0.013246, 0.01403};
  #endif

  AnyFloat Via_Extensor_Carpi_Radialis_Brevis_pos = {-0.2000000, -0.02800000, 0.02200000};

  #if RUHM_DETAILED_MODEL == ON
  AnyFloat Via_Extensor_Carpi_Radialis_Longus_pos_1 = {-0.003752, -0.01868, 0.01262};
  AnyFloat Via_Extensor_Carpi_Radialis_Longus_pos_2 = {-0.004089, -0.02050, 0.003705};
  AnyFloat Via_Extensor_Carpi_Radialis_Longus_pos_3 = {-0.003499, -0.02086, 0.01517};
  AnyFloat Via_Extensor_Carpi_Radialis_Longus_pos_4 = {-0.003415, -0.02314, 0.01619};
  AnyFloat Via_Extensor_Carpi_Radialis_Longus_pos_5 = {-0.003797, -0.02235, 0.007443};
  AnyFloat Via_Extensor_Carpi_Radialis_Longus_pos_6 = {-0.003632, -0.02243, 0.01084};
  AnyFloat Via_Extensor_Carpi_Radialis_Longus_pos_7 = {-0.00453, -0.01617, 0.00008801};
  AnyFloat Via_Extensor_Carpi_Radialis_Longus_pos_8 = {-0.003675, -0.02027, 0.01334};
  AnyFloat Via_Extensor_Carpi_Radialis_Longus_pos_9 = {-0.003569, -0.02194, 0.0145};
  AnyFloat Via_Extensor_Carpi_Radialis_Longus_pos_10 = {-0.003996, -0.01731, 0.009641};
  AnyFloat Via_Extensor_Carpi_Radialis_Longus_pos_11 = {-0.004235, -0.01511, 0.00526};
  AnyFloat Via_Extensor_Carpi_Radialis_Longus_pos_12 = {-0.00349, -0.02338, 0.014 };
  #else
  AnyFloat Via_Extensor_Carpi_Radialis_Longus_pos_1 = {0.0002695, -0.01873, 0.0065745};
  #endif

  #if RUHM_DETAILED_MODEL == ON
  AnyFloat Via1_Extensor_Digitorum_Finger2_pos_1 = {-0.08873, -0.008911, 0.01774};
  AnyFloat Via1_Extensor_Digitorum_Finger2_pos_2 = {-0.08962, -0.002993, 0.01251};
  AnyFloat Via1_Extensor_Digitorum_Finger2_pos_3 = {-0.08916, -0.01233, 0.01575};
  AnyFloat Via1_Extensor_Digitorum_Finger2_pos_4 = {-0.08943, -0.009897, 0.01403};
  AnyFloat Via1_Extensor_Digitorum_Finger2_pos_5 = {-0.08972, -0.008018, 0.01221};
  AnyFloat Via1_Extensor_Digitorum_Finger2_pos_6 = {-0.09, -0.01189, 0.01102};
  AnyFloat Via1_Extensor_Digitorum_Finger2_pos_7 = {-0.08887, -0.01196, 0.01727};
  AnyFloat Via1_Extensor_Digitorum_Finger2_pos_8 = {-0.08877, -0.005133, 0.01774};
  AnyFloat Via1_Extensor_Digitorum_Finger2_pos_9 = {-0.08939, -0.01313, 0.01297};
  AnyFloat Via1_Extensor_Digitorum_Finger2_pos_10 = {-0.08906, -0.041, 0.01686};
  #else
  AnyFloat Via1_Extensor_Digitorum_Finger2_pos_1 = {-0.089345, -0.0080965, 0.014285};
  #endif

  #if RUHM_DETAILED_MODEL == ON
  AnyFloat Via1_Extensor_Digitorum_Finger3_pos_1 = {-0.08888, 0.007289, 0.01561};
  AnyFloat Via1_Extensor_Digitorum_Finger3_pos_2 = {-0.08823, 0.008924, 0.01926};
  AnyFloat Via1_Extensor_Digitorum_Finger3_pos_3 = {-0.08771, 0.007904, 0.02257};
  AnyFloat Via1_Extensor_Digitorum_Finger3_pos_4 = {-0.08856, -0.001605, 0.01858};
  AnyFloat Via1_Extensor_Digitorum_Finger3_pos_5 = {-0.0879, 0.002775, 0.02152};
  AnyFloat Via1_Extensor_Digitorum_Finger3_pos_6 = {-0.08944, -0.0002341, 0.01323};
  AnyFloat Via1_Extensor_Digitorum_Finger3_pos_7 = {-0.0884, 0.001956, 0.01619};
  AnyFloat Via1_Extensor_Digitorum_Finger3_pos_8 = {-0.08842, 0.005494, 0.01833};
  AnyFloat Via1_Extensor_Digitorum_Finger3_pos_9 = {-0.08948, 0.002407, 0.0173};
  AnyFloat Via1_Extensor_Digitorum_Finger3_pos_10 = {-0.08926, 0.005101, 0.01385};
  #else
  AnyFloat Via1_Extensor_Digitorum_Finger3_pos_1 = {-0.088365, 0.0040165, 0.018895};
  #endif

  #if RUHM_DETAILED_MODEL == ON
  AnyFloat Via1_Extensor_Indicis_pos_1 = {-0.2098, -0.00881, 0.023815};
  AnyFloat Via1_Extensor_Indicis_pos_2 = {-0.2098, -0.01172, 0.023815};
  AnyFloat Via1_Extensor_Indicis_pos_3 = {-0.2098, -0.01038, 0.023815};
  AnyFloat Via1_Extensor_Indicis_pos_4 = {-0.2098, -0.01075, 0.023815};
  AnyFloat Via1_Extensor_Indicis_pos_5 = {-0.2098, -0.004192, 0.023815};
  AnyFloat Via1_Extensor_Indicis_pos_6 = {-0.2098, -0.005615, 0.023815};
  #else
  AnyFloat Via1_Extensor_Indicis_pos_1 = {-0.21965, -0.0078285, 0.023815};
  #endif

  #if RUHM_DETAILED_MODEL == ON
  AnyFloat O_Extensor_Pollicis_Brevis_1 = {-0.1676, 0.002166, -0.0001964};
  AnyFloat O_Extensor_Pollicis_Brevis_2 = {-0.1538, -0.00004835, 0.00005237};
  #else
  AnyFloat O_Extensor_Pollicis_Brevis_1 = {-0.1607, 0.001058825, -0.000072015};
  #endif

  #if RUHM_DETAILED_MODEL == ON
  AnyFloat Via_Extensor_Pollicis_Brevis_1 = {-0.1732, 0.003512, 0.001932};
  AnyFloat Via_Extensor_Pollicis_Brevis_2 = {-0.1722, -0.00009611, 0.002194};
  #else
  AnyFloat Via_Extensor_Pollicis_Brevis_1 = {-0.1727, 0.001707945, 0.002063};
  #endif

  #if RUHM_DETAILED_MODEL == ON
  AnyFloat O_Flexor_Digitorum_Superficialis_Finger2_1 = {-0.06959, -0.004553, -0.005018};
  AnyFloat O_Flexor_Digitorum_Superficialis_Finger2_2 = {-0.04323, -0.0008069, -0.003192};
  AnyFloat O_Flexor_Digitorum_Superficialis_Finger2_3 = {-0.04927, -0.001713, -0.003902};
  AnyFloat O_Flexor_Digitorum_Superficialis_Finger2_4 = {-0.06845, -0.003305, -0.004607};
  AnyFloat O_Flexor_Digitorum_Superficialis_Finger2_5 = {-0.05455, -0.003588, -0.002756};
  AnyFloat O_Flexor_Digitorum_Superficialis_Finger2_6 = {-0.06631, -0.002561, -0.004342};
  AnyFloat O_Flexor_Digitorum_Superficialis_Finger2_7 = {-0.06604, -0.004825, -0.005091};
  AnyFloat O_Flexor_Digitorum_Superficialis_Finger2_8 = {-0.0624, -0.0027, -0.004708};
  AnyFloat O_Flexor_Digitorum_Superficialis_Finger2_9 = {-0.05824, -0.003013, -0.004852};
  #else
  AnyFloat O_Flexor_Digitorum_Superficialis_Finger2_1 = {-0.054335, -0.0021771, -0.004165};
  #endif

  #if RUHM_DETAILED_MODEL == ON
  AnyFloat O_Flexor_Digitorum_Superficialis_Finger3_1 = {-0.0396, -0.0001083, -0.002698};
  AnyFloat O_Flexor_Digitorum_Superficialis_Finger3_2 = {-0.01702, 0.004796, -0.002118};
  AnyFloat O_Flexor_Digitorum_Superficialis_Finger3_3 = {-0.03422, -0.0006297, -0.002955};
  AnyFloat O_Flexor_Digitorum_Superficialis_Finger3_4 = {-0.02199, 0.004777, -0.000863};
  AnyFloat O_Flexor_Digitorum_Superficialis_Finger3_5 = {-0.02751, 0.003405, -0.0005662};
  AnyFloat O_Flexor_Digitorum_Superficialis_Finger3_6 = {-0.03349, 0.001701, -0.001429};
  AnyFloat O_Flexor_Digitorum_Superficialis_Finger3_7 = {-0.02366, 0.001218, -0.002824};
  AnyFloat O_Flexor_Digitorum_Superficialis_Finger3_8 = {-0.03718, 0.0003624, -0.002394};
  AnyFloat O_Flexor_Digitorum_Superficialis_Finger3_9 = {-0.0294, 0.0002461, -0.002859 };
  #else
  AnyFloat O_Flexor_Digitorum_Superficialis_Finger3_1 = {-0.02755, 0.002405, -0.0020765};
  #endif

  #if RUHM_DETAILED_MODEL == ON
  AnyFloat Via_Flexor_Digitorum_Superficialis_Finger2_1 = {-0.0735, 0.001057, -0.008597};
  AnyFloat Via_Flexor_Digitorum_Superficialis_Finger2_2 = {-0.07479, 0.00968, -0.01581};
  AnyFloat Via_Flexor_Digitorum_Superficialis_Finger2_3 = {-0.07377, 0.009506, -0.0121};
  AnyFloat Via_Flexor_Digitorum_Superficialis_Finger2_4 = {-0.07384, 0.003669, -0.006594};
  AnyFloat Via_Flexor_Digitorum_Superficialis_Finger2_5 = {-0.07339, 0.007858, -0.008816};
  AnyFloat Via_Flexor_Digitorum_Superficialis_Finger2_6 = {-0.07328, 0.003265, -0.01222};
  AnyFloat Via_Flexor_Digitorum_Superficialis_Finger2_7 = {-0.07325, 0.00187, -0.01296};
  AnyFloat Via_Flexor_Digitorum_Superficialis_Finger2_8 = {-0.07364, 0.006588, -0.0123};
  AnyFloat Via_Flexor_Digitorum_Superficialis_Finger2_9 = {-0.07389, 0.005302, -0.0151 };
  #else
  AnyFloat Via_Flexor_Digitorum_Superficialis_Finger2_1  = {-0.07378, 0.0054555, -0.011604};
  #endif

  AnyFloat movement = {0,-0.01,0};
  #if RUHM_DETAILED_MODEL == ON
  AnyFloat O_Flexor_Pollicis_Longus_1 = {-0.08966, 0.001639, -0.004372} + movement;
  AnyFloat O_Flexor_Pollicis_Longus_2 = {-0.07792, 0.00136, -0.002982} + movement;
  AnyFloat O_Flexor_Pollicis_Longus_3 = {-0.09966, -0.002899, -0.006679} + movement;
  AnyFloat O_Flexor_Pollicis_Longus_4 = {-0.1107, -0.002172, -0.007185} + movement;
  AnyFloat O_Flexor_Pollicis_Longus_5 = {-0.1152, 0.0041, -0.00473} + movement;
  AnyFloat O_Flexor_Pollicis_Longus_6 = {-0.1018, 0.0043, -0.004417} + movement;
  AnyFloat O_Flexor_Pollicis_Longus_7 = {-0.1261, 0.006159, -0.004307} + movement;
  AnyFloat O_Flexor_Pollicis_Longus_8 = {-0.125, 0.002073, -0.006501} + movement;
  AnyFloat O_Flexor_Pollicis_Longus_9 = {-0.1332, 0.003809, -0.005657} + movement;
  AnyFloat O_Flexor_Pollicis_Longus_10 = {-0.04902, 0.003516, 0.0006592} + movement;
  AnyFloat O_Flexor_Pollicis_Longus_11 = {-0.1302, -0.0023, -0.00941} + movement;
  AnyFloat O_Flexor_Pollicis_Longus_12 = {-0.1107, -0.002172, -0.007185} + movement;
  AnyFloat O_Flexor_Pollicis_Longus_13 = {-0.06455, 0.003166, -0.0007091} + movement;
  #else
  AnyFloat O_Flexor_Pollicis_Longus_1 = {-0.0916, -0.0018, -0.0111} + movement;
  #endif


  AnyFloat move = {-0.03,-0.02,0};

  //AnyFloat Via_Flexor_Pollicis_Longus_1 = {-0.1186, 0.006661, -0.01527} + move;
  //AnyFloat Via_Flexor_Pollicis_Longus_2 = {-0.118, 0.01118, -0.01335} + move;
  //New changed by loopluc for momentarmstudy:
//  AnyFloat Via_Flexor_Pollicis_Longus_1 = {-0.152, 0.006661, -0.0105} + move;
//  AnyFloat Via_Flexor_Pollicis_Longus_2 = {-0.152, 0.01118, -0.0102} + move;

  #if RUHM_DETAILED_MODEL == ON
  AnyFloat Via_Flexor_Pollicis_Longus_1 = {-0.1186, 0.006661, -0.01527} + move;
  AnyFloat Via_Flexor_Pollicis_Longus_2 = {-0.118, 0.01118, -0.01335} + move;
  AnyFloat Via_Flexor_Pollicis_Longus_3 = {-0.1193, 0.001391, -0.01673} + move;
  AnyFloat Via_Flexor_Pollicis_Longus_4 = {-0.1195, -0.001698, -0.01117} + move;
  AnyFloat Via_Flexor_Pollicis_Longus_5 = {-0.1174, 0.005872, -0.00553} + move;
  AnyFloat Via_Flexor_Pollicis_Longus_6 = {-0.1184, 0.008028, -0.007488} + move;
  AnyFloat Via_Flexor_Pollicis_Longus_7 = {-0.1183, 0.00528, -0.008034} + move;
  AnyFloat Via_Flexor_Pollicis_Longus_8 = {-0.1193, 0.003133, -0.01263} + move;
  AnyFloat Via_Flexor_Pollicis_Longus_9 = {-0.1184, 0.007829, -0.01079} + move;
  AnyFloat Via_Flexor_Pollicis_Longus_10 = {-0.1176, 0.01351, -0.01079} + move;
  AnyFloat Via_Flexor_Pollicis_Longus_11 = {-0.1193, -0.004464, -0.01523} + move;
  AnyFloat Via_Flexor_Pollicis_Longus_12 = {-0.1188, 0.002101, -0.008546} + move;
  AnyFloat Via_Flexor_Pollicis_Longus_13 = {-0.1176, 0.01126, -0.008298} + move;
  #else
  AnyFloat Via_Flexor_Pollicis_Longus_1 = {-0.1488, -0.0121, -0.0126} ;
  #endif

  AnyFloat O_Pronator_Quadratus_1 = {-0.1978, 0.0008688, -0.01839};
  AnyFloat O_Pronator_Quadratus_2 = {-0.2153, 0.003867, -0.02524};
  AnyFloat O_Pronator_Quadratus_3 = {-0.1826, -0.001036, -0.01544};
  AnyFloat O_Pronator_Quadratus_4 = {-0.1888, 0.00184, -0.01522};
  AnyFloat O_Pronator_Quadratus_5 = {-0.1902, -0.0009049, -0.01726};
  AnyFloat O_Pronator_Quadratus_6 = {-0.206, 0.002053, -0.02173};

  AnyFloat Via_Pronator_Quadratus_1 = {-0.2096, 0.01354, -0.01678};
  AnyFloat Via_Pronator_Quadratus_2 = {-0.2202, 0.01447, -0.01774};
  AnyFloat Via_Pronator_Quadratus_3 = {-0.1829, 0.01343, -0.01748};
  AnyFloat Via_Pronator_Quadratus_4 = {-0.1943, 0.0142, -0.0182};
  AnyFloat Via_Pronator_Quadratus_5 = {-0.2033, 0.01374, -0.01726};
  AnyFloat Via_Pronator_Quadratus_6 = {-0.2156, 0.01437, -0.01775};

  AnyFloat O_Pronator_Teres_Humerus_1 = {-0.1134, -0.01256, -0.01498};
  AnyFloat O_Pronator_Teres_Humerus_2 = {-0.1091, -0.01352, -0.01431};
  AnyFloat O_Pronator_Teres_Humerus_3 = {-0.118, -0.01317, -0.01556};

  AnyFloat Via_Pronator_Teres_Humerus_1 = {-0.05395, 0.005969, -0.006162};
  AnyFloat Via_Pronator_Teres_Humerus_2 = {-0.0523, 0.002517, -0.004662};
  AnyFloat Via_Pronator_Teres_Humerus_3 = {-0.05479, 0.007351, -0.002209};

  AnyFloat O_Pronator_Teres_Ulna_1 = {-0.1298, -0.001331, -0.01706};
  AnyFloat O_Pronator_Teres_Ulna_2 = {-0.257, -0.01325, -0.01655};
  AnyFloat O_Pronator_Teres_Ulna_3 = {-0.1218, -0.01382, -0.01592};

#endif //_HAND_MODEL_RUHM_
};

AnyFolder Ulna = {
  //For the forearm the data comes from MAYO sub2.
  AnyVar Length = ((us_pos[1]-ol_pos[1])^2)^0.5; // Find the length using bonylandmark x coordinates!
  AnyFloat sCoM_pos={0,0.43*Length,0};

  AnyFloat ScalingNode_pos = {0.0000000, 0.0000000, 0.0000000};
  AnyFloat fe_pos = {0.0000000, 0.008000000, 0.0000000};
  AnyFloat ps2_pos = {-0.01500000, 0.0000000, 0.005000000};

  AnyFloat ps2_rot =RotMat(ps2_pos,us_pos,ol_pos)*RotMat(pi,y)*RotMat(pi/2,z);
  AnyFloat ps2Reac_pos = ps2_pos + {0.00000, 0.0250000, 0.0000000}*ps2_rot';

  AnyFloat ps2_usRot_pos =  ps2_pos + ({0.0, vnorm(us_pos-ps2_pos),0.0} + {0.0,-0.008,0.0})*ps2_rot';
  //      sRel = {0.00000, vnorm(..us.sRel-.sRel), 0.000000} + ..Scale({0, -0.008, 0}); // TODO

  AnyFloat us_pos = {0.02487800, 0.2704510, 0.0000000};
  AnyFloat ol_pos = {0.01966500, -0.005124000, 0.03300000};
  AnyFloat ps_pos = {-0.01006300, 0.04506600, -0.002620000};

  AnyFloat oleacranon_Cyl_Point2_pos = {0.008231, 0.008, 0.0290396-0.05};
  AnyFloat oleacranon_Cyl_Point1_pos = {0.008231, 0.019+0.0115, 0.025396-0.019};

  AnyFloat length_ratio = 0.14/(oleacranon_p[1][0]-oleacranon_p[0][0]);
  AnyMatrix oleacranon_p = {
//   {-0.065, 0.007 , 0.003},
//   {0.085,  0.007,  0.003},
   {-0.025048656441208822, 0.007, 0.003},
   {0.025883420652587398, 0.007, 0.003},
   I_Triceps_LH_1_pos,
   oleacranon_Cyl_Point1_pos,
   oleacranon_Cyl_Point2_pos
  };

  AnyFloat oleacranon_pos = {-0.06500000, 0.005386209, 0.004120444};
  AnyFloat O_Pron_quadr_1_pos = {0.016303, 0.215608, -0.005749} +{0.013,0.005,0.003};  //Corrected value
  AnyFloat O_Pron_quadr_2_pos = {0.019230, 0.249767, -0.006490}+{0.01,0.005,0.003};    //Corrected value

  AnyVec3 correction ={0.0,0.0,-0.00};
  AnyVec3 correction0 ={0.0,0.0,-0.01};
  AnyVec3 correction1 ={0.015,0.0,0.005};
  AnyVec3 correction2 ={-0.005,0.0,0.008};


  AnyFloat O_Pronator_teres_caput_ulnare_1_pos = {0.039301, 0.014662, 0.001805}+correction2;

  AnyFloat O_Supinator_ulna_part_1_pos = {-0.012788, 0.033349, 0.010340}+correction1;
  AnyFloat O_Supinator_ulna_part_2_pos = {-0.003613, 0.059799, 0.016045}+correction1;
  AnyFloat I_Brachialis_1_pos = {0.017098,   0.038909, 0.007278}+correction0;
  AnyFloat I_Brachialis_2_pos = {0.017098,   0.038909, 0.007278}+correction0;
  AnyFloat I_Triceps_LH_1_pos = {0.017540,  -0.007721, 0.025663}+correction ;
  AnyFloat I_Triceps_LH_2_pos = {0.017540,  -0.007721, 0.025663}+correction ;
  AnyFloat I_Anconeus_1_pos   = {0.008231,   0.027393, 0.031396};
  AnyFloat I_Anconeus_2_pos   = {0.006305,   0.057521, 0.029827};
  AnyFloat I_Triceps_ME_1_pos = ({0.017540, -0.007721, 0.025663}+correction);
  AnyFloat I_Triceps_ME_2_pos = ({0.017540, -0.007721, 0.025663}+correction);
  AnyFloat I_Triceps_LA_1_pos = ({0.017540, -0.007721, 0.025663}+correction);
  AnyFloat I_Triceps_LA_2_pos = ({0.017540, -0.007721, 0.025663}+correction);

  AnyFloat O_Extensor_Indicis_pos = {0.02200000, 0.2000000, 0.0000000};                         //estimate
  AnyFloat O_Extensor_Pollicis_Longus_pos = {0.01500000, 0.1500000, 0.01000000};                //estimate
  AnyFloat O_Abductor_Pollicis_Longus_pos = {0.008000000, 0.1000000, 0.01000000};               //estimate

  #if BM_HAND_MODEL == _HAND_MODEL_RUHM_
  #if RUHM_DETAILED_MODEL == ON
  AnyFloat O_Abductor_Pollicis_Longus_pos_1 = {0.001698, 0.1001, 0.010701};
  AnyFloat O_Abductor_Pollicis_Longus_pos_2 = {0.002222, 0.07191, 0.01382};
  AnyFloat O_Abductor_Pollicis_Longus_pos_6 = {0.000913, 0.0867, 0.015108};
  AnyFloat O_Abductor_Pollicis_Longus_pos_7 = {0.004094, 0.0609, 0.01733};
  #endif
  #endif

  AnyFloat Via1_Flexor_Carpi_Ulnaris_pos = {0.03400000, 0.1600000, -0.005000000};               //estimate
  AnyFloat Via2_Flexor_Carpi_Ulnaris_pos = {0.03000000, 0.2450000, -0.01000000};                //estimate
  AnyFloat Via1_Extensor_Carpi_Ulnaris_pos = {0.02000000, 0.1000000, 0.02000000};               //estimate
  AnyFloat Via2_Extensor_Carpi_Ulnaris_pos = {0.02200000, 0.2400000, 0.008000000};              //estimate
  AnyFloat O_Flexor_Digitorum_Superficialis_pos = {0.03000000, 0.02000000, -0.005000000};       //estimate
  AnyFloat O_Flexor_Digitorum_Profundus_pos = {0.01300000, 0.07000000, 0.0000000};

  AnyFloat UlnaMuscleCyl_pos = {0.02000000, 0.05000000, 0.01000000};
  AnyFloat UlnaMuscleCyl_P3_pos =UlnaMuscleCyl_pos+ {0.0,0.0,0.017};
  AnyFloat UlnaMuscleCyl_P2_pos =UlnaMuscleCyl_pos+ {-0.007, 0.21,-0.007};


  AnyFloat fe_RotNode_pos = {0.0000000, 0.0000000, 0.0000000};
  AnyFloat ps2_RotNode_pos = {0.0000000, 0.0000000, 0.0000000};
#if BM_HAND_MODEL == _HAND_MODEL_RUHM_
  #if RUHM_DETAILED_MODEL == ON
  AnyFloat Via_Extensor_Carpi_Ulnaris_pos_1 = {-0.004112, 0.1087, 0.001136};
  AnyFloat Via_Extensor_Carpi_Ulnaris_pos_2 = {-0.0006581, 0.1089, 0.001565};
  AnyFloat Via_Extensor_Carpi_Ulnaris_pos_3 = {-0.005717, 0.1096, 0.002202};
  AnyFloat Via_Extensor_Carpi_Ulnaris_pos_4 = {0.001617, 0.1094, 0.003879};
  AnyFloat Via_Extensor_Carpi_Ulnaris_pos_5 = {0.00563, 0.1094, 0.004954};
  AnyFloat Via_Extensor_Carpi_Ulnaris_pos_6 = {-0.00229, 0.11, 0.004224};
  #else
  AnyFloat Via_Extensor_Carpi_Ulnaris_pos_1 = {-0.0035325, 0.10945, 0.0036065};
  #endif

  AnyFloat Via1_Extensor_Digiti_Minimi_Finger4_pos = {-0.01526, 0.1217, 0.007688};

  AnyFloat Via1_Extensor_Digiti_Minimi_Finger5_pos = {-0.0001213, 0.1218, 0.006031};

  #if RUHM_DETAILED_MODEL == ON
  AnyFloat O_Extensor_Indicis_pos_1 = {0.01207, 0.2055, -0.002639};
  AnyFloat O_Extensor_Indicis_pos_2 = {0.01032, 0.2183, -0.002895};
  AnyFloat O_Extensor_Indicis_pos_3 = {0.009037, 0.2319, -0.003466};
  AnyFloat O_Extensor_Indicis_pos_4 = {0.01085, 0.2249, -0.003281};
  AnyFloat O_Extensor_Indicis_pos_5 = {0.01125, 0.2182, -0.003338};
  AnyFloat O_Extensor_Indicis_pos_6 = {0.01125, 0.2114, -0.002846};
  #else
  AnyFloat O_Extensor_Indicis_pos_1 = {0.011185, 0.2184, -0.0030615};
  #endif

  #if RUHM_DETAILED_MODEL == ON
  AnyFloat O_Extensor_Pollicis_Longus_1 = {0.01153, 0.1979, 0.003395};
  AnyFloat O_Extensor_Pollicis_Longus_2 = {0.009356, 0.1341, 0.001838};
  AnyFloat O_Extensor_Pollicis_Longus_3 = {0.01026, 0.1553, 0.002381};
  AnyFloat O_Extensor_Pollicis_Longus_4 = {0.01206, 0.1777, 0.002889};
  #else
  AnyFloat O_Extensor_Pollicis_Longus_1 = {0.0107, 0.1652, 0.0026};
  #endif

  AnyFloat Via_Extensor_Pollicis_Longus_1 = {0.00983, 0.1934, 0.003001};
  AnyFloat Via_Extensor_Pollicis_Longus_2 = {0.005051, 0.1892, 0.003625};
  AnyFloat Via_Extensor_Pollicis_Longus_3 = {0.0069, 0.1913, 0.003295};
  AnyFloat Via_Extensor_Pollicis_Longus_4 = {0.009904, 0.1912, 0.003367};

  #if RUHM_DETAILED_MODEL == ON
  AnyFloat Via_Flexor_Carpi_Radialis_1 = {0.0161, 0.06732, -0.02102};
  AnyFloat Via_Flexor_Carpi_Radialis_2 = {0.01086, 0.06807, -0.01715};
  AnyFloat Via_Flexor_Carpi_Radialis_3 = {0.01232, 0.06713, -0.02323};
  AnyFloat Via_Flexor_Carpi_Radialis_4 = {0.0172, 0.06813, -0.01542};
  AnyFloat Via_Flexor_Carpi_Radialis_5 = {0.008973, 0.06737, -0.02247};
  AnyFloat Via_Flexor_Carpi_Radialis_6 = {0.01134, 0.06784, -0.01903};
  AnyFloat Via_Flexor_Carpi_Radialis_7 = {0.01971, 0.06774, -0.01745};
  AnyFloat Via_Flexor_Carpi_Radialis_8 = {0.01659, 0.06771, -0.01847};
  AnyFloat Via_Flexor_Carpi_Radialis_9 = {0.0137, 0.06818, -0.01602};
  #else
  AnyFloat Via_Flexor_Carpi_Radialis_1 = {0.01393, 0.0676, -0.01952};
  #endif

  #if RUHM_DETAILED_MODEL == ON
  AnyFloat Via_Flexor_Carpi_Ulnaris_1 = {0.0168, 0.0584, 0.01262};
  AnyFloat Via_Flexor_Carpi_Ulnaris_2 = {0.01521, 0.05887, 0.01611};
  AnyFloat Via_Flexor_Carpi_Ulnaris_3 = {0.009885, 0.06084, 0.0146};
  AnyFloat Via_Flexor_Carpi_Ulnaris_4 = {0.01632, 0.05927, 0.01865};
  AnyFloat Via_Flexor_Carpi_Ulnaris_5 = {0.0192, 0.0587, 0.01373};
  AnyFloat Via_Flexor_Carpi_Ulnaris_6 = {0.02025, 0.0581, 0.01032};
  AnyFloat Via_Flexor_Carpi_Ulnaris_7 = {0.02318, 0.05188, 0.009847};
  #else
  AnyFloat Via_Flexor_Carpi_Ulnaris_1 = {0.019965, 0.05855, 0.013705};
  #endif

  #if RUHM_DETAILED_MODEL == ON
  AnyFloat Via_Flexor_Digitorum_Superficialis_Finger3_1 = {0.01071, 0.09632, -0.02481};
  AnyFloat Via_Flexor_Digitorum_Superficialis_Finger3_2 = {0.01746, 0.0987, -0.02597};
  AnyFloat Via_Flexor_Digitorum_Superficialis_Finger3_3 = {0.01272, 0.09696, -0.02443};
  AnyFloat Via_Flexor_Digitorum_Superficialis_Finger3_4 = {0.01623, 0.09829, -0.02243};
  AnyFloat Via_Flexor_Digitorum_Superficialis_Finger3_5 = {0.01427, 0.09752, -0.02044};
  AnyFloat Via_Flexor_Digitorum_Superficialis_Finger3_6 = {0.01289, 0.097, -0.02217};
  AnyFloat Via_Flexor_Digitorum_Superficialis_Finger3_7 = {0.01502, 0.09781, -0.02463};
  AnyFloat Via_Flexor_Digitorum_Superficialis_Finger3_8 = {0.009959, 0.09626, -0.02264};
  AnyFloat Via_Flexor_Digitorum_Superficialis_Finger3_9 = {0.01398, 0.09736, -0.02799};
  #else
  AnyFloat Via_Flexor_Digitorum_Superficialis_Finger3_1 = {0.014405, 0.09759, -0.02459};
  #endif

  #if RUHM_DETAILED_MODEL == ON
  AnyFloat Via_Flexor_Digitorum_Superficialis_Finger4_1 = {0.01619, 0.0983, -0.01725};
  AnyFloat Via_Flexor_Digitorum_Superficialis_Finger4_2 = {0.02015, 0.09977, -0.02248};
  AnyFloat Via_Flexor_Digitorum_Superficialis_Finger4_3 = {0.01788, 0.09895, -0.02152};
  AnyFloat Via_Flexor_Digitorum_Superficialis_Finger4_4 = {0.01504, 0.09784, -0.01899};
  AnyFloat Via_Flexor_Digitorum_Superficialis_Finger4_5 = {0.01618, 0.09821, -0.01962};
  AnyFloat Via_Flexor_Digitorum_Superficialis_Finger4_6 = {0.01849, 0.09913, -0.01888};
  AnyFloat Via_Flexor_Digitorum_Superficialis_Finger4_7 = {0.01993, 0.0996, -0.01626};
  AnyFloat Via_Flexor_Digitorum_Superficialis_Finger4_8 = {0.02173, 0.1003, -0.01885};
  AnyFloat Via_Flexor_Digitorum_Superficialis_Finger4_9 = {0.01787, 0.0988, -0.01516};
  #else
  AnyFloat Via_Flexor_Digitorum_Superficialis_Finger4_1 = {0.019105, 0.09937, -0.01898};
  #endif

  #if RUHM_DETAILED_MODEL == ON
  AnyFloat Via_Flexor_Digitorum_Superficialis_Finger5_1 = {0.01899, 0.09925, -0.01203};
  AnyFloat Via_Flexor_Digitorum_Superficialis_Finger5_2 = {0.02143, 0.09958, -0.006623};
  AnyFloat Via_Flexor_Digitorum_Superficialis_Finger5_3 = {0.01995, 0.09953, -0.004105};
  AnyFloat Via_Flexor_Digitorum_Superficialis_Finger5_4 = {0.01892, 0.09944, -0.008013};
  AnyFloat Via_Flexor_Digitorum_Superficialis_Finger5_5 = {0.01804, 0.09954, -0.004679};
  AnyFloat Via_Flexor_Digitorum_Superficialis_Finger5_6 = {0.02217, 0.1002, -0.01425};
  AnyFloat Via_Flexor_Digitorum_Superficialis_Finger5_7 = {0.02218, 0.09989, -0.01003};
  AnyFloat Via_Flexor_Digitorum_Superficialis_Finger5_8 = {0.01736, 0.09956, -0.00568};
  AnyFloat Via_Flexor_Digitorum_Superficialis_Finger5_9 = {0.0174, 0.09964, -0.002993};
  #else
  AnyFloat Via_Flexor_Digitorum_Superficialis_Finger5_1 = {0.01999, 0.09964, -0.008863};
  #endif

  #if RUHM_DETAILED_MODEL == ON
  AnyFloat O_Flexor_Digitorum_Profundus_Finger2_1 = {0.01759, 0.07955, -0.01283};
  AnyFloat O_Flexor_Digitorum_Profundus_Finger2_2 = {0.01921, 0.06733, 0.01531};
  AnyFloat O_Flexor_Digitorum_Profundus_Finger2_3 = {0.01816, 0.1057, -0.01906};
  AnyFloat O_Flexor_Digitorum_Profundus_Finger2_4 = {0.01801, 0.09243, -0.0151};
  #else
  AnyFloat O_Flexor_Digitorum_Profundus_Finger2_1 = {0.01927, 0.08799, -0.0145};
  #endif

  #if RUHM_DETAILED_MODEL == ON
  AnyFloat Via_Flexor_Digitorum_Profundus_Finger2_1 = {0.02625, 0.1101, -0.01387};
  AnyFloat Via_Flexor_Digitorum_Profundus_Finger2_2 = {0.0287, 0.1112, -0.0178};
  AnyFloat Via_Flexor_Digitorum_Profundus_Finger2_3 = {0.02199, 0.1091, -0.01591};
  AnyFloat Via_Flexor_Digitorum_Profundus_Finger2_4 = {0.01872, 0.1094, -0.01742};
  #else
  AnyFloat Via_Flexor_Digitorum_Profundus_Finger2_1 = {0.02273, 0.1098, -0.01579};
  #endif

  #if RUHM_DETAILED_MODEL == ON
  AnyFloat O_Flexor_Digitorum_Profundus_Finger3_1 = {0.02083, 0.1465, -0.02939};
  AnyFloat O_Flexor_Digitorum_Profundus_Finger3_2 = {0.01925, 0.1191, -0.02175};
  AnyFloat O_Flexor_Digitorum_Profundus_Finger3_3 = {0.01946, 0.1286, -0.02474};
  AnyFloat O_Flexor_Digitorum_Profundus_Finger3_4 = {0.02027, 0.1375, -0.02746};
  #else
  AnyFloat O_Flexor_Digitorum_Profundus_Finger3_1 = {0.019745, 0.1309, -0.025385};
  #endif

  #if RUHM_DETAILED_MODEL == ON
  AnyFloat O_Flexor_Digitorum_Profundus_Finger4_1 = {0.02468, 0.1428, -0.02172};
  AnyFloat O_Flexor_Digitorum_Profundus_Finger4_2 = {0.02652, 0.1198, -0.01651};
  AnyFloat O_Flexor_Digitorum_Profundus_Finger4_3 = {0.02527, 0.1315, -0.01917};
  AnyFloat O_Flexor_Digitorum_Profundus_Finger4_4 = {0.02645, 0.1518, -0.02521};
  #else
  AnyFloat O_Flexor_Digitorum_Profundus_Finger4_1 = {0.026015, 0.13515, -0.02012};
  #endif

  #if RUHM_DETAILED_MODEL == ON
  AnyFloat O_Flexor_Digitorum_Profundus_Finger5_1 = {0.02306, 0.0365, 0.007589};
  AnyFloat O_Flexor_Digitorum_Profundus_Finger5_2 = {0.02257, 0.0563, 0.001868};
  AnyFloat O_Flexor_Digitorum_Profundus_Finger5_3 = {0.02568, 0.1017, -0.01206};
  AnyFloat O_Flexor_Digitorum_Profundus_Finger5_4 = {0.02309, 0.07797, -0.01806};
  #else
  AnyFloat O_Flexor_Digitorum_Profundus_Finger5_1 = {0.02387, 0.069825, -0.0021695};
  #endif

  #if RUHM_DETAILED_MODEL == ON
  AnyFloat Via_Flexor_Digitorum_Profundus_Finger5_1 = {0.03331, 0.1109, -0.0119};
  AnyFloat Via_Flexor_Digitorum_Profundus_Finger5_2 = {0.03451, 0.1107, -0.00556};
  AnyFloat Via_Flexor_Digitorum_Profundus_Finger5_3 = {0.02732, 0.1098, -0.005713};
  AnyFloat Via_Flexor_Digitorum_Profundus_Finger5_4 = {0.03116, 0.1107, -0.005158};
  #else
  AnyFloat Via_Flexor_Digitorum_Profundus_Finger5_1 = {0.03157, 0.11055, -0.009623};
  #endif

  AnyFloat Via_Palmaris_Longus = {0.01871, 0.07568, -0.01382};

  AnyFloat I_Pronator_Quadratus_1 = {0.02763, 0.2298, -0.0367};
  AnyFloat I_Pronator_Quadratus_2 = {0.02857, 0.239, -0.0406};
  AnyFloat I_Pronator_Quadratus_3 = {0.02626, 0.2062, -0.03186};
  AnyFloat I_Pronator_Quadratus_4 = {0.02657, 0.2157, -0.03345};
  AnyFloat I_Pronator_Quadratus_5 = {0.02694, 0.2236, -0.03537};
  AnyFloat I_Pronator_Quadratus_6 = {0.02817, 0.2347, -0.03876};

  AnyFloat I_Pronator_Teres_Ulna_1 = {0.01658, 0.02031, -0.001312};
  AnyFloat I_Pronator_Teres_Ulna_2 = {0.03123, 0.01510, -0.003133};
  AnyFloat I_Pronator_Teres_Ulna_3 = {0.01786, 0.01563, -0.002418};

  AnyFloat Via_Pronator_Teres_Ulna_1 = {0.007983, 0.08374, -0.01032};
  AnyFloat Via_Pronator_Teres_Ulna_2 = {0.005009, 0.08144, -0.01247};
  AnyFloat Via_Pronator_Teres_Ulna_3 = {0.00642, 0.08021, -0.01609};

#endif //_HAND_MODEL_RUHM_
};


AnyFolder Scapula = {
  AnyFloat sCoM_pos = {-0.06,-0.04,0.02};

  AnyFloat deltoid_cyl_P2_pos = {0.027588, -0.047361, -0.015292};
  AnyFloat deltoid_cyl_P3_pos = {-0.128825, -0.129236, 0.024150};

  AnyFloat margo_medialis_P2_pos= {-0.1114460,  0.0300000, -0.003720};
  AnyFloat margo_medialis_P3_pos= {-0.1157360, -0.1402360,  0.01628000};
  AnyFloat margo_medialis_pos = {-0.1157360, -0.1402360, 0.006280000};

  AnyFloat acromion_cyl_P2_pos = {0.039946, -0.011151, -0.068103};
  AnyFloat acromion_cyl_P3_pos = {0.018708, -0.025413, 0.008353};
  AnyFloat acromion_cyl_pos = {0.05856500, -0.01642700, -0.001132000};

  AnyFloat coracoid_cyl_P2_pos = {0.0000000, -0.02500000, -0.07000000};
  AnyFloat coracoid_cyl_P3_pos = {-0.02660200, -0.01086300, -0.02438100};
  AnyFloat coracoid_cyl_pos = {-0.02660200, -0.01086300, -0.03438100};

  AnyFloat coracoid_cyl2_P2_pos = {0.03000000, -0.02500000, -0.1200000};
  AnyFloat coracoid_cyl2_P3_pos = {-0.01660200, -0.01086300, -0.02438100};
  AnyFloat coracoid_cyl2_pos = {-0.02660200, -0.01086300, -0.03438100};

  AnyFloat subscapularis_cyl_P2_pos =subscapularis_cyl_pos + {0.015-0.02,-0.06,0.025+0.005};
  AnyFloat subscapularis_cyl_P3_pos =subscapularis_cyl_pos + {0.0,0.008,0.008};//sRel+VX*Radius;
  AnyFloat subscapularis_cyl_pos = gh_pos+{-0.03-0.015,0.015+0.01,-0.02+0.005};


  AnyFloat AnatomicalFrame_pos = {0.0000000, 0.0000000, 0.0000000};

  AnyFloat NeutralPositionOnPelvis_pos = {-0.0808, 1.6551, 0.16928};
  AnyFloat Scapula_Axes =
   {{0.39807674220255507, -0.16141538644427236, -0.90303930165660407},
    {0.36916871646552452, 0.92935623664317468, -0.0033829270806418343},
    {0.8397912634104967, -0.33202719531912139, 0.42954461405996036}};

  AnyFloat MuscleConnectorPlaneNode_pos = {0.03214400, -0.008524000, -0.02828300};
  AnyFloat acj_pos = {0.006071000, -0.003599000, -0.03033100};
  AnyFloat ts_pos = {-0.1174550, -0.01769300, 0.006280000};
  AnyFloat ai_pos = {-0.1307360, -0.1302360, 0.006280000};
  AnyFloat aa_pos = {0.02252200, -0.01769300, 0.006280000};
#if BM_ARM_DELTOID_WRAPPING
  AnyFloat coronoid_pos = {0.00670189, -0.0396442, -0.0829768}; //this is use for the anterior deltoid wrapping surface scaling
#endif
  AnyFloat gh_pos = {0.015898, -0.050863, -0.024381}+{0.0075,0,-0.01};//Corrected, final value= {0.02339800, -0.05086300, -0.03438100};
  AnyFloat conoid_pos = {-0.03004000, -0.008900000, -0.03575400};
  AnyFloat trapezoid_pos = {-0.02019400, -0.009190000, -0.03729100};
  AnyFloat GHReactionCenterNode_pos = {-0.001000000, -0.04800000, -0.03000000};
  AnyFloat EdgeNode1_pos = {0.001000000, -0.05086300, -0.01300000};
  AnyFloat EdgeNode2_pos = {0.001000000, -0.03500000, -0.03000000};
  AnyFloat GHReactionCenterNodeRotated_pos = {-0.001000000, -0.04800000, -0.03000000};
#if BM_ARM_DELTOID_WRAPPING == _DELTOID_WRAPPING_RAKE_
  AnyFloat O_deltoideus_scapular_part_1_pos = {-0.021964, -0.018987, 0.017237}+{-0.06,0.008,-0.0040};                                 //{-0.08196400, -0.01098700, 0.01323700};
  AnyFloat O_deltoideus_scapular_part_2_pos = {-0.021964, -0.018987, 0.017237}+{0.01,0.011,-0.008};                                   //{-0.01196400, -0.007987000, 0.009237000};
  AnyFloat O_deltoideus_scapular_part_3_pos = {0.018565-0.01, -0.020427, 0.008868}+{0.02,0.009,-0.01};                                //{0.02856500, -0.01142700, -0.001132000};
  AnyFloat O_deltoideus_scapular_part_4_pos = {0.018565+0.01, -0.020427, 0.008868}+{0.01,0.012,-0.035};                               //{0.03856500, -0.008427000, -0.02613200};
  AnyFloat O_deltoideus_scapular_part_5_pos = {0.027144+0.025, (-0.013524-0.005), -0.008283-0.0025}+{-0.01,0.012,-0.035};             //{0.04214400, -0.006524000, -0.04578300};
  AnyFloat O_deltoideus_scapular_part_6_pos = {0.027144+0.025, (-0.013524-0.0025), -0.008283-.015}+{-0.015,0.012,-0.03};              //{0.03714400, -0.004024000, -0.05328300};
#else
  AnyFloat O_deltoideus_posterior_part_1_pos = {-0.021964, -0.018987, 0.017237}+{-0.06,0.008,-0.0040};                                 //{-0.08196400, -0.01098700, 0.01323700};
  AnyFloat O_deltoideus_posterior_part_2_pos = {-0.021964, -0.018987, 0.017237}+{-0.015,0.011,-0.008};                                //{-0.01196400, -0.007987000, 0.009237000};
  AnyFloat O_deltoideus_posterior_part_3_pos = {-0.021964, -0.018987, 0.017237}+{0.01,0.011,-0.008};                                   //{-0.01196400, -0.007987000, 0.009237000};
  AnyFloat O_deltoideus_posterior_part_4_pos = {-0.01196400, -0.007987000, 0.009237000}+{0.027,-0.006,0.0};                           //{-0.01196400, -0.007987000, 0.009237000};
  AnyFloat O_deltoideus_lateral_part_1_pos = {0.018565-0.01, -0.020427, 0.008868}+{0.02,0.009,-0.01};                                //{0.02856500, -0.01142700, -0.001132000};
  AnyFloat O_deltoideus_lateral_part_3_pos = {0.018565+0.01, -0.020427, 0.008868}+{0.012,0.012,-0.042};                               //{0.03856500, -0.008427000, -0.02613200};
  AnyFloat O_deltoideus_lateral_part_2_pos = {0.018565+0.01, -0.020427, 0.008868}+{0.01,0.012,-0.023};                              //{0.03856500, -0.008427000, -0.02613200};
  AnyFloat O_deltoideus_lateral_part_4_pos = {0.027144+0.025, (-0.013524-0.005), -0.008283-0.0025}+{-0.015,0.012,-0.035};             //{0.04214400, -0.006524000, -0.04578300};
#endif
  AnyFloat O_subscapularis_1_pos = {-0.1170700, -0.03737400, 0.001273000};
  AnyFloat O_subscapularis_2_pos = {-0.1068230, -0.03107300, -0.001931000};
  AnyFloat O_subscapularis_3_pos = {-0.1196620, -0.09270600, 0.005038000};
  AnyFloat O_subscapularis_4_pos = {-0.09853700, -0.07971500, -0.001576000};
  AnyFloat O_subscapularis_5_pos = {-0.1057510, -0.1084560, 0.002014000};
  AnyFloat O_subscapularis_6_pos = {-0.07867000, -0.09181100, -0.006469000};
  AnyFloat O_supraspinatus_1_pos = {-0.08761200, 0.009190000, -0.01282400};
  AnyFloat O_supraspinatus_2_pos = {-0.07483500, 0.008454000, -0.01818900};
  AnyFloat O_supraspinatus_3_pos = {-0.08652400, 0.001699000, -0.002132000};
  AnyFloat O_supraspinatus_4_pos = {-0.06676400, 0.0005510000, -0.01043800};
  AnyFloat O_supraspinatus_5_pos = {-0.07604200, -0.006054000, 0.004172000};
  AnyFloat O_supraspinatus_6_pos = {-0.06367200, -0.006783000, -0.001029000};
  AnyFloat O_infraspinatus_1_pos = {-0.09447200, -0.03427400, 0.01015000};
  AnyFloat O_infraspinatus_2_pos = {-0.06154900, -0.02414900, 0.005710000};
  AnyFloat O_infraspinatus_3_pos = {-0.1112650, -0.06131700, 0.009120000};
  AnyFloat O_infraspinatus_4_pos = {-0.06361100, -0.04666800, 0.002686000};
  AnyFloat O_infraspinatus_5_pos = {-0.1207210, -0.08780300, 0.006848000};
  AnyFloat O_infraspinatus_6_pos = {-0.08975100, -0.07827000, 0.002667000};
  AnyFloat O_teres_minor_1_pos = {-0.05260300, -0.07627500, -0.004653000};
  AnyFloat O_teres_minor_2_pos = {-0.05038400, -0.07696700, -0.005156000};
  AnyFloat O_teres_minor_3_pos = {-0.06493800, -0.08456200, -0.002430000};
  AnyFloat O_teres_minor_4_pos = {-0.05946100, -0.08626600, -0.003667000};
  AnyFloat O_teres_minor_5_pos = {-0.07168100, -0.09265500, -0.001380000};
  AnyFloat O_teres_minor_6_pos = {-0.06785100, -0.09385300, -0.002244000};
  AnyFloat O_teres_major_1_pos = {-0.1011600, -0.1092340, 0.003289000};
  AnyFloat O_teres_major_2_pos = {-0.09425200, -0.1113340, -0.0002200000};
  AnyFloat O_teres_major_3_pos = {-0.1173630, -0.1157010, 0.005858000};
  AnyFloat O_teres_major_4_pos = {-0.1038070, -0.1197340, -0.0008670000};
  AnyFloat O_teres_major_5_pos = {-0.1223600, -0.1223990, 0.004290000};
  AnyFloat O_teres_major_6_pos = {-0.1106550, -0.1259410, -0.001546000};
  AnyFloat O_biceps_brachii_caput_breve_pos = {0.01000000, -0.02594100, -0.08500000};        //{0.006927, -0.029410, -0.053235} // Original number from data
  AnyFloat O_biceps_brachii_caput_longum_pos = {-0.01800000, -0.02452900, -0.02424200};      //{0.002473, -0.024529, -0.024242}+.Soffset)*.Smat; // Original number from data
  AnyFloat O_coracobrachialis_1_pos = {0.01000000, -0.02594100, -0.08500000};                //{0.004515, -0.029586, -0.052879}     // Original numbers from data
  AnyFloat O_coracobrachialis_2_pos = {0.01000000, -0.02594100, -0.08500000};                //{0.004515, -0.029586, -0.052879}     // Original numbers from data
  AnyFloat O_coracobrachialis_3_pos = {0.01000000, -0.02594100, -0.08500000};                //{-0.000986, -0.029598, -0.054989}    // Original numbers from data
  AnyFloat O_coracobrachialis_4_pos = {0.01000000, -0.02594100, -0.08500000};                //{-0.000986, -0.029598, -0.054989}    // Original numbers from data
  AnyFloat O_coracobrachialis_5_pos = {0.01000000, -0.02594100, -0.08500000};                //{-0.006942, -0.029611, -0.057278}    // Original numbers from data
  AnyFloat O_coracobrachialis_6_pos = {0.01000000, -0.02594100, -0.08500000};                //{-0.006942, -0.029611, -0.057278}    // Original numbers from data
  AnyFloat I_trapezius_scapular_part_1_pos = {-0.08682300, -0.01211800, 0.01353100};
  AnyFloat I_trapezius_scapular_part_2_pos = {-0.08509700, -0.009392000, 0.01375600};
  AnyFloat I_trapezius_scapular_part_3_pos = {-0.08414700, -0.008617000, 0.01376400};
  AnyFloat I_trapezius_scapular_part_4_pos = {-0.07476000, -0.005252000, 0.01316700};
  AnyFloat I_trapezius_scapular_part_5_pos = {-0.04263600, -0.002774000, 0.008364000};
  AnyFloat I_trapezius_scapular_part_6_pos = {-0.008965000, 0.003103000, -0.004761000};
  AnyFloat I_rhomboideus_1_pos = {-0.1451670, -0.1101890, 0.01247800};
  AnyFloat I_rhomboideus_2_pos = {-0.1319360, -0.06671700, 0.008610000};
  AnyFloat I_rhomboideus_3_pos = {-0.1187020, -0.02323600, 0.004743000};
  AnyFloat I_levator_scapulae_1_pos = {-0.1158450, -0.007797000, 0.002254000};
  AnyFloat I_levator_scapulae_2_pos = {-0.09996300, 0.006836000, -0.01183100};
  AnyFloat I_levator_scapulae_3_pos = {-0.08907000, 0.02147400, -0.02590900};
  AnyFloat I_levator_scapulae_4_pos = {-0.08070000, 0.01547400, -0.02590900};
  AnyVec3 Pec ={0.01,-0.005,-0.015}; //correction!
  AnyFloat I_pectoralis_minor_1_pos =   {-0.009520, -0.015997, -0.054575}+Pec;//{0.0004800000, -0.02099700, -0.06957500};
  AnyFloat I_pectoralis_minor_2_pos =   {-0.006040, -0.020567, -0.057330}+Pec;//{0.003960000, -0.02556700, -0.07233000};
  AnyFloat I_pectoralis_minor_3_pos =   {-0.002557, -0.025139, -0.060071}+Pec;//{0.007443000, -0.03013900, -0.07507100};
  AnyFloat I_pectoralis_minor_4_pos =   {0.000919, -0.029718, -0.062827}+Pec;//{0.01091900, -0.03471800, -0.07782700};
  AnyFloat I_serratus_anterior_1_pos = {-0.1364170, -0.1335270, 0.004607000};
  AnyFloat I_serratus_anterior_2_pos = {-0.1345470, -0.1349260, 0.004544000};
  AnyFloat I_serratus_anterior_3_pos = {-0.1382470, -0.1310930, 0.004759000};
  AnyFloat I_serratus_anterior_4_pos = {-0.1415090, -0.1111430, 0.005854000};
  AnyFloat I_serratus_anterior_5_pos = {-0.1324230, -0.06085600, 0.005562000};
  AnyFloat I_serratus_anterior_6_pos = {-0.1004360, 0.005643000, -0.01047900};

  // Nodes for muscle attachments bml etc. data from MAYO sub2
  AnyFloat O_Biceps_LH_pos = {-0.02177500, -0.01713600, -0.001841000};
  AnyFloat O_Biceps_SH_pos = {-0.02021500, -0.01569400, -0.03530000};
  AnyFloat O_Cor_brach_1_pos = {-0.01843900, -0.01527700, -0.03394900};
  AnyFloat O_Cor_brach_2_pos = {-0.01843900, -0.01527700, -0.03394900};
  AnyFloat O_Triceps_LH_1_pos = {-0.002101, -0.05239, -0.012904};
  AnyFloat O_Triceps_LH_2_pos = {-0.014529, -0.053439, -0.008614};

  AnyFloat gh_rotated_pos = {0.02339800, -0.05086300, -0.03438100};
  AnyFloat RotNode_pos = {0.0000000, 0.0000000, 0.0000000};
  AnyFloat ac_pos = {0.0000000, 0.0000000, 0.0000000};
  AnyFloat gh_RotNode_pos = {0.0000000, 0.0000000, 0.0000000};
  AnyFloat GHReactionCenterNodeRotated_CavityEdgeNode1_pos = {-0.01227185, 0.01227185, 0.0000000};
  AnyFloat GHReactionCenterNodeRotated_CavityEdgeNode2_pos = {-1.062689e-018, 0.01735502, 0.0000000};
  AnyFloat GHReactionCenterNodeRotated_CavityEdgeNode3_pos = {0.01227185, 0.01227185, 0.0000000};
  AnyFloat GHReactionCenterNodeRotated_CavityEdgeNode4_pos = {0.01735502, 2.125377e-018, 0.0000000};
  AnyFloat GHReactionCenterNodeRotated_CavityEdgeNode5_pos = {0.01227185, -0.01227185, 0.0000000};
  AnyFloat GHReactionCenterNodeRotated_CavityEdgeNode6_pos = {3.188066e-018, -0.01735502, 0.0000000};
  AnyFloat GHReactionCenterNodeRotated_CavityEdgeNode7_pos = {-0.01227185, -0.01227185, 0.0000000};
  AnyFloat GHReactionCenterNodeRotated_CavityEdgeNode8_pos = {-0.01735502, -4.250754e-018, 0.0000000};
};

AnyFolder Clavicula = {

  AnyFloat AnatomicalFrame_pos = {0.0000000, 0.0000000, 0.0000000};
  AnyFloat NeutralPositionOnPelvis_pos = {0.002932, 1.61958, 0.02070};
  AnyFloat Clavicula_Axes =
    {{-0.38288708567101515, -0.007233363949379179, -0.92376683100895784},
      {0.1993679344171973, 0.9757575413694155, -0.090275396354340925},
      {0.90202544662142248, -0.21873476839928549, -0.372162860506975}};

  AnyFloat ac_pos = {0.1688740, 0.0000000, 0.0000000};
  AnyFloat acj_pos = {0.1552540, 0.002989000, -0.006589000};
  AnyFloat scj_pos = {0.0000000, 0.0000000, 0.0000000};
  AnyFloat conoid_pos = {0.1271050, 0.006526000, 0.002547000};
  AnyFloat trapezoid_pos = {0.1394170, 0.004248000, -0.006785000};


  AnyFloat Length = vnorm(ac_pos-scj_pos);// Find the length using bonylandmark x coordinates!
  AnyFloat sCoM_pos={Length/2,0,0};
  // Below originated from ClavicleMuscleGeometry: clavicle segment data from VU sub 2.
  // The original coordinates have been transformed from global coordinates to the segment local
  // coordinate system

  AnyVec3 correction ={-0.01,0.005,0};
#if BM_ARM_DELTOID_WRAPPING == _DELTOID_WRAPPING_RAKE_
  AnyFloat O_deltoideus_clavicular_part_1_pos = {0.153611, 0.003833, -0.026054}+correction+{0.01,0.005,0};    //{0.1536110, 0.01383300, -0.02605400};
  AnyFloat O_deltoideus_clavicular_part_2_pos = {0.153611, 0.003833, -0.026054}+correction+{0,0.005,0};       //{0.1436110, 0.01383300, -0.02605400};
  AnyFloat O_deltoideus_clavicular_part_3_pos = {0.141158, 0.008015, -0.021351}+correction;                  //{0.1311580, 0.01301500, -0.02135100};
  AnyFloat O_deltoideus_clavicular_part_4_pos = {0.141158, 0.008015, -0.021351}+correction+{-0.007,0.00,0};   //{0.1241580, 0.01301500, -0.02135100};
  AnyFloat O_deltoideus_clavicular_part_5_pos = {0.125129, 0.012248, -0.014889}+correction+{0,-0.005,0};      //{0.1151290, 0.01224800, -0.01488900};
  AnyFloat O_deltoideus_clavicular_part_6_pos = {0.125129, 0.012248, -0.014889}+correction+{-0.007,-0.005,0}; //{0.1081290, 0.01224800, -0.01488900};
#else
  AnyFloat O_deltoideus_anterior_part_1_pos = {0.153611, 0.003833, -0.026054}+correction+{0.005,0.005,-0.004};    //{0.1536110, 0.01383300, -0.02605400};
  AnyFloat O_deltoideus_anterior_part_2_pos = {0.141158, 0.008015, -0.021351}+correction+{0.006,-0.001,-0.002};                  //{0.1311580, 0.01301500, -0.02135100};
  AnyFloat O_deltoideus_anterior_part_3_pos = {0.141158, 0.008015, -0.021351}+correction+{-0.009,0.00,0.006};   //{0.1241580, 0.01301500, -0.02135100};
  AnyFloat O_deltoideus_anterior_part_4_pos = {0.125129, 0.012248, -0.014889}+correction+{-0.007,-0.005,0}; //{0.1081290, 0.01224800, -0.01488900};
#endif
  AnyVec3 correction1 ={0.02,-0.01,0};
  AnyFloat O_pectoralis_major_clavicular_part_1_pos = {0.029694, 0.009026, -0.024971}+correction1;            //{0.04969400, -0.0009740000, -0.02497100};
  AnyFloat O_pectoralis_major_clavicular_part_2_pos = {0.043668, 0.012786, -0.026008}+correction1;            //{0.06366800, 0.002786000, -0.02600800};
  AnyFloat O_pectoralis_major_clavicular_part_3_pos = {0.057700, 0.015357, -0.025905}+correction1;            //{0.07770000, 0.005357000, -0.02590500};
  AnyFloat O_pectoralis_major_clavicular_part_4_pos = {0.071340, 0.015905, -0.023851}+correction1;            //{0.09134000, 0.005905000, -0.02385100};
  AnyFloat O_pectoralis_major_clavicular_part_5_pos = {0.084030-0.0125, 0.013554, -0.019239}+correction1;     //{0.09153000, 0.003554000, -0.01923900};

  AnyVec3 correction2 ={0.0,-0.01,0};
  AnyFloat I_trapezius_clavicular_part_1_pos = {0.147973, 0.011838, 0.001597}+correction2;                   //{0.1479730, 0.001838000, 0.001597000};
  AnyFloat I_trapezius_clavicular_part_2_pos = {0.140579, 0.014921, 0.002398}+correction2;                   //{0.1405790, 0.004921000, 0.002398000};
  AnyFloat I_trapezius_clavicular_part_3_pos = {0.132298, 0.017312, 0.003265}+correction2;                   //{0.1322980, 0.007312000, 0.003265000};
  AnyFloat I_trapezius_clavicular_part_4_pos = {0.123776, 0.018878, 0.003479}+correction2;                   //{0.1237760, 0.008878000, 0.003479000};
  AnyFloat I_trapezius_clavicular_part_5_pos = {0.115728, 0.019599, 0.002630}+correction2;                   //{0.1157280, 0.009599000, 0.002630000};
  AnyFloat I_trapezius_clavicular_part_6_pos = {0.108808, 0.019632, 0.000784}+correction2;                   //{0.1088080, 0.009632000, 0.0007840000};

  AnyFloat SternocleidomastoidNode_pos = {0.03900000, 0.005000000, -0.01200000};
  AnyFloat scj_RotNode_pos = {0.0000000, 0.0000000, 0.0000000};
};

AnyFolder HandSeg = {
  AnyFolder SimpleHandSeg = {

    AnyFloat ARel0 = RotMat(...Sign*pi/2,y)*RotMat(...Sign*pi/2,x);  // used for the SPLine.InitWrapPosVectors

    AnyFloat wj_pos                                        ={-0.014,0.0,0.0};
    AnyFloat sCoM_pos                                      = {-0.06, 0.0, 0.0};
    AnyFloat Hand_pos     						           = {-0.1,0,.0};
    AnyFloat PalmJoint_pos                                 = {-0.08  ,-0.02  ,0.0    };
    AnyFloat Via1_Extensor_Indicis_pos                     = {-0.03  , -0.015, 0.015 };
    AnyFloat I_Extensor_Indicis_pos                        = {-0.135 , -0.05 , -0.005};
    AnyFloat I_Extensor_Pollicis_Longus_pos                = {-0.055 , -0.065, -0.003};
    AnyFloat Via1_Extensor_Pollicis_Longus_pos             = {-0.03  , -0.04 , 0.005 };
    AnyFloat I_Extensor_Pollicis_Brevis_pos                = {-0.055 , -0.065, -0.003};
    AnyFloat Via1_Extensor_Pollicis_Brevis_pos             = {-0.03  , -0.04 , 0.005 };
    AnyFloat I_Abductor_Pollicis_Longus_pos                = {-0.04  , -0.055, -0.01 };
    AnyFloat Via1_Abductor_Pollicis_Longus_pos             = {-0.01  , -0.02 , 0.015 };
    AnyFloat I_Extensor_Carpi_Ulnaris_pos                  = {-0.035 , 0.017 , 0.0053};
    AnyFloat I_Extensor_Carpi_Radialis_Brevis_pos          = {-0.04  , -0.014, 0.01  };
    AnyFloat Via_Extensor_Carpi_Radialis_Brevis_pos        = {-0.033 , -0.015, 0.01  };
    AnyFloat I_Extensor_Carpi_Radialis_Longus_pos          = {-0.05  , -0.02 , 0.01  };
    AnyFloat I_Flexor_Carpi_Ulnaris_pos                    = {-0.04  , 0.014 , -0.0  };
    AnyFloat I_Flexor_Carpi_Radialis_pos                   = {-0.0335, -0.018, -0.0  };
    AnyFloat Via_Flexor_Carpi_Radialis_pos                 = {-0.035 , -0.005, -0.013};
    AnyFloat I_Palmaris_Longus_pos                         = {-0.0435,  0.0  , -0.007};
    AnyFloat Via_Palmaris_Longus_pos                       = {-0.035 , -0.0  , -0.014};
    AnyFloat I_Flexor_Digitorum_Superficialis_Digit2_pos   = {-0.132 , -0.05 , -0.005};
    AnyFloat I_Flexor_Digitorum_Superficialis_Digit3_pos   = {-0.143 , -0.025, -0.005};
    AnyFloat I_Flexor_Digitorum_Superficialis_Digit4_pos   = {-0.14  , -0.006, -0.005};
    AnyFloat I_Flexor_Digitorum_Superficialis_Digit5_pos   = {-0.125 , 0.017 , -0.00 };
    AnyFloat Via_Flexor_Digitorum_Superficialis_Digit5_pos = {-0.03  , 0.00  , -0.005};
    AnyFloat Via_Flexor_Digitorum_Superficialis_Digit4_pos = {-0.03  , -0.003, -0.005};
    AnyFloat Via_Flexor_Digitorum_Superficialis_Digit3_pos = {-0.03  , -0.006, -0.005};
    AnyFloat Via_Flexor_Digitorum_Superficialis_Digit2_pos = {-0.03  , -0.009, -0.005};
    AnyFloat I_Flexor_Digitorum_Profundus_Digit2_pos       = {-0.152 , -0.055, -0.007};
    AnyFloat I_Flexor_Digitorum_Profundus_Digit3_pos       = {-0.169 , -0.027, -0.005};
    AnyFloat I_Flexor_Digitorum_Profundus_Digit4_pos       = {-0.165 , -0.008, -0.008};
    AnyFloat I_Flexor_Digitorum_Profundus_Digit5_pos       = {-0.145 , 0.017 , -0.009};
    AnyFloat Via_Flexor_Digitorum_Profundus_Digit5_pos     = {-0.03  , 0.00  , -0.005};
    AnyFloat Via_Flexor_Digitorum_Profundus_Digit4_pos     = {-0.03  , -0.002, -0.005};
    AnyFloat Via_Flexor_Digitorum_Profundus_Digit3_pos     = {-0.03  , -0.004, -0.005};
    AnyFloat Via_Flexor_Digitorum_Profundus_Digit2_pos     = {-0.03  , -0.006, -0.005};
    AnyFloat I_Extensor_Digitorum_Digit2_pos               = {-0.132 , -0.05 , 0.005 };
    AnyFloat I_Extensor_Digitorum_Digit3_pos               = {-0.143 , -0.025, 0.005 };
    AnyFloat I_Extensor_Digitorum_Digit4_pos 			     = {-0.14  , -0.006, 0.005 };
    AnyFloat I_Extensor_Digitorum_Digit5_pos               = {-0.125 , 0.017 , 0.002 };
    AnyFloat Via_Extensor_Digitorum_Digit5_pos             = {-0.02  , 0.002 , 0.011 };
    AnyFloat Via_Extensor_Digitorum_Digit4_pos             = {-0.02  , 0.00  , 0.011 };
    AnyFloat Via_Extensor_Digitorum_Digit3_pos             = {-0.02  , -0.002, 0.011 };
    AnyFloat Via_Extensor_Digitorum_Digit2_pos             = {-0.027 , -0.004, 0.011 };
    AnyFloat Via_Extensor_Digiti_Minimi_pos                = {-0.02  , 0.00 , 0.01  };
    AnyFloat I_Extensor_Digiti_Minimi_pos                  = {-0.145 , 0.017 , 0.002 };
    AnyFloat Via_Flexor_Pollicis_Longus_pos                = {-0.03  , -0.025, -0.01 };
    AnyFloat I_Flexor_Pollicis_Longus_pos                  = {-0.093 , -0.08 , -0.02 };

    AnyFloat FlexorMuscleCyl_pos = {-0.009000000, -0.07000000, 0.0000000}; //.wj.sRel-..Scale({0,0.07,0})*..Mirror-...WristJointSeg.RadialUlnarDeviation.sRel;
    AnyFloat FlexorMuscleCyl_P3_pos = FlexorMuscleCyl_pos + {0.0,0.0,0.0115}; //P1+ ..Scale({0.0,0.0,0.0115})*..Mirror;
    AnyFloat FlexorMuscleCyl_P2_pos = FlexorMuscleCyl_pos + {0.0, 0.14,0.0};  //P1+ ..Scale({0.0, 0.14,0.0})*..Mirror;
  };

};
