//This file can be used for making shortcuts to the muscle data


AnyFolder &mus1 = ..Mus.biceps_brachii_caput_breve ;
AnyFolder &mus2 = ..Mus.biceps_brachii_caput_longum ;
AnyFolder &mus3 = ..Mus.coracobrachialis_1 ;
AnyFolder &mus4 = ..Mus.coracobrachialis_2 ;
AnyFolder &mus5 = ..Mus.coracobrachialis_3 ;
AnyFolder &mus6 = ..Mus.coracobrachialis_4 ;
AnyFolder &mus7 = ..Mus.coracobrachialis_5 ;
AnyFolder &mus8 = ..Mus.coracobrachialis_6 ;
#if BM_ARM_DELTOID_WRAPPING == _DELTOID_WRAPPING_RAKE_
AnyFolder &mus9 = ..Mus.deltoideus_scapular_part_1 ;
AnyFolder &mus10 = ..Mus.deltoideus_scapular_part_2 ;
AnyFolder &mus11 = ..Mus.deltoideus_scapular_part_3 ;
AnyFolder &mus12 = ..Mus.deltoideus_scapular_part_4 ;
AnyFolder &mus13 = ..Mus.deltoideus_scapular_part_5 ;
AnyFolder &mus14 = ..Mus.deltoideus_scapular_part_6 ;
AnyFolder &mus15 = ..Mus.deltoideus_clavicular_part_1 ;
AnyFolder &mus16 = ..Mus.deltoideus_clavicular_part_2 ;
AnyFolder &mus17 = ..Mus.deltoideus_clavicular_part_3 ;
AnyFolder &mus18 = ..Mus.deltoideus_clavicular_part_4 ;
AnyFolder &mus19 = ..Mus.deltoideus_clavicular_part_5 ;
AnyFolder &mus20 = ..Mus.deltoideus_clavicular_part_6 ;
#else
AnyFolder &mus9 = ..Mus.deltoideus_posterior_part_1 ;
AnyFolder &mus10 = ..Mus.deltoideus_posterior_part_2 ;
AnyFolder &mus11 = ..Mus.deltoideus_posterior_part_3;
AnyFolder &mus12 = ..Mus.deltoideus_posterior_part_4 ;
AnyFolder &mus13 = ..Mus.deltoideus_lateral_part_1 ;
AnyFolder &mus14 = ..Mus.deltoideus_lateral_part_2 ;
AnyFolder &mus15 = ..Mus.deltoideus_lateral_part_3 ;
AnyFolder &mus16 = ..Mus.deltoideus_lateral_part_4 ;
AnyFolder &mus17 = ..Mus.deltoideus_anterior_part_1 ;
AnyFolder &mus18 = ..Mus.deltoideus_anterior_part_2 ;
AnyFolder &mus19 = ..Mus.deltoideus_anterior_part_3 ;
AnyFolder &mus20 = ..Mus.deltoideus_anterior_part_4 ;
#endif
AnyFolder &mus21 = ..Mus.infraspinatus_1 ;
AnyFolder &mus22 = ..Mus.infraspinatus_2 ;
AnyFolder &mus23 = ..Mus.infraspinatus_3 ;
AnyFolder &mus24 = ..Mus.infraspinatus_4 ;
AnyFolder &mus25 = ..Mus.infraspinatus_5 ;
AnyFolder &mus26 = ..Mus.infraspinatus_6 ;
AnyFolder &mus27 = ..Mus.latissimus_dorsi_1 ;
AnyFolder &mus28 = ..Mus.latissimus_dorsi_2 ;
AnyFolder &mus29 = ..Mus.latissimus_dorsi_3 ;
AnyFolder &mus30 = ..Mus.latissimus_dorsi_4 ;
AnyFolder &mus31 = ..Mus.latissimus_dorsi_5 ;
AnyFolder &mus32 = ..Mus.levator_scapulae_1 ;
AnyFolder &mus33 = ..Mus.levator_scapulae_2 ;
AnyFolder &mus34 = ..Mus.levator_scapulae_3 ;
AnyFolder &mus34bis = ..Mus.levator_scapulae_4 ;
AnyFolder &mus35 = ..Mus.pectoralis_major_thoracic_part_1 ;
AnyFolder &mus36 = ..Mus.pectoralis_major_thoracic_part_2 ;
AnyFolder &mus37 = ..Mus.pectoralis_major_thoracic_part_3 ;
AnyFolder &mus38 = ..Mus.pectoralis_major_thoracic_part_4 ;
AnyFolder &mus39 = ..Mus.pectoralis_major_thoracic_part_5 ;
AnyFolder &mus35_2 = ..Mus.pectoralis_major_thoracic_part_6 ;
AnyFolder &mus36_2 = ..Mus.pectoralis_major_thoracic_part_7 ;
AnyFolder &mus37_2 = ..Mus.pectoralis_major_thoracic_part_8 ;
AnyFolder &mus38_2 = ..Mus.pectoralis_major_thoracic_part_9 ;
AnyFolder &mus39_2 = ..Mus.pectoralis_major_thoracic_part_10 ;
AnyFolder &mus40 = ..Mus.pectoralis_major_clavicular_part_1 ;
AnyFolder &mus41 = ..Mus.pectoralis_major_clavicular_part_2 ;
AnyFolder &mus42 = ..Mus.pectoralis_major_clavicular_part_3 ;
AnyFolder &mus43 = ..Mus.pectoralis_major_clavicular_part_4 ;
AnyFolder &mus44 = ..Mus.pectoralis_major_clavicular_part_5 ;
AnyFolder &mus45 = ..Mus.pectoralis_minor_1 ;
AnyFolder &mus46 = ..Mus.pectoralis_minor_2 ;
AnyFolder &mus47 = ..Mus.pectoralis_minor_3 ;
AnyFolder &mus48 = ..Mus.pectoralis_minor_4 ;
AnyFolder &mus49 = ..Mus.rhomboideus_1 ;
AnyFolder &mus50 = ..Mus.rhomboideus_2 ;
AnyFolder &mus51 = ..Mus.rhomboideus_3 ;
AnyFolder &mus52 = ..Mus.serratus_anterior_1 ;
AnyFolder &mus53 = ..Mus.serratus_anterior_2 ;
AnyFolder &mus54 = ..Mus.serratus_anterior_3 ;
AnyFolder &mus55 = ..Mus.serratus_anterior_4 ;
AnyFolder &mus56 = ..Mus.serratus_anterior_5 ;
AnyFolder &mus57 = ..Mus.serratus_anterior_6 ;
AnyFolder &mus58 = ..Mus.subscapularis_1 ;
AnyFolder &mus59 = ..Mus.subscapularis_2 ;
AnyFolder &mus60 = ..Mus.subscapularis_3 ;
AnyFolder &mus61 = ..Mus.subscapularis_4 ;
AnyFolder &mus62 = ..Mus.subscapularis_5 ;
AnyFolder &mus63 = ..Mus.subscapularis_6 ;
AnyFolder &mus64 = ..Mus.supraspinatus_1 ;
AnyFolder &mus65 = ..Mus.supraspinatus_2 ;
AnyFolder &mus66 = ..Mus.supraspinatus_3 ;
AnyFolder &mus67 = ..Mus.supraspinatus_4 ;
AnyFolder &mus68 = ..Mus.supraspinatus_5 ;
AnyFolder &mus69 = ..Mus.supraspinatus_6 ;
AnyFolder &mus70 = ..Mus.teres_major_1 ;
AnyFolder &mus71 = ..Mus.teres_major_2 ;
AnyFolder &mus72 = ..Mus.teres_major_3 ;
AnyFolder &mus73 = ..Mus.teres_major_4 ;
AnyFolder &mus74 = ..Mus.teres_major_5 ;
AnyFolder &mus75 = ..Mus.teres_major_6 ;
AnyFolder &mus76 = ..Mus.teres_minor_1 ;
AnyFolder &mus77 = ..Mus.teres_minor_2 ;
AnyFolder &mus78 = ..Mus.teres_minor_3 ;
AnyFolder &mus79 = ..Mus.teres_minor_4 ;
AnyFolder &mus80 = ..Mus.teres_minor_5 ;
AnyFolder &mus81 = ..Mus.teres_minor_6 ;
AnyFolder &mus82 = ..Mus.trapezius_scapular_part_1 ;
AnyFolder &mus83 = ..Mus.trapezius_scapular_part_2 ;
AnyFolder &mus84 = ..Mus.trapezius_scapular_part_3 ;
AnyFolder &mus85 = ..Mus.trapezius_scapular_part_4 ;
AnyFolder &mus86 = ..Mus.trapezius_scapular_part_5 ;
AnyFolder &mus87 = ..Mus.trapezius_scapular_part_6 ;
AnyFolder &mus88 = ..Mus.trapezius_clavicular_part_1 ;
AnyFolder &mus89 = ..Mus.trapezius_clavicular_part_2 ;
AnyFolder &mus90 = ..Mus.trapezius_clavicular_part_3 ;
AnyFolder &mus91 = ..Mus.trapezius_clavicular_part_4 ;
AnyFolder &mus92 = ..Mus.trapezius_clavicular_part_5 ;
AnyFolder &mus93 = ..Mus.trapezius_clavicular_part_6 ;
AnyFolder &mus94 = ..Mus.Brachialis_1 ;
AnyFolder &mus95 = ..Mus.Brachialis_2 ;
AnyFolder &mus96 = ..Mus.Triceps_LH_1 ;
AnyFolder &mus97 = ..Mus.Triceps_LH_2 ;
AnyFolder &mus98 = ..Mus.Triceps_ME_1 ;
AnyFolder &mus99 = ..Mus.Triceps_ME_2 ;
AnyFolder &mus100 = ..Mus.Triceps_LA_1 ;
AnyFolder &mus101 = ..Mus.Triceps_LA_2 ;
AnyFolder &mus102 = ..Mus.Brach_rad_1 ;
AnyFolder &mus103 = ..Mus.Brach_rad_2 ;
AnyFolder &mus104 = ..Mus.Anconeus_1 ;
AnyFolder &mus105 = ..Mus.Anconeus_2 ;
AnyFolder &mus106 = ..Mus.Pronator_teres_caput_humeral_1 ;
AnyFolder &mus107 = ..Mus.Pronator_teres_caput_humeral_2 ;
AnyFolder &mus108 = ..Mus.Pronator_teres_caput_ulnare_1 ;
AnyFolder &mus109 = ..Mus.Supinator_humerus_part_1 ;
AnyFolder &mus110 = ..Mus.Supinator_humerus_part_2 ;
AnyFolder &mus111 = ..Mus.Supinator_ulna_part_1 ;
AnyFolder &mus112 = ..Mus.Supinator_ulna_part_2 ;
AnyFolder &mus113 = ..Mus.Pron_quadr_1 ;
AnyFolder &mus114 = ..Mus.Pron_quadr_2 ;

//Handmuscles
//TODO: Has to be extended on intrinsic muscles
/*
AnyFolder &mus115 = ..Mus.Hand.Extensor_Indicis ;
AnyFolder &mus116 = ..Mus.Hand.Abductor_Pollicis_Longus ;
AnyFolder &mus117 = ..Mus.Hand.Extensor_Pollicis_Brevis ;
AnyFolder &mus118 = ..Mus.Hand.Extensor_Pollicis_Longus ;
AnyFolder &mus119 = ..Mus.Hand.Extensor_Carpi_Radialis_Longus ;
AnyFolder &mus120 = ..Mus.Hand.Extensor_Carpi_Radialis_Brevis ;
AnyFolder &mus121 = ..Mus.Hand.Extensor_Carpi_Ulnaris ;
AnyFolder &mus122 = ..Mus.Hand.Flexor_Carpi_Ulnaris  ;
AnyFolder &mus123 = ..Mus.Hand.Flexor_Carpi_Radialis  ;
AnyFolder &mus124 = ..Mus.Hand.Palmaris_Longus  ;
AnyFolder &mus125 = ..Mus.Hand.Flexor_Digitorum_Superficialis_Digit5 ;
AnyFolder &mus126 = ..Mus.Hand.Flexor_Digitorum_Superficialis_Digit4 ;
AnyFolder &mus127 = ..Mus.Hand.Flexor_Digitorum_Superficialis_Digit3 ;
AnyFolder &mus128 = ..Mus.Hand.Flexor_Digitorum_Superficialis_Digit2 ;
AnyFolder &mus129 = ..Mus.Hand.Flexor_Digitorum_Produndus_Digit5 ;
AnyFolder &mus130 = ..Mus.Hand.Flexor_Digitorum_Profundus_Digit4 ;
AnyFolder &mus131 = ..Mus.Hand.Flexor_Digitorum_Profundus_Digit3 ;
AnyFolder &mus132 = ..Mus.Hand.Flexor_Digitorum_Profundus_Digit2 ;
AnyFolder &mus133 = ..Mus.Hand.Extensor_Digitorum_Digit5 ;
AnyFolder &mus134 = ..Mus.Hand.Extensor_Digitorum_Digit4 ;
AnyFolder &mus135 = ..Mus.Hand.Extensor_Digitorum_Digit3 ;
AnyFolder &mus136 = ..Mus.Hand.Extensor_Digitorum_Digit2 ;
AnyFolder &mus137 = ..Mus.Hand.Extensor_Digiti_Minimi ;
AnyFolder &mus138 = ..Mus.Hand.Flexor_Pollicis_Longus ;
*/
