///This is the calibratiion file it will calibrate the anterrio part of the deltoid muscle 10 deg abduction 35 flexion
AnyFolder ArmCal2 ={


  AnyFolder &ThoraxSegs =  ...HumanFolderRef.Trunk.SegmentsThorax;
  AnyFolder &CervicalSegs =  ...HumanFolderRef.Trunk.SegmentsCervicalSpine;
  AnyFolder &LumbarSegs =  ...HumanFolderRef.Trunk.SegmentsLumbar;
  AnyFolder &SpineJoints =  ...HumanFolderRef.Trunk.JointsLumbar;

  AnyFolder &SegSideCal = .SideHumanFolderRef.ShoulderArm.Seg;
  AnyFolder &JointsSideCal = .SideHumanFolderRef.ShoulderArm.Jnt;

  AnyShortestPathMuscle &del1 =  .SideHumanFolderRef.ShoulderArm.Mus.deltoideus_clavicular_part_1;
  AnyShortestPathMuscle &del2 =  .SideHumanFolderRef.ShoulderArm.Mus.deltoideus_clavicular_part_2;
  AnyShortestPathMuscle &del3 =  .SideHumanFolderRef.ShoulderArm.Mus.deltoideus_clavicular_part_3;
  AnyShortestPathMuscle &del4 =  .SideHumanFolderRef.ShoulderArm.Mus.deltoideus_clavicular_part_4;
  AnyShortestPathMuscle &del5 =  .SideHumanFolderRef.ShoulderArm.Mus.deltoideus_clavicular_part_5;
  AnyShortestPathMuscle &del6 =  .SideHumanFolderRef.ShoulderArm.Mus.deltoideus_clavicular_part_6;


  AnyFolder &MusParCalSide =  .SideHumanFolderRef.ShoulderArm.MusPar;

  AnyFixedRefFrame ground = {
    AnyRefNode node = {
      ARel=.....HumanFolderRef.Trunk.SegmentsThorax.ThoraxSeg.Axes0;
      sRel=.....HumanFolderRef.Trunk.SegmentsThorax.ThoraxSeg.r0;
    };
  };

  AnySphericalJoint ThoraxGround={
    AnyRefFrame &Ground = .ground.node;
    AnyRefFrame &Sacrum= ....HumanFolderRef.Trunk.SegmentsThorax.ThoraxSeg;
  };

  AnyKinEqSimpleDriver  ThoraxGroundDriver = {
    AnySphericalJoint &Jnt = .ThoraxGround;
    DriverPos = {0,0,0};
    DriverVel = {0,0,0};
    Reaction.Type = {Off,Off,Off};
  };


  AnyKinEqSimpleDriver T1C7JntDriver = {
    AnyJoint &C7T1Joint = ....HumanFolderRef.Trunk.JointsCervicalSpine.T1C7Jnt;
    DriverPos = {0,0,0};
    DriverVel = {0,0,0};
    Reaction.Type = {On,On,On};
  };

  AnyKinEqSimpleDriver C7C6JntDriver = {
    AnyJoint &C7C6Joint = ....HumanFolderRef.Trunk.JointsCervicalSpine.C7C6Jnt;
    DriverPos = {0,0,0};
    DriverVel = {0,0,0};
    Reaction.Type = {On,On,On};
  };

  AnyKinEqSimpleDriver C6C5JntDriver = {
    AnyJoint &C6C5Joint = ....HumanFolderRef.Trunk.JointsCervicalSpine.C6C5Jnt;
    DriverPos = {0,0,0};
    DriverVel = {0,0,0};
    Reaction.Type = {On,On,On};
  };

  AnyKinEqSimpleDriver C5C4JntDriver = {
    AnyJoint &C5C4Joint = ....HumanFolderRef.Trunk.JointsCervicalSpine.C5C4Jnt;
    DriverPos = {0,0,0};
    DriverVel = {0,0,0};
    Reaction.Type = {On,On,On};
  };

  AnyKinEqSimpleDriver C4C3JntDriver = {
    AnyJoint &C4C3Joint = ....HumanFolderRef.Trunk.JointsCervicalSpine.C4C3Jnt;
    DriverPos = {0,0,0};
    DriverVel = {0,0,0};
    Reaction.Type = {On,On,On};
  };

  AnyKinEqSimpleDriver C3C2JntDriver = {
    AnyJoint &C3C2Joint = ....HumanFolderRef.Trunk.JointsCervicalSpine.C3C2Jnt;
    DriverPos = {0,0,0};
    DriverVel = {0,0,0};
    Reaction.Type = {On,On,On};
  };

  AnyKinEqSimpleDriver C2C1JntDriver = {
    AnyJoint &C2C1Joint = ....HumanFolderRef.Trunk.JointsCervicalSpine.C2C1Jnt;
    DriverPos = {0};
    DriverVel = {0};
    Reaction.Type = {On};
  };

  AnyKinEqSimpleDriver C1C0JntDriver = {
    AnyJoint &C1C0Joint = ....HumanFolderRef.Trunk.JointsCervicalSpine.C1C0Jnt;
    DriverPos = {0};
    DriverVel = {0};
    Reaction.Type = {On};
  };

  AnyKinMeasureOrg Posture = {
    AnyKinMeasureOrg &Ref2 = ....HumanFolderRef.Interface.Trunk.PelvisThoraxLateralBending;
    AnyKinMeasureOrg &Ref3 = ....HumanFolderRef.Interface.Trunk.PelvisThoraxRotation;
    AnyKinMeasureOrg &Ref1 = ....HumanFolderRef.Interface.Trunk.PelvisThoraxExtension;
    MeasureOrganizer={0,1,2};
  };

  AnyKinEqSimpleDriver PostureDriver ={
    AnyKinMeasureOrg &AllDofs = .Posture;
    DriverPos = pi/180*{0,0,0};
    DriverVel = pi/180*{  0.0,0.0,0.0};
    Reaction.Type = {On,On,On};
  };

  #if RIGHT_SHOULDER_RHYTHM*RIGHT_ARM + LEFT_SHOULDER_RHYTHM*LEFT_ARM == 0
  AnyKinEqSimpleDriver SCDriver ={
    AnyKinRotational &SC =  ..SideHumanFolderRef.ShoulderArm.Jnt.SCRot;
        DriverPos = {..Sign*-0.66, -0.5*(..Sign-1)*pi+..Sign*0.258228, ..Sign*-0.25};
    DriverVel = {-0.0,-0.0,-0.0};
    Reaction.Type={Off,Off,Off};
  };
  #endif

  //This joint is not used in the  mannequin as the is set to a default pos.
  AnyKinEqSimpleDriver WristDriver ={
    AnyKinMeasureOrg &Wrist1 =..SideHumanFolderRef.ShoulderArm.Jnt.WristJointFlexion;
    AnyKinMeasureOrg &Wrist2 =..SideHumanFolderRef.ShoulderArm.Jnt.WristJointDeviation;
    DriverPos = {0,0};
    DriverVel = {0,0};
    Reaction.Type={On,On};
  };

  AnyKinEqSimpleDriver FEDriver ={
    AnyKinMeasureOrg &ref = ..SideHumanFolderRef.ShoulderArm.Jnt.FE;
    AnyVar pos = iffun(ltfun(..Sign,0), 65*pi/180, pi-65*pi/180);
    DriverPos = {pos};

    DriverVel = {0};
    Reaction.Type = {Off};
  };

  AnyKinEqSimpleDriver PSDriver ={
    AnyKinMeasureOrg &ref = ..SideHumanFolderRef.ShoulderArm.Jnt.PS;
    DriverPos = {0.50*pi};
    DriverVel = pi/180*{ 0.0 };
    Reaction.Type = {Off};
  };

  AnyKinEqSimpleDriver GHDriver ={
    AnyKinRotational GHRotR = {
      AnyRefNode &scapula_gh = .....HumanFolderRef.Trunk.SegmentsThorax.ThoraxSeg.ij;
      AnyRefNode &humerus_gh = ...SideHumanFolderRef.ShoulderArm.Seg.Humerus.gh;
      Type = RotAxesAngles;
      Axis1 = z;
      Axis2 = x;
      Axis3 = y;
    };
    MeasureOrganizer={0,1,2};
    DriverPos = pi/180*{..Sign*10.0,35,0.0 };
    DriverVel = {0,0,0};
    Reaction.Type = {Off,Off,Off};
  };

  //---------------------------------------------------------------------
  //Finger drivers
  #if RIGHT_DETAILLED_HAND*RIGHT_ARM + LEFT_DETAILLED_HAND*LEFT_ARM == 0
  #else
  //finger1
  AnyKinEqSimpleDriver CMC1Flexion={
    AnyRevoluteJoint &ref=  ..SideHumanFolderRef.ShoulderArm.Seg.Hand.Finger1.Jnt.CMCFlexion;
    DriverPos={0}*pi/180;
    DriverVel={0};
  };

  AnyKinEqSimpleDriver CMC1Abduction={
    AnyRevoluteJoint &ref=  ..SideHumanFolderRef.ShoulderArm.Seg.Hand.Finger1.Jnt.CMCAbduction;
    DriverPos={0}*pi/180;
    DriverVel={0};
  };


  AnyKinEqSimpleDriver MCP1Flexion={

    AnyRevoluteJoint &ref=..SideHumanFolderRef.ShoulderArm.Seg.Hand.Finger1.Jnt.MCPFlexion;
    DriverPos={0}*pi/180;
    DriverVel={0};

  };
  AnyKinEqSimpleDriver MCP1Abduction={

    AnyRevoluteJoint &ref=..SideHumanFolderRef.ShoulderArm.Seg.Hand.Finger1.Jnt.MCPAbduction;
    DriverPos={0}*pi/180;
    DriverVel={0};

  };

  AnyKinEqSimpleDriver DIP1={
    AnyRevoluteJoint &ref=  ..SideHumanFolderRef.ShoulderArm.Seg.Hand.Finger1.Jnt.DIP;
    DriverPos={0}*pi/180;
    DriverVel={0};
  };


 // finger2
//    AnyKinEqSimpleDriver CMC2={
//      AnyUniversalJoint &ref=  ..SideHumanFolderRef.ShoulderArm.Seg.Hand.Finger2.Jnt.CMC;
//      DriverPos={0,0};
//      DriverVel={0,0};
//    };
  AnyKinEqSimpleDriver MCP2={
    AnyRevoluteJoint &ref=  ..SideHumanFolderRef.ShoulderArm.Seg.Hand.Finger2.Jnt.MCP;
    DriverPos={0}*pi/180;
    DriverVel={0};
  };
  AnyKinEqSimpleDriver PIP2={
    AnyRevoluteJoint &ref=  ..SideHumanFolderRef.ShoulderArm.Seg.Hand.Finger2.Jnt.PIP;
    DriverPos={0}*pi/180;
    DriverVel={0};
  };
    AnyKinEqSimpleDriver DIP2={
      AnyRevoluteJoint &ref=  ..SideHumanFolderRef.ShoulderArm.Seg.Hand.Finger2.Jnt.DIP;
      DriverPos={0};
      DriverVel={0};
    };


 // finger3
//    AnyKinEqSimpleDriver CMC3={
//      AnyUniversalJoint &ref=  ..SideHumanFolderRef.ShoulderArm.Seg.Hand.Finger3.Jnt.CMC;
//      DriverPos={0,0};
//      DriverVel={0,0};
//    };
  AnyKinEqSimpleDriver MCP3={
    AnyRevoluteJoint &ref=  ..SideHumanFolderRef.ShoulderArm.Seg.Hand.Finger3.Jnt.MCP;
    DriverPos={0}*pi/180;
    DriverVel={0};
  };
  AnyKinEqSimpleDriver PIP3={
    AnyRevoluteJoint &ref=  ..SideHumanFolderRef.ShoulderArm.Seg.Hand.Finger3.Jnt.PIP;
    DriverPos={0}*pi/180;
    DriverVel={0};
  };
    AnyKinEqSimpleDriver DIP3={
      AnyRevoluteJoint &ref=  ..SideHumanFolderRef.ShoulderArm.Seg.Hand.Finger3.Jnt.DIP;
      DriverPos={0};
      DriverVel={0};
    };


  //finger4
//    AnyKinEqSimpleDriver CMC4={
//      AnyUniversalJoint &ref=  ..SideHumanFolderRef.ShoulderArm.Seg.Hand.Finger4.Jnt.CMC;
//      DriverPos={0,0}*pi/180;
//      DriverVel={0,0};
//    };
  AnyKinEqSimpleDriver MCP4={
    AnyRevoluteJoint &ref=  ..SideHumanFolderRef.ShoulderArm.Seg.Hand.Finger4.Jnt.MCP;
    DriverPos={0}*pi/180;
    DriverVel={0};
  };
  AnyKinEqSimpleDriver PIP4={
    AnyRevoluteJoint &ref=  ..SideHumanFolderRef.ShoulderArm.Seg.Hand.Finger4.Jnt.PIP;
    DriverPos={0}*pi/180;
    DriverVel={0};
  };
    AnyKinEqSimpleDriver DIP4={
      AnyRevoluteJoint &ref=  ..SideHumanFolderRef.ShoulderArm.Seg.Hand.Finger4.Jnt.DIP;
      DriverPos={0}*pi/180;
      DriverVel={0};
    };


 // finger5
//    AnyKinEqSimpleDriver CMC5={
//      AnyUniversalJoint &ref=  ..SideHumanFolderRef.ShoulderArm.Seg.Hand.Finger5.Jnt.CMC;
//      DriverPos={0,0};
//      DriverVel={0,0};
//    };
  AnyKinEqSimpleDriver MCP5={
    AnyRevoluteJoint &ref=  ..SideHumanFolderRef.ShoulderArm.Seg.Hand.Finger5.Jnt.MCP;
    DriverPos={0}*pi/180;
    DriverVel={0};
  };
  AnyKinEqSimpleDriver PIP5={
    AnyRevoluteJoint &ref=  ..SideHumanFolderRef.ShoulderArm.Seg.Hand.Finger5.Jnt.PIP;
    DriverPos={0}*pi/180;
    DriverVel={0};
  };
    AnyKinEqSimpleDriver DIP5={
      AnyRevoluteJoint &ref=  ..SideHumanFolderRef.ShoulderArm.Seg.Hand.Finger5.Jnt.DIP;
      DriverPos={0};
      DriverVel={0};
    };
  #endif


};


// The study: Operations to be performed on the model
AnyBodyCalibrationStudy ArmCalibrationStudy2 = {
  AnyFolder &ref=.ArmCal2;
  nStep = 1;
  Kinematics.KinematicTol = 1e-07;

};
