/**This is the calibration file it will calibrate the latissimus dorsi muscle
in the article  "Esitmation of musculotendon properties in the human upperlimb"
Grian A. Garner, Marcus G. Pandy
Annals biomedical engineering Vol. 31, pp.207-220, 2003
it has been found that the latissimus dorsi muscle have limited strength
at short operation length whereas the strength is high for large operation lengths
120 deg abduction
*/
AnyFolder ArmCal5 ={
  AnyComponentDefinition obj = {};

  AnyFolder &ThoraxSegs =  ...BodyModel.Trunk.Segments;
  AnyFolder &LumbarSegs =  ...BodyModel.Trunk.Segments;
  AnyFolder &CervicalSegs =  ...BodyModel.Trunk.Segments;
  AnyFolder &LumbarSpineJoints =  ...BodyModel.Trunk.Joints.Lumbar;
  AnyFolder &LumbarCervicalJoints =  ...BodyModel.Trunk.Joints.Cervical;

  AnyFolder &SegSideCal = .SideHumanFolderRef.ShoulderArm.Segments;
  AnyFolder &JointsSideCal = .SideHumanFolderRef.ShoulderArm.Joints;

  #if BM_ARM_DELTOID_WRAPPING == _DELTOID_WRAPPING_RAKE_
  AnyFolder& DeltoidRakeRef = .SideHumanFolderRef.ShoulderArm.Muscles.ArtificialRake;
  #else
  AnyFolder& DeltoidWrappingPosteriorRef = .SideHumanFolderRef.ShoulderArm.Muscles.WrappingSurfaces.DeltoidWrappingPosterior;
  AnyFolder& DeltoidWrappingLateralRef = .SideHumanFolderRef.ShoulderArm.Muscles.WrappingSurfaces.DeltoidWrappingLateral;
  AnyFolder& DeltoidWrappingAnteriorRef = .SideHumanFolderRef.ShoulderArm.Muscles.WrappingSurfaces.DeltoidWrappingAnterior;
  #endif

  AnyFolder& LastissimusWrappingRef = .SideHumanFolderRef.ShoulderArm.Muscles.WrappingSurfaces.LatissimusDorsiWrapping;

  AnyFolder &MusParCalSide =  .SideHumanFolderRef.ShoulderArm.MuscleModels;

  AnyFixedRefFrame ground = {
    AnyRefNode node = {
      ARel=.....BodyModel.Trunk.Segments.ThoraxSeg.Axes0;
      sRel=.....BodyModel.Trunk.Segments.ThoraxSeg.r0;
    };
  };

  AnySphericalJoint ThoraxGround={
    AnyRefFrame &Ground = .ground.node;
    AnyRefFrame &Sacrum= ....BodyModel.Trunk.Segments.ThoraxSeg;
  };

  AnyKinEqSimpleDriver  ThoraxGroundDriver = {
    AnySphericalJoint &Jnt = .ThoraxGround;
    DriverPos = {0,0,0};
    DriverVel = {0,0,0};
    Reaction.Type = {Off,Off,Off};
  };


  AnyKinEqSimpleDriver NeckJntDriver = {
    AnyKinMeasure& lb = ....BodyModel.Interface.Trunk.SkullThoraxLateralBending;
    AnyKinMeasure& ar = ....BodyModel.Interface.Trunk.SkullThoraxRotation;
    AnyKinMeasure& fe = ....BodyModel.Interface.Trunk.SkullThoraxFlexion;
    DriverPos = {0,0,0};
    DriverVel = {0,0,0};
    Reaction.Type = {On,On,On};
  };

  AnyKinEqSimpleDriver ThoraxDriver ={
    AnyKinMeasure& Ref2 = ....BodyModel.Interface.Trunk.PelvisThoraxLateralBending;
    AnyKinMeasure& Ref3 = ....BodyModel.Interface.Trunk.PelvisThoraxRotation;
    AnyKinMeasure& Ref1 = ....BodyModel.Interface.Trunk.PelvisThoraxExtension;
    DriverPos = pi/180*{0,0,0};
    DriverVel = pi/180*{0,0,0};
    Reaction.Type = {On,On,On};
  };

  #if !BM_ARM_SHOULDER_RHYTHM
  AnyKinEqSimpleDriver SCDriver ={
    AnyKinMeasureOrg SC_measure = {
      AnyKinMeasure& ref = ...SideInterfaceFolderRef.SternoClavicularProtraction.SCRot;
      MeasureOrganizer = {0,1};
    };
    DriverPos = {-0.7605314, 0.3203484};
    DriverVel = {-0.0,-0.0};
    Reaction.Type = {Off,Off};
  };
  #endif

  AnyKinEqSimpleDriver WristDriver ={
    AnyKinMeasure& WF = ..SideInterfaceFolderRef.WristFlexion;
    AnyKinMeasure& WA = ..SideInterfaceFolderRef.WristAbduction;
    DriverPos = {0,0};
    DriverVel = {0,0};
    Reaction.Type = {On,On};
  };

  AnyKinEqSimpleDriver FEDriver ={
    AnyKinMeasure& FE = ..SideInterfaceFolderRef.ElbowFlexion;
    DriverPos = {90*pi/180};
    DriverVel = {0};
    Reaction.Type = {Off};
  };

  AnyKinEqSimpleDriver PSDriver ={
    AnyKinMeasure& PS = ..SideInterfaceFolderRef.ElbowPronation;
    DriverPos = pi/180*{-90};
    DriverVel = pi/180*{ 0.0 };
    Reaction.Type = {Off};
  };

  AnyKinEqSimpleDriver GHDriver ={
    AnyKinRotational &GHRotR = ..SideInterfaceFolderRef.GlenohumeralFlexion.GHMeasure;
    DriverPos = pi/180*{120.0,0,0.0 };
    DriverVel = {0,0,0};
    Reaction.Type = {Off,Off,Off};
  };

  //---------------------------------------------------------------------
  //Finger drivers
  #if BM_ARM_DETAILED_HAND
  //finger1
  AnyKinEqSimpleDriver CMC1Flexion={
    AnyRevoluteJoint &ref=  ..SideHumanFolderRef.ShoulderArm.Segments.Hand.Finger1.Jnt.CMCFlexion;
    DriverPos={0}*pi/180;
    DriverVel={0};
  };

  AnyKinEqSimpleDriver CMC1Abduction={
    AnyRevoluteJoint &ref=  ..SideHumanFolderRef.ShoulderArm.Segments.Hand.Finger1.Jnt.CMCAbduction;
    DriverPos={0}*pi/180;
    DriverVel={0};
  };


  AnyKinEqSimpleDriver MCP1Flexion={

    AnyRevoluteJoint &ref=..SideHumanFolderRef.ShoulderArm.Segments.Hand.Finger1.Jnt.MCPFlexion;
    DriverPos={0}*pi/180;
    DriverVel={0};

  };
  AnyKinEqSimpleDriver MCP1Abduction={

    AnyRevoluteJoint &ref=..SideHumanFolderRef.ShoulderArm.Segments.Hand.Finger1.Jnt.MCPAbduction;
    DriverPos={0}*pi/180;
    DriverVel={0};

  };

  AnyKinEqSimpleDriver DIP1={
    AnyRevoluteJoint &ref=  ..SideHumanFolderRef.ShoulderArm.Segments.Hand.Finger1.Jnt.DIP;
    DriverPos={0}*pi/180;
    DriverVel={0};
  };


 // finger2
//    AnyKinEqSimpleDriver CMC2={
//      AnyUniversalJoint &ref=  ..SideHumanFolderRef.ShoulderArm.Segments.Hand.Finger2.Jnt.CMC;
//      DriverPos={0,0};
//      DriverVel={0,0};
//    };
  AnyKinEqSimpleDriver MCP2={
    AnyRevoluteJoint &ref=  ..SideHumanFolderRef.ShoulderArm.Segments.Hand.Finger2.Jnt.MCP;
    DriverPos={0}*pi/180;
    DriverVel={0};
  };
  AnyKinEqSimpleDriver PIP2={
    AnyRevoluteJoint &ref=  ..SideHumanFolderRef.ShoulderArm.Segments.Hand.Finger2.Jnt.PIP;
    DriverPos={0}*pi/180;
    DriverVel={0};
  };
    AnyKinEqSimpleDriver DIP2={
      AnyRevoluteJoint &ref=  ..SideHumanFolderRef.ShoulderArm.Segments.Hand.Finger2.Jnt.DIP;
      DriverPos={0};
      DriverVel={0};
    };


 // finger3
//    AnyKinEqSimpleDriver CMC3={
//      AnyUniversalJoint &ref=  ..SideHumanFolderRef.ShoulderArm.Segments.Hand.Finger3.Jnt.CMC;
//      DriverPos={0,0};
//      DriverVel={0,0};
//    };
  AnyKinEqSimpleDriver MCP3={
    AnyRevoluteJoint &ref=  ..SideHumanFolderRef.ShoulderArm.Segments.Hand.Finger3.Jnt.MCP;
    DriverPos={0}*pi/180;
    DriverVel={0};
  };
  AnyKinEqSimpleDriver PIP3={
    AnyRevoluteJoint &ref=  ..SideHumanFolderRef.ShoulderArm.Segments.Hand.Finger3.Jnt.PIP;
    DriverPos={0}*pi/180;
    DriverVel={0};
  };
    AnyKinEqSimpleDriver DIP3={
      AnyRevoluteJoint &ref=  ..SideHumanFolderRef.ShoulderArm.Segments.Hand.Finger3.Jnt.DIP;
      DriverPos={0};
      DriverVel={0};
    };


  //finger4
//    AnyKinEqSimpleDriver CMC4={
//      AnyUniversalJoint &ref=  ..SideHumanFolderRef.ShoulderArm.Segments.Hand.Finger4.Jnt.CMC;
//      DriverPos={0,0}*pi/180;
//      DriverVel={0,0};
//    };
  AnyKinEqSimpleDriver MCP4={
    AnyRevoluteJoint &ref=  ..SideHumanFolderRef.ShoulderArm.Segments.Hand.Finger4.Jnt.MCP;
    DriverPos={0}*pi/180;
    DriverVel={0};
  };
  AnyKinEqSimpleDriver PIP4={
    AnyRevoluteJoint &ref=  ..SideHumanFolderRef.ShoulderArm.Segments.Hand.Finger4.Jnt.PIP;
    DriverPos={0}*pi/180;
    DriverVel={0};
  };
    AnyKinEqSimpleDriver DIP4={
      AnyRevoluteJoint &ref=  ..SideHumanFolderRef.ShoulderArm.Segments.Hand.Finger4.Jnt.DIP;
      DriverPos={0}*pi/180;
      DriverVel={0};
    };


 // finger5
//    AnyKinEqSimpleDriver CMC5={
//      AnyUniversalJoint &ref=  ..SideHumanFolderRef.ShoulderArm.Segments.Hand.Finger5.Jnt.CMC;
//      DriverPos={0,0};
//      DriverVel={0,0};
//    };
  AnyKinEqSimpleDriver MCP5={
    AnyRevoluteJoint &ref=  ..SideHumanFolderRef.ShoulderArm.Segments.Hand.Finger5.Jnt.MCP;
    DriverPos={0}*pi/180;
    DriverVel={0};
  };
  AnyKinEqSimpleDriver PIP5={
    AnyRevoluteJoint &ref=  ..SideHumanFolderRef.ShoulderArm.Segments.Hand.Finger5.Jnt.PIP;
    DriverPos={0}*pi/180;
    DriverVel={0};
  };
    AnyKinEqSimpleDriver DIP5={
      AnyRevoluteJoint &ref=  ..SideHumanFolderRef.ShoulderArm.Segments.Hand.Finger5.Jnt.DIP;
      DriverPos={0};
      DriverVel={0};
    };
  #endif

  AnyString MusPrefix = CompleteNameOf(&.SideHumanFolderRef.ShoulderArm.Muscles);


   AnyObjectPtrArray LatissimusDorsiMuscles = ObjSearch(MusPrefix+".*.LatissimusDorsi*", "AnyMuscle");

};


// The study: Operations to be performed on the model
AnyBodyCalibrationStudy ArmCalibrationStudy5 = {
  AnyFolder &ref=.ArmCal5;
  nStep = 1;
  MuscleArr = ref.LatissimusDorsiMuscles;
  Kinematics.KinematicTol = 1e-07;
  Kinematics.SmallStepAssumptionOnOff = Off;
  InitialConditions.PosAnalysisOnlyOnOff = On;
  Kinematics.PosAnalysisOnlyOnOff = On;
};
