 //This will run calibration on the right arm
AnyFolder LeftShoulderCal={
  AnyFolder &SideHumanFolderRef=..BodyModel.Left;
  AnyFolder &SideInterfaceFolderRef=..BodyModel.Interface.Left;
  #include "ShoulderCal.any"
};

AnyFolder LeftElbowCal={
  AnyFolder &SideHumanFolderRef=..BodyModel.Left;
  AnyFolder &SideInterfaceFolderRef=..BodyModel.Interface.Left;
  #include "ElbowCal.any"
};

AnyFolder LeftWristCal={
  AnyFolder &SideHumanFolderRef=..BodyModel.Left;
  AnyFolder &SideInterfaceFolderRef=..BodyModel.Interface.Left;
  #include "WristCal.any"
};

AnyFolder LeftSpineDependentCal={
  AnyFolder &SideHumanFolderRef=..BodyModel.Left;
  AnyFolder &SideInterfaceFolderRef=..BodyModel.Interface.Left;
  AnyVar Sign = -1;
  #include "SpineDependentCal.any"
};


CalibrationSequence ={
  AnyOperation &ArmCalLeftShoulder = .LeftShoulderCal.ArmCalibrationStudyShoulder.FiberAndTendonLengthAdjustment;
  AnyOperation &ArmCalLeftElbow = .LeftElbowCal.ArmCalibrationStudyElbow.FiberAndTendonLengthAdjustment;
  AnyOperation &ArmCalLeftWrist = .LeftWristCal.ArmCalibrationStudyWrist.FiberAndTendonLengthAdjustment;
  AnyOperation &ArmCalLeftSpineDependent = .LeftSpineDependentCal.ArmCalibrationStudySpineDependent.FiberAndTendonLengthAdjustment;

};
