AnyFolder DeltoidLateralWrapCyl ={

  AnySeg Cyl ={

    r0=...Seg.Scapula.r0;
    Axes0=...Seg.Scapula.Axes0;
    Mass=0;
    Jii={0,0,0};
    AnyRefNode ai= {sRel=....Seg.Scapula.ai.sRel;};
    AnyRefNode gh= {
      sRel=....Seg.Scapula.gh.sRel;
      ARel=....Seg.Scapula.gh.ARel;
      AnyRefNode DeltoidPosteriorWrap ={
        sRel=.....Seg.Scapula.gh.DeltoidPosteriorWrap.sRel;
        ARel=.....Seg.Scapula.gh.DeltoidPosteriorWrap.ARel;
      };

    };
    AnyRefNode RotNode= {
      sRel=.gh.sRel;
      ARel =RotMat(sRel,.ai.sRel,....Seg.Scapula.ts.sRel);
      AnyDrawRefFrame drw ={
        ScaleXYZ={1,1,1}*0.3;
        RGB={0,1,0};};
    };
  };

  AnySphericalJoint ai_Joint={
    AnyRefNode &ref1=.Cyl.ai;
    AnyRefNode &ref2=...Seg.Scapula.ai;
  };

  AnyKinLinear gh_lin ={
    AnyRefNode &ref1=.Cyl.gh;
    AnyRefNode &ref2=...Seg.Humerus.gh;
    Ref=0;
  };

  AnyKinEq gh_lin_drv ={
    AnyKinLinear &ref=.gh_lin;
    MeasureOrganizer ={1,2};  //x is long axis...not to be driven
  };

  AnyKinRotational ai_rot ={
    AnyRefNode &ref1=.Cyl.ai;
    AnyRefNode &ref2=...Seg.Scapula.ai;
    Type=RotAxesAngles;
    Axis1=x;
        Axis2=y;
            Axis3=z;
  };

  AnyKinEq ai_rot_drv ={
    AnyKinRotational &ref=.ai_rot;
    MeasureOrganizer ={0};  //x is long axis...rot around it to be driven
  };


};
