AnyFolder &scapularef  =.Segments.Scapula;

scapularef ={

  AnyRefNode ControlNode0_0 = {sRel= ...Segments.Scapula.Scale(....._SIDE_.ShoulderArm.Data.unscaled.ModelParameters.Scapula.Scapula_Ellipsoid_0_Node0*.Mirror);};
  AnyRefNode ControlNode1_0 = {sRel= ...Segments.Scapula.Scale(....._SIDE_.ShoulderArm.Data.unscaled.ModelParameters.Scapula.Scapula_Ellipsoid_0_Node1*.Mirror);};
  AnyRefNode ControlNode2_0 = {sRel= ...Segments.Scapula.Scale(....._SIDE_.ShoulderArm.Data.unscaled.ModelParameters.Scapula.Scapula_Ellipsoid_0_Node2*.Mirror);};
  AnyRefNode ControlNode3_0 = {sRel= ...Segments.Scapula.Scale(....._SIDE_.ShoulderArm.Data.unscaled.ModelParameters.Scapula.Scapula_Ellipsoid_0_Node3*.Mirror);};

  AnyRefNode Ellipsoid_0 ={
    sRel=.ControlNode0_0.sRel;
    ARel =RotMat(sRel,.ControlNode1_0.sRel,.ControlNode2_0.sRel);
    AnySurfEllipsoid  ellipsoid ={
      AnyVar r1 = vnorm(..ControlNode0_0.sRel-..ControlNode1_0.sRel);
      AnyVar r2 = vnorm(..ControlNode0_0.sRel-..ControlNode2_0.sRel);
      AnyVar r3 = vnorm(..ControlNode0_0.sRel-..ControlNode3_0.sRel);
      Radius ={r1,r2,r3};
     };
  };
  AnyRefNode ControlNode0_1 = {sRel= ...Segments.Scapula.Scale(....._SIDE_.ShoulderArm.Data.unscaled.ModelParameters.Scapula.Scapula_Ellipsoid_1_Node0*.Mirror);};
  AnyRefNode ControlNode1_1 = {sRel= ...Segments.Scapula.Scale(....._SIDE_.ShoulderArm.Data.unscaled.ModelParameters.Scapula.Scapula_Ellipsoid_1_Node1*.Mirror);};
  AnyRefNode ControlNode2_1 = {sRel= ...Segments.Scapula.Scale(....._SIDE_.ShoulderArm.Data.unscaled.ModelParameters.Scapula.Scapula_Ellipsoid_1_Node2*.Mirror);};
  AnyRefNode ControlNode3_1 = {sRel= ...Segments.Scapula.Scale(....._SIDE_.ShoulderArm.Data.unscaled.ModelParameters.Scapula.Scapula_Ellipsoid_1_Node3*.Mirror);};

  AnyRefNode Ellipsoid_1 ={
    sRel=.ControlNode0_1.sRel;
    ARel =RotMat(sRel,.ControlNode1_1.sRel,.ControlNode2_1.sRel);
    AnySurfEllipsoid  ellipsoid ={
      AnyVar r1 = vnorm(..ControlNode0_1.sRel-..ControlNode1_1.sRel);
      AnyVar r2 = vnorm(..ControlNode0_1.sRel-..ControlNode2_1.sRel);
      AnyVar r3 = vnorm(..ControlNode0_1.sRel-..ControlNode3_1.sRel);
      Radius ={r1,r2,r3};
     };
  };
   AnyRefNode ControlNode0_2 = {sRel= ...Segments.Scapula.Scale(....._SIDE_.ShoulderArm.Data.unscaled.ModelParameters.Scapula.Scapula_Ellipsoid_2_Node0*.Mirror);};
  AnyRefNode ControlNode1_2 = {sRel= ...Segments.Scapula.Scale(....._SIDE_.ShoulderArm.Data.unscaled.ModelParameters.Scapula.Scapula_Ellipsoid_2_Node1*.Mirror);};
  AnyRefNode ControlNode2_2 = {sRel= ...Segments.Scapula.Scale(....._SIDE_.ShoulderArm.Data.unscaled.ModelParameters.Scapula.Scapula_Ellipsoid_2_Node2*.Mirror);};
  AnyRefNode ControlNode3_2 = {sRel= ...Segments.Scapula.Scale(....._SIDE_.ShoulderArm.Data.unscaled.ModelParameters.Scapula.Scapula_Ellipsoid_2_Node3*.Mirror);};

  AnyRefNode Ellipsoid_2 ={
    sRel=.ControlNode0_2.sRel;
    ARel =RotMat(sRel,.ControlNode1_2.sRel,.ControlNode2_2.sRel);
    AnySurfEllipsoid  ellipsoid ={
      AnyVar r1 = vnorm(..ControlNode0_2.sRel-..ControlNode1_2.sRel);
      AnyVar r2 = vnorm(..ControlNode0_2.sRel-..ControlNode2_2.sRel);
      AnyVar r3 = vnorm(..ControlNode0_2.sRel-..ControlNode3_2.sRel);
      Radius ={r1,r2,r3};
     };
  };
  AnyRefNode ControlNode0_3 = {sRel= ...Segments.Scapula.Scale(....._SIDE_.ShoulderArm.Data.unscaled.ModelParameters.Scapula.Scapula_Ellipsoid_3_Node0*.Mirror);};
  AnyRefNode ControlNode1_3 = {sRel= ...Segments.Scapula.Scale(....._SIDE_.ShoulderArm.Data.unscaled.ModelParameters.Scapula.Scapula_Ellipsoid_3_Node1*.Mirror);};
  AnyRefNode ControlNode2_3 = {sRel= ...Segments.Scapula.Scale(....._SIDE_.ShoulderArm.Data.unscaled.ModelParameters.Scapula.Scapula_Ellipsoid_3_Node2*.Mirror);};
  AnyRefNode ControlNode3_3 = {sRel= ...Segments.Scapula.Scale(....._SIDE_.ShoulderArm.Data.unscaled.ModelParameters.Scapula.Scapula_Ellipsoid_3_Node3*.Mirror);};
   AnyRefNode Ellipsoid_3 ={
    sRel=.ControlNode0_3.sRel;
    ARel =RotMat(sRel,.ControlNode1_3.sRel,.ControlNode2_3.sRel);
    AnySurfEllipsoid  ellipsoid ={
      AnyVar r1 = vnorm(..ControlNode0_3.sRel-..ControlNode1_3.sRel);
      AnyVar r2 = vnorm(..ControlNode0_3.sRel-..ControlNode2_3.sRel);
      AnyVar r3 = vnorm(..ControlNode0_3.sRel-..ControlNode3_3.sRel);
      Radius ={r1,r2,r3};
     };
  };
  AnyRefNode ControlNode0_4 = {sRel= ...Segments.Scapula.Scale(....._SIDE_.ShoulderArm.Data.unscaled.ModelParameters.Scapula.Scapula_Ellipsoid_4_Node0*.Mirror);};
  AnyRefNode ControlNode1_4 = {sRel= ...Segments.Scapula.Scale(....._SIDE_.ShoulderArm.Data.unscaled.ModelParameters.Scapula.Scapula_Ellipsoid_4_Node1*.Mirror);};
  AnyRefNode ControlNode2_4 = {sRel= ...Segments.Scapula.Scale(....._SIDE_.ShoulderArm.Data.unscaled.ModelParameters.Scapula.Scapula_Ellipsoid_4_Node2*.Mirror);};
  AnyRefNode ControlNode3_4 = {sRel= ...Segments.Scapula.Scale(....._SIDE_.ShoulderArm.Data.unscaled.ModelParameters.Scapula.Scapula_Ellipsoid_4_Node3*.Mirror);};
   AnyRefNode Ellipsoid_4 ={
    sRel=.ControlNode0_4.sRel;
    ARel =RotMat(sRel,.ControlNode1_4.sRel,.ControlNode2_4.sRel);
    AnySurfEllipsoid  ellipsoid ={
      AnyVar r1 = vnorm(..ControlNode0_4.sRel-..ControlNode1_4.sRel);
      AnyVar r2 = vnorm(..ControlNode0_4.sRel-..ControlNode2_4.sRel);
      AnyVar r3 = vnorm(..ControlNode0_4.sRel-..ControlNode3_4.sRel);
      Radius ={r1,r2,r3};
     };
  };

   AnyRefNode ControlNode0_5 = {sRel= ...Segments.Scapula.Scale(....._SIDE_.ShoulderArm.Data.unscaled.ModelParameters.Scapula.Scapula_Ellipsoid_5_Node0*.Mirror);};
  AnyRefNode ControlNode1_5 = {sRel= ...Segments.Scapula.Scale(....._SIDE_.ShoulderArm.Data.unscaled.ModelParameters.Scapula.Scapula_Ellipsoid_5_Node1*.Mirror);};
  AnyRefNode ControlNode2_5 = {sRel= ...Segments.Scapula.Scale(....._SIDE_.ShoulderArm.Data.unscaled.ModelParameters.Scapula.Scapula_Ellipsoid_5_Node2*.Mirror);};
  AnyRefNode ControlNode3_5 = {sRel= ...Segments.Scapula.Scale(....._SIDE_.ShoulderArm.Data.unscaled.ModelParameters.Scapula.Scapula_Ellipsoid_5_Node3*.Mirror);};
  AnyRefNode Ellipsoid_5 ={
    sRel=.ControlNode0_5.sRel;
    ARel =RotMat(sRel,.ControlNode1_5.sRel,.ControlNode2_5.sRel);
    AnySurfEllipsoid  ellipsoid ={
      AnyVar r1 = vnorm(..ControlNode0_5.sRel-..ControlNode1_5.sRel);
      AnyVar r2 = vnorm(..ControlNode0_5.sRel-..ControlNode2_5.sRel);
      AnyVar r3 = vnorm(..ControlNode0_5.sRel-..ControlNode3_5.sRel);
      Radius ={r1,r2,r3};
     };
  };

  AnyRefNode ControlNode0_6 = {sRel= ...Segments.Scapula.Scale(....._SIDE_.ShoulderArm.Data.unscaled.ModelParameters.Scapula.Scapula_Ellipsoid_6_Node0*.Mirror);};
  AnyRefNode ControlNode1_6 = {sRel= ...Segments.Scapula.Scale(....._SIDE_.ShoulderArm.Data.unscaled.ModelParameters.Scapula.Scapula_Ellipsoid_6_Node1*.Mirror);};
  AnyRefNode ControlNode2_6 = {sRel= ...Segments.Scapula.Scale(....._SIDE_.ShoulderArm.Data.unscaled.ModelParameters.Scapula.Scapula_Ellipsoid_6_Node2*.Mirror);};
  AnyRefNode ControlNode3_6 = {sRel= ...Segments.Scapula.Scale(....._SIDE_.ShoulderArm.Data.unscaled.ModelParameters.Scapula.Scapula_Ellipsoid_6_Node3*.Mirror);};
   AnyRefNode Ellipsoid_6 ={
    sRel=.ControlNode0_6.sRel;
    ARel =RotMat(sRel,.ControlNode1_6.sRel,.ControlNode2_6.sRel);
    AnySurfEllipsoid  ellipsoid ={
      AnyVar r1 = vnorm(..ControlNode0_6.sRel-..ControlNode1_6.sRel);
      AnyVar r2 = vnorm(..ControlNode0_6.sRel-..ControlNode2_6.sRel);
      AnyVar r3 = vnorm(..ControlNode0_6.sRel-..ControlNode3_6.sRel);
      Radius ={r1,r2,r3};
     };
  };


};
