// *******************************************************************************************************
// *******************************************************************************************************
// Plzen 2019
// *******************************************************************************************************
// *******************************************************************************************************

// *******************************************************************************************************
// Interossei Palmares
// *******************************************************************************************************
AnyViaPointMuscle Interossei_Palmares_I_1 ={
  AnyMuscleModel &MusMdl = ...MusPar.Interossei_Palmares_I_1;
  AnyRefNode &Org = ...Seg.Hand.Finger2MetaRef.O_Interossei_Palmares_I_1;
  AnyRefNode &Via1 = ...Seg.Hand.Finger2MetaRef.Via_Interossei_Palmares_I_1;
  AnyRefNode &Via2 = ...Seg.Hand.Finger2MetaRef.Via01_Interossei_Palmares_I_1;
  AnyRefNode &Ins = ...Seg.Hand.Finger2ProximalRef.I_Interossei_Palmares_I_1;
  AnyDrawMuscle DrwMus = {#include "../drawSettings/MusDrawSettings.any"};
//  AnySurfTorus &Torus1 = ...Seg.Hand.Finger2.Seg.Metacarpal.Interossei_Palmares_I_1.TorusCenter_I.Torus_I;
//  AnySurfTorus &Torus2 = ...Seg.Hand.Finger2.Seg.Metacarpal.Interossei_Palmares_I_1_01.TorusCenter01_I.Torus01_I;
//  AnyMatrix InitWrapPosVectors1 = transf3D({{0,0,-Torus1.MinorRadius},{0,0,Torus1.MinorRadius}},&Torus1);
//  AnyMatrix InitWrapPosVectors2 = transf3D({{0,0,-Torus2.MinorRadius},{0,0,Torus2.MinorRadius}},&Torus2);
//  #include "Parameter_IntrinsicFinger.any"
  //  SPLine.InitWrapPosVecArr = {None,&InitWrapPosVectors1,&InitWrapPosVectors2};
  //SPLine.InitWrapPosOnlyOnOff = On;
};
AnyViaPointMuscle Interossei_Palmares_I_2 ={
  AnyMuscleModel &MusMdl = ...MusPar.Interossei_Palmares_I_2;
  AnyRefNode &Org = ...Seg.Hand.Finger2MetaRef.O_Interossei_Palmares_I_2;
  AnyRefNode &Via1 = ...Seg.Hand.Finger2MetaRef.Via_Interossei_Palmares_I_2;
  AnyRefNode &Via2 = ...Seg.Hand.Finger2MetaRef.Via01_Interossei_Palmares_I_2;
  AnyRefNode &Ins = ...Seg.Hand.Finger2ProximalRef.I_Interossei_Palmares_I_2;
  AnyDrawMuscle DrwMus = {#include "../drawSettings/MusDrawSettings.any"};
//  AnySurfTorus &Torus1 = ...Seg.Hand.Finger2.Seg.Metacarpal.Interossei_Palmares_I_2.TorusCenter_I.Torus_I;
//  AnySurfTorus &Torus2 = ...Seg.Hand.Finger2.Seg.Metacarpal.Interossei_Palmares_I_2_01.TorusCenter01_I.Torus01_I;
//  #include "Parameter_IntrinsicFinger.any"
//  AnyMatrix InitWrapPosVectors1 = transf3D({{0,0,-Torus1.MinorRadius},{0,0,Torus1.MinorRadius}},&Torus1);
//  AnyMatrix InitWrapPosVectors2 = transf3D({{0,0,-Torus2.MinorRadius},{0,0,Torus2.MinorRadius}},&Torus2);
  //  SPLine.InitWrapPosVecArr = {None,&InitWrapPosVectors1,&InitWrapPosVectors2};
  //SPLine.InitWrapPosOnlyOnOff = On;
};
AnyViaPointMuscle Interossei_Palmares_II_1 ={
  AnyMuscleModel &MusMdl = ...MusPar.Interossei_Palmares_II_1;
  AnyRefNode &Org = ...Seg.Hand.Finger4MetaRef.O_Interossei_Palmares_II_1;
  AnyRefNode &Via1 = ...Seg.Hand.Finger4MetaRef.Via_Interossei_Palmares_II_1;
  AnyRefNode &Via2 = ...Seg.Hand.Finger4MetaRef.Via01_Interossei_Palmares_II_1;
  AnyRefNode &Ins = ...Seg.Hand.Finger4ProximalRef.I_Interossei_Palmares_II_1;
  AnyDrawMuscle DrwMus = {#include "../drawSettings/MusDrawSettings.any"};
//  AnySurfTorus &Torus1 = ...Seg.Hand.Finger4.Seg.Metacarpal.Interossei_Palmares_II_1.TorusCenter_II.Torus_II;
//  AnySurfTorus &Torus2 = ...Seg.Hand.Finger4.Seg.Metacarpal.Interossei_Palmares_II_1_01.TorusCenter01_II.Torus01_II;
//  #include "Parameter_IntrinsicFinger.any"
//  AnyMatrix InitWrapPosVectors1 = transf3D({{0,0,-Torus1.MinorRadius},{0,0,Torus1.MinorRadius}},&Torus1);
//  AnyMatrix InitWrapPosVectors2 = transf3D({{0,0,-Torus2.MinorRadius},{0,0,Torus2.MinorRadius}},&Torus2);
  //  SPLine.InitWrapPosVecArr = {None,&InitWrapPosVectors1,&InitWrapPosVectors2};
  //SPLine.InitWrapPosOnlyOnOff = On;
};
AnyViaPointMuscle Interossei_Palmares_II_2 ={
  AnyMuscleModel &MusMdl = ...MusPar.Interossei_Palmares_II_2;
  AnyRefNode &Org = ...Seg.Hand.Finger4MetaRef.O_Interossei_Palmares_II_2;
  AnyRefNode &Via1 = ...Seg.Hand.Finger4MetaRef.Via_Interossei_Palmares_II_2;
  AnyRefNode &Via2 = ...Seg.Hand.Finger4MetaRef.Via01_Interossei_Palmares_II_2;
  AnyRefNode &Ins = ...Seg.Hand.Finger4ProximalRef.I_Interossei_Palmares_II_2;
  AnyDrawMuscle DrwMus = {#include "../drawSettings/MusDrawSettings.any"};
//  AnySurfTorus &Torus1 = ...Seg.Hand.Finger4.Seg.Metacarpal.Interossei_Palmares_II_2.TorusCenter_II.Torus_II;
//  AnySurfTorus &Torus2 = ...Seg.Hand.Finger4.Seg.Metacarpal.Interossei_Palmares_II_2_01.TorusCenter01_II.Torus01_II;
//  #include "Parameter_IntrinsicFinger.any"
//  AnyMatrix InitWrapPosVectors1 = transf3D({{0,0,-Torus1.MinorRadius},{0,0,Torus1.MinorRadius}},&Torus1);
//  AnyMatrix InitWrapPosVectors2 = transf3D({{0,0,-Torus2.MinorRadius},{0,0,Torus2.MinorRadius}},&Torus2);
  //  SPLine.InitWrapPosVecArr = {None,&InitWrapPosVectors1,&InitWrapPosVectors2};
  //SPLine.InitWrapPosOnlyOnOff = On;
};
AnyViaPointMuscle Interossei_Palmares_III_1 ={
  AnyMuscleModel &MusMdl = ...MusPar.Interossei_Palmares_III_1;
  AnyRefNode &Org = ...Seg.Hand.Finger5MetaRef.O_Interossei_Palmares_III_1;
  AnyRefNode &Via1 = ...Seg.Hand.Finger5MetaRef.Via_Interossei_Palmares_III_1;
  AnyRefNode &Via2 = ...Seg.Hand.Finger5MetaRef.Via01_Interossei_Palmares_III_1;
  AnyRefNode &Ins = ...Seg.Hand.Finger5ProximalRef.I_Interossei_Palmares_III_1;
  AnyDrawMuscle DrwMus = {#include "../drawSettings/MusDrawSettings.any"};
//  AnySurfTorus &Torus1 = ...Seg.Hand.Finger5.Seg.Metacarpal.Interossei_Palmares_III_1.TorusCenter_III.Torus_III;
//  AnySurfTorus &Torus2 = ...Seg.Hand.Finger5.Seg.Metacarpal.Interossei_Palmares_III_1_01.TorusCenter01_III.Torus01_III;
//  #include "Parameter_IntrinsicFinger.any"
//  AnyMatrix InitWrapPosVectors1 = transf3D({{0,0,-Torus1.MinorRadius},{0,0,Torus1.MinorRadius}},&Torus1);
//  AnyMatrix InitWrapPosVectors2 = transf3D({{0,0,-Torus2.MinorRadius},{0,0,Torus2.MinorRadius}},&Torus2);
  //  SPLine.InitWrapPosVecArr = {None,&InitWrapPosVectors1,&InitWrapPosVectors2};
  //SPLine.InitWrapPosOnlyOnOff = On;
};
AnyViaPointMuscle Interossei_Palmares_III_2 ={
  AnyMuscleModel &MusMdl = ...MusPar.Interossei_Palmares_III_2;
  AnyRefNode &Org = ...Seg.Hand.Finger5MetaRef.O_Interossei_Palmares_III_2;
  AnyRefNode &Via1 = ...Seg.Hand.Finger5MetaRef.Via_Interossei_Palmares_III_2;
  AnyRefNode &Via2 = ...Seg.Hand.Finger5MetaRef.Via01_Interossei_Palmares_III_2;
  AnyRefNode &Ins = ...Seg.Hand.Finger5ProximalRef.I_Interossei_Palmares_III_2;
  AnyDrawMuscle DrwMus = {#include "../drawSettings/MusDrawSettings.any"};
//  AnySurfTorus &Torus1 = ...Seg.Hand.Finger5.Seg.Metacarpal.Interossei_Palmares_III_2.TorusCenter_III.Torus_III;
//  AnySurfTorus &Torus2 = ...Seg.Hand.Finger5.Seg.Metacarpal.Interossei_Palmares_III_2_01.TorusCenter01_III.Torus01_III;
//  #include "Parameter_IntrinsicFinger.any"
//  AnyMatrix InitWrapPosVectors1 = transf3D({{0,0,-Torus1.MinorRadius},{0,0,Torus1.MinorRadius}},&Torus1);
//  AnyMatrix InitWrapPosVectors2 = transf3D({{0,0,-Torus2.MinorRadius},{0,0,Torus2.MinorRadius}},&Torus2);
  //  SPLine.InitWrapPosVecArr = {None,&InitWrapPosVectors1,&InitWrapPosVectors2};
  //SPLine.InitWrapPosOnlyOnOff = On;
};
// *******************************************************************************************************
// Abductor Digiti Minimi
// *******************************************************************************************************

AnyViaPointMuscle Abductor_Digiti_Minimi_1 ={
  AnyMuscleModel &MusMdl = ...MusPar.Abductor_Digiti_Minimi;
  AnyRefNode &Org = ...Seg.Hand.Carpals.O_Abductor_Digiti_Minimi_1;
  AnyRefNode &Via1 = ...Seg.Hand.Finger5MetaRef.Via_Abductor_Digiti_Minimi_1;
  AnyRefNode &Via2 = ...Seg.Hand.Finger5MetaRef.Via01_Abductor_Digiti_Minimi_1;
  AnyRefNode &Ins = ...Seg.Hand.Finger5ProximalRef.I_Abductor_Digiti_Minimi_1;
  AnyDrawMuscle DrwMus = {#include "../drawSettings/MusDrawSettings.any"};
//  AnySurfTorus &Torus1 = ...Seg.Hand.Finger5.Seg.Metacarpal.Abductor_Digiti_Minimi_1.TorusCenter.Torus;
//  AnySurfTorus &Torus2 = ...Seg.Hand.Finger5.Seg.Metacarpal.Abductor_Digiti_Minimi_1_01.TorusCenter01.Torus01;
//  SPLine.StringMesh = 90;
//  AnyMatrix InitWrapPosVectors1 = transf3D({{0,0,-Torus1.MinorRadius},{0,0,Torus1.MinorRadius}},&Torus1);
//  AnyMatrix InitWrapPosVectors2 = transf3D({{0,0,-Torus2.MinorRadius},{0,0,Torus2.MinorRadius}},&Torus2);
//  SPLine.InitWrapPosVecArr = {None,&InitWrapPosVectors1,&InitWrapPosVectors2};
  //SPLine.InitWrapPosOnlyOnOff = On;
};

// *******************************************************************************************************
// Opponens Digiti Minimi
// *******************************************************************************************************
AnyViaPointMuscle Opponens_Digiti_Minimi_1 ={
  AnyMuscleModel &MusMdl = ...MusPar.Opponens_Digiti_Minimi_1;
  AnyRefNode &Org = ...Seg.Hand.Carpals.O_Opponens_Digiti_Minimi_1;
  AnyRefNode &Via1 = ...Seg.Hand.Finger5MetaRef.Via_Opponens_Digiti_Minimi_1;
  AnyRefNode &Ins = ...Seg.Hand.Finger5MetaRef.I_Opponens_Digiti_Minimi_1;
  AnyDrawMuscle DrwMus = {#include "../drawSettings/MusDrawSettings.any"};
//  AnySurfTorus &Torus1 = ...Seg.Hand.Finger5.Seg.Metacarpal.Opponens_Digiti_Minimi_1.TorusCenter.Torus;
//  #include "Parameter_IntrinsicFinger.any"
//  AnyMatrix InitWrapPosVectors1 = transf3D({{0,0,-Torus1.MinorRadius},{0,0,Torus1.MinorRadius}},&Torus1);
//  SPLine.InitWrapPosVecArr = {None,&InitWrapPosVectors1};
  //  SPLine.InitWrapPosOnlyOnOff = On;
};
AnyViaPointMuscle Opponens_Digiti_Minimi_2 ={
  AnyMuscleModel &MusMdl = ...MusPar.Opponens_Digiti_Minimi_2;
  AnyRefNode &Org = ...Seg.Hand.Carpals.O_Opponens_Digiti_Minimi_2;
  AnyRefNode &Via1 = ...Seg.Hand.Finger5MetaRef.Via_Opponens_Digiti_Minimi_2;
  AnyRefNode &Ins = ...Seg.Hand.Finger5MetaRef.I_Opponens_Digiti_Minimi_2;
  AnyDrawMuscle DrwMus = {#include "../drawSettings/MusDrawSettings.any"};
//  AnySurfTorus &Torus1 = ...Seg.Hand.Finger5.Seg.Metacarpal.Opponens_Digiti_Minimi_2.TorusCenter.Torus;
//  #include "Parameter_IntrinsicFinger.any"
//  AnyMatrix InitWrapPosVectors1 = transf3D({{0,0,-Torus1.MinorRadius},{0,0,Torus1.MinorRadius}},&Torus1);
//  SPLine.InitWrapPosVecArr = {None,&InitWrapPosVectors1};
  //  SPLine.InitWrapPosOnlyOnOff = On;
};
// *******************************************************************************************************
// Flexor Digiti Minimi Brevis
// *******************************************************************************************************
AnyShortestPathMuscle Flexor_Digiti_Minimi_Brevis ={
  AnyMuscleModel &MusMdl = ...MusPar.Flexor_Digiti_Minimi_Brevis;
  AnyRefNode &Org = ...Seg.Hand.Carpals.O_Flexor_Digiti_Minimi_Brevis;
  AnyRefNode &Via1 = ...Seg.Hand.Finger5MetaRef.Via_Flexor_Digiti_Minimi_Brevis;
  AnyRefNode &Ins = ...Seg.Hand.Finger5ProximalRef.I_Flexor_Digiti_Minimi_Brevis;
  AnyDrawMuscle DrwMus = {#include "../drawSettings/MusDrawSettings.any"};
  AnySurfTorus &Torus1 = ...Seg.Hand.Finger5.Seg.Metacarpal.Flexor_Digiti_Minimi_Brevis.TorusCenter.Torus;
  #include "Parameter_IntrinsicFinger.any"
  AnyMatrix InitWrapPosVectors1 = transf3D({{0,0,-Torus1.MinorRadius},{0,0,Torus1.MinorRadius}},&Torus1);
  SPLine.InitWrapPosVecArr = {&InitWrapPosVectors1,None};
  // SPLine.InitWrapPosOnlyOnOff = On;
};
// *******************************************************************************************************
// Interossei Dorsales
// *******************************************************************************************************
AnyShortestPathMuscle Interossei_Dorsales_I_Finger2_1 ={
  AnyMuscleModel &MusMdl = ...MusPar.Interossei_I_Dorsales_Finger2_1;
  AnyRefNode &Org = ...Seg.Hand.Finger2MetaRef.O_Interossei_I_Dorsales_Finger2_1;
  AnyRefNode &Via1 = ...Seg.Hand.Finger2MetaRef.Via_Interossei_I_Dorsales_Finger2_1;
//  AnyRefNode &Via2 = ...Seg.Hand.Finger2MetaRef.Via01_Interossei_I_Dorsales_Finger2_1;
  AnyRefNode &Ins = ...Seg.Hand.Finger2ProximalRef.I_Interossei_I_Dorsales_Finger2_1;
  AnyDrawMuscle DrwMus = {#include "../drawSettings/MusDrawSettings.any"};
//  AnySurfTorus &Torus1 = ...Seg.Hand.Finger2.Seg.Metacarpal.Interossei_Dorsales_I_Finger2_1.TorusCenter_I.Torus_I;
//  AnySurfTorus &Torus2 = ...Seg.Hand.Finger2.Seg.Metacarpal.Interossei_Dorsales_I_Finger2_1_01.TorusCenter01.Torus01;
AnyParamSurf &Surf1 =  ...Seg.Hand.Finger2.Seg.Metacarpal.MetaJointCyl2.cyl;
AnyParamSurf &Surf2 =  ...Seg.Hand.Finger2.Seg.Metacarpal.MetaJointCyl3.cyl;
AnyParamSurf &Surf3 = ...Seg.Hand.Finger2.Seg.Metacarpal.DistalJointNode.Jointsphere;
#include "Parameter_IntrinsicFinger.any"
  AnyMatrix InitWrapPosVectors1 = transf3D({{Surf1.Radius,Surf1.Radius,Surf1.Length/2}},&Surf1);
//  AnyMatrix InitWrapPosVectors2 = transf3D({{0,0,-Torus2.MinorRadius},{0,0,Torus2.MinorRadius}},&Torus2);
  SPLine.InitWrapPosVecArr = {None,&InitWrapPosVectors1};
//    SPLine.InitWrapPosOnlyOnOff = On;
};

AnyShortestPathMuscle Interossei_Dorsales_I_Finger2_2 ={
  AnyMuscleModel &MusMdl = ...MusPar.Interossei_I_Dorsales_Finger2_2;
  AnyRefNode &Org = ...Seg.Hand.Finger2MetaRef.O_Interossei_I_Dorsales_Finger2_2;
//  AnyRefNode &Via2 = ...Seg.Hand.Finger2MetaRef.Via01_Interossei_I_Dorsales_Finger2_2;
  AnyRefNode &Ins = ...Seg.Hand.Finger2ProximalRef.I_Interossei_I_Dorsales_Finger2_2;
  AnyDrawMuscle DrwMus = {#include "../drawSettings/MusDrawSettings.any"};
//  AnySurfTorus &Torus1 = ...Seg.Hand.Finger2.Seg.Metacarpal.Interossei_Dorsales_I_Finger2_2_01.TorusCenter01.Torus01;
AnyParamSurf &Surf1 =  ...Seg.Hand.Finger2.Seg.Metacarpal.MetaJointCyl2.cyl;
AnyParamSurf &Surf2 =  ...Seg.Hand.Finger2.Seg.Metacarpal.MetaJointCyl3.cyl;
AnyParamSurf &Surf3 = ...Seg.Hand.Finger2.Seg.Metacarpal.DistalJointNode.Jointsphere;
#include "Parameter_IntrinsicFinger.any"
AnyMatrix InitWrapPosVectors1 = transf3D({{Surf1.Radius,Surf1.Radius,Surf1.Length/2}},&Surf1);
//  AnyMatrix InitWrapPosVectors1 = transf3D({{0,0,-Torus1.MinorRadius},{0,0,Torus1.MinorRadius}},&Torus1);
  SPLine.InitWrapPosVecArr = {&InitWrapPosVectors1};
  //  SPLine.InitWrapPosOnlyOnOff = On;
};
AnyShortestPathMuscle Interossei_Dorsales_I_Finger2_3 ={
  AnyMuscleModel &MusMdl = ...MusPar.Interossei_I_Dorsales_Finger2_3;
  AnyRefNode &Org = ...Seg.Hand.Finger2MetaRef.O_Interossei_I_Dorsales_Finger2_3;
//  AnyRefNode &Via2 = ...Seg.Hand.Finger2MetaRef.Via01_Interossei_I_Dorsales_Finger2_3;
  AnyRefNode &Ins = ...Seg.Hand.Finger2ProximalRef.I_Interossei_I_Dorsales_Finger2_3;
  AnyDrawMuscle DrwMus = {#include "../drawSettings/MusDrawSettings.any"};
//  AnySurfTorus &Torus1 = ...Seg.Hand.Finger2.Seg.Metacarpal.Interossei_Dorsales_I_Finger2_3_01.TorusCenter01.Torus01;
AnyParamSurf &Surf1 =  ...Seg.Hand.Finger2.Seg.Metacarpal.MetaJointCyl2.cyl;
AnyParamSurf &Surf2 =  ...Seg.Hand.Finger2.Seg.Metacarpal.MetaJointCyl3.cyl;
AnyParamSurf &Surf3 = ...Seg.Hand.Finger2.Seg.Metacarpal.DistalJointNode.Jointsphere;
#include "Parameter_IntrinsicFinger.any"
AnyMatrix InitWrapPosVectors1 = transf3D({{Surf1.Radius,Surf1.Radius,Surf1.Length/2}},&Surf1);
//  AnyMatrix InitWrapPosVectors1 = transf3D({{0,0,-Torus1.MinorRadius},{0,0,Torus1.MinorRadius}},&Torus1);
  SPLine.InitWrapPosVecArr = {&InitWrapPosVectors1};
  //  SPLine.InitWrapPosOnlyOnOff = On;
};
AnyShortestPathMuscle Interossei_Dorsales_I_Finger1_1 ={
  AnyMuscleModel &MusMdl = ...MusPar.Interossei_I_Dorsales_Finger1_1;
  AnyRefNode &Org = ...Seg.Hand.Finger1MetaRef.O_Interossei_I_Dorsales_Finger1_1;
  AnyRefNode &Via1 = ...Seg.Hand.Finger1MetaRef.Via_Interossei_I_Dorsales_Finger1_1;
//  AnyRefNode &Via2 = ...Seg.Hand.Finger2MetaRef.Via01_Interossei_I_Dorsales_Finger21_1;
  AnyRefNode &Ins = ...Seg.Hand.Finger2ProximalRef.I_Interossei_I_Dorsales_Finger1_1;
  AnyDrawMuscle DrwMus = {#include "../drawSettings/MusDrawSettings.any"};
//  AnySurfTorus &Torus1 = ...Seg.Hand.Finger1.Seg.Metacarpal.Interossei_Dorsales_I_Finger1_1.TorusCenter_II.Torus_II;
//  AnySurfTorus &Torus2 = ...Seg.Hand.Finger2.Seg.Metacarpal.Interossei_Dorsales_I_Finger21_1_01.TorusCenter01.Torus01;
AnyParamSurf &Surf1 =  ...Seg.Hand.Finger2.Seg.Metacarpal.MetaJointCyl2.cyl;
AnyParamSurf &Surf2 =  ...Seg.Hand.Finger2.Seg.Metacarpal.MetaJointCyl3.cyl;
AnyParamSurf &Surf3 = ...Seg.Hand.Finger2.Seg.Metacarpal.DistalJointNode.Jointsphere;
#include "Parameter_IntrinsicFinger.any"
AnyMatrix InitWrapPosVectors1 = transf3D({{Surf1.Radius,Surf1.Radius,Surf1.Length/2}},&Surf1);
//  AnyMatrix InitWrapPosVectors1 = transf3D({{0,0,-Torus1.MinorRadius},{0,0,Torus1.MinorRadius}},&Torus1);
//  AnyMatrix InitWrapPosVectors2 = transf3D({{0,0,-Torus2.MinorRadius},{0,0,Torus2.MinorRadius}},&Torus2);
  SPLine.InitWrapPosVecArr = {None,&InitWrapPosVectors1};
  //  SPLine.InitWrapPosOnlyOnOff = On;
};
AnyShortestPathMuscle Interossei_Dorsales_I_Finger1_2 ={
  AnyMuscleModel &MusMdl = ...MusPar.Interossei_I_Dorsales_Finger1_2;
  AnyRefNode &Org = ...Seg.Hand.Finger1MetaRef.O_Interossei_I_Dorsales_Finger1_2;
  AnyRefNode &Via1 = ...Seg.Hand.Finger1MetaRef.Via_Interossei_I_Dorsales_Finger1_2;
//  AnyRefNode &Via2 = ...Seg.Hand.Finger2MetaRef.Via01_Interossei_I_Dorsales_Finger21_2;
  AnyRefNode &Ins = ...Seg.Hand.Finger2ProximalRef.I_Interossei_I_Dorsales_Finger1_2;
  AnyDrawMuscle DrwMus = {#include "../drawSettings/MusDrawSettings.any"};
//  AnySurfTorus &Torus1 = ...Seg.Hand.Finger1.Seg.Metacarpal.Interossei_Dorsales_I_Finger1_2.TorusCenter_II.Torus_II;
//  AnySurfTorus &Torus2 = ...Seg.Hand.Finger2.Seg.Metacarpal.Interossei_Dorsales_I_Finger21_2_01.TorusCenter01.Torus01;
AnyParamSurf &Surf1 =  ...Seg.Hand.Finger2.Seg.Metacarpal.MetaJointCyl2.cyl;
AnyParamSurf &Surf2 =  ...Seg.Hand.Finger2.Seg.Metacarpal.MetaJointCyl3.cyl;
AnyParamSurf &Surf3 = ...Seg.Hand.Finger2.Seg.Metacarpal.DistalJointNode.Jointsphere;
#include "Parameter_IntrinsicFinger.any"
AnyMatrix InitWrapPosVectors1 = transf3D({{Surf1.Radius,Surf1.Radius,Surf1.Length/2}},&Surf1);
//  AnyMatrix InitWrapPosVectors1 = transf3D({{0,0,-Torus1.MinorRadius},{0,0,Torus1.MinorRadius}},&Torus1);
//  AnyMatrix InitWrapPosVectors2 = transf3D({{0,0,-Torus2.MinorRadius},{0,0,Torus2.MinorRadius}},&Torus2);
  SPLine.InitWrapPosVecArr = {None,&InitWrapPosVectors1};
  //  SPLine.InitWrapPosOnlyOnOff = On;
};
AnyShortestPathMuscle Interossei_Dorsales_II_Finger2_1 ={
  AnyMuscleModel &MusMdl = ...MusPar.Interossei_II_Dorsales_Finger2_1;
  AnyRefNode &Org = ...Seg.Hand.Finger2MetaRef.O_Interossei_II_Dorsales_Finger2_1;
  AnyRefNode &Via1 = ...Seg.Hand.Finger3MetaRef.Via01_Interossei_II_Dorsales_Finger2_1;
//  AnyRefNode &Via2 = ...Seg.Hand.Finger3MetaRef.Via_Interossei_II_Dorsales_Finger2_1;
  AnyRefNode &Ins = ...Seg.Hand.Finger3ProximalRef.I_Interossei_II_Dorsales_Finger2_1;
  AnyDrawMuscle DrwMus = {#include "../drawSettings/MusDrawSettings.any"};
//  AnySurfTorus &Torus1 = ...Seg.Hand.Finger3.Seg.Metacarpal.Interossei_Dorsales_II_Finger2_1.TorusCenter01.Torus01;
//  AnySurfTorus &Torus2 = ...Seg.Hand.Finger3.Seg.Metacarpal.Interossei_Dorsales_II_Finger2_1_01.TorusCenter_III.Torus_III;
AnyParamSurf &Surf1 =  ...Seg.Hand.Finger3.Seg.Metacarpal.MetaJointCyl2.cyl;
AnyParamSurf &Surf2 =  ...Seg.Hand.Finger3.Seg.Metacarpal.MetaJointCyl3.cyl;
#include "Parameter_IntrinsicFinger.any"
//  AnyMatrix InitWrapPosVectors1 = transf3D({{0,0,-Torus1.MinorRadius},{0,0,Torus1.MinorRadius}},&Torus1);
//  AnyMatrix InitWrapPosVectors2 = transf3D({{0,0,-Torus2.MinorRadius},{0,0,Torus2.MinorRadius}},&Torus2);
//  SPLine.InitWrapPosVecArr = {None,&InitWrapPosVectors1,&InitWrapPosVectors2};
  //  SPLine.InitWrapPosOnlyOnOff = On;
};
AnyShortestPathMuscle Interossei_Dorsales_II_Finger2_2 ={
  AnyMuscleModel &MusMdl = ...MusPar.Interossei_II_Dorsales_Finger2_2;
  AnyRefNode &Org = ...Seg.Hand.Finger2MetaRef.O_Interossei_II_Dorsales_Finger2_2;
  AnyRefNode &Via1 = ...Seg.Hand.Finger3MetaRef.Via01_Interossei_II_Dorsales_Finger2_2;
//  AnyRefNode &Via2 = ...Seg.Hand.Finger3MetaRef.Via_Interossei_II_Dorsales_Finger2_2;
  AnyRefNode &Ins = ...Seg.Hand.Finger3ProximalRef.I_Interossei_II_Dorsales_Finger2_2;
  AnyDrawMuscle DrwMus = {#include "../drawSettings/MusDrawSettings.any"};
//  AnySurfTorus &Torus1 = ...Seg.Hand.Finger3.Seg.Metacarpal.Interossei_Dorsales_II_Finger2_2.TorusCenter01.Torus01;
//  AnySurfTorus &Torus2 = ...Seg.Hand.Finger3.Seg.Metacarpal.Interossei_Dorsales_II_Finger2_2_01.TorusCenter_III.Torus_III;
AnyParamSurf &Surf1 =  ...Seg.Hand.Finger3.Seg.Metacarpal.MetaJointCyl2.cyl;
AnyParamSurf &Surf2 =  ...Seg.Hand.Finger3.Seg.Metacarpal.MetaJointCyl3.cyl;
#include "Parameter_IntrinsicFinger.any"
//  AnyMatrix InitWrapPosVectors1 = transf3D({{0,0,-Torus1.MinorRadius},{0,0,Torus1.MinorRadius}},&Torus1);
//  AnyMatrix InitWrapPosVectors2 = transf3D({{0,0,-Torus2.MinorRadius},{0,0,Torus2.MinorRadius}},&Torus2);
//  SPLine.InitWrapPosVecArr = {None,&InitWrapPosVectors1,&InitWrapPosVectors2};
  //  SPLine.InitWrapPosOnlyOnOff = On;
};
AnyShortestPathMuscle Interossei_Dorsales_II_Finger2_3 ={
  AnyMuscleModel &MusMdl = ...MusPar.Interossei_II_Dorsales_Finger2_3;
  AnyRefNode &Org = ...Seg.Hand.Finger2MetaRef.O_Interossei_II_Dorsales_Finger2_3;
  AnyRefNode &Via1 = ...Seg.Hand.Finger3MetaRef.Via_Interossei_II_Dorsales_Finger2_3;
  AnyRefNode &Ins = ...Seg.Hand.Finger3ProximalRef.I_Interossei_II_Dorsales_Finger2_3;
  AnyDrawMuscle DrwMus = {#include "../drawSettings/MusDrawSettings.any"};
//  AnySurfTorus &Torus1 = ...Seg.Hand.Finger3.Seg.Metacarpal.Interossei_Dorsales_II_Finger2_3.TorusCenter01.Torus01;
AnyParamSurf &Surf1 =  ...Seg.Hand.Finger3.Seg.Metacarpal.MetaJointCyl2.cyl;
AnyParamSurf &Surf2 =  ...Seg.Hand.Finger3.Seg.Metacarpal.MetaJointCyl3.cyl;
#include "Parameter_IntrinsicFinger.any"
//  AnyMatrix InitWrapPosVectors1 = transf3D({{0,0,-Torus1.MinorRadius},{0,0,Torus1.MinorRadius}},&Torus1);
//  SPLine.InitWrapPosVecArr = {None,&InitWrapPosVectors1};
  //  SPLine.InitWrapPosOnlyOnOff = On;
};

AnyShortestPathMuscle Interossei_Dorsales_II_Finger3_1 ={
  AnyMuscleModel &MusMdl = ...MusPar.Interossei_II_Dorsales_Finger3_1;
  AnyRefNode &Org = ...Seg.Hand.Finger3MetaRef.O_Interossei_II_Dorsales_Finger3_1;
  AnyRefNode &Via2 = ...Seg.Hand.Finger3MetaRef.Via_Interossei_II_Dorsales_Finger3_1;
  AnyRefNode &Ins = ...Seg.Hand.Finger3ProximalRef.I_Interossei_II_Dorsales_Finger3_1;
  AnyDrawMuscle DrwMus = {#include "../drawSettings/MusDrawSettings.any"};
//  AnySurfTorus &Torus1 = ...Seg.Hand.Finger3.Seg.Metacarpal.Interossei_Dorsales_II_Finger3_1_01.TorusCenter01.Torus01;
AnyParamSurf &Surf1 =  ...Seg.Hand.Finger3.Seg.Metacarpal.MetaJointCyl2.cyl;
AnyParamSurf &Surf2 =  ...Seg.Hand.Finger3.Seg.Metacarpal.MetaJointCyl3.cyl;
#include "Parameter_IntrinsicFinger.any"
 AnyMatrix InitWrapPosVectors1 = transf3D({{Surf1.Radius,Surf1.Radius,Surf1.Length/2}},&Surf1);
//  AnyMatrix InitWrapPosVectors1 = transf3D({{0,0,-Torus1.MinorRadius},{0,0,Torus1.MinorRadius}},&Torus1);
  SPLine.InitWrapPosVecArr = {None,&InitWrapPosVectors1};
  //  SPLine.InitWrapPosOnlyOnOff = On;
};
AnyShortestPathMuscle Interossei_Dorsales_II_Finger3_2 ={
  AnyMuscleModel &MusMdl = ...MusPar.Interossei_II_Dorsales_Finger3_2;
  AnyRefNode &Org = ...Seg.Hand.Finger3MetaRef.O_Interossei_II_Dorsales_Finger3_2;
  AnyRefNode &Via1 = ...Seg.Hand.Finger3MetaRef.Via01_Interossei_II_Dorsales_Finger3_2;
//  AnyRefNode &Via2 = ...Seg.Hand.Finger3MetaRef.Via_Interossei_II_Dorsales_Finger3_2;
  AnyRefNode &Ins = ...Seg.Hand.Finger3ProximalRef.I_Interossei_II_Dorsales_Finger3_2;
  AnyDrawMuscle DrwMus = {#include "../drawSettings/MusDrawSettings.any"};
//  AnySurfTorus &Torus1 = ...Seg.Hand.Finger3.Seg.Metacarpal.Interossei_Dorsales_II_Finger3_2_01.TorusCenter01.Torus01;
//  AnySurfTorus &Torus2 = ...Seg.Hand.Finger3.Seg.Metacarpal.Interossei_Dorsales_II_Finger3_2.TorusCenter_III.Torus_III;
AnyParamSurf &Surf1 =  ...Seg.Hand.Finger3.Seg.Metacarpal.MetaJointCyl2.cyl;
AnyParamSurf &Surf2 =  ...Seg.Hand.Finger3.Seg.Metacarpal.MetaJointCyl3.cyl;
#include "Parameter_IntrinsicFinger.any"
 AnyMatrix InitWrapPosVectors1 = transf3D({{Surf1.Radius,Surf1.Radius,Surf1.Length/2}},&Surf1);
//  AnyMatrix InitWrapPosVectors1 = transf3D({{0,0,-Torus1.MinorRadius},{0,0,Torus1.MinorRadius}},&Torus1);
//  AnyMatrix InitWrapPosVectors2 = transf3D({{0,0,-Torus2.MinorRadius},{0,0,Torus2.MinorRadius}},&Torus2);
  SPLine.InitWrapPosVecArr = {None,&InitWrapPosVectors1};
  //  SPLine.InitWrapPosOnlyOnOff = On;
};
AnyShortestPathMuscle Interossei_Dorsales_II_Finger3_3 ={
  AnyMuscleModel &MusMdl = ...MusPar.Interossei_II_Dorsales_Finger3_3;
  AnyRefNode &Org = ...Seg.Hand.Finger3MetaRef.O_Interossei_II_Dorsales_Finger3_3;
  AnyRefNode &Via1 = ...Seg.Hand.Finger3MetaRef.Via01_Interossei_II_Dorsales_Finger3_3;
//  AnyRefNode &Via2 = ...Seg.Hand.Finger3MetaRef.Via_Interossei_II_Dorsales_Finger3_3;
  AnyRefNode &Ins = ...Seg.Hand.Finger3ProximalRef.I_Interossei_II_Dorsales_Finger3_3;
  AnyDrawMuscle DrwMus = {#include "../drawSettings/MusDrawSettings.any"};
//  AnySurfTorus &Torus1 = ...Seg.Hand.Finger3.Seg.Metacarpal.Interossei_Dorsales_II_Finger3_3_01.TorusCenter01.Torus01;
//  AnySurfTorus &Torus2 = ...Seg.Hand.Finger3.Seg.Metacarpal.Interossei_Dorsales_II_Finger3_3.TorusCenter_III.Torus_III;
AnyParamSurf &Surf1 =  ...Seg.Hand.Finger3.Seg.Metacarpal.MetaJointCyl2.cyl;
AnyParamSurf &Surf2 =  ...Seg.Hand.Finger3.Seg.Metacarpal.MetaJointCyl3.cyl;
#include "Parameter_IntrinsicFinger.any"
 AnyMatrix InitWrapPosVectors1 = transf3D({{Surf1.Radius,Surf1.Radius,Surf1.Length/2}},&Surf1);
//  AnyMatrix InitWrapPosVectors1 = transf3D({{0,0,-Torus1.MinorRadius},{0,0,Torus1.MinorRadius}},&Torus1);
//  AnyMatrix InitWrapPosVectors2 = transf3D({{0,0,-Torus2.MinorRadius},{0,0,Torus2.MinorRadius}},&Torus2);
  SPLine.InitWrapPosVecArr = {None,&InitWrapPosVectors1};
  //  SPLine.InitWrapPosOnlyOnOff = On;
};
AnyShortestPathMuscle Interossei_Dorsales_III_Finger3_1 ={
  AnyMuscleModel &MusMdl = ...MusPar.Interossei_III_Dorsales_Finger3_1;
  AnyRefNode &Org = ...Seg.Hand.Finger3MetaRef.O_Interossei_III_Dorsales_Finger3_1;
  AnyRefNode &Via1 = ...Seg.Hand.Finger3MetaRef.Via01_Interossei_III_Dorsales_Finger3_1;
//  AnyRefNode &Via2 = ...Seg.Hand.Finger3MetaRef.Via_Interossei_III_Dorsales_Finger3_1;
  AnyRefNode &Ins = ...Seg.Hand.Finger3ProximalRef.I_Interossei_III_Dorsales_Finger3_1;
  AnyDrawMuscle DrwMus = {#include "../drawSettings/MusDrawSettings.any"};
//  AnySurfTorus &Torus1 = ...Seg.Hand.Finger3.Seg.Metacarpal.Interossei_Dorsales_III_Finger3_1_01.TorusCenter01.Torus01;
//  AnySurfTorus &Torus2 = ...Seg.Hand.Finger3.Seg.Metacarpal.Interossei_Dorsales_III_Finger3_1.TorusCenter_III.Torus_III;
AnyParamSurf &Surf1 =  ...Seg.Hand.Finger3.Seg.Metacarpal.MetaJointCyl2.cyl;
AnyParamSurf &Surf2 =  ...Seg.Hand.Finger3.Seg.Metacarpal.MetaJointCyl3.cyl;
#include "Parameter_IntrinsicFinger.any"
 AnyMatrix InitWrapPosVectors1 = transf3D({{Surf1.Radius,Surf1.Radius,Surf1.Length/2}},&Surf1);
//  AnyMatrix InitWrapPosVectors1 = transf3D({{0,0,-Torus1.MinorRadius},{0,0,Torus1.MinorRadius}},&Torus1);
//  AnyMatrix InitWrapPosVectors2 = transf3D({{0,0,-Torus2.MinorRadius},{0,0,Torus2.MinorRadius}},&Torus2);
  SPLine.InitWrapPosVecArr = {None,&InitWrapPosVectors1};
  //  SPLine.InitWrapPosOnlyOnOff = On;
};
AnyShortestPathMuscle Interossei_Dorsales_III_Finger3_2 ={
  AnyMuscleModel &MusMdl = ...MusPar.Interossei_III_Dorsales_Finger3_2;
  AnyRefNode &Org = ...Seg.Hand.Finger3MetaRef.O_Interossei_III_Dorsales_Finger3_2;
  AnyRefNode &Via1 = ...Seg.Hand.Finger3MetaRef.Via01_Interossei_III_Dorsales_Finger3_2;
//  AnyRefNode &Via2 = ...Seg.Hand.Finger3MetaRef.Via_Interossei_III_Dorsales_Finger3_2;
  AnyRefNode &Ins = ...Seg.Hand.Finger3ProximalRef.I_Interossei_III_Dorsales_Finger3_2;
  AnyDrawMuscle DrwMus = {#include "../drawSettings/MusDrawSettings.any"};
//  AnySurfTorus &Torus1 = ...Seg.Hand.Finger3.Seg.Metacarpal.Interossei_Dorsales_III_Finger3_2_01.TorusCenter01.Torus01;
//  AnySurfTorus &Torus2 = ...Seg.Hand.Finger3.Seg.Metacarpal.Interossei_Dorsales_III_Finger3_2.TorusCenter_III.Torus_III;
AnyParamSurf &Surf1 =  ...Seg.Hand.Finger3.Seg.Metacarpal.MetaJointCyl2.cyl;
AnyParamSurf &Surf2 =  ...Seg.Hand.Finger3.Seg.Metacarpal.MetaJointCyl3.cyl;
#include "Parameter_IntrinsicFinger.any"
 AnyMatrix InitWrapPosVectors1 = transf3D({{Surf1.Radius,Surf1.Radius,Surf1.Length/2}},&Surf1);
//  AnyMatrix InitWrapPosVectors1 = transf3D({{0,0,-Torus1.MinorRadius},{0,0,Torus1.MinorRadius}},&Torus1);
//  AnyMatrix InitWrapPosVectors2 = transf3D({{0,0,-Torus2.MinorRadius},{0,0,Torus2.MinorRadius}},&Torus2);
  SPLine.InitWrapPosVecArr = {None,&InitWrapPosVectors1};
  //  SPLine.InitWrapPosOnlyOnOff = On;
};
AnyShortestPathMuscle Interossei_Dorsales_III_Finger3_3 ={
  AnyMuscleModel &MusMdl = ...MusPar.Interossei_III_Dorsales_Finger3_3;
  AnyRefNode &Org = ...Seg.Hand.Finger3MetaRef.O_Interossei_III_Dorsales_Finger3_3;
  AnyRefNode &Via2 = ...Seg.Hand.Finger3MetaRef.Via_Interossei_III_Dorsales_Finger3_3;
  AnyRefNode &Ins = ...Seg.Hand.Finger3ProximalRef.I_Interossei_III_Dorsales_Finger3_3;
  AnyDrawMuscle DrwMus = {#include "../drawSettings/MusDrawSettings.any"};
//  AnySurfTorus &Torus1 = ...Seg.Hand.Finger3.Seg.Metacarpal.Interossei_Dorsales_III_Finger3_3_01.TorusCenter01.Torus01;
AnyParamSurf &Surf1 =  ...Seg.Hand.Finger3.Seg.Metacarpal.MetaJointCyl2.cyl;
AnyParamSurf &Surf2 =  ...Seg.Hand.Finger3.Seg.Metacarpal.MetaJointCyl3.cyl;
#include "Parameter_IntrinsicFinger.any"
 AnyMatrix InitWrapPosVectors1 = transf3D({{Surf1.Radius,Surf1.Radius,Surf1.Length/2}},&Surf1);
//  AnyMatrix InitWrapPosVectors1 = transf3D({{0,0,-Torus1.MinorRadius},{0,0,Torus1.MinorRadius}},&Torus1);
  SPLine.InitWrapPosVecArr = {None,&InitWrapPosVectors1};
  //  SPLine.InitWrapPosOnlyOnOff = On;
};
AnyShortestPathMuscle Interossei_Dorsales_III_Finger4_1 ={
  AnyMuscleModel &MusMdl = ...MusPar.Interossei_III_Dorsales_Finger4_1;
  AnyRefNode &Org = ...Seg.Hand.Finger4MetaRef.O_Interossei_III_Dorsales_Finger4_1;
  AnyRefNode &Via1 = ...Seg.Hand.Finger3MetaRef.Via01_Interossei_III_Dorsales_Finger4_1;
//  AnyRefNode &Via2 = ...Seg.Hand.Finger3MetaRef.Via_Interossei_III_Dorsales_Finger4_1;
  AnyRefNode &Ins = ...Seg.Hand.Finger3ProximalRef.I_Interossei_III_Dorsales_Finger3a_1;
  AnyDrawMuscle DrwMus = {#include "../drawSettings/MusDrawSettings.any"};
//  AnySurfTorus &Torus1 = ...Seg.Hand.Finger3.Seg.Metacarpal.Interossei_Dorsales_III_Finger4_1_01.TorusCenter01.Torus01;
//  AnySurfTorus &Torus2 = ...Seg.Hand.Finger3.Seg.Metacarpal.Interossei_Dorsales_III_Finger4_1.TorusCenter_III.Torus_III;
AnyParamSurf &Surf1 =  ...Seg.Hand.Finger3.Seg.Metacarpal.MetaJointCyl2.cyl;
AnyParamSurf &Surf2 =  ...Seg.Hand.Finger3.Seg.Metacarpal.MetaJointCyl3.cyl;
#include "Parameter_IntrinsicFinger.any"
 AnyMatrix InitWrapPosVectors1 = transf3D({{Surf1.Radius,Surf1.Radius,Surf1.Length/2}},&Surf1);
//  AnyMatrix InitWrapPosVectors1 = transf3D({{0,0,-Torus1.MinorRadius},{0,0,Torus1.MinorRadius}},&Torus1);
//  AnyMatrix InitWrapPosVectors2 = transf3D({{0,0,-Torus2.MinorRadius},{0,0,Torus2.MinorRadius}},&Torus2);
  SPLine.InitWrapPosVecArr = {None,&InitWrapPosVectors1};
  //  SPLine.InitWrapPosOnlyOnOff = On;
};
AnyShortestPathMuscle Interossei_Dorsales_III_Finger4_2 ={
  AnyMuscleModel &MusMdl = ...MusPar.Interossei_III_Dorsales_Finger4_2;
  AnyRefNode &Org = ...Seg.Hand.Finger4MetaRef.O_Interossei_III_Dorsales_Finger4_2;
  AnyRefNode &Via2 = ...Seg.Hand.Finger3MetaRef.Via_Interossei_III_Dorsales_Finger4_2;
  AnyRefNode &Ins = ...Seg.Hand.Finger3ProximalRef.I_Interossei_III_Dorsales_Finger3a_2;
  AnyDrawMuscle DrwMus = {#include "../drawSettings/MusDrawSettings.any"};
//  AnySurfTorus &Torus1 = ...Seg.Hand.Finger3.Seg.Metacarpal.Interossei_Dorsales_III_Finger4_2_01.TorusCenter01.Torus01;
AnyParamSurf &Surf1 =  ...Seg.Hand.Finger3.Seg.Metacarpal.MetaJointCyl2.cyl;
AnyParamSurf &Surf2 =  ...Seg.Hand.Finger3.Seg.Metacarpal.MetaJointCyl3.cyl;
#include "Parameter_IntrinsicFinger.any"
 AnyMatrix InitWrapPosVectors1 = transf3D({{Surf1.Radius,Surf1.Radius,Surf1.Length/2}},&Surf1);
//  AnyMatrix InitWrapPosVectors1 = transf3D({{0,0,-Torus1.MinorRadius},{0,0,Torus1.MinorRadius}},&Torus1);
  SPLine.InitWrapPosVecArr = {None,&InitWrapPosVectors1};
  //  SPLine.InitWrapPosOnlyOnOff = On;
};
AnyShortestPathMuscle Interossei_Dorsales_III_Finger4_3 ={
  AnyMuscleModel &MusMdl = ...MusPar.Interossei_III_Dorsales_Finger4_3;
  AnyRefNode &Org = ...Seg.Hand.Finger4MetaRef.O_Interossei_III_Dorsales_Finger4_3;
  AnyRefNode &Via2 = ...Seg.Hand.Finger3MetaRef.Via_Interossei_III_Dorsales_Finger4_3;
  AnyRefNode &Ins = ...Seg.Hand.Finger3ProximalRef.I_Interossei_III_Dorsales_Finger3a_3;
  AnyDrawMuscle DrwMus = {#include "../drawSettings/MusDrawSettings.any"};
//  AnySurfTorus &Torus1 = ...Seg.Hand.Finger3.Seg.Metacarpal.Interossei_Dorsales_III_Finger4_3_01.TorusCenter01.Torus01;
AnyParamSurf &Surf1 =  ...Seg.Hand.Finger3.Seg.Metacarpal.MetaJointCyl2.cyl;
AnyParamSurf &Surf2 =  ...Seg.Hand.Finger3.Seg.Metacarpal.MetaJointCyl3.cyl;
#include "Parameter_IntrinsicFinger.any"
 AnyMatrix InitWrapPosVectors1 = transf3D({{Surf1.Radius,Surf1.Radius,Surf1.Length/2}},&Surf1);
//  AnyMatrix InitWrapPosVectors1 = transf3D({{0,0,-Torus1.MinorRadius},{0,0,Torus1.MinorRadius}},&Torus1);
  SPLine.InitWrapPosVecArr = {None,&InitWrapPosVectors1};
  //  SPLine.InitWrapPosOnlyOnOff = On;
};
AnyShortestPathMuscle Interossei_Dorsales_IV_Finger4_1 ={
  AnyMuscleModel &MusMdl = ...MusPar.Interossei_IV_Dorsales_Finger4_1;
  AnyRefNode &Org = ...Seg.Hand.Finger4MetaRef.O_Interossei_IV_Dorsales_Finger4_1;
  AnyRefNode &Via2 = ...Seg.Hand.Finger4MetaRef.Via_Interossei_IV_Dorsales_Finger4_1;
  AnyRefNode &Ins = ...Seg.Hand.Finger4ProximalRef.I_Interossei_IV_Dorsales_Finger4_1;
  AnyDrawMuscle DrwMus = {#include "../drawSettings/MusDrawSettings.any"};
//  AnySurfTorus &Torus1 = ...Seg.Hand.Finger4.Seg.Metacarpal.Interossei_Dorsales_IV_Finger4_1_01.TorusCenter01.Torus01;
AnyParamSurf &Surf1 =  ...Seg.Hand.Finger4.Seg.Metacarpal.MetaJointCyl2.cyl;
AnyParamSurf &Surf2 =  ...Seg.Hand.Finger4.Seg.Metacarpal.MetaJointCyl3.cyl;
#include "Parameter_IntrinsicFinger.any"
 AnyMatrix InitWrapPosVectors1 = transf3D({{Surf1.Radius,Surf1.Radius,Surf1.Length/2}},&Surf1);
//  AnyMatrix InitWrapPosVectors1 = transf3D({{0,0,-Torus1.MinorRadius},{0,0,Torus1.MinorRadius}},&Torus1);
  SPLine.InitWrapPosVecArr = {None,&InitWrapPosVectors1};
  //  SPLine.InitWrapPosOnlyOnOff = On;
};
AnyShortestPathMuscle Interossei_Dorsales_IV_Finger4_2 ={
  AnyMuscleModel &MusMdl = ...MusPar.Interossei_IV_Dorsales_Finger4_2;
  AnyRefNode &Org = ...Seg.Hand.Finger4MetaRef.O_Interossei_IV_Dorsales_Finger4_2;
  AnyRefNode &Via2 = ...Seg.Hand.Finger4MetaRef.Via_Interossei_IV_Dorsales_Finger4_2;
  AnyRefNode &Ins = ...Seg.Hand.Finger4ProximalRef.I_Interossei_IV_Dorsales_Finger4_2;
  AnyDrawMuscle DrwMus = {#include "../drawSettings/MusDrawSettings.any"};
//  AnySurfTorus &Torus1 = ...Seg.Hand.Finger4.Seg.Metacarpal.Interossei_Dorsales_IV_Finger4_2_01.TorusCenter01.Torus01;
AnyParamSurf &Surf1 =  ...Seg.Hand.Finger4.Seg.Metacarpal.MetaJointCyl2.cyl;
AnyParamSurf &Surf2 =  ...Seg.Hand.Finger4.Seg.Metacarpal.MetaJointCyl3.cyl;
#include "Parameter_IntrinsicFinger.any"
 AnyMatrix InitWrapPosVectors1 = transf3D({{Surf1.Radius,Surf1.Radius,Surf1.Length/2}},&Surf1);
//  AnyMatrix InitWrapPosVectors1 = transf3D({{0,0,-Torus1.MinorRadius},{0,0,Torus1.MinorRadius}},&Torus1);
  SPLine.InitWrapPosVecArr = {None,&InitWrapPosVectors1};
  //  SPLine.InitWrapPosOnlyOnOff = On;
};
AnyShortestPathMuscle Interossei_Dorsales_IV_Finger4_3 ={
  AnyMuscleModel &MusMdl = ...MusPar.Interossei_IV_Dorsales_Finger4_3;
  AnyRefNode &Org = ...Seg.Hand.Finger4MetaRef.O_Interossei_IV_Dorsales_Finger4_3;
  AnyRefNode &Via2 = ...Seg.Hand.Finger4MetaRef.Via_Interossei_IV_Dorsales_Finger4_3;
  AnyRefNode &Ins = ...Seg.Hand.Finger4ProximalRef.I_Interossei_IV_Dorsales_Finger4_3;
  AnyDrawMuscle DrwMus = {#include "../drawSettings/MusDrawSettings.any"};
//  AnySurfTorus &Torus1 = ...Seg.Hand.Finger4.Seg.Metacarpal.Interossei_Dorsales_IV_Finger4_3_01.TorusCenter01.Torus01;
AnyParamSurf &Surf1 =  ...Seg.Hand.Finger4.Seg.Metacarpal.MetaJointCyl2.cyl;
AnyParamSurf &Surf2 =  ...Seg.Hand.Finger4.Seg.Metacarpal.MetaJointCyl3.cyl;
#include "Parameter_IntrinsicFinger.any"
 AnyMatrix InitWrapPosVectors1 = transf3D({{Surf1.Radius,Surf1.Radius,Surf1.Length/2}},&Surf1);
//  AnyMatrix InitWrapPosVectors1 = transf3D({{0,0,-Torus1.MinorRadius},{0,0,Torus1.MinorRadius}},&Torus1);
  SPLine.InitWrapPosVecArr = {None,&InitWrapPosVectors1};
  //  SPLine.InitWrapPosOnlyOnOff = On;
};
AnyShortestPathMuscle Interossei_Dorsales_IV_Finger5_1 ={
  AnyMuscleModel &MusMdl = ...MusPar.Interossei_IV_Dorsales_Finger5_1;
  AnyRefNode &Org = ...Seg.Hand.Finger5MetaRef.O_Interossei_IV_Dorsales_Finger5_1;
  AnyRefNode &Via1 = ...Seg.Hand.Finger4MetaRef.Via01_Interossei_IV_Dorsales_Finger5_1;
//  AnyRefNode &Via2 = ...Seg.Hand.Finger4MetaRef.Via_Interossei_IV_Dorsales_Finger5_1;
  AnyRefNode &Ins = ...Seg.Hand.Finger4ProximalRef.I_Interossei_IV_Dorsales_Finger5_1;
  AnyDrawMuscle DrwMus = {#include "../drawSettings/MusDrawSettings.any"};
//  AnySurfTorus &Torus1 = ...Seg.Hand.Finger4.Seg.Metacarpal.Interossei_Dorsales_IV_Finger5_1_01.TorusCenter01.Torus01;
//  AnySurfTorus &Torus2 = ...Seg.Hand.Finger4.Seg.Metacarpal.Interossei_Dorsales_IV_Finger5_1.TorusCenter_III.Torus_III;
AnyParamSurf &Surf1 =  ...Seg.Hand.Finger4.Seg.Metacarpal.MetaJointCyl2.cyl;
AnyParamSurf &Surf2 =  ...Seg.Hand.Finger4.Seg.Metacarpal.MetaJointCyl3.cyl;
#include "Parameter_IntrinsicFinger.any"
 AnyMatrix InitWrapPosVectors1 = transf3D({{Surf1.Radius,Surf1.Radius,Surf1.Length/2}},&Surf1);
//  AnyMatrix InitWrapPosVectors1 = transf3D({{0,0,-Torus1.MinorRadius},{0,0,Torus1.MinorRadius}},&Torus1);
//  AnyMatrix InitWrapPosVectors2 = transf3D({{0,0,-Torus2.MinorRadius},{0,0,Torus2.MinorRadius}},&Torus2);
  SPLine.InitWrapPosVecArr = {None,&InitWrapPosVectors1};
  //  SPLine.InitWrapPosOnlyOnOff = On;
};
AnyShortestPathMuscle Interossei_Dorsales_IV_Finger5_2 ={
  AnyMuscleModel &MusMdl = ...MusPar.Interossei_IV_Dorsales_Finger5_2;
  AnyRefNode &Org = ...Seg.Hand.Finger5MetaRef.O_Interossei_IV_Dorsales_Finger5_2;
  AnyRefNode &Via2 = ...Seg.Hand.Finger4MetaRef.Via_Interossei_IV_Dorsales_Finger5_2;
  AnyRefNode &Ins = ...Seg.Hand.Finger4ProximalRef.I_Interossei_IV_Dorsales_Finger5_2;
  AnyDrawMuscle DrwMus = {#include "../drawSettings/MusDrawSettings.any"};
//  AnySurfTorus &Torus1 = ...Seg.Hand.Finger4.Seg.Metacarpal.Interossei_Dorsales_IV_Finger5_2_01.TorusCenter01.Torus01;
AnyParamSurf &Surf1 =  ...Seg.Hand.Finger4.Seg.Metacarpal.MetaJointCyl2.cyl;
AnyParamSurf &Surf2 =  ...Seg.Hand.Finger4.Seg.Metacarpal.MetaJointCyl3.cyl;
#include "Parameter_IntrinsicFinger.any"
 AnyMatrix InitWrapPosVectors1 = transf3D({{Surf1.Radius,Surf1.Radius,Surf1.Length/2}},&Surf1);
//  AnyMatrix InitWrapPosVectors1 = transf3D({{0,0,-Torus1.MinorRadius},{0,0,Torus1.MinorRadius}},&Torus1);
  SPLine.InitWrapPosVecArr = {None,&InitWrapPosVectors1};
  //  SPLine.InitWrapPosOnlyOnOff = On;
};
AnyShortestPathMuscle Interossei_Dorsales_IV_Finger5_3 ={
  AnyMuscleModel &MusMdl = ...MusPar.Interossei_IV_Dorsales_Finger5_3;
  AnyRefNode &Org = ...Seg.Hand.Finger5MetaRef.O_Interossei_IV_Dorsales_Finger5_3;
  AnyRefNode &Via2 = ...Seg.Hand.Finger4MetaRef.Via_Interossei_IV_Dorsales_Finger5_3;
  AnyRefNode &Ins = ...Seg.Hand.Finger4ProximalRef.I_Interossei_IV_Dorsales_Finger5_3;
  AnyDrawMuscle DrwMus = {#include "../drawSettings/MusDrawSettings.any"};
//  AnySurfTorus &Torus1 = ...Seg.Hand.Finger4.Seg.Metacarpal.Interossei_Dorsales_IV_Finger5_3_01.TorusCenter01.Torus01;
AnyParamSurf &Surf1 =  ...Seg.Hand.Finger4.Seg.Metacarpal.MetaJointCyl2.cyl;
AnyParamSurf &Surf2 =  ...Seg.Hand.Finger4.Seg.Metacarpal.MetaJointCyl3.cyl;
#include "Parameter_IntrinsicFinger.any"
 AnyMatrix InitWrapPosVectors1 = transf3D({{Surf1.Radius,Surf1.Radius,Surf1.Length/2}},&Surf1);
//  AnyMatrix InitWrapPosVectors1 = transf3D({{0,0,-Torus1.MinorRadius},{0,0,Torus1.MinorRadius}},&Torus1);
  SPLine.InitWrapPosVecArr = {None,&InitWrapPosVectors1};
  //  SPLine.InitWrapPosOnlyOnOff = On;
};
// *******************************************************************************************************
// Lumbricales
// *******************************************************************************************************
AnyViaPointMuscle Lumbricales_I ={
  AnyMuscleModel &MusMdl = ...MusPar.Lumbricales_I;
  AnyRefNode &Org = ...Seg.Hand.Finger2TendonIns.Lumbrical.Intrinsic_Seg.Point;
  AnyRefNode &ViaO6 = ...Seg.Hand.Finger2O6.LU;
  AnyRefNode &ViaO5 = ...Seg.Hand.Finger2O5.LU;
  AnyRefNode &Ins = ...Seg.Hand.Finger2ProximalRef.I_Lumbricales_I;
  //Tori
//  AnyParamSurf &TorusMCP2 = ...Seg.Hand.Finger2.Seg.ProximalPhalanx.TorusCenter2.Torus;
//  AnyParamSurf &TorusMCP1 = ...Seg.Hand.Finger2.Seg.ProximalPhalanx.TorusCenter1.Torus;
//  AnyParamSurf &TorusPIP = ...Seg.Hand.Finger2.Seg.MiddlePhalanx.ProximalJointNode.TorusCenter.Torus;
//  AnyParamSurf &TorusDIP = ...Seg.Hand.Finger2.Seg.DistalPhalanx.ProximalJointNode.TorusCenter.Torus;
//  AnyParamSurf &JointPIP = ...Seg.Hand.Finger2.Seg.ProximalPhalanx.DistalJointNode.Jointsphere;
//  AnyParamSurf &JoinrDIP = ...Seg.Hand.Finger2.Seg.MiddlePhalanx.DistalJointNode.Jointsphere;
  AnyDrawMuscle DrwMus = {#include "../drawSettings/MusDrawSettings.any"};
//  #include "Parameter_IntrinsicFinger.any"
//  SPLine.InitWrapPosVecArr = {None,None,None};

};
AnyViaPointMuscle Lumbricales_II ={
  AnyMuscleModel &MusMdl = ...MusPar.Lumbricales_II;
  AnyRefNode &Org = ...Seg.Hand.Finger3TendonIns.Lumbrical.Intrinsic_Seg.Point;
  AnyRefNode &ViaO6 = ...Seg.Hand.Finger3O6.LU;
  AnyRefNode &ViaO5 = ...Seg.Hand.Finger3O5.LU;
  AnyRefNode &Ins = ...Seg.Hand.Finger3ProximalRef.I_Lumbricales_II;
  //Tori
//  AnyParamSurf &TorusMCP2 = ...Seg.Hand.Finger3.Seg.ProximalPhalanx.TorusCenter2.Torus;
//  AnyParamSurf &TorusMCP1 = ...Seg.Hand.Finger3.Seg.ProximalPhalanx.TorusCenter1.Torus;
//  AnyParamSurf &TorusPIP = ...Seg.Hand.Finger3.Seg.MiddlePhalanx.ProximalJointNode.TorusCenter.Torus;
//  AnyParamSurf &JointPIP = ...Seg.Hand.Finger3.Seg.ProximalPhalanx.DistalJointNode.Jointsphere;
  AnyDrawMuscle DrwMus = {#include "../drawSettings/MusDrawSettings.any"};
//  #include "Parameter_IntrinsicFinger.any"
//  SPLine.InitWrapPosVecArr = {None,None,None};
};
AnyViaPointMuscle Lumbricales_III_Finger4 ={
  AnyMuscleModel &MusMdl = ...MusPar.Lumbricales_III_Finger4;
  AnyRefNode &Org = ...Seg.Hand.Finger4TendonIns.Lumbrical.Intrinsic_Seg.Point;
  AnyRefNode &ViaO6 = ...Seg.Hand.Finger4O6.LU;
  AnyRefNode &ViaO5 = ...Seg.Hand.Finger4O5.LU;
  AnyRefNode &Ins = ...Seg.Hand.Finger4ProximalRef.I_Lumbricales_III_Finger4;
  //Tori
//  AnyParamSurf &TorusMCP2 = ...Seg.Hand.Finger4.Seg.ProximalPhalanx.TorusCenter2.Torus;
//  AnyParamSurf &TorusMCP1 = ...Seg.Hand.Finger4.Seg.ProximalPhalanx.TorusCenter1.Torus;
//  AnyParamSurf &TorusPIP = ...Seg.Hand.Finger4.Seg.MiddlePhalanx.ProximalJointNode.TorusCenter.Torus;
//  AnyParamSurf &JointMCP = ...Seg.Hand.Finger4.Seg.Metacarpal.DistalJointNode.Jointsphere;
//  AnyParamSurf &JointPIP = ...Seg.Hand.Finger4.Seg.ProximalPhalanx.DistalJointNode.Jointsphere;
  AnyDrawMuscle DrwMus = {#include "../drawSettings/MusDrawSettings.any"};
//  #include "Parameter_IntrinsicFinger.any"
//  SPLine.InitWrapPosVecArr = {None,None,None};
};
AnyViaPointMuscle Lumbricales_III_Finger3 ={
  AnyMuscleModel &MusMdl = ...MusPar.Lumbricales_III_Finger3;
  AnyRefNode &Org = ...Seg.Hand.Finger3TendonIns.Lumbrical.Intrinsic_Seg.Point;
  AnyRefNode &ViaO6 = ...Seg.Hand.Finger4O6.LU;
  AnyRefNode &ViaO5 = ...Seg.Hand.Finger4O5.LU;
  AnyRefNode &Ins = ...Seg.Hand.Finger4ProximalRef.I_Lumbricales_III_Finger3;
  //Tori
//  AnyParamSurf &TorusMCP2 = ...Seg.Hand.Finger4.Seg.ProximalPhalanx.TorusCenter2.Torus;
//  AnyParamSurf &TorusMCP1 = ...Seg.Hand.Finger4.Seg.ProximalPhalanx.TorusCenter1.Torus;
//  AnyParamSurf &TorusPIP = ...Seg.Hand.Finger4.Seg.MiddlePhalanx.ProximalJointNode.TorusCenter.Torus;
//  AnyParamSurf &JointMCP = ...Seg.Hand.Finger4.Seg.Metacarpal.DistalJointNode.Jointsphere;
//  AnyParamSurf &JointPIP = ...Seg.Hand.Finger4.Seg.ProximalPhalanx.DistalJointNode.Jointsphere;
  AnyDrawMuscle DrwMus = {#include "../drawSettings/MusDrawSettings.any"};
//  #include "Parameter_IntrinsicFinger.any"
//  SPLine.InitWrapPosVecArr = {None,None,None};
};
AnyViaPointMuscle Lumbricales_IV_Finger5 ={
  AnyMuscleModel &MusMdl = ...MusPar.Lumbricales_IV_Finger5;
  AnyRefNode &Org = ...Seg.Hand.Finger5TendonIns.Lumbrical.Intrinsic_Seg.Point;
  AnyRefNode &ViaO6 = ...Seg.Hand.Finger5O6.LU;
  AnyRefNode &ViaO5 = ...Seg.Hand.Finger5O5.LU;
  AnyRefNode &Ins = ...Seg.Hand.Finger5ProximalRef.I_Lumbricales_IV_Finger5;
  //Tori
//  AnyParamSurf &TorusMCP2 = ...Seg.Hand.Finger5.Seg.ProximalPhalanx.TorusCenter2.Torus;
//  AnyParamSurf &TorusMCP1 = ...Seg.Hand.Finger5.Seg.ProximalPhalanx.TorusCenter1.Torus;
//  AnyParamSurf &TorusPIP = ...Seg.Hand.Finger5.Seg.MiddlePhalanx.ProximalJointNode.TorusCenter.Torus;
//  AnyParamSurf &JointMCP = ...Seg.Hand.Finger5.Seg.Metacarpal.DistalJointNode.Jointsphere;
//  AnyParamSurf &JointPIP = ...Seg.Hand.Finger5.Seg.ProximalPhalanx.DistalJointNode.Jointsphere;
  AnyDrawMuscle DrwMus = {#include "../drawSettings/MusDrawSettings.any"};
//  #include "Parameter_IntrinsicFinger.any"
//  SPLine.InitWrapPosVecArr = {None,None,None};
};
AnyViaPointMuscle Lumbricales_IV_Finger4 ={
  AnyMuscleModel &MusMdl = ...MusPar.Lumbricales_IV_Finger4;
  AnyRefNode &Org = ...Seg.Hand.Finger4TendonIns.Lumbrical.Intrinsic_Seg.Point;
  AnyRefNode &ViaO6 = ...Seg.Hand.Finger5O6.LU;
  AnyRefNode &ViaO5 = ...Seg.Hand.Finger5O5.LU;
  AnyRefNode &Ins = ...Seg.Hand.Finger5ProximalRef.I_Lumbricales_IV_Finger4;
  //Tori
//  AnyParamSurf &TorusMCP2 = ...Seg.Hand.Finger4.Seg.ProximalPhalanx.TorusCenter2.Torus;
//  AnyParamSurf &TorusMCP1 = ...Seg.Hand.Finger4.Seg.ProximalPhalanx.TorusCenter1.Torus;
//  AnyParamSurf &TorusPIP = ...Seg.Hand.Finger5.Seg.MiddlePhalanx.ProximalJointNode.TorusCenter.Torus;
//  AnyParamSurf &JointMCP = ...Seg.Hand.Finger5.Seg.Metacarpal.DistalJointNode.Jointsphere;
//  AnyParamSurf &JointPIP = ...Seg.Hand.Finger5.Seg.ProximalPhalanx.DistalJointNode.Jointsphere;
  AnyDrawMuscle DrwMus = {#include "../drawSettings/MusDrawSettings.any"};
//  #include "Parameter_IntrinsicFinger.any"
//  SPLine.InitWrapPosVecArr = {None,None,None};
};
// *******************************************************************************************************
// Extensor Carpi Radialis Brevis
// *******************************************************************************************************
AnyShortestPathMuscle Extensor_Carpi_Radialis_Brevis_1 ={
  AnyMuscleModel &MusMdl = ...MusPar.Extensor_Carpi_Radialis_Brevis;
  AnyRefNode &Org = ...Seg.Humerus.O_Extensor_Carpi_Radialis_Brevis_1;
  AnyRefNode &Via1 = ...Seg.Radius.Via_Extensor_Carpi_Radialis_Brevis_1;
//  AnyRefNode &Via2 = ...Seg.Radius.Via_Extensor_Carpi_Radialis_Brevis;
  AnyRefNode &Ins = ...Seg.Hand.Finger3MetaRef.I_Extensor_Carpi_Radialis_Brevis_1;
  AnyDrawMuscle DrwMus = {#include "../drawSettings/MusDrawSettings.any"};
  AnySurfCylinder &Surf1 = ...Seg.Radius.FlexorMuscleCyl.cyl_level3;
//  AnySurfCylinder &Surf2 =...Seg.Hand.Carpals.DorsalWristCyl.cyl;
  AnySurfCylinder &Surf3 = ...Seg.Radius.FlexorMuscleCyl.cyl_ECRB.cyl;
  AnyParamSurf &TorusWrist = ...Seg.Radius.Wrist_Torus.Torus;
  AnySurfCylinder &Surf4 =...Seg.Radius.DorsalCyl.cyl;
//  #include "Parameter_ExtrinsicCarpi.any"
  SPLine = {
      StringMesh = 100;
//  AugLagCoef = 5000;
//  MaxRelStepSize =0.1;
  //  MaxIteration = 500;
  SolverType = SPSolverFull;
  InitWrapPosForEachStepOnOff = On;
//  RelTol=0.0001;
};
  AnyMatrix InitWrapPosVectors1 = transf3D({{Surf3.Radius,-Surf3.Radius*1.5,Surf3.Length/2.5},{-Surf3.Radius,-Surf3.Radius*1.5,Surf3.Length/2.5}},&Surf3);
  SPLine.InitWrapPosVecArr = {None,&InitWrapPosVectors1};
//   SPLine.InitWrapPosOnlyOnOff = On;
};

// *******************************************************************************************************
// Extensor Digitorum
// *******************************************************************************************************

AnyShortestPathMuscle Extensor_Digitorum_Finger2_1 ={
  AnyMuscleModel &MusMdl = ...MusPar.Extensor_Digitorum_Finger2;
  AnyRefNode &Org = ...Seg.Humerus.O_Extensor_Digitorum_Finger2_1;
  AnyRefNode &Via1 = ...Seg.Radius.Via1_Extensor_Digitorum_Finger2_1;
  AnyRefNode &Via2 = ...Seg.Hand.Finger2ProximalRef.Via3_Extensor_Digitorum_Finger2_1;
  AnyRefNode &Via3 = ...Seg.Hand.Finger2MiddleRef.Via2_Extensor_Digitorum_Finger2_1;
  AnyRefNode &Ins = ...Seg.Hand.Finger2DistalRef.I_Extensor_Digitorum_Finger2_1;
  AnyDrawMuscle DrwMus = {#include "../drawSettings/MusDrawSettings.any"};
  AnySurfCylinder &Surf1 = ...Seg.Radius.FlexorMuscleCyl.cyl_level1;
  AnySurfCylinder &Surf3 = ...Seg.Hand.Finger2.Seg.Metacarpal.MetaJointCyl.cyl;
//  AnySurfCylinder &Surf4 = ...Seg.Hand.Finger2.Seg.ProximalPhalanx.PPJointCyl2.cyl;
  AnySurfCylinder &Surf5 = ...Seg.Hand.Finger2.Seg.ProximalPhalanx.PPJointCyl.cyl;
  AnySurfCylinder &Surf6 =...Seg.Hand.Finger2.Seg.MiddlePhalanx.MPJointCyl.cyl;
//  AnySurfCylinder &Surf7 =...Seg.Hand.Finger2.Seg.MiddlePhalanx.MPJointCyl2.cyl;
  AnySurfCylinder &Surf8 =...Seg.Hand.Carpals.DorsalWristCyl.cyl;
  AnySurfCylinder &Surf9 = ...Seg.Radius.FlexorMuscleCyl.cyl_abduction_Finger2_2.cyl;
  AnySurfCylinder &Surf10 = ...Seg.Radius.FlexorMuscleCyl.cyl_abduction_Finger4_1.cyl;
  AnySurfCylinder &Surf11 =...Seg.Radius.DorsalCyl.cyl;
  AnyParamSurf &TorusWrist = ...Seg.Radius.Wrist_Torus.Torus;
//  AnyParamSurf &Torus1 = ...Seg.Hand.Finger2.Seg.ProximalPhalanx.DistalJointNode_ExDig.TorusCenter.Torus;
  AnyParamSurf &Torus2 = ...Seg.Hand.Finger2.Seg.MiddlePhalanx.ProximalJointNode.TorusCenter.Torus;
  AnyParamSurf &Torus3 = ...Seg.Hand.Finger2.Seg.DistalPhalanx.ProximalJointNode.TorusCenter.Torus;
  AnyParamSurf &Torus4 = ...Seg.Hand.Finger2.Seg.Metacarpal.DorsalTorusMeta_Ex.TorusCenter.Torus;
//  #include "Parameter_ExtrinsicHand.any"
   SPLine = {
       StringMesh = 200;
//  MaxIteration = 10000;
//  AugLagCoef = 20000;
//  MaxRelStepSize =0.1;
  SolverType = SPSolverFull;
  InitWrapPosForEachStepOnOff = On;
//  RelTol=0.0001;
};
  AnyVector InitWrapPosVectors1 = transf3D({Surf1.Radius,-Surf1.Radius,Surf1.Length/2},&Surf1);
  AnyVector InitWrapPosVectors2 = transf3D({-Surf1.Radius,-Surf1.Radius,Surf1.Length/2},&Surf1);
  AnyVector InitWrapPosVectors3 = transf3D({-Surf3.Radius*1.5,0,Surf3.Length/4},&Surf3);
//  AnyVector InitWrapPosVectors4 = transf3D({-Torus1.MinorRadius,0,Torus1.MinorRadius},&Torus1);
  AnyMatrix InitWrapPosVectors5 = {InitWrapPosVectors1,InitWrapPosVectors2,InitWrapPosVectors3};
  AnyMatrix InitWrapPosVectors6 = transf3D({{-Surf5.Radius*1.5,0,Surf5.Length/2}},&Surf5);
  AnyMatrix InitWrapPosVectors7 =transf3D({{-Surf6.Radius*1.5,0,Surf6.Length/2}},&Surf6);
  SPLine.InitWrapPosVecArr = {None,&InitWrapPosVectors5,&InitWrapPosVectors6,&InitWrapPosVectors7};
//   SPLine.InitWrapPosOnlyOnOff = On;
};


AnyShortestPathMuscle Extensor_Digitorum_Finger3_1 ={
  AnyMuscleModel &MusMdl = ...MusPar.Extensor_Digitorum_Finger3;
  AnyRefNode &Org = ...Seg.Humerus.O_Extensor_Digitorum_Finger3_1;
  AnyRefNode &Via1 = ...Seg.Radius.Via1_Extensor_Digitorum_Finger3_1;
  AnyRefNode &Via2 = ...Seg.Hand.Finger3ProximalRef.Via3_Extensor_Digitorum_Finger3_1;
  AnyRefNode &Via3 = ...Seg.Hand.Finger3MiddleRef.Via2_Extensor_Digitorum_Finger3_1;
  AnyRefNode &Ins = ...Seg.Hand.Finger3DistalRef.I_Extensor_Digitorum_Finger3_1;
  AnyDrawMuscle DrwMus = {#include "../drawSettings/MusDrawSettings.any"};
  AnySurfCylinder &Surf1 = ...Seg.Radius.FlexorMuscleCyl.cyl_level1;
  AnySurfCylinder &Surf3 = ...Seg.Hand.Finger3.Seg.Metacarpal.MetaJointCyl.cyl;
//  AnySurfCylinder &Surf4 = ...Seg.Hand.Finger3.Seg.ProximalPhalanx.PPJointCyl2.cyl;
  AnySurfCylinder &Surf5 = ...Seg.Hand.Finger3.Seg.ProximalPhalanx.PPJointCyl.cyl;
  AnySurfCylinder &Surf6 =...Seg.Hand.Finger3.Seg.MiddlePhalanx.MPJointCyl.cyl;
//  AnySurfCylinder &Surf7 =...Seg.Hand.Finger3.Seg.MiddlePhalanx.MPJointCyl2.cyl;
  AnySurfCylinder &Surf8 =...Seg.Hand.Carpals.DorsalWristCyl.cyl;
  AnySurfCylinder &Surf9 = ...Seg.Radius.FlexorMuscleCyl.cyl_abduction_Finger3_2.cyl;
  AnySurfCylinder &Surf10 = ...Seg.Radius.FlexorMuscleCyl.cyl_abduction_Finger4_1.cyl;
  AnySurfCylinder &Surf11 =...Seg.Radius.DorsalCyl.cyl;
  AnyParamSurf &TorusWrist = ...Seg.Radius.Wrist_Torus.Torus;
//  AnyParamSurf &Torus1 = ...Seg.Hand.Finger3.Seg.ProximalPhalanx.DistalJointNode_ExDig.TorusCenter.Torus;
  AnyParamSurf &Torus2 = ...Seg.Hand.Finger3.Seg.MiddlePhalanx.ProximalJointNode.TorusCenter.Torus;
  AnyParamSurf &Torus3 = ...Seg.Hand.Finger3.Seg.DistalPhalanx.ProximalJointNode.TorusCenter.Torus;
 AnyParamSurf &Torus4 = ...Seg.Hand.Finger3.Seg.Metacarpal.DorsalTorusMeta_Ex.TorusCenter.Torus;
//  #include "Parameter_ExtrinsicHand.any"
     SPLine = {
       StringMesh = 200;
//  MaxIteration = 10000;
//  AugLagCoef = 20000;
//  MaxRelStepSize =0.5;
  SolverType = SPSolverFull;
  InitWrapPosForEachStepOnOff = On;
//  RelTol=0.0001;
};
  AnyVector InitWrapPosVectors1 = transf3D({Surf1.Radius,-Surf1.Radius,Surf1.Length/2},&Surf1);
  AnyVector InitWrapPosVectors2 = transf3D({-Surf1.Radius,-Surf1.Radius,Surf1.Length/2},&Surf1);
  AnyVector InitWrapPosVectors3 = transf3D({-Surf3.Radius*1.5,0,Surf3.Length/4},&Surf3);
//  AnyVector InitWrapPosVectors4 = transf3D({-Torus1.MinorRadius,0,Torus1.MinorRadius},&Torus1);
  AnyMatrix InitWrapPosVectors5 = {InitWrapPosVectors1,InitWrapPosVectors2,InitWrapPosVectors3};
  AnyMatrix InitWrapPosVectors6 = transf3D({{-Surf5.Radius*1.5,0,Surf5.Length/2}},&Surf5);
  AnyMatrix InitWrapPosVectors7 =transf3D({{-Surf6.Radius*1.5,0,Surf6.Length/2}},&Surf6);
  SPLine.InitWrapPosVecArr = {None,&InitWrapPosVectors5,&InitWrapPosVectors6,&InitWrapPosVectors7};
//   SPLine.InitWrapPosOnlyOnOff = On;
};

// *******************************************************************************************************
// Extensor Digiti Minimi
// *******************************************************************************************************

AnyShortestPathMuscle Extensor_Digiti_Minimi_Finger4 ={
  AnyMuscleModel &MusMdl = ...MusPar.Extensor_Digiti_Minimi_Finger4;
  AnyRefNode &Org = ...Seg.Humerus.O_Extensor_Digiti_Minimi_Finger4;
  AnyRefNode &Via1 = ...Seg.Ulna.Via1_Extensor_Digiti_Minimi_Finger4;
  AnyRefNode &Via2 = ...Seg.Hand.Finger4ProximalRef.Via3_Extensor_Digiti_Minimi_Finger4;
  AnyRefNode &Via3 = ...Seg.Hand.Finger4MiddleRef.Via2_Extensor_Digiti_Minimi_Finger4;
  AnyRefNode &Ins = ...Seg.Hand.Finger4DistalRef.I_Extensor_Digiti_Minimi_Finger4;
  AnyDrawMuscle DrwMus = {#include "../drawSettings/MusDrawSettings.any"};
  AnySurfCylinder &Surf1 = ...Seg.Radius.FlexorMuscleCyl.cyl_level1;
  AnySurfCylinder &Surf3 = ...Seg.Hand.Finger4.Seg.Metacarpal.MetaJointCyl.cyl;
//  AnySurfCylinder &Surf4 = ...Seg.Hand.Finger4.Seg.ProximalPhalanx.PPJointCyl2.cyl;
  AnySurfCylinder &Surf5 = ...Seg.Hand.Finger4.Seg.ProximalPhalanx.PPJointCyl.cyl;
  AnySurfCylinder &Surf6 =...Seg.Hand.Finger4.Seg.MiddlePhalanx.MPJointCyl.cyl;
//  AnySurfCylinder &Surf7 =...Seg.Hand.Finger4.Seg.MiddlePhalanx.MPJointCyl2.cyl;
  AnySurfCylinder &Surf8 =...Seg.Hand.Carpals.DorsalWristCyl.cyl;
  AnySurfCylinder &Surf9 = ...Seg.Radius.FlexorMuscleCyl.cyl_abduction_Finger3_2.cyl;
  AnySurfCylinder &Surf10 = ...Seg.Radius.FlexorMuscleCyl.cyl_abduction_Finger4_1.cyl;
  AnySurfCylinder &Surf11 =...Seg.Radius.DorsalCyl.cyl;
  AnyParamSurf &TorusWrist = ...Seg.Radius.Wrist_Torus.Torus;
//  AnyParamSurf &Torus1 = ...Seg.Hand.Finger4.Seg.ProximalPhalanx.DistalJointNode_ExDig.TorusCenter.Torus;
  AnyParamSurf &Torus2 = ...Seg.Hand.Finger4.Seg.MiddlePhalanx.ProximalJointNode.TorusCenter.Torus;
  AnyParamSurf &Torus3 = ...Seg.Hand.Finger4.Seg.DistalPhalanx.ProximalJointNode.TorusCenter.Torus;
AnyParamSurf &Torus4 = ...Seg.Hand.Finger4.Seg.Metacarpal.DorsalTorusMeta_Ex.TorusCenter.Torus;
//  #include "Parameter_ExtrinsicHand.any"
   SPLine = {
       StringMesh = 200;
//  MaxIteration = 10000;
//  AugLagCoef = 20000;
//  MaxRelStepSize =0.1;
  SolverType = SPSolverFull;
  InitWrapPosForEachStepOnOff = On;
//  RelTol=0.0001;
};
  AnyVector InitWrapPosVectors1 = transf3D({Surf1.Radius,-Surf1.Radius,Surf1.Length/2},&Surf1);
  AnyVector InitWrapPosVectors2 = transf3D({-Surf1.Radius,-Surf1.Radius,Surf1.Length/2},&Surf1);
  AnyVector InitWrapPosVectors3 = transf3D({-Surf3.Radius*1.5,0,Surf3.Length/4},&Surf3);
//  AnyVector InitWrapPosVectors4 = transf3D({-Torus1.MinorRadius,0,Torus1.MinorRadius},&Torus1);
  AnyMatrix InitWrapPosVectors5 = {InitWrapPosVectors1,InitWrapPosVectors2,InitWrapPosVectors3};
  AnyMatrix InitWrapPosVectors6 = transf3D({{-Surf5.Radius*1.5,0,Surf5.Length/2}},&Surf5);
  AnyMatrix InitWrapPosVectors7 =transf3D({{-Surf6.Radius*1.5,0,Surf6.Length/2}},&Surf6);
  SPLine.InitWrapPosVecArr = {None,&InitWrapPosVectors5,&InitWrapPosVectors6,&InitWrapPosVectors7};
//   SPLine.InitWrapPosOnlyOnOff = On;
};

AnyShortestPathMuscle Extensor_Digiti_Minimi_Finger5 ={
  AnyMuscleModel &MusMdl = ...MusPar.Extensor_Digiti_Minimi_Finger5;
  AnyRefNode &Org = ...Seg.Humerus.O_Extensor_Digiti_Minimi_Finger5;
  AnyRefNode &Via1 = ...Seg.Ulna.Via1_Extensor_Digiti_Minimi_Finger5;
  AnyRefNode &Via2 = ...Seg.Hand.Finger5ProximalRef.Via3_Extensor_Digiti_Minimi_Finger5;
  AnyRefNode &Via3 = ...Seg.Hand.Finger5MiddleRef.Via2_Extensor_Digiti_Minimi_Finger5;
  AnyRefNode &Ins = ...Seg.Hand.Finger5DistalRef.I_Extensor_Digiti_Minimi_Finger5;
  AnyDrawMuscle DrwMus = {#include "../drawSettings/MusDrawSettings.any"};
  AnySurfCylinder &Surf1 = ...Seg.Radius.FlexorMuscleCyl.cyl_level1;
  AnySurfCylinder &Surf3 = ...Seg.Hand.Finger5.Seg.Metacarpal.MetaJointCyl.cyl;
//  AnySurfCylinder &Surf4 = ...Seg.Hand.Finger5.Seg.ProximalPhalanx.PPJointCyl2.cyl;
  AnySurfCylinder &Surf5 = ...Seg.Hand.Finger5.Seg.ProximalPhalanx.PPJointCyl.cyl;
  AnySurfCylinder &Surf6 =...Seg.Hand.Finger5.Seg.MiddlePhalanx.MPJointCyl.cyl;
//  AnySurfCylinder &Surf7 =...Seg.Hand.Finger5.Seg.MiddlePhalanx.MPJointCyl2.cyl;
  AnySurfCylinder &Surf8 =...Seg.Hand.Carpals.DorsalWristCyl.cyl;
  AnySurfCylinder &Surf9 = ...Seg.Radius.FlexorMuscleCyl.cyl_abduction_Finger3_2.cyl;
  AnySurfCylinder &Surf10 = ...Seg.Radius.FlexorMuscleCyl.cyl_abduction_Finger5_1.cyl;
  AnySurfCylinder &Surf11 =...Seg.Radius.DorsalCyl.cyl;
  AnyParamSurf &TorusWrist = ...Seg.Radius.Wrist_Torus.Torus;
//  AnyParamSurf &Torus1 = ...Seg.Hand.Finger5.Seg.ProximalPhalanx.DistalJointNode_ExDig.TorusCenter.Torus;
  AnyParamSurf &Torus2 = ...Seg.Hand.Finger5.Seg.MiddlePhalanx.ProximalJointNode.TorusCenter.Torus;
  AnyParamSurf &Torus3 = ...Seg.Hand.Finger5.Seg.DistalPhalanx.ProximalJointNode.TorusCenter.Torus;
AnyParamSurf &Torus4 = ...Seg.Hand.Finger5.Seg.Metacarpal.DorsalTorusMeta_Ex.TorusCenter.Torus;
//  #include "Parameter_ExtrinsicHand.any"
SPLine = {
  StringMesh = 200;
//  MaxIteration = 10000;
//  AugLagCoef = 20000;
//  MaxRelStepSize =0.1;
  SolverType = SPSolverFull;
  InitWrapPosForEachStepOnOff = On;
//  RelTol=0.0001;
};
AnyVector InitWrapPosVectors1 = transf3D({Surf1.Radius,-Surf1.Radius,Surf1.Length/2},&Surf1);
  AnyVector InitWrapPosVectors2 = transf3D({-Surf1.Radius,-Surf1.Radius,Surf1.Length/2},&Surf1);
  AnyVector InitWrapPosVectors3 = transf3D({-Surf3.Radius*1.5,0,Surf3.Length/4},&Surf3);
//  AnyVector InitWrapPosVectors4 = transf3D({-Torus1.MinorRadius,0,Torus1.MinorRadius},&Torus1);
  AnyMatrix InitWrapPosVectors5 = {InitWrapPosVectors1,InitWrapPosVectors2,InitWrapPosVectors3};
  AnyMatrix InitWrapPosVectors6 = transf3D({{-Surf5.Radius*1.5,0,Surf5.Length/2}},&Surf5);
  AnyMatrix InitWrapPosVectors7 =transf3D({{-Surf6.Radius*1.5,0,Surf6.Length/2}},&Surf6);
  SPLine.InitWrapPosVecArr = {None,&InitWrapPosVectors5,&InitWrapPosVectors6,&InitWrapPosVectors7};
//   SPLine.InitWrapPosOnlyOnOff = On;
};

// *******************************************************************************************************
// Extensor Carpi Ulnaris
// *******************************************************************************************************

AnyShortestPathMuscle Extensor_Carpi_Ulnaris_1 ={
  AnyMuscleModel &MusMdl = ...MusPar.Extensor_Carpi_Ulnaris;
  AnyRefNode &Org = ...Seg.Humerus.O_Extensor_Carpi_Ulnaris_1;
  AnyRefNode &Via1 = ...Seg.Ulna.Via_Extensor_Carpi_Ulnaris_1;
//  AnyRefNode &Via2 = ...Seg.Hand.Finger5MetaRef.Via2_Extensor_Carpi_Ulnaris_1;
  AnyRefNode &Ins = ...Seg.Hand.Finger5MetaRef.I_Extensor_Carpi_Ulnaris_1;
  AnyDrawMuscle DrwMus = {#include "../drawSettings/MusDrawSettings.any"};
//  AnySurfCylinder &Surf = ...Seg.Radius.FlexorMuscleCyl_ECU.cyl;
//  AnySurfCylinder &Surf2 =...Seg.Hand.Carpals.DorsalWristCyl.cyl;
  AnySurfCylinder &Surf11 =...Seg.Radius.DorsalCyl.cyl;
//  AnySurfCylinder &Surf3 = ...Seg.Radius.FlexorMuscleCyl.cyl_ECU.cyl;
AnySurfCylinder &Surf9 = ...Seg.Radius.FlexorMuscleCyl.cyl_level3;
AnySurfCylinder &Surf10 = ...Seg.Radius.FlexorMuscleCyl.cyl_abduction_Finger5_2.cyl;

//  AnyParamSurf &TorusWrist = ...Seg.Radius.Wrist_Torus.Torus;
//  #include "Parameter_ExtrinsicCarpi.any"
//AnySurfCylinder &Surf9 = ...Seg.Radius.MedialExtensorCyl.cyl;

  SPLine = {
    StringMesh = 40;
//  AugLagCoef = 5000;
//  MaxRelStepSize =0.1;
  //  MaxIteration = 500;
  SolverType = SPSolverFull;
//  RelTol=0.0001;
};
  AnyVector InitWrapPosVectors2 = transf3D({Surf11.Radius,Surf11.Radius*1.0,Surf11.Length/4},&Surf11);
  AnyVector InitWrapPosVectors22= transf3D({-Surf11.Radius,Surf11.Radius*1.0,Surf11.Length/4},&Surf11);
//    AnyVector InitWrapPosVectors222 = transf3D({Surf9.Radius,Surf9.Radius*1.7,Surf9.Length/2},&Surf9);
//    AnyVector InitWrapPosVectors2222 = transf3D({-Surf9.Radius,Surf9.Radius*1.7,Surf9.Length/2},&Surf9);

    AnyMatrix InitWrapPosVectors1= {InitWrapPosVectors2,InitWrapPosVectors22};
  SPLine.InitWrapPosVecArr = {None,&InitWrapPosVectors1};
//   SPLine.InitWrapPosOnlyOnOff = On;
};

// *******************************************************************************************************
// Extensor Carpi Radialis Longus
// *******************************************************************************************************
AnyShortestPathMuscle Extensor_Carpi_Radialis_Longus_1 ={
  AnyMuscleModel &MusMdl = ...MusPar.Extensor_Carpi_Radialis_Longus;
  AnyRefNode &Org = ...Seg.Humerus.O_Extensor_Carpi_Radialis_Longus_1;
  AnyRefNode &Via = ...Seg.Radius.Via_Extensor_Carpi_Radialis_Longus_1;
  AnyRefNode &Ins = ...Seg.Hand.Finger2MetaRef.I_Extensor_Carpi_Radialis_Longus_1;
  AnyDrawMuscle DrwMus = {#include "../drawSettings/MusDrawSettings.any"};
  AnySurfCylinder &Surf = ...Seg.Radius.MedialExtensorCyl.cyl;
  AnySurfCylinder &Surf1 = ...Seg.Radius.FlexorMuscleCyl_ECRL.cyl;
  AnySurfCylinder &Surf2 =...Seg.Hand.Carpals.DorsalWristCyl.cyl;
  AnySurfCylinder &Surf3 = ...Seg.Radius.FlexorMuscleCyl.cyl_ECRL.cyl;
  AnySurfCylinder &Surf9 = ...Seg.Radius.FlexorMuscleCyl.cyl_abduction_Finger2_1.cyl;
  AnySurfCylinder &Surf11 =...Seg.Radius.DorsalCyl.cyl;
  AnyParamSurf &TorusWrist = ...Seg.Radius.Wrist_Torus.Torus;
//  #include "Parameter_ExtrinsicCarpi.any"
 SPLine = {
  StringMesh = 100;
  AugLagCoef = 5000;
//  MaxRelStepSize =0.1;
  //  MaxIteration = 500;
  SolverType = SPSolverFull;
  InitWrapPosForEachStepOnOff = On;
};
  AnyMatrix InitWrapPosVectors1 = transf3D({{-Surf.Radius,Surf.Radius,Surf.Length/8},{Surf.Radius,Surf.Radius,Surf.Length/8}},&Surf);
  SPLine.InitWrapPosVecArr = {None,&InitWrapPosVectors1};
  // SPLine.InitWrapPosOnlyOnOff = On;
};

// *******************************************************************************************************
// Extensor Indicis
// *******************************************************************************************************
AnyShortestPathMuscle Extensor_Indicis_1 = {
  AnyMuscleModel &MusMdl = ...MusPar.Extensor_Indicis;
  AnyRefNode &Org = ...Seg.Ulna.O_Extensor_Indicis_1;
  AnyRefNode &Via1= ...Seg.Radius.Via1_Extensor_Indicis_1;
  AnyRefNode &Via2= ...Seg.Hand.Finger2ProximalRef.Via3_Extensor_Indicis_1;
  AnyRefNode &Via3= ...Seg.Hand.Finger2MiddleRef.Via2_Extensor_Indicis_1;
  AnyRefNode &Ins = ...Seg.Hand.Finger2DistalRef.I_Extensor_Indicis_1;
  AnyDrawMuscle DrwMus = {#include "../drawSettings/MusDrawSettings.any"};
  AnySurfCylinder &Surf1 = ...Seg.Radius.FlexorMuscleCyl.cyl_level2;
  AnySurfCylinder &Surf2 = ...Seg.Hand.Finger2.Seg.Metacarpal.MetaJointCyl.cyl;
//  AnySurfCylinder &Surf4 = ...Seg.Hand.Finger2.Seg.ProximalPhalanx.PPJointCyl2.cyl;
  AnySurfCylinder &Surf5 = ...Seg.Hand.Finger2.Seg.ProximalPhalanx.PPJointCyl.cyl;
  AnySurfCylinder &Surf6 =...Seg.Hand.Finger2.Seg.MiddlePhalanx.MPJointCyl.cyl;
  AnySurfCylinder &Surf7 =...Seg.Hand.Carpals.DorsalWristCyl.cyl;
//  AnySurfCylinder &Surf66 =...Seg.Hand.Finger2.Seg.MiddlePhalanx.MPJointCyl2.cyl;
  AnyParamSurf &TorusWrist = ...Seg.Radius.Wrist_Torus.Torus;
//  AnyParamSurf &Torus1 = ...Seg.Hand.Finger2.Seg.ProximalPhalanx.DistalJointNode_ExIn.TorusCenter.Torus;
  AnyParamSurf &Torus2 = ...Seg.Hand.Finger2.Seg.MiddlePhalanx.ProximalJointNode.TorusCenter.Torus;
  AnyParamSurf &Torus3 = ...Seg.Hand.Finger2.Seg.DistalPhalanx.ProximalJointNode.TorusCenter.Torus;
  AnyParamSurf &Torus4 = ...Seg.Hand.Finger2.Seg.Metacarpal.DorsalTorusMeta_Ex.TorusCenter.Torus;
  AnySurfCylinder &Surf11 =...Seg.Radius.DorsalCyl.cyl;
//  #include "Parameter_ExtrinsicHand.any"
   SPLine = {
       StringMesh = 100;
//  MaxIteration = 10000;
//  AugLagCoef = 20000;
//  MaxRelStepSize =0.1;
  SolverType = SPSolverFull;
  InitWrapPosForEachStepOnOff = On;
//  RelTol=0.0001;
};
  AnyVector InitWrapPosVectors1 = transf3D({Surf1.Radius,-Surf1.Radius,Surf1.Length/2},&Surf1);
  AnyVector InitWrapPosVectors2 = transf3D({-Surf1.Radius,-Surf1.Radius,Surf1.Length/2},&Surf1);
  AnyVector InitWrapPosVectors3 = transf3D({-Surf2.Radius*1.5,0,Surf2.Length/4},&Surf2);
//  AnyVector InitWrapPosVectors33 = transf3D({-Torus1.MinorRadius,0,Torus1.MinorRadius},&Torus1);
  AnyMatrix InitWrapPosVectors4 = {InitWrapPosVectors1,InitWrapPosVectors2,InitWrapPosVectors3};
  AnyMatrix InitWrapPosVectors5 = transf3D({{-Surf5.Radius*1.5,0,Surf5.Length/2}},&Surf5);
  AnyMatrix InitWrapPosVectors6 =transf3D({{-Surf6.Radius*1.5,0,Surf6.Length/2}},&Surf6);
  SPLine.InitWrapPosVecArr = {None,&InitWrapPosVectors4,&InitWrapPosVectors5,&InitWrapPosVectors6};
//   SPLine.InitWrapPosOnlyOnOff = On;
};

// *******************************************************************************************************
// Flexor Digitorum Profundus
// *******************************************************************************************************

AnyShortestPathMuscle Flexor_Digitorum_Profundus_Finger2_1 = {
  AnyMuscleModel &MusMdl = ...MusPar.Flexor_Digitorum_Profundus_Finger2;
  AnyRefNode &Org = ...Seg.Ulna.O_Flexor_Digitorum_Profundus_Finger2_1;
  AnyRefNode &Via1 = ...Seg.Ulna.Via_Flexor_Digitorum_Profundus_Finger2_1;
  AnyRefNode &Via2  = ...Seg.Hand.Finger2MetaRef.Via_Flexor_Digitorum_Profundus_Digit2;
  AnyRefNode &Via3 = ...Seg.Hand.Finger2MetaRef.DistalJointNode.FP;
  AnyRefNode &Via4 = ...Seg.Hand.Finger2ProximalRef.Via2_Flexor_Digitorum_Profundus_Finger2_1;
  AnyRefNode &Ins = ...Seg.Hand.Finger2DistalRef.I_Flexor_Digitorum_Profundus_Finger2_1;
  AnyDrawMuscle DrwMus = {#include "../drawSettings/MusDrawSettings.any"};
  AnySurfCylinder &Surf1 = ...Seg.Radius.FlexorMuscleCyl.cyl;
//  AnySurfEllipsoid &Surf2 = ...Seg.Hand.Finger2.Seg.Metacarpal.DistalJointNode.Jointsphere;
  AnyParamSurf &Torus6 = ...Seg.Hand.Finger2.Seg.ProximalPhalanx.TorusCenter1.Torus;
  AnyParamSurf &Torus7 = ...Seg.Hand.Finger2.Seg.MiddlePhalanx.TorusCenter2.Torus;
  AnyParamSurf &Torus8 = ...Seg.Hand.Finger2.Seg.MiddlePhalanx.TorusCenter1.Torus;
  AnyParamSurf &Torus9 = ...Seg.Hand.Finger2.Seg.DistalPhalanx.TorusCenter.Torus;
  AnyParamSurf &TorusWrist = ...Seg.Radius.Wrist_Torus.Torus;
//  AnySurfEllipsoid  &Surf4 = ...Seg.Hand.Finger2.Seg.Metacarpal.DistalJointNode_Flex.Jointsphere;
  AnySurfCylinder &Surf5 = ...Seg.Hand.Finger2.Seg.ProximalPhalanx.PPJointCyl3.cyl;
  AnySurfCylinder &Surf6 =...Seg.Hand.Finger2.Seg.MiddlePhalanx.MPJointCyl.cyl;
  AnySurfCylinder &Surf7 =...Seg.Hand.Finger2.Seg.Metacarpal.MetaJointCyl.cyl;
  AnySurfCylinder &Surf9 = ...Seg.Radius.FlexorMuscleCyl.cyl_abduction_Finger4_2.cyl;
  AnySurfCylinder &Surf10 = ...Seg.Radius.FlexorMuscleCyl.cyl_abduction_Finger5_1.cyl; //4_1
  AnySurfCylinder &Surf11 =...Seg.Radius.PalmarCyl.cyl;
//  #include "Parameter_ExtrinsicHand.any"
 SPLine = {
    StringMesh = 50;
//  AugLagCoef = 5000;
//  MaxRelStepSize =0.1;
  //  MaxIteration = 500;
  SolverType = SPSolverFull;
//  RelTol=0.0001;
};
  AnyVector InitWrapPosVectors1 = transf3D({Surf1.Radius,Surf1.Radius,Surf1.Length/2},&Surf1);
  AnyVector InitWrapPosVectors2 = transf3D({-Surf1.Radius,Surf1.Radius,Surf1.Length/2},&Surf1);
  AnyMatrix InitWrapPosVectors6 = {InitWrapPosVectors1,InitWrapPosVectors2};
//  AnyMatrix InitWrapPosVectors7 = transf3D({{Surf4.Radius[0]/2,-Surf4.Radius[1]*1.5,-Surf4.Radius[2]*1.5}},&Surf4);
  AnyVector InitWrapPosVectors8 = transf3D({Torus6.MinorRadius,Torus6.MinorRadius/2,0},&Torus6);
  AnyVector InitWrapPosVectors9 = transf3D({Torus7.MinorRadius,Torus7.MinorRadius/2,0},&Torus7);
  AnyVector InitWrapPosVectors10 = transf3D({Torus8.MinorRadius,Torus8.MinorRadius/2,0},&Torus8);
  AnyVector InitWrapPosVectors11 = transf3D({Torus9.MinorRadius,Torus9.MinorRadius/2,0},&Torus9);
  AnyMatrix InitWrapPosVectors12 = {InitWrapPosVectors8,InitWrapPosVectors9,InitWrapPosVectors10,InitWrapPosVectors11};
  AnyMatrix InitWrapPosVectors13 = transf3D({{Surf7.Radius*2,Surf7.Radius,Surf7.Length/2},{Surf7.Radius*2,-Surf7.Radius*2,Surf7.Length/2}},&Surf7);
  SPLine.InitWrapPosVecArr = {None,&InitWrapPosVectors6,None,&InitWrapPosVectors13,&InitWrapPosVectors12};
//   SPLine.InitWrapPosOnlyOnOff = On;
};


AnyShortestPathMuscle Flexor_Digitorum_Profundus_Finger3_1 = {
  AnyMuscleModel &MusMdl = ...MusPar.Flexor_Digitorum_Profundus_Finger3;
  AnyRefNode &Org = ...Seg.Ulna.O_Flexor_Digitorum_Profundus_Finger3_1;
  AnyRefNode &Via1  = ...Seg.Hand.Finger3MetaRef.Via_Flexor_Digitorum_Profundus_Digit3;
  AnyRefNode &Via2 = ...Seg.Hand.Finger3MetaRef.DistalJointNode.FP;
  AnyRefNode &Via3 = ...Seg.Hand.Finger3ProximalRef.Via_Flexor_Digitorum_Profundus_Finger3_1;
  AnyRefNode &Ins = ...Seg.Hand.Finger3DistalRef.I_Flexor_Digitorum_Profundus_Finger3_1;
  AnyDrawMuscle DrwMus = {#include "../drawSettings/MusDrawSettings.any"};
  AnySurfCylinder &Surf1 = ...Seg.Radius.FlexorMuscleCyl.cyl;
//  AnySurfEllipsoid &Surf2 = ...Seg.Hand.Finger3.Seg.Metacarpal.DistalJointNode.Jointsphere;
  AnyParamSurf &Torus6 = ...Seg.Hand.Finger3.Seg.ProximalPhalanx.TorusCenter1.Torus;
  AnyParamSurf &Torus7 = ...Seg.Hand.Finger3.Seg.MiddlePhalanx.TorusCenter2.Torus;
  AnyParamSurf &Torus8 = ...Seg.Hand.Finger3.Seg.MiddlePhalanx.TorusCenter1.Torus;
  AnyParamSurf &Torus9 = ...Seg.Hand.Finger3.Seg.DistalPhalanx.TorusCenter.Torus;
  AnyParamSurf &TorusWrist = ...Seg.Radius.Wrist_Torus.Torus;
  AnySurfCylinder &Surf11 =...Seg.Radius.PalmarCyl.cyl;
//  AnySurfEllipsoid  &Surf4 = ...Seg.Hand.Finger3.Seg.Metacarpal.DistalJointNode_Flex.Jointsphere;
  AnySurfCylinder &Surf5 = ...Seg.Hand.Finger3.Seg.ProximalPhalanx.PPJointCyl3.cyl;
  AnySurfCylinder &Surf6 =...Seg.Hand.Finger3.Seg.MiddlePhalanx.MPJointCyl.cyl;
  AnySurfCylinder &Surf7 =...Seg.Hand.Finger3.Seg.Metacarpal.MetaJointCyl.cyl;
  AnySurfCylinder &Surf9 = ...Seg.Radius.FlexorMuscleCyl.cyl_abduction_Finger4_2.cyl;
  AnySurfCylinder &Surf10 = ...Seg.Radius.FlexorMuscleCyl.cyl_abduction_Finger5_1.cyl; //4_1
//  #include "Parameter_ExtrinsicHand.any"
SPLine = {
    StringMesh = 50;
//  AugLagCoef = 5000;
//  MaxRelStepSize =0.1;
  //  MaxIteration = 500;
  SolverType = SPSolverFull;
//  RelTol=0.0001;
};
  AnyVector InitWrapPosVectors1 = transf3D({Surf1.Radius,Surf1.Radius,Surf1.Length/2},&Surf1);
  AnyVector InitWrapPosVectors2 = transf3D({-Surf1.Radius,Surf1.Radius,Surf1.Length/2},&Surf1);
  AnyMatrix InitWrapPosVectors6 = {InitWrapPosVectors1,InitWrapPosVectors2};
//  AnyMatrix InitWrapPosVectors7 = transf3D({{Surf4.Radius[0]/2,-Surf4.Radius[1]*1.5,-Surf4.Radius[2]*1.5}},&Surf4);
  AnyVector InitWrapPosVectors8 = transf3D({Torus6.MinorRadius,Torus6.MinorRadius/2,0},&Torus6);
  AnyVector InitWrapPosVectors9 = transf3D({Torus7.MinorRadius,Torus7.MinorRadius/2,0},&Torus7);
  AnyVector InitWrapPosVectors10 = transf3D({Torus8.MinorRadius,Torus8.MinorRadius/2,0},&Torus8);
  AnyVector InitWrapPosVectors11 = transf3D({Torus9.MinorRadius,Torus9.MinorRadius/2,0},&Torus9);
  AnyMatrix InitWrapPosVectors12 = {InitWrapPosVectors8,InitWrapPosVectors9,InitWrapPosVectors10,InitWrapPosVectors11};
  AnyMatrix InitWrapPosVectors13 = transf3D({{Surf7.Radius*2,Surf7.Radius,Surf7.Length/2},{Surf7.Radius*2,-Surf7.Radius*2,Surf7.Length/2}},&Surf7);

  SPLine.InitWrapPosVecArr = {&InitWrapPosVectors6,None,&InitWrapPosVectors13,&InitWrapPosVectors12};
  // SPLine.InitWrapPosOnlyOnOff = On;
};

AnyShortestPathMuscle Flexor_Digitorum_Profundus_Finger4_1 = {
  AnyMuscleModel &MusMdl = ...MusPar.Flexor_Digitorum_Profundus_Finger4;
  AnyRefNode &Org = ...Seg.Ulna.O_Flexor_Digitorum_Profundus_Finger4_1;
  AnyRefNode &Via1  = ...Seg.Hand.Finger4MetaRef.Via_Flexor_Digitorum_Profundus_Digit4;
  AnyRefNode &Via2 = ...Seg.Hand.Finger4MetaRef.DistalJointNode.FP;
  AnyRefNode &Via3 = ...Seg.Hand.Finger4ProximalRef.Via_Flexor_Digitorum_Profundus_Finger4_1;
  AnyRefNode &Ins = ...Seg.Hand.Finger4DistalRef.I_Flexor_Digitorum_Profundus_Finger4_1;
  AnyDrawMuscle DrwMus = {#include "../drawSettings/MusDrawSettings.any"};
  AnySurfCylinder &Surf1 = ...Seg.Radius.FlexorMuscleCyl.cyl;
//  AnySurfEllipsoid &Surf2 = ...Seg.Hand.Finger4.Seg.Metacarpal.DistalJointNode.Jointsphere;
  AnyParamSurf &Torus6 = ...Seg.Hand.Finger4.Seg.ProximalPhalanx.TorusCenter1.Torus;
  AnyParamSurf &Torus7 = ...Seg.Hand.Finger4.Seg.MiddlePhalanx.TorusCenter2.Torus;
  AnyParamSurf &Torus8 = ...Seg.Hand.Finger4.Seg.MiddlePhalanx.TorusCenter1.Torus;
  AnyParamSurf &Torus9 = ...Seg.Hand.Finger4.Seg.DistalPhalanx.TorusCenter.Torus;
  AnyParamSurf &TorusWrist = ...Seg.Radius.Wrist_Torus.Torus;
//  AnySurfEllipsoid  &Surf4 = ...Seg.Hand.Finger4.Seg.Metacarpal.DistalJointNode_Flex.Jointsphere;
  AnySurfCylinder &Surf5 = ...Seg.Hand.Finger4.Seg.ProximalPhalanx.PPJointCyl3.cyl;
  AnySurfCylinder &Surf6 =...Seg.Hand.Finger4.Seg.MiddlePhalanx.MPJointCyl.cyl;
  AnySurfCylinder &Surf7 =...Seg.Hand.Finger4.Seg.Metacarpal.MetaJointCyl.cyl;
  AnySurfCylinder &Surf9 = ...Seg.Radius.FlexorMuscleCyl.cyl_abduction_Finger4_2.cyl; //3_2
  AnySurfCylinder &Surf10 = ...Seg.Radius.FlexorMuscleCyl.cyl_abduction_Finger5_1.cyl;
  AnySurfCylinder &Surf11 =...Seg.Radius.PalmarCyl.cyl;

  //  #include "Parameter_ExtrinsicHand.any"
SPLine = {
    StringMesh = 50;
//  AugLagCoef = 5000;
//  MaxRelStepSize =0.1;
  //  MaxIteration = 500;
  SolverType = SPSolverFull;
//  RelTol=0.0001;
};
  AnyVector InitWrapPosVectors1 = transf3D({Surf1.Radius,Surf1.Radius,Surf1.Length/2},&Surf1);
  AnyVector InitWrapPosVectors2 = transf3D({-Surf1.Radius,Surf1.Radius,Surf1.Length/2},&Surf1);
  AnyMatrix InitWrapPosVectors6 = {InitWrapPosVectors1,InitWrapPosVectors2};
//  AnyMatrix InitWrapPosVectors7 = transf3D({{Surf4.Radius[0]/2,-Surf4.Radius[1]*1.5,Surf4.Radius[2]*1.5}},&Surf4);
  AnyVector InitWrapPosVectors8 = transf3D({Torus6.MinorRadius,Torus6.MinorRadius/2,0},&Torus6);
  AnyVector InitWrapPosVectors9 = transf3D({Torus7.MinorRadius,Torus7.MinorRadius/2,0},&Torus7);
  AnyVector InitWrapPosVectors10 = transf3D({Torus8.MinorRadius,Torus8.MinorRadius/2,0},&Torus8);
  AnyVector InitWrapPosVectors11 = transf3D({Torus9.MinorRadius,Torus9.MinorRadius/2,0},&Torus9);
  AnyMatrix InitWrapPosVectors12 = {InitWrapPosVectors8,InitWrapPosVectors9,InitWrapPosVectors10,InitWrapPosVectors11};
  AnyMatrix InitWrapPosVectors13 = transf3D({{Surf7.Radius*2,Surf7.Radius,Surf7.Length/2},{Surf7.Radius*2,-Surf7.Radius*2,Surf7.Length/2}},&Surf7);

  SPLine.InitWrapPosVecArr = {&InitWrapPosVectors6,None,&InitWrapPosVectors13,&InitWrapPosVectors12};
  // SPLine.InitWrapPosOnlyOnOff = On;
};

AnyShortestPathMuscle Flexor_Digitorum_Profundus_Finger5_1 = {
  AnyMuscleModel &MusMdl = ...MusPar.Flexor_Digitorum_Profundus_Finger5;
  AnyRefNode &Org = ...Seg.Ulna.O_Flexor_Digitorum_Profundus_Finger5_1;
  AnyRefNode &Via1 = ...Seg.Ulna.Via_Flexor_Digitorum_Profundus_Finger5_1;
  AnyRefNode &Via2  = ...Seg.Hand.Finger5MetaRef.Via_Flexor_Digitorum_Profundus_Digit5;
  AnyRefNode &Via3 = ...Seg.Hand.Finger5MetaRef.DistalJointNode.FP;
  AnyRefNode &Via4 = ...Seg.Hand.Finger5ProximalRef.Via2_Flexor_Digitorum_Profundus_Finger5_1;
  AnyRefNode &Ins = ...Seg.Hand.Finger5DistalRef.I_Flexor_Digitorum_Profundus_Finger5_1;
  AnyDrawMuscle DrwMus = {#include "../drawSettings/MusDrawSettings.any"};
  AnySurfCylinder &Surf1 = ...Seg.Radius.FlexorMuscleCyl.cyl;
//  AnySurfEllipsoid &Surf2 = ...Seg.Hand.Finger5.Seg.Metacarpal.DistalJointNode.Jointsphere;
  AnyParamSurf &Torus6 = ...Seg.Hand.Finger5.Seg.ProximalPhalanx.TorusCenter1.Torus;
  AnyParamSurf &Torus7 = ...Seg.Hand.Finger5.Seg.MiddlePhalanx.TorusCenter2.Torus;
  AnyParamSurf &Torus8 = ...Seg.Hand.Finger5.Seg.MiddlePhalanx.TorusCenter1.Torus;
  AnyParamSurf &Torus9 = ...Seg.Hand.Finger5.Seg.DistalPhalanx.TorusCenter.Torus;
  AnyParamSurf &TorusWrist = ...Seg.Radius.Wrist_Torus.Torus;
//  AnySurfEllipsoid  &Surf4 = ...Seg.Hand.Finger5.Seg.Metacarpal.DistalJointNode_Flex.Jointsphere;
  AnySurfCylinder &Surf5 = ...Seg.Hand.Finger5.Seg.ProximalPhalanx.PPJointCyl3.cyl;
  AnySurfCylinder &Surf6 =...Seg.Hand.Finger5.Seg.MiddlePhalanx.MPJointCyl.cyl;
  AnySurfCylinder &Surf7 =...Seg.Hand.Finger5.Seg.Metacarpal.MetaJointCyl.cyl;
  AnySurfCylinder &Surf9 = ...Seg.Radius.FlexorMuscleCyl.cyl_abduction_Finger4_2.cyl; //3_2
  AnySurfCylinder &Surf10 = ...Seg.Radius.FlexorMuscleCyl.cyl_abduction_Finger5_1.cyl;
  AnySurfCylinder &Surf11 =...Seg.Radius.PalmarCyl.cyl;
  //  #include "Parameter_ExtrinsicHand.any"
 SPLine = {
  StringMesh = 50;
//  MaxIteration = 5000;
//  AugLagCoef = 20000;
//  MaxRelStepSize =0.1;
  SolverType = SPSolverFull;
//  RelTol=0.0001;
};
  AnyVector InitWrapPosVectors1 = transf3D({Surf1.Radius,Surf1.Radius,Surf1.Length/2},&Surf1);
  AnyVector InitWrapPosVectors2 = transf3D({-Surf1.Radius,Surf1.Radius,Surf1.Length/2},&Surf1);
  AnyMatrix InitWrapPosVectors6 = {InitWrapPosVectors1,InitWrapPosVectors2};
//  AnyMatrix InitWrapPosVectors7 = transf3D({{Surf4.Radius[0]/2,-Surf4.Radius[1]*1.5,Surf4.Radius[2]*1.5}},&Surf4);
  AnyVector InitWrapPosVectors8 = transf3D({Torus6.MinorRadius,Torus6.MinorRadius/2,0},&Torus6);
  AnyVector InitWrapPosVectors9 = transf3D({Torus7.MinorRadius,Torus7.MinorRadius/2,0},&Torus7);
  AnyVector InitWrapPosVectors10 = transf3D({Torus8.MinorRadius,Torus8.MinorRadius/2,0},&Torus8);
  AnyVector InitWrapPosVectors11 = transf3D({Torus9.MinorRadius,Torus9.MinorRadius/2,0},&Torus9);
  AnyMatrix InitWrapPosVectors12 = {InitWrapPosVectors8,InitWrapPosVectors9,InitWrapPosVectors10,InitWrapPosVectors11};
  AnyMatrix InitWrapPosVectors13 = transf3D({{Surf7.Radius*2,Surf7.Radius,Surf7.Length/2},{Surf7.Radius*2,-Surf7.Radius*2,Surf7.Length/2}},&Surf7);

  SPLine.InitWrapPosVecArr = {None,&InitWrapPosVectors6,None,&InitWrapPosVectors13,&InitWrapPosVectors12};
  // SPLine.InitWrapPosOnlyOnOff = On;
};

// *******************************************************************************************************
// Flexor Digitorum Superficialis
// *******************************************************************************************************
AnyShortestPathMuscle Flexor_Digitorum_Superficialis_Finger2_1 = {
  AnyMuscleModel &MusMdl = ...MusPar.Flexor_Digitorum_Superficialis_Finger2;
  AnyRefNode &Org = ...Seg.Radius.O_Flexor_Digitorum_Superficialis_Finger2_1;
  AnyRefNode &Via1 = ...Seg.Radius.Via_Flexor_Digitorum_Superficialis_Finger2_1;
  AnyRefNode &Via2 = ...Seg.Hand.Finger2ProximalRef.Via1_Flexor_Digitorum_Superficialis_Finger2_1;
  AnyRefNode &Ins = ...Seg.Hand.Finger2MiddleRef.I_Flexor_Digitorum_Superficialis_Finger2_1;
  AnyDrawMuscle DrwMus = {#include "../drawSettings/MusDrawSettings.any"};
  AnySurfCylinder &Surf1 = ...Seg.Radius.FlexorMuscleCyl.cyl_level1;
  AnySurfEllipsoid &Surf3 = ...Seg.Hand.Finger2.Seg.Metacarpal.DistalJointNode.Jointsphere;
//  AnySurfEllipsoid  &Surf4 = ...Seg.Hand.Finger2.Seg.Metacarpal.DistalJointNode_Flex.Jointsphere;
  AnySurfCylinder &Surf5 = ...Seg.Hand.Finger2.Seg.ProximalPhalanx.PPJointCyl3.cyl;
  AnyParamSurf &Torus1 = ...Seg.Hand.Finger2.Seg.Metacarpal.DorsalTorusMeta.TorusCenter.Torus;
  AnyParamSurf &Torus2 = ...Seg.Hand.Finger2.Seg.Metacarpal.TorusCenter.Torus;
  AnyParamSurf &Torus4 = ...Seg.Hand.Finger2.Seg.ProximalPhalanx.TorusCenter1.Torus;
  AnyParamSurf &TorusWrist = ...Seg.Radius.Wrist_Torus.Torus;
  AnySurfCylinder &Surf7 =...Seg.Hand.Finger2.Seg.Metacarpal.MetaJointCyl.cyl;
  AnySurfCylinder &Surf9 = ...Seg.Radius.FlexorMuscleCyl.cyl_abduction_Finger4_2.cyl;//2_2
  AnySurfCylinder &Surf10 = ...Seg.Radius.FlexorMuscleCyl.cyl_abduction_Finger5_1.cyl;//4_1
  AnySurfCylinder &Surf11 =...Seg.Radius.PalmarCyl.cyl;
//  #include "Parameter_ExtrinsicHand.any"
SPLine = {
    StringMesh = 150;
//  AugLagCoef = 5000;
//  MaxRelStepSize =0.1;
  //  MaxIteration = 500;
  SolverType = SPSolverFull;
//  RelTol=0.0001;
};
  AnyVector InitWrapPosVectors1 = transf3D({Surf1.Radius,Surf1.Radius,Surf1.Length/2},&Surf1);
  AnyVector InitWrapPosVectors2 = transf3D({-Surf1.Radius,Surf1.Radius,Surf1.Length/2},&Surf1);
  AnyVector InitWrapPosVectors3 = transf3D({Torus1.MinorRadius/2,Torus1.MinorRadius/2,0},&Torus1);
  AnyVector InitWrapPosVectors4 = transf3D({Torus2.MinorRadius,Torus2.MinorRadius/2,0},&Torus2);
  AnyVector InitWrapPosVectors5 = transf3D({Surf3.Radius[0]*1.5,0,Surf3.Radius[2]/2},&Surf3);
  AnyMatrix InitWrapPosVectors6 = {InitWrapPosVectors1,InitWrapPosVectors2,InitWrapPosVectors3,InitWrapPosVectors4,InitWrapPosVectors5};
//  AnyVector InitWrapPosVectors7 = transf3D({Surf4.Radius[0]/2,-Surf4.Radius[1]*1.5,-Surf4.Radius[2]*1.5},&Surf4);
  AnyVector InitWrapPosVectors8 = transf3D({Torus4.MinorRadius,Torus4.MinorRadius/2,0},&Torus4);
  AnyMatrix InitWrapPosVectors9 = {InitWrapPosVectors8};
  SPLine.InitWrapPosVecArr = {None,&InitWrapPosVectors6,&InitWrapPosVectors9};
//  //  SPLine.InitWrapPosOnlyOnOff = On;
};

AnyShortestPathMuscle Flexor_Digitorum_Superficialis_Finger3_1 = {
  AnyMuscleModel &MusMdl = ...MusPar.Flexor_Digitorum_Superficialis_Finger3;
  AnyRefNode &Org = ...Seg.Radius.O_Flexor_Digitorum_Superficialis_Finger3_1;
  AnyRefNode &Via1 = ...Seg.Ulna.Via_Flexor_Digitorum_Superficialis_Finger3_1;
  AnyRefNode &Via2 = ...Seg.Hand.Finger3ProximalRef.Via1_Flexor_Digitorum_Superficialis_Finger3_1;
  AnyRefNode &Ins = ...Seg.Hand.Finger3MiddleRef.I_Flexor_Digitorum_Superficialis_Finger3_1;
  AnyDrawMuscle DrwMus = {#include "../drawSettings/MusDrawSettings.any"};
  AnySurfCylinder &Surf1 = ...Seg.Radius.FlexorMuscleCyl.cyl_level1;
  AnySurfEllipsoid &Surf3 = ...Seg.Hand.Finger3.Seg.Metacarpal.DistalJointNode.Jointsphere;
//  AnySurfEllipsoid  &Surf4 = ...Seg.Hand.Finger3.Seg.Metacarpal.DistalJointNode_Flex.Jointsphere;
  AnySurfCylinder &Surf5 = ...Seg.Hand.Finger3.Seg.ProximalPhalanx.PPJointCyl3.cyl;
  AnyParamSurf &Torus1 = ...Seg.Hand.Finger3.Seg.Metacarpal.DorsalTorusMeta.TorusCenter.Torus;
  AnyParamSurf &Torus2 = ...Seg.Hand.Finger3.Seg.Metacarpal.TorusCenter.Torus;
  AnyParamSurf &Torus4 = ...Seg.Hand.Finger3.Seg.ProximalPhalanx.TorusCenter1.Torus;
  AnyParamSurf &TorusWrist = ...Seg.Radius.Wrist_Torus.Torus;
  AnySurfCylinder &Surf7 =...Seg.Hand.Finger3.Seg.Metacarpal.MetaJointCyl.cyl;
  AnySurfCylinder &Surf9 = ...Seg.Radius.FlexorMuscleCyl.cyl_abduction_Finger4_2.cyl; //3_2
  AnySurfCylinder &Surf10 = ...Seg.Radius.FlexorMuscleCyl.cyl_abduction_Finger5_1.cyl; //4_1
  AnySurfCylinder &Surf11 =...Seg.Radius.PalmarCyl.cyl;
//  #include "Parameter_ExtrinsicHand.any"
SPLine = {
    StringMesh = 150;
//  AugLagCoef = 5000;
//  MaxRelStepSize =0.1;
  //  MaxIteration = 500;
  SolverType = SPSolverFull;
//  RelTol=0.0001;
};
  AnyVector InitWrapPosVectors1 = transf3D({Surf1.Radius,Surf1.Radius,Surf1.Length/2},&Surf1);
  AnyVector InitWrapPosVectors2 = transf3D({-Surf1.Radius,Surf1.Radius,Surf1.Length/2},&Surf1);
  AnyVector InitWrapPosVectors3 = transf3D({Torus1.MinorRadius/2,Torus1.MinorRadius/2,0},&Torus1);
  AnyVector InitWrapPosVectors4 = transf3D({Torus2.MinorRadius,Torus2.MinorRadius/2,0},&Torus2);
  AnyVector InitWrapPosVectors5 = transf3D({Surf3.Radius[0]*1.5,0,Surf3.Radius[2]/2},&Surf3);
  AnyMatrix InitWrapPosVectors6 = {InitWrapPosVectors1,InitWrapPosVectors2,InitWrapPosVectors3,InitWrapPosVectors4,InitWrapPosVectors5};
//  AnyVector InitWrapPosVectors7 = transf3D({Surf4.Radius[0]/2,-Surf4.Radius[1]*1.5,-Surf4.Radius[2]*1.5},&Surf4);
  AnyVector InitWrapPosVectors8 = transf3D({Torus4.MinorRadius,Torus4.MinorRadius/2,0},&Torus4);
  AnyMatrix InitWrapPosVectors9 = {InitWrapPosVectors8};
  SPLine.InitWrapPosVecArr = {None,&InitWrapPosVectors6,&InitWrapPosVectors9};
  //  SPLine.InitWrapPosOnlyOnOff = On;
};
AnyShortestPathMuscle Flexor_Digitorum_Superficialis_Finger4_1 = {
  AnyMuscleModel &MusMdl = ...MusPar.Flexor_Digitorum_Superficialis_Finger4;
  AnyRefNode &Org = ...Seg.Humerus.O_Flexor_Digitorum_Superficialis_Finger4_1;
  AnyRefNode &Via1 = ...Seg.Ulna.Via_Flexor_Digitorum_Superficialis_Finger4_1;
  AnyRefNode &Via2 = ...Seg.Hand.Finger4ProximalRef.Via1_Flexor_Digitorum_Superficialis_Finger4_1;
  AnyRefNode &Ins = ...Seg.Hand.Finger4MiddleRef.I_Flexor_Digitorum_Superficialis_Finger4_1;
  AnyDrawMuscle DrwMus = {#include "../drawSettings/MusDrawSettings.any"};
  AnySurfCylinder &Surf1 = ...Seg.Radius.FlexorMuscleCyl.cyl_level1;
  AnySurfEllipsoid &Surf3 = ...Seg.Hand.Finger4.Seg.Metacarpal.DistalJointNode.Jointsphere;
//  AnySurfEllipsoid  &Surf4 = ...Seg.Hand.Finger4.Seg.Metacarpal.DistalJointNode_Flex.Jointsphere;
  AnySurfCylinder &Surf5 = ...Seg.Hand.Finger4.Seg.ProximalPhalanx.PPJointCyl3.cyl;
  AnyParamSurf &Torus1 = ...Seg.Hand.Finger4.Seg.Metacarpal.DorsalTorusMeta.TorusCenter.Torus;
  AnyParamSurf &Torus2 = ...Seg.Hand.Finger4.Seg.Metacarpal.TorusCenter.Torus;
  AnyParamSurf &Torus4 = ...Seg.Hand.Finger4.Seg.ProximalPhalanx.TorusCenter1.Torus;
  AnyParamSurf &TorusWrist = ...Seg.Radius.Wrist_Torus.Torus;
  AnySurfCylinder &Surf7 =...Seg.Hand.Finger4.Seg.Metacarpal.MetaJointCyl.cyl;
  AnySurfCylinder &Surf9 = ...Seg.Radius.FlexorMuscleCyl.cyl_abduction_Finger4_2.cyl;//3_2
  AnySurfCylinder &Surf10 = ...Seg.Radius.FlexorMuscleCyl.cyl_abduction_Finger5_1.cyl;  //4_1
  AnySurfCylinder &Surf11 =...Seg.Radius.PalmarCyl.cyl;
//  #include "Parameter_ExtrinsicHand.any"
SPLine = {
    StringMesh = 150;
//  AugLagCoef = 5000;
//  MaxRelStepSize =0.1;
  //  MaxIteration = 500;
  SolverType = SPSolverFull;
//  RelTol=0.0001;
};
  AnyVector InitWrapPosVectors1 = transf3D({Surf1.Radius,Surf1.Radius,Surf1.Length/2},&Surf1);
  AnyVector InitWrapPosVectors2 = transf3D({-Surf1.Radius,Surf1.Radius,Surf1.Length/2},&Surf1);
  AnyVector InitWrapPosVectors3 = transf3D({Torus1.MinorRadius/2,Torus1.MinorRadius/2,0},&Torus1);
  AnyVector InitWrapPosVectors4 = transf3D({Torus2.MinorRadius,Torus2.MinorRadius/2,0},&Torus2);
  AnyVector InitWrapPosVectors5 = transf3D({Surf3.Radius[0]*1.5,0,Surf3.Radius[2]/2},&Surf3);
  AnyMatrix InitWrapPosVectors6 = {InitWrapPosVectors1,InitWrapPosVectors2,InitWrapPosVectors3,InitWrapPosVectors4,InitWrapPosVectors5};
//  AnyVector InitWrapPosVectors7 = transf3D({Surf4.Radius[0]/2,-Surf4.Radius[1]*1.5,Surf4.Radius[2]*1.5},&Surf4);
  AnyVector InitWrapPosVectors8 = transf3D({Torus4.MinorRadius,Torus4.MinorRadius/2,0},&Torus4);
  AnyMatrix InitWrapPosVectors9 = {InitWrapPosVectors8};
  SPLine.InitWrapPosVecArr = {None,&InitWrapPosVectors6,&InitWrapPosVectors9};
  //  SPLine.InitWrapPosOnlyOnOff = On;
};

AnyShortestPathMuscle Flexor_Digitorum_Superficialis_Finger5_1 = {
  AnyMuscleModel &MusMdl = ...MusPar.Flexor_Digitorum_Superficialis_Finger5;
  AnyRefNode &Org = ...Seg.Humerus.O_Flexor_Digitorum_Superficialis_Finger5_1;
  AnyRefNode &Via1 = ...Seg.Ulna.Via_Flexor_Digitorum_Superficialis_Finger5_1;
  AnyRefNode &Via2 = ...Seg.Hand.Finger5ProximalRef.Via1_Flexor_Digitorum_Superficialis_Finger5_1;
  AnyRefNode &Ins = ...Seg.Hand.Finger5MiddleRef.I_Flexor_Digitorum_Superficialis_Finger5_1;
  AnyDrawMuscle DrwMus = {#include "../drawSettings/MusDrawSettings.any"};
  AnySurfCylinder &Surf1 = ...Seg.Radius.FlexorMuscleCyl.cyl_level1;
  AnySurfEllipsoid &Surf3 = ...Seg.Hand.Finger5.Seg.Metacarpal.DistalJointNode.Jointsphere;
//  AnySurfEllipsoid  &Surf4 = ...Seg.Hand.Finger5.Seg.Metacarpal.DistalJointNode_Flex.Jointsphere;
  AnySurfCylinder &Surf5 = ...Seg.Hand.Finger5.Seg.ProximalPhalanx.PPJointCyl3.cyl;
  AnyParamSurf &Torus1 = ...Seg.Hand.Finger5.Seg.Metacarpal.DorsalTorusMeta.TorusCenter.Torus;
  AnyParamSurf &Torus2 = ...Seg.Hand.Finger5.Seg.Metacarpal.TorusCenter.Torus;
  AnyParamSurf &Torus4 = ...Seg.Hand.Finger5.Seg.ProximalPhalanx.TorusCenter1.Torus;
  AnyParamSurf &TorusWrist = ...Seg.Radius.Wrist_Torus.Torus;
  AnySurfCylinder &Surf7 =...Seg.Hand.Finger5.Seg.Metacarpal.MetaJointCyl.cyl;
  AnySurfCylinder &Surf9 = ...Seg.Radius.FlexorMuscleCyl.cyl_abduction_Finger4_2.cyl; //2_2
  AnySurfCylinder &Surf10 = ...Seg.Radius.FlexorMuscleCyl.cyl_abduction_Finger5_1.cyl;//5_1
  AnySurfCylinder &Surf11 =...Seg.Radius.PalmarCyl.cyl;
//  #include "Parameter_ExtrinsicHand.any"
SPLine = {
    StringMesh = 100;
//  AugLagCoef = 5000;
//  MaxRelStepSize =0.1;
  //  MaxIteration = 500;
  SolverType = SPSolverFull;
//  RelTol=0.0001;
};
  AnyVector InitWrapPosVectors1 = transf3D({Surf1.Radius,Surf1.Radius,Surf1.Length/2},&Surf1);
  AnyVector InitWrapPosVectors2 = transf3D({-Surf1.Radius,Surf1.Radius,Surf1.Length/2},&Surf1);
  AnyVector InitWrapPosVectors3 = transf3D({Torus1.MinorRadius/2,Torus1.MinorRadius/2,0},&Torus1);
  AnyVector InitWrapPosVectors4 = transf3D({Torus2.MinorRadius,Torus2.MinorRadius/2,0},&Torus2);
  AnyVector InitWrapPosVectors5 = transf3D({Surf3.Radius[0]*1.5,0,Surf3.Radius[2]/2},&Surf3);
  AnyMatrix InitWrapPosVectors6 = {InitWrapPosVectors1,InitWrapPosVectors2,InitWrapPosVectors3,InitWrapPosVectors4,InitWrapPosVectors5};
//  AnyVector InitWrapPosVectors7 = transf3D({Surf4.Radius[0]/2,-Surf4.Radius[1]*1.5,Surf4.Radius[2]*1.5},&Surf4);
  AnyVector InitWrapPosVectors8 = transf3D({Torus4.MinorRadius,Torus4.MinorRadius/2,0},&Torus4);
  AnyMatrix InitWrapPosVectors9 = {InitWrapPosVectors8};
  SPLine.InitWrapPosVecArr = {None,&InitWrapPosVectors6,&InitWrapPosVectors9};
  //  SPLine.InitWrapPosOnlyOnOff = On;
};


// *******************************************************************************************************
// Flexor Carpi Radialis
// *******************************************************************************************************
AnyShortestPathMuscle Flexor_Carpi_Radialis_1 = {
  AnyMuscleModel &MusMdl = ...MusPar.Flexor_Carpi_Radialis;
  AnyRefNode &Org = ...Seg.Humerus.O_Flexor_Carpi_Radialis_1;
  AnyRefNode &Via = ...Seg.Ulna.Via_Flexor_Carpi_Radialis_1;
  AnyRefNode &Ins = ...Seg.Hand.Finger2MetaRef.I_Flexor_Carpi_Radialis_1;
  AnyDrawMuscle DrwMus = {#include "../drawSettings/MusDrawsettings.any"};
  AnySurfCylinder &Surf1 = ...Seg.Radius.FlexorMuscleCyl.cyl_level3;
//  AnySurfCylinder &Surf2 = ...Seg.Radius.FlexorMuscleCyl.cyl_FCR_1.cyl;
  AnySurfCylinder &Surf3 = ...Seg.Radius.FlexorMuscleCyl.cyl_FCR_2.cyl;
  AnySurfCylinder &Surf4 =...Seg.Radius.PalmarCyl.cyl;
//  AnyParamSurf &TorusWrist = ...Seg.Radius.Wrist_Torus.Torus;
  #include "Parameter_ExtrinsicCarpi.any"
  AnyMatrix InitWrapPosVectors1 = transf3D({{Surf1.Radius,Surf1.Radius,Surf1.Length/2},{-Surf1.Radius,Surf1.Radius,Surf1.Length/2}},&Surf1);
  SPLine.InitWrapPosVecArr = {None,&InitWrapPosVectors1};
//    SPLine.InitWrapPosOnlyOnOff = On;
};

// *******************************************************************************************************
// Flexor Carpi Ulnaris
// *******************************************************************************************************
AnyShortestPathMuscle Flexor_Carpi_Ulnaris_1 = {
  AnyMuscleModel &MusMdl = ...MusPar.Flexor_Carpi_Ulnaris;
  AnyRefNode &Org = ...Seg.Humerus.O_Flexor_Carpi_Ulnaris_1;
  AnyRefNode &Via = ...Seg.Ulna.Via_Flexor_Carpi_Ulnaris_1;
  AnyRefNode &Ins = ...Seg.Hand.Carpals.I_Flexor_Carpi_Ulnaris_1;
  AnyDrawMuscle DrwMus = {#include "../drawSettings/MusDrawsettings.any"};
  AnyParamSurf &TorusWrist = ...Seg.Radius.Wrist_Torus.Torus;
  AnySurfCylinder &Surf1 = ...Seg.Radius.FlexorMuscleCyl.cyl_level3;//FlexorMuscleCyl.cyl_level0;
AnySurfCylinder &Surf11 =...Seg.Radius.PalmarCyl.cyl;
//  #include "Parameter_ExtrinsicCarpi.any"
 SPLine = {
    StringMesh = 50;
//  AugLagCoef = 5000;
//  MaxRelStepSize =0.1;
  //  MaxIteration = 500;
  SolverType = SPSolverFull;
//  RelTol=0.0001;
};
  AnyMatrix InitWrapPosVectors1 = transf3D({{Surf1.Radius,Surf1.Radius,Surf1.Length/2},{-Surf1.Radius,Surf1.Radius,Surf1.Length/2}},&Surf1);
  SPLine.InitWrapPosVecArr = {None,&InitWrapPosVectors1};
//   SPLine.InitWrapPosOnlyOnOff = On;
};

// *******************************************************************************************************
// Palmaris Longus
// *******************************************************************************************************
AnyShortestPathMuscle Palmaris_Longus = {
  AnyMuscleModel &MusMdl = ...MusPar.Palmaris_Longus;
  AnyRefNode &Org = ...Seg.Humerus.O_Palmaris_Longus;
  AnyRefNode &Via = ...Seg.Ulna.Via_Palmaris_Longus;
  AnyRefNode &Ins = ...Seg.Hand.Carpals.I_Palmaris_Longus;
  AnyDrawMuscle DrwMus = {#include "../drawSettings/MusDrawSettings.any"};
  AnyParamSurf &TorusWrist = ...Seg.Radius.Wrist_Torus.Torus;
  AnySurfCylinder &Surf1 = ...Seg.Radius.FlexorMuscleCyl.cyl_level2;
  #include "Parameter_ExtrinsicCarpi.any"
  AnyMatrix InitWrapPosVectors1 = transf3D({{Surf1.Radius,Surf1.Radius,Surf1.Length/2},{-Surf1.Radius,Surf1.Radius,Surf1.Length/2}},&Surf1);
  SPLine.InitWrapPosVecArr = {None,&InitWrapPosVectors1};
  // SPLine.InitWrapPosOnlyOnOff = On;
};
