BodyModelRef.Right.ShoulderArm = {
  // Create a folder with references to the necessary muscles.
  AnyFolder EvaluateJointStrengthMusRef = {
    #if BM_ARM_MUSCLES_RIGHT == CONST_MUSCLES_SIMPLE | BM_ARM_MUSCLES_RIGHT == CONST_MUSCLES_3E_HILL  | ( BM_ARM_MUSCLES_RIGHT == BM_ARM_MUSCLES_BOTH & (BM_ARM_MUSCLES_BOTH  == CONST_MUSCLES_SIMPLE  | BM_ARM_MUSCLES_BOTH  == CONST_MUSCLES_3E_HILL))
    AnyFolder &ArmMuscles = .Mus;
    #endif
  };
};

Right = {

    AnyFolder Arm = {

    AnyFolder GlenoHumeralAbduction={
      // Change the following variables to adjust the study
      AnyVector RangeOfMotion = DesignVar({-10,140});
      AnyVar SternoClavicularProtraction = DesignVar(-23);
      AnyVar SternoClavicularElevation = DesignVar(11.5);
      AnyVar SternoClavicularAxialRotation = DesignVar(-20);
      AnyVar GHFlexion = DesignVar(0);
      AnyVar GHExternalRotation = DesignVar(0);
      AnyVar ElbowFlexion = DesignVar(0);
      AnyVar ElbowSupination = DesignVar(0);
      AnyVar WristFlexion = DesignVar(0);
      AnyVar WristAbduction = DesignVar(0);
      /////////////////////////////////////////

      // The following should not be changed
      AnyFolder &SideBodyModelRef=...BodyModelRef.Right;
      AnyFolder &SideBodyInterfaceRef = ...BodyModelRef.Interface.Right;
      AnyInt nStep = 1;
      #include "EvaluateJointStrengthStudy.any"
      AnyString OutputFileName=  "JointStrength_Arm_Right_GHAbduction.csv";
      Model.Drivers = {
          AnyKinEqSimpleDriver ArmDriver= {
            AnyKinMeasure &ref = .ArmMeasure;
            DriverPos = {...SternoClavicularProtraction ,...SternoClavicularElevation ,
                         ...SternoClavicularAxialRotation, ...RangeOfMotion[0],
                          ...GHFlexion ,...GHExternalRotation,
                         ...ElbowFlexion, -1*...ElbowSupination ,
                         ...WristFlexion ,...WristAbduction }*pi/180;
            AnyFloat Mask = {0,0,0,1,0,0,0,0,0,0};
            DriverVel = Mask* (...RangeOfMotion[1]-...RangeOfMotion[0])*pi/180/...Study.tEnd;
            Reaction.Type = {Off,Off,Off,Off, Off, Off, On,On, On, On};
          };
      };
    };
    AnyFolder GlenoHumeralAdduction={
      // Change the following variables to adjust the study
      AnyVector RangeOfMotion = DesignVar({140,-10});
      AnyVar SternoClavicularProtraction = DesignVar(-23);
      AnyVar SternoClavicularElevation = DesignVar(11.5);
      AnyVar SternoClavicularAxialRotation = DesignVar(-20);
      AnyVar GHFlexion = DesignVar(0);
      AnyVar GHExternalRotation = DesignVar(0);
      AnyVar ElbowFlexion = DesignVar(0);
      AnyVar ElbowSupination = DesignVar(0);
      AnyVar WristFlexion = DesignVar(0);
      AnyVar WristAbduction = DesignVar(0);
      /////////////////////////////////////////

      // The following should not be changed
      AnyFolder &SideBodyModelRef=...BodyModelRef.Right;
      AnyFolder &SideBodyInterfaceRef = ...BodyModelRef.Interface.Right;
      AnyInt nStep = 1;
      #include "EvaluateJointStrengthStudy.any"
      AnyString OutputFileName=  "JointStrength_Arm_Right_GHAbduction.csv";
      Model.Drivers = {
          AnyKinEqSimpleDriver ArmDriver= {
            AnyKinMeasure &ref = .ArmMeasure;
            DriverPos = {...SternoClavicularProtraction ,...SternoClavicularElevation ,
                         ...SternoClavicularAxialRotation, ...RangeOfMotion[0],
                          ...GHFlexion ,...GHExternalRotation,
                         ...ElbowFlexion, -1*...ElbowSupination ,
                         ...WristFlexion ,...WristAbduction }*pi/180;
            AnyFloat Mask = {0,0,0,1,0,0,0,0,0,0};
            DriverVel = Mask* (...RangeOfMotion[1]-...RangeOfMotion[0])*pi/180/...Study.tEnd;
            Reaction.Type = {Off,Off,Off,Off, Off, Off, On,On, On, On};
          };
      };
    };

    AnyFolder GlenoHumeralFlexion={
      // Change the following variables to adjust the moment arm study
      AnyVector RangeOfMotion = DesignVar({-30,170});
      AnyVar SternoClavicularProtraction = DesignVar(-23);
      AnyVar SternoClavicularElevation = DesignVar(11.5);
      AnyVar SternoClavicularAxialRotation = DesignVar(-20);
      AnyVar GHAbduction = DesignVar(0);
      AnyVar GHExternalRotation = DesignVar(0);
      AnyVar ElbowFlexion = DesignVar(0);
      AnyVar ElbowSupination = DesignVar(0);
      AnyVar WristFlexion = DesignVar(0);
      AnyVar WristAbduction = DesignVar(0);
      /////////////////////////////////////////

      // The following should not be changed
      AnyFolder &SideBodyModelRef=...BodyModelRef.Right;
      AnyFolder &SideBodyInterfaceRef = ...BodyModelRef.Interface.Right;
      AnyInt nStep = 1;
      #include "EvaluateJointStrengthStudy.any"
      AnyString OutputFileName=  "JointStrength_Arm_Right_GHFlexion.csv";
      Model.Drivers = {
          AnyKinEqSimpleDriver ArmDriver= {
            AnyKinMeasure &ref = .ArmMeasure;
            DriverPos = {...SternoClavicularProtraction ,...SternoClavicularElevation ,
                         ...SternoClavicularAxialRotation, ...GHAbduction ,
                         ...RangeOfMotion[0] ,...GHExternalRotation,
                         ...ElbowFlexion, -1*...ElbowSupination ,
                         ...WristFlexion ,...WristAbduction }*pi/180;
            AnyFloat Mask = {0,0,0,0,1,0,0,0,0,0};
            DriverVel = Mask* (...RangeOfMotion[1]-...RangeOfMotion[0])*pi/180/...Study.tEnd;
            Reaction.Type = {Off,Off,Off,Off, Off, Off, On,On, On, On};
          };
      };
    };
    AnyFolder GlenoHumeralExtension ={
      // Change the following variables to adjust the moment arm study
      AnyVector RangeOfMotion = DesignVar({170,-30});
      AnyVar SternoClavicularProtraction = DesignVar(-23);
      AnyVar SternoClavicularElevation = DesignVar(11.5);
      AnyVar SternoClavicularAxialRotation = DesignVar(-20);
      AnyVar GHAbduction = DesignVar(0);
      AnyVar GHExternalRotation = DesignVar(0);
      AnyVar ElbowFlexion = DesignVar(0);
      AnyVar ElbowSupination = DesignVar(0);
      AnyVar WristFlexion = DesignVar(0);
      AnyVar WristAbduction = DesignVar(0);
      /////////////////////////////////////////

      // The following should not be changed
      AnyFolder &SideBodyModelRef=...BodyModelRef.Right;
      AnyFolder &SideBodyInterfaceRef = ...BodyModelRef.Interface.Right;
      AnyInt nStep = 1;
      #include "EvaluateJointStrengthStudy.any"
      AnyString OutputFileName=  "JointStrength_Arm_Right_GHFlexion.csv";
      Model.Drivers = {
          AnyKinEqSimpleDriver ArmDriver= {
            AnyKinMeasure &ref = .ArmMeasure;
            DriverPos = {...SternoClavicularProtraction ,...SternoClavicularElevation ,
                         ...SternoClavicularAxialRotation, ...GHAbduction ,
                         ...RangeOfMotion[0] ,...GHExternalRotation,
                         ...ElbowFlexion, -1*...ElbowSupination ,
                         ...WristFlexion ,...WristAbduction }*pi/180;
            AnyFloat Mask = {0,0,0,0,1,0,0,0,0,0};
            DriverVel = Mask* (...RangeOfMotion[1]-...RangeOfMotion[0])*pi/180/...Study.tEnd;
            Reaction.Type = {Off,Off,Off,Off, Off, Off, On,On, On, On};
          };
      };
    };

    AnyFolder GlenoHumeralExternalRotation={
      // Change the following variables to adjust the moment arm study
      AnyVector RangeOfMotion = DesignVar({-30,30});
      AnyVar SternoClavicularProtraction = DesignVar(-23);
      AnyVar SternoClavicularElevation = DesignVar(11.5);
      AnyVar SternoClavicularAxialRotation = DesignVar(-20);
      AnyVar GHAbduction = DesignVar(30);
      AnyVar GHFlexion = DesignVar(30);
      AnyVar GHExternalRotation = DesignVar(0);
      AnyVar ElbowFlexion = DesignVar(0);
      AnyVar ElbowSupination = DesignVar(0);
      AnyVar WristFlexion = DesignVar(0);
      AnyVar WristAbduction = DesignVar(0);
      /////////////////////////////////////////

      // The following should not be changed
      AnyFolder &SideBodyModelRef=...BodyModelRef.Right;
      AnyFolder &SideBodyInterfaceRef = ...BodyModelRef.Interface.Right;
      AnyInt nStep = 1;
      #include "EvaluateJointStrengthStudy.any"
      AnyString OutputFileName=  "JointStrength_Arm_Right_GHAbduction.csv";
      Model.Drivers = {
          AnyKinEqSimpleDriver ArmDriver= {
            AnyKinMeasure &ref = .ArmMeasure;
            DriverPos = {...SternoClavicularProtraction ,...SternoClavicularElevation ,
                         ...SternoClavicularAxialRotation, ...GHAbduction,
                          ...GHFlexion ,...RangeOfMotion[0],
                         ...ElbowFlexion, -1*...ElbowSupination ,
                         ...WristFlexion ,...WristAbduction }*pi/180;
            AnyFloat Mask = {0,0,0,0,0,1,0,0,0,0};
            DriverVel = Mask* (...RangeOfMotion[1]-...RangeOfMotion[0])*pi/180/...Study.tEnd;
            Reaction.Type = {Off,Off,Off,Off, Off, Off, On,On, On, On};
          };
      };
    };
    AnyFolder GlenoHumeralInternalRotation={

      // Change the following variables to adjust the moment arm study
      AnyVector RangeOfMotion = DesignVar({30,-30});
      AnyVar SternoClavicularProtraction = DesignVar(-23);
      AnyVar SternoClavicularElevation = DesignVar(11.5);
      AnyVar SternoClavicularAxialRotation = DesignVar(-20);
      AnyVar GHAbduction = DesignVar(30);
      AnyVar GHFlexion = DesignVar(30);
      AnyVar GHExternalRotation = DesignVar(0);
      AnyVar ElbowFlexion = DesignVar(0);
      AnyVar ElbowSupination = DesignVar(0);
      AnyVar WristFlexion = DesignVar(0);
      AnyVar WristAbduction = DesignVar(0);
      /////////////////////////////////////////

      // The following should not be changed
      AnyFolder &SideBodyModelRef=...BodyModelRef.Right;
      AnyFolder &SideBodyInterfaceRef = ...BodyModelRef.Interface.Right;
      AnyInt nStep = 1;
      #include "EvaluateJointStrengthStudy.any"
      AnyString OutputFileName=  "JointStrength_Arm_Right_GHAbduction.csv";
      Model.Drivers = {
          AnyKinEqSimpleDriver ArmDriver= {
            AnyKinMeasure &ref = .ArmMeasure;
            DriverPos = {...SternoClavicularProtraction ,...SternoClavicularElevation ,
                         ...SternoClavicularAxialRotation, ...GHAbduction,
                          ...GHFlexion ,...RangeOfMotion[0],
                         ...ElbowFlexion, -1*...ElbowSupination ,
                         ...WristFlexion ,...WristAbduction }*pi/180;
            AnyFloat Mask = {0,0,0,0,0,1,0,0,0,0};
            DriverVel = Mask* (...RangeOfMotion[1]-...RangeOfMotion[0])*pi/180/...Study.tEnd;
            Reaction.Type = {Off,Off,Off,Off, Off, Off, On,On, On, On};
          };
      };
    };

    AnyFolder ElbowFlexion={

      // Change the following variables to adjust the moment arm study
      AnyVector RangeOfMotion = DesignVar({0,160});
      AnyVar SternoClavicularProtraction = DesignVar(-23);
      AnyVar SternoClavicularElevation = DesignVar(11.5);
      AnyVar SternoClavicularAxialRotation = DesignVar(-20);
      AnyVar GHAbduction = DesignVar(0);
      AnyVar GHFlexion = DesignVar(0);
      AnyVar GHExternalRotation = DesignVar(0);
      AnyVar ElbowSupination = DesignVar(0);
      AnyVar WristFlexion = DesignVar(0);
      AnyVar WristAbduction = DesignVar(0);
      /////////////////////////////////////////

      // The following should not be changed
      AnyFolder &SideBodyModelRef=...BodyModelRef.Right;
      AnyFolder &SideBodyInterfaceRef = ...BodyModelRef.Interface.Right;
      AnyInt nStep = 1;
      #include "EvaluateJointStrengthStudy.any"
      AnyString OutputFileName=  "JointStrength_Arm_Right_ElbowFlexion.csv";
      Model.Drivers = {
          AnyKinEqSimpleDriver ArmDriver= {
            AnyKinMeasure &ref = .ArmMeasure;
            DriverPos = {...SternoClavicularProtraction ,...SternoClavicularElevation ,
                         ...SternoClavicularAxialRotation, ...GHAbduction ,
                         ...GHFlexion ,...GHExternalRotation,
                         ...RangeOfMotion[0], -1*...ElbowSupination ,
                         ...WristFlexion ,...WristAbduction }*pi/180;
            AnyFloat Mask = {0,0,0,0,0,0,1,0,0,0};
            DriverVel = Mask* (...RangeOfMotion[1]-...RangeOfMotion[0])*pi/180/...Study.tEnd;
            Reaction.Type = {Off,Off,Off,On, On, On, Off,On, Off, Off};
          };
      };
    };
    AnyFolder ElbowExtension={

      // Change the following variables to adjust the moment arm study
      AnyVector RangeOfMotion = DesignVar({160,5});
      AnyVar SternoClavicularProtraction = DesignVar(-23);
      AnyVar SternoClavicularElevation = DesignVar(11.5);
      AnyVar SternoClavicularAxialRotation = DesignVar(-20);
      AnyVar GHAbduction = DesignVar(0);
      AnyVar GHFlexion = DesignVar(0);
      AnyVar GHExternalRotation = DesignVar(0);
      AnyVar ElbowSupination = DesignVar(0);
      AnyVar WristFlexion = DesignVar(0);
      AnyVar WristAbduction = DesignVar(0);
      /////////////////////////////////////////

      // The following should not be changed
      AnyFolder &SideBodyModelRef=...BodyModelRef.Right;
      AnyFolder &SideBodyInterfaceRef = ...BodyModelRef.Interface.Right;
      AnyInt nStep = 1;
      #include "EvaluateJointStrengthStudy.any"
      AnyString OutputFileName=  "JointStrength_Arm_Right_ElbowFlexion.csv";
      Model.Drivers = {
          AnyKinEqSimpleDriver ArmDriver= {
            AnyKinMeasure &ref = .ArmMeasure;
            DriverPos = {...SternoClavicularProtraction ,...SternoClavicularElevation ,
                         ...SternoClavicularAxialRotation, ...GHAbduction ,
                         ...GHFlexion ,...GHExternalRotation,
                         ...RangeOfMotion[0], -1*...ElbowSupination ,
                         ...WristFlexion ,...WristAbduction }*pi/180;
            AnyFloat Mask = {0,0,0,0,0,0,1,0,0,0};
            DriverVel = Mask* (...RangeOfMotion[1]-...RangeOfMotion[0])*pi/180/...Study.tEnd;
            Reaction.Type = {Off,Off,Off,On, On, On, Off,On, Off, Off};
          };
      };
    };

    AnyFolder ElbowPronation={

      // Change the following variables to adjust the moment arm study
      AnyVector RangeOfMotion = DesignVar({80,-80});
      AnyVar SternoClavicularProtraction = DesignVar(-23);
      AnyVar SternoClavicularElevation = DesignVar(11.5);
      AnyVar SternoClavicularAxialRotation = DesignVar(-20);
      AnyVar GHAbduction = DesignVar(0);
      AnyVar GHFlexion = DesignVar(0);
      AnyVar GHExternalRotation = DesignVar(0);
      AnyVar ElbowFlexion = DesignVar(90);
//      AnyVar ElbowSupination = DesignVar(0);
      AnyVar WristFlexion = DesignVar(0);
      AnyVar WristAbduction = DesignVar(0);
      /////////////////////////////////////////

      // The following should not be changed
      AnyFolder &SideBodyModelRef=...BodyModelRef.Right;
      AnyFolder &SideBodyInterfaceRef = ...BodyModelRef.Interface.Right;
      AnyInt nStep = 1;
      #include "EvaluateJointStrengthStudy.any"
      AnyString OutputFileName=  "JointStrength_Arm_Right_ElbowFlexion.csv";
      Model.Drivers = {
          AnyKinEqSimpleDriver ArmDriver= {
            AnyKinMeasure &ref = .ArmMeasure;
            DriverPos = {...SternoClavicularProtraction ,...SternoClavicularElevation ,
                         ...SternoClavicularAxialRotation, ...GHAbduction ,
                         ...GHFlexion ,...GHExternalRotation,
                         ...ElbowFlexion, -1*...RangeOfMotion[0],
                         ...WristFlexion ,...WristAbduction }*pi/180;
            AnyFloat Mask = {0,0,0,0,0,0,0,1,0,0};
            DriverVel = Mask* (-1)*(...RangeOfMotion[1]-...RangeOfMotion[0])*pi/180/...Study.tEnd;
            Reaction.Type = {Off,Off,Off,On, On, On, Off,Off, Off, Off};
          };
      };
    };

    AnyFolder ElbowSupination = {

      // Change the following variables to adjust the moment arm study
      AnyVector RangeOfMotion = DesignVar({-90, 90});
      AnyVar SternoClavicularProtraction = DesignVar(-23);
      AnyVar SternoClavicularElevation = DesignVar(11.5);
      AnyVar SternoClavicularAxialRotation = DesignVar(-20);
      AnyVar GHAbduction = DesignVar(0);
      AnyVar GHFlexion = DesignVar(0);
      AnyVar GHExternalRotation = DesignVar(0);
      AnyVar ElbowFlexion = DesignVar(90);
//      AnyVar ElbowSupination = DesignVar(0);
      AnyVar WristFlexion = DesignVar(0);
      AnyVar WristAbduction = DesignVar(0);
      /////////////////////////////////////////

      // The following should not be changed
      AnyFolder &SideBodyModelRef=...BodyModelRef.Right;
      AnyFolder &SideBodyInterfaceRef = ...BodyModelRef.Interface.Right;
      AnyInt nStep = 1;
      #include "EvaluateJointStrengthStudy.any"
      AnyString OutputFileName=  "JointStrength_Arm_Right_ElbowFlexion.csv";
      Model.Drivers = {
          AnyKinEqSimpleDriver ArmDriver= {
            AnyKinMeasure &ref = .ArmMeasure;
            DriverPos = {...SternoClavicularProtraction ,...SternoClavicularElevation ,
                         ...SternoClavicularAxialRotation, ...GHAbduction ,
                         ...GHFlexion ,...GHExternalRotation,
                         ...ElbowFlexion, -1*...RangeOfMotion[0],
                         ...WristFlexion ,...WristAbduction }*pi/180;
            AnyFloat Mask = {0,0,0,0,0,0,0,1,0,0};
            DriverVel = Mask*(-1)* (...RangeOfMotion[1]-...RangeOfMotion[0])*pi/180/...Study.tEnd;
            Reaction.Type = {Off,Off,Off,On, On, On, Off,Off, Off, Off};
          };
      };
    };

    AnyFolder WristFlexion = {
      // Change the following variables to adjust the moment arm study
      AnyVector RangeOfMotion = DesignVar({-60,60});
      AnyVar SternoClavicularProtraction = DesignVar(-23);
      AnyVar SternoClavicularElevation = DesignVar(11.5);
      AnyVar SternoClavicularAxialRotation = DesignVar(-20);
      AnyVar GHAbduction = DesignVar(0);
      AnyVar GHFlexion = DesignVar(0);
      AnyVar GHExternalRotation = DesignVar(0);
      AnyVar ElbowFlexion = DesignVar(5);
      AnyVar ElbowSupination = DesignVar(0);
//      AnyVar WristFlexion = DesignVar(0);
      AnyVar WristAbduction = DesignVar(0);
      /////////////////////////////////////////

      // The following should not be changed
      AnyFolder &SideBodyModelRef=...BodyModelRef.Right;
      AnyFolder &SideBodyInterfaceRef = ...BodyModelRef.Interface.Right;
      AnyInt nStep = 1;
      #include "EvaluateJointStrengthStudy.any"
      AnyString OutputFileName=  "JointStrength_Arm_Right_ElbowFlexion.csv";
      Model.Drivers = {
          AnyKinEqSimpleDriver ArmDriver= {
            AnyKinMeasure &ref = .ArmMeasure;
            DriverPos = {...SternoClavicularProtraction ,...SternoClavicularElevation ,
                         ...SternoClavicularAxialRotation, ...GHAbduction ,
                         ...GHFlexion ,...GHExternalRotation,
                         ...ElbowFlexion, -1*...ElbowSupination ,
                         ...RangeOfMotion[0], ...WristAbduction }*pi/180;
            AnyFloat Mask = {0,0,0,0,0,0,0,0,1,0};
            DriverVel = Mask* (...RangeOfMotion[1]-...RangeOfMotion[0])*pi/180/...Study.tEnd;
            Reaction.Type = {On,On,On,On, On, On, On,Off, Off, Off};
          };
      };
    };

    AnyFolder WristExtension = {
      // Change the following variables to adjust the moment arm study
      AnyVector RangeOfMotion = DesignVar({60,-60});
      AnyVar SternoClavicularProtraction = DesignVar(-23);
      AnyVar SternoClavicularElevation = DesignVar(11.5);
      AnyVar SternoClavicularAxialRotation = DesignVar(-20);
      AnyVar GHAbduction = DesignVar(0);
      AnyVar GHFlexion = DesignVar(0);
      AnyVar GHExternalRotation = DesignVar(0);
      AnyVar ElbowFlexion = DesignVar(5);
      AnyVar ElbowSupination = DesignVar(0);
//      AnyVar WristFlexion = DesignVar(0);
      AnyVar WristAbduction = DesignVar(0);
      /////////////////////////////////////////

      // The following should not be changed
      AnyFolder &SideBodyModelRef=...BodyModelRef.Right;
      AnyFolder &SideBodyInterfaceRef = ...BodyModelRef.Interface.Right;
      AnyInt nStep = 1;
      #include "EvaluateJointStrengthStudy.any"
      AnyString OutputFileName=  "JointStrength_Arm_Right_ElbowFlexion.csv";
      Model.Drivers = {
          AnyKinEqSimpleDriver ArmDriver= {
            AnyKinMeasure &ref = .ArmMeasure;
            DriverPos = {...SternoClavicularProtraction ,...SternoClavicularElevation ,
                         ...SternoClavicularAxialRotation, ...GHAbduction ,
                         ...GHFlexion ,...GHExternalRotation,
                         ...ElbowFlexion, -1*...ElbowSupination ,
                         ...RangeOfMotion[0], ...WristAbduction }*pi/180;
            AnyFloat Mask = {0,0,0,0,0,0,0,0,1,0};
            DriverVel = Mask* (...RangeOfMotion[1]-...RangeOfMotion[0])*pi/180/...Study.tEnd;
            Reaction.Type = {On,On,On,On, On, On, On,Off, Off, Off};
          };
      };
    };
    AnyFolder WristAbduction = {
      // Change the following variables to adjust the moment arm study
      AnyVector RangeOfMotion = DesignVar({-20,20});
      AnyVar SternoClavicularProtraction = DesignVar(-23);
      AnyVar SternoClavicularElevation = DesignVar(11.5);
      AnyVar SternoClavicularAxialRotation = DesignVar(-20);
      AnyVar GHAbduction = DesignVar(0);
      AnyVar GHFlexion = DesignVar(0);
      AnyVar GHExternalRotation = DesignVar(0);
      AnyVar ElbowFlexion = DesignVar(0);
      AnyVar ElbowSupination = DesignVar(0);
      AnyVar WristFlexion = DesignVar(0);
//      AnyVar WristAbduction = DesignVar(0);
      /////////////////////////////////////////

      // The following should not be changed
      AnyFolder &SideBodyModelRef=...BodyModelRef.Right;
      AnyFolder &SideBodyInterfaceRef = ...BodyModelRef.Interface.Right;
      AnyInt nStep = 1;
      #include "EvaluateJointStrengthStudy.any"
      AnyString OutputFileName=  "JointStrength_Arm_Right_ElbowFlexion.csv";
      Model.Drivers = {
          AnyKinEqSimpleDriver ArmDriver= {
            AnyKinMeasure &ref = .ArmMeasure;
            DriverPos = {...SternoClavicularProtraction ,...SternoClavicularElevation ,
                         ...SternoClavicularAxialRotation, ...GHAbduction ,
                         ...GHFlexion ,...GHExternalRotation,
                         ...ElbowFlexion, -1*...ElbowSupination ,
                         ...WristFlexion , ...RangeOfMotion[0]}*pi/180;
            AnyFloat Mask = {0,0,0,0,0,0,0,0,0,1};
            DriverVel = Mask* (...RangeOfMotion[1]-...RangeOfMotion[0])*pi/180/...Study.tEnd;
            Reaction.Type = {On,On,On,On, On, On, On,Off, Off, Off};
          };
      };
    };
    AnyFolder WristAdduction = {
      // Change the following variables to adjust the moment arm study
      AnyVector RangeOfMotion = DesignVar({20,-20});
      AnyVar SternoClavicularProtraction = DesignVar(-23);
      AnyVar SternoClavicularElevation = DesignVar(11.5);
      AnyVar SternoClavicularAxialRotation = DesignVar(-20);
      AnyVar GHAbduction = DesignVar(0);
      AnyVar GHFlexion = DesignVar(0);
      AnyVar GHExternalRotation = DesignVar(0);
      AnyVar ElbowFlexion = DesignVar(0);
      AnyVar ElbowSupination = DesignVar(0);
      AnyVar WristFlexion = DesignVar(0);
//      AnyVar WristAbduction = DesignVar(0);
      /////////////////////////////////////////

      // The following should not be changed
      AnyFolder &SideBodyModelRef=...BodyModelRef.Right;
      AnyFolder &SideBodyInterfaceRef = ...BodyModelRef.Interface.Right;
      AnyInt nStep = 1;
      #include "EvaluateJointStrengthStudy.any"
      AnyString OutputFileName=  "JointStrength_Arm_Right_ElbowFlexion.csv";
      Model.Drivers = {
          AnyKinEqSimpleDriver ArmDriver= {
            AnyKinMeasure &ref = .ArmMeasure;
            DriverPos = {...SternoClavicularProtraction ,...SternoClavicularElevation ,
                         ...SternoClavicularAxialRotation, ...GHAbduction ,
                         ...GHFlexion ,...GHExternalRotation,
                         ...ElbowFlexion, -1*...ElbowSupination ,
                         ...WristFlexion , ...RangeOfMotion[0]}*pi/180;
            AnyFloat Mask = {0,0,0,0,0,0,0,0,0,1};
            DriverVel = Mask* (...RangeOfMotion[1]-...RangeOfMotion[0])*pi/180/...Study.tEnd;
            Reaction.Type = {On,On,On,On, On, On, On,Off, Off, Off};
          };
      };
    };
  };

};//Right


 Run_all_studies ={
   AnyOperation &RGlenoHumeralAbduction= .Right.Arm.GlenoHumeralAbduction.Run;
   AnyOperation &RGlenoHumeralAdduction= .Right.Arm.GlenoHumeralAdduction.Run;
   AnyOperation &RGlenoHumeralFlexion= .Right.Arm.GlenoHumeralFlexion.Run;
   AnyOperation &RGlenoHumeralExtension= .Right.Arm.GlenoHumeralExtension.Run;
   AnyOperation &RGlenoHumeralExternalRotation= .Right.Arm.GlenoHumeralExternalRotation.Run;
   AnyOperation &RGlenoHumeralInternalRotation= .Right.Arm.GlenoHumeralInternalRotation.Run;
   AnyOperation &RElbowFlexion= .Right.Arm.ElbowFlexion.Run;
   AnyOperation &RElbowExtension= .Right.Arm.ElbowExtension.Run;
   AnyOperation &RElbowPronation= .Right.Arm.ElbowPronation.Run;
   AnyOperation &RElbowSupination= .Right.Arm.ElbowSupination.Run;
   AnyOperation &RWristFlexion= .Right.Arm.WristFlexion.Run;
   AnyOperation &RWristExtension= .Right.Arm.WristExtension.Run;
   AnyOperation &RWristAbduction= .Right.Arm.WristAbduction.Run;
   AnyOperation &RWristAdduction= .Right.Arm.WristAdduction.Run;
 };
