//Muscle parameters for the shoulder muscles

biceps_brachii_caput_breve = {
  AnyVar Epsilon0Temp = 0.053000;
  AnyVar K1Temp = 10.000000;
  AnyVar K2Temp = 0.000000;
  AnyVar FcfastTemp = 0.400000;
  AnyVar JtTemp = 3.000000;
  AnyVar JpeTemp = 3.000000;
  AnyVar PEFactorTemp = 5.000000;
};

biceps_brachii_caput_longum = {
  AnyVar Epsilon0Temp = 0.053000;
  AnyVar K1Temp = 10.000000;
  AnyVar K2Temp = 0.000000;
  AnyVar FcfastTemp = 0.400000;
  AnyVar JtTemp = 3.000000;
  AnyVar JpeTemp = 3.000000;
  AnyVar PEFactorTemp = 5.000000;
};

coracobrachialis_1 = {
  AnyVar Epsilon0Temp = 0.053000;
  AnyVar K1Temp = 10.000000;
  AnyVar K2Temp = 0.000000;
  AnyVar FcfastTemp = 0.400000;
  AnyVar JtTemp = 3.000000;
  AnyVar JpeTemp = 3.000000;
  AnyVar PEFactorTemp = 5.000000;
};

coracobrachialis_2 = {
  AnyVar Epsilon0Temp = 0.053000;
  AnyVar K1Temp = 10.000000;
  AnyVar K2Temp = 0.000000;
  AnyVar FcfastTemp = 0.400000;
  AnyVar JtTemp = 3.000000;
  AnyVar JpeTemp = 3.000000;
  AnyVar PEFactorTemp = 5.000000;
};

coracobrachialis_3 = {
  AnyVar Epsilon0Temp = 0.053000;
  AnyVar K1Temp = 10.000000;
  AnyVar K2Temp = 0.000000;
  AnyVar FcfastTemp = 0.400000;
  AnyVar JtTemp = 3.000000;
  AnyVar JpeTemp = 3.000000;
  AnyVar PEFactorTemp = 5.000000;
};

coracobrachialis_4 = {
  AnyVar Epsilon0Temp = 0.053000;
  AnyVar K1Temp = 10.000000;
  AnyVar K2Temp = 0.000000;
  AnyVar FcfastTemp = 0.400000;
  AnyVar JtTemp = 3.000000;
  AnyVar JpeTemp = 3.000000;
  AnyVar PEFactorTemp = 5.000000;
};

coracobrachialis_5 = {
  AnyVar Epsilon0Temp = 0.053000;
  AnyVar K1Temp = 10.000000;
  AnyVar K2Temp = 0.000000;
  AnyVar FcfastTemp = 0.400000;
  AnyVar JtTemp = 3.000000;
  AnyVar JpeTemp = 3.000000;
  AnyVar PEFactorTemp = 5.000000;
};

coracobrachialis_6 = {
  AnyVar Epsilon0Temp = 0.053000;
  AnyVar K1Temp = 10.000000;
  AnyVar K2Temp = 0.000000;
  AnyVar FcfastTemp = 0.400000;
  AnyVar JtTemp = 3.000000;
  AnyVar JpeTemp = 3.000000;
  AnyVar PEFactorTemp = 5.000000;
};

#if BM_ARM_DELTOID_WRAPPING == _DELTOID_WRAPPING_RAKE_

deltoideus_scapular_part_1 = {
  AnyVar Epsilon0Temp = 0.053000;
  AnyVar K1Temp = 10.000000;
  AnyVar K2Temp = 0.000000;
  AnyVar FcfastTemp = 0.400000;
  AnyVar JtTemp = 3.000000;
  AnyVar JpeTemp = 3.000000;
  AnyVar PEFactorTemp = 5.000000;
};

deltoideus_scapular_part_2 = {
  AnyVar Epsilon0Temp = 0.053000;
  AnyVar K1Temp = 10.000000;
  AnyVar K2Temp = 0.000000;
  AnyVar FcfastTemp = 0.400000;
  AnyVar JtTemp = 3.000000;
  AnyVar JpeTemp = 3.000000;
  AnyVar PEFactorTemp = 5.000000;
};

deltoideus_scapular_part_3 = {
  AnyVar Epsilon0Temp = 0.053000;
  AnyVar K1Temp = 10.000000;
  AnyVar K2Temp = 0.000000;
  AnyVar FcfastTemp = 0.400000;
  AnyVar JtTemp = 3.000000;
  AnyVar JpeTemp = 3.000000;
  AnyVar PEFactorTemp = 5.000000;
};

deltoideus_scapular_part_4 = {
  AnyVar Epsilon0Temp = 0.053000;
  AnyVar K1Temp = 10.000000;
  AnyVar K2Temp = 0.000000;
  AnyVar FcfastTemp = 0.400000;
  AnyVar JtTemp = 3.000000;
  AnyVar JpeTemp = 3.000000;
  AnyVar PEFactorTemp = 5.000000;
};

deltoideus_scapular_part_5 = {
  AnyVar Epsilon0Temp = 0.053000;
  AnyVar K1Temp = 10.000000;
  AnyVar K2Temp = 0.000000;
  AnyVar FcfastTemp = 0.400000;
  AnyVar JtTemp = 3.000000;
  AnyVar JpeTemp = 3.000000;
  AnyVar PEFactorTemp = 5.000000;
};

deltoideus_scapular_part_6 = {
  AnyVar Epsilon0Temp = 0.053000;
  AnyVar K1Temp = 10.000000;
  AnyVar K2Temp = 0.000000;
  AnyVar FcfastTemp = 0.400000;
  AnyVar JtTemp = 3.000000;
  AnyVar JpeTemp = 3.000000;
  AnyVar PEFactorTemp = 5.000000;
};

deltoideus_clavicular_part_1 = {
  AnyVar Epsilon0Temp = 0.053000;
  AnyVar K1Temp = 10.000000;
  AnyVar K2Temp = 0.000000;
  AnyVar FcfastTemp = 0.400000;
  AnyVar JtTemp = 3.000000;
  AnyVar JpeTemp = 3.000000;
  AnyVar PEFactorTemp = 5.000000;
};

deltoideus_clavicular_part_2 = {
  AnyVar Epsilon0Temp = 0.053000;
  AnyVar K1Temp = 10.000000;
  AnyVar K2Temp = 0.000000;
  AnyVar FcfastTemp = 0.400000;
  AnyVar JtTemp = 3.000000;
  AnyVar JpeTemp = 3.000000;
  AnyVar PEFactorTemp = 5.000000;
};

deltoideus_clavicular_part_3 = {
  AnyVar Epsilon0Temp = 0.053000;
  AnyVar K1Temp = 10.000000;
  AnyVar K2Temp = 0.000000;
  AnyVar FcfastTemp = 0.400000;
  AnyVar JtTemp = 3.000000;
  AnyVar JpeTemp = 3.000000;
  AnyVar PEFactorTemp = 5.000000;
};

deltoideus_clavicular_part_4 = {
  AnyVar Epsilon0Temp = 0.053000;
  AnyVar K1Temp = 10.000000;
  AnyVar K2Temp = 0.000000;
  AnyVar FcfastTemp = 0.400000;
  AnyVar JtTemp = 3.000000;
  AnyVar JpeTemp = 3.000000;
  AnyVar PEFactorTemp = 5.000000;
};

deltoideus_clavicular_part_5 = {
  AnyVar Epsilon0Temp = 0.053000;
  AnyVar K1Temp = 10.000000;
  AnyVar K2Temp = 0.000000;
  AnyVar FcfastTemp = 0.400000;
  AnyVar JtTemp = 3.000000;
  AnyVar JpeTemp = 3.000000;
  AnyVar PEFactorTemp = 5.000000;
};

deltoideus_clavicular_part_6 = {
  AnyVar Epsilon0Temp = 0.053000;
  AnyVar K1Temp = 10.000000;
  AnyVar K2Temp = 0.000000;
  AnyVar FcfastTemp = 0.400000;
  AnyVar JtTemp = 3.000000;
  AnyVar JpeTemp = 3.000000;
  AnyVar PEFactorTemp = 5.000000;
};

#else
// Start of BM_ARM_DELTOID_WRAPPING
deltoideus_posterior_part_1 = {
  AnyVar Epsilon0Temp = 0.053000;
  AnyVar K1Temp = 10.000000;
  AnyVar K2Temp = 0.000000;
  AnyVar FcfastTemp = 0.400000;
  AnyVar JtTemp = 3.000000;
  AnyVar JpeTemp = 3.000000;
  AnyVar PEFactorTemp = 5.000000;
};

deltoideus_posterior_part_2 = {
  AnyVar Epsilon0Temp = 0.053000;
  AnyVar K1Temp = 10.000000;
  AnyVar K2Temp = 0.000000;
  AnyVar FcfastTemp = 0.400000;
  AnyVar JtTemp = 3.000000;
  AnyVar JpeTemp = 3.000000;
  AnyVar PEFactorTemp = 5.000000;
};

deltoideus_posterior_part_3 = {
  AnyVar Epsilon0Temp = 0.053000;
  AnyVar K1Temp = 10.000000;
  AnyVar K2Temp = 0.000000;
  AnyVar FcfastTemp = 0.400000;
  AnyVar JtTemp = 3.000000;
  AnyVar JpeTemp = 3.000000;
  AnyVar PEFactorTemp = 5.000000;
};

deltoideus_posterior_part_4 = {
  AnyVar Epsilon0Temp = 0.053000;
  AnyVar K1Temp = 10.000000;
  AnyVar K2Temp = 0.000000;
  AnyVar FcfastTemp = 0.400000;
  AnyVar JtTemp = 3.000000;
  AnyVar JpeTemp = 3.000000;
  AnyVar PEFactorTemp = 5.000000;
};

deltoideus_lateral_part_1 = {
  AnyVar Epsilon0Temp = 0.053000;
  AnyVar K1Temp = 10.000000;
  AnyVar K2Temp = 0.000000;
  AnyVar FcfastTemp = 0.400000;
  AnyVar JtTemp = 3.000000;
  AnyVar JpeTemp = 3.000000;
  AnyVar PEFactorTemp = 5.000000;
};

deltoideus_lateral_part_2 = {
  AnyVar Epsilon0Temp = 0.053000;
  AnyVar K1Temp = 10.000000;
  AnyVar K2Temp = 0.000000;
  AnyVar FcfastTemp = 0.400000;
  AnyVar JtTemp = 3.000000;
  AnyVar JpeTemp = 3.000000;
  AnyVar PEFactorTemp = 5.000000;
};

deltoideus_lateral_part_3 = {
  AnyVar Epsilon0Temp = 0.053000;
  AnyVar K1Temp = 10.000000;
  AnyVar K2Temp = 0.000000;
  AnyVar FcfastTemp = 0.400000;
  AnyVar JtTemp = 3.000000;
  AnyVar JpeTemp = 3.000000;
  AnyVar PEFactorTemp = 5.000000;
};

deltoideus_lateral_part_4 = {
  AnyVar Epsilon0Temp = 0.053000;
  AnyVar K1Temp = 10.000000;
  AnyVar K2Temp = 0.000000;
  AnyVar FcfastTemp = 0.400000;
  AnyVar JtTemp = 3.000000;
  AnyVar JpeTemp = 3.000000;
  AnyVar PEFactorTemp = 5.000000;
};

deltoideus_anterior_part_1 = {
  AnyVar Epsilon0Temp = 0.053000;
  AnyVar K1Temp = 10.000000;
  AnyVar K2Temp = 0.000000;
  AnyVar FcfastTemp = 0.400000;
  AnyVar JtTemp = 3.000000;
  AnyVar JpeTemp = 3.000000;
  AnyVar PEFactorTemp = 5.000000;
};

deltoideus_anterior_part_2 = {
  AnyVar Epsilon0Temp = 0.053000;
  AnyVar K1Temp = 10.000000;
  AnyVar K2Temp = 0.000000;
  AnyVar FcfastTemp = 0.400000;
  AnyVar JtTemp = 3.000000;
  AnyVar JpeTemp = 3.000000;
  AnyVar PEFactorTemp = 5.000000;
};

deltoideus_anterior_part_3 = {
  AnyVar Epsilon0Temp = 0.053000;
  AnyVar K1Temp = 10.000000;
  AnyVar K2Temp = 0.000000;
  AnyVar FcfastTemp = 0.400000;
  AnyVar JtTemp = 3.000000;
  AnyVar JpeTemp = 3.000000;
  AnyVar PEFactorTemp = 5.000000;
};

deltoideus_anterior_part_4 = {
  AnyVar Epsilon0Temp = 0.053000;
  AnyVar K1Temp = 10.000000;
  AnyVar K2Temp = 0.000000;
  AnyVar FcfastTemp = 0.400000;
  AnyVar JtTemp = 3.000000;
  AnyVar JpeTemp = 3.000000;
  AnyVar PEFactorTemp = 5.000000;
};
// End of BM_ARM_DELTOID_WRAPPING
#endif

infraspinatus_1 = {
  AnyVar Epsilon0Temp = 0.053000;
  AnyVar K1Temp = 10.000000;
  AnyVar K2Temp = 0.000000;
  AnyVar FcfastTemp = 0.400000;
  AnyVar JtTemp = 3.000000;
  AnyVar JpeTemp = 3.000000;
  AnyVar PEFactorTemp = 5.000000;
};

infraspinatus_2 = {
  AnyVar Epsilon0Temp = 0.053000;
  AnyVar K1Temp = 10.000000;
  AnyVar K2Temp = 0.000000;
  AnyVar FcfastTemp = 0.400000;
  AnyVar JtTemp = 3.000000;
  AnyVar JpeTemp = 3.000000;
  AnyVar PEFactorTemp = 5.000000;
};

infraspinatus_3 = {
  AnyVar Epsilon0Temp = 0.053000;
  AnyVar K1Temp = 10.000000;
  AnyVar K2Temp = 0.000000;
  AnyVar FcfastTemp = 0.400000;
  AnyVar JtTemp = 3.000000;
  AnyVar JpeTemp = 3.000000;
  AnyVar PEFactorTemp = 5.000000;
};

infraspinatus_4 = {
  AnyVar Epsilon0Temp = 0.053000;
  AnyVar K1Temp = 10.000000;
  AnyVar K2Temp = 0.000000;
  AnyVar FcfastTemp = 0.400000;
  AnyVar JtTemp = 3.000000;
  AnyVar JpeTemp = 3.000000;
  AnyVar PEFactorTemp = 5.000000;
};

infraspinatus_5 = {
  AnyVar Epsilon0Temp = 0.053000;
  AnyVar K1Temp = 10.000000;
  AnyVar K2Temp = 0.000000;
  AnyVar FcfastTemp = 0.400000;
  AnyVar JtTemp = 3.000000;
  AnyVar JpeTemp = 3.000000;
  AnyVar PEFactorTemp = 5.000000;
};

infraspinatus_6 = {
  AnyVar Epsilon0Temp = 0.053000;
  AnyVar K1Temp = 10.000000;
  AnyVar K2Temp = 0.000000;
  AnyVar FcfastTemp = 0.400000;
  AnyVar JtTemp = 3.000000;
  AnyVar JpeTemp = 3.000000;
  AnyVar PEFactorTemp = 5.000000;
};

latissimus_dorsi_1 = {
  AnyVar Epsilon0Temp = 0.053000;
  AnyVar K1Temp = 10.000000;
  AnyVar K2Temp = 0.000000;
  AnyVar FcfastTemp = 0.400000;
  AnyVar JtTemp = 3.000000;
  AnyVar JpeTemp = 3.000000;
  AnyVar PEFactorTemp = 5.000000;
};

latissimus_dorsi_2 = {
  AnyVar Epsilon0Temp = 0.053000;
  AnyVar K1Temp = 10.000000;
  AnyVar K2Temp = 0.000000;
  AnyVar FcfastTemp = 0.400000;
  AnyVar JtTemp = 3.000000;
  AnyVar JpeTemp = 3.000000;
  AnyVar PEFactorTemp = 5.000000;
};

latissimus_dorsi_3 = {
  AnyVar Epsilon0Temp = 0.053000;
  AnyVar K1Temp = 10.000000;
  AnyVar K2Temp = 0.000000;
  AnyVar FcfastTemp = 0.400000;
  AnyVar JtTemp = 3.000000;
  AnyVar JpeTemp = 3.000000;
  AnyVar PEFactorTemp = 5.000000;
};

latissimus_dorsi_4 = {
  AnyVar Epsilon0Temp = 0.053000;
  AnyVar K1Temp = 10.000000;
  AnyVar K2Temp = 0.000000;
  AnyVar FcfastTemp = 0.400000;
  AnyVar JtTemp = 3.000000;
  AnyVar JpeTemp = 3.000000;
  AnyVar PEFactorTemp = 5.000000;
};

latissimus_dorsi_5 = {
  AnyVar Epsilon0Temp = 0.053000;
  AnyVar K1Temp = 10.000000;
  AnyVar K2Temp = 0.000000;
  AnyVar FcfastTemp = 0.400000;
  AnyVar JtTemp = 3.000000;
  AnyVar JpeTemp = 3.000000;
  AnyVar PEFactorTemp = 5.000000;
};

levator_scapulae_1 = {
  AnyVar Epsilon0Temp = 0.053000;
  AnyVar K1Temp = 10.000000;
  AnyVar K2Temp = 0.000000;
  AnyVar FcfastTemp = 0.400000;
  AnyVar JtTemp = 3.000000;
  AnyVar JpeTemp = 3.000000;
  AnyVar PEFactorTemp = 5.000000;
};

levator_scapulae_2 = {
  AnyVar Epsilon0Temp = 0.053000;
  AnyVar K1Temp = 10.000000;
  AnyVar K2Temp = 0.000000;
  AnyVar FcfastTemp = 0.400000;
  AnyVar JtTemp = 3.000000;
  AnyVar JpeTemp = 3.000000;
  AnyVar PEFactorTemp = 5.000000;
};

levator_scapulae_3 = {
  AnyVar Epsilon0Temp = 0.053000;
  AnyVar K1Temp = 10.000000;
  AnyVar K2Temp = 0.000000;
  AnyVar FcfastTemp = 0.400000;
  AnyVar JtTemp = 3.000000;
  AnyVar JpeTemp = 3.000000;
  AnyVar PEFactorTemp = 5.000000;
};

levator_scapulae_4 = {
  AnyVar Epsilon0Temp = 0.053000;
  AnyVar K1Temp = 10.000000;
  AnyVar K2Temp = 0.000000;
  AnyVar FcfastTemp = 0.400000;
  AnyVar JtTemp = 3.000000;
  AnyVar JpeTemp = 3.000000;
  AnyVar PEFactorTemp = 5.000000;
};
pectoralis_major_thoracic_part_1 = {
  AnyVar Epsilon0Temp = 0.053000;
  AnyVar K1Temp = 10.000000;
  AnyVar K2Temp = 0.000000;
  AnyVar FcfastTemp = 0.400000;
  AnyVar JtTemp = 3.000000;
  AnyVar JpeTemp = 3.000000;
  AnyVar PEFactorTemp = 5.000000;
};

pectoralis_major_thoracic_part_2 = {
  AnyVar Epsilon0Temp = 0.053000;
  AnyVar K1Temp = 10.000000;
  AnyVar K2Temp = 0.000000;
  AnyVar FcfastTemp = 0.400000;
  AnyVar JtTemp = 3.000000;
  AnyVar JpeTemp = 3.000000;
  AnyVar PEFactorTemp = 5.000000;
};

pectoralis_major_thoracic_part_3 = {
  AnyVar Epsilon0Temp = 0.053000;
  AnyVar K1Temp = 10.000000;
  AnyVar K2Temp = 0.000000;
  AnyVar FcfastTemp = 0.400000;
  AnyVar JtTemp = 3.000000;
  AnyVar JpeTemp = 3.000000;
  AnyVar PEFactorTemp = 5.000000;
};

pectoralis_major_thoracic_part_4 = {
  AnyVar Epsilon0Temp = 0.053000;
  AnyVar K1Temp = 10.000000;
  AnyVar K2Temp = 0.000000;
  AnyVar FcfastTemp = 0.400000;
  AnyVar JtTemp = 3.000000;
  AnyVar JpeTemp = 3.000000;
  AnyVar PEFactorTemp = 5.000000;
};

pectoralis_major_thoracic_part_5 = {
  AnyVar Epsilon0Temp = 0.053000;
  AnyVar K1Temp = 10.000000;
  AnyVar K2Temp = 0.000000;
  AnyVar FcfastTemp = 0.400000;
  AnyVar JtTemp = 3.000000;
  AnyVar JpeTemp = 3.000000;
  AnyVar PEFactorTemp = 5.000000;
};

pectoralis_major_thoracic_part_6 = {
  AnyVar Epsilon0Temp = 0.053000;
  AnyVar K1Temp = 10.000000;
  AnyVar K2Temp = 0.000000;
  AnyVar FcfastTemp = 0.400000;
  AnyVar JtTemp = 3.000000;
  AnyVar JpeTemp = 3.000000;
  AnyVar PEFactorTemp = 5.000000;
};

pectoralis_major_thoracic_part_7 = {
  AnyVar Epsilon0Temp = 0.053000;
  AnyVar K1Temp = 10.000000;
  AnyVar K2Temp = 0.000000;
  AnyVar FcfastTemp = 0.400000;
  AnyVar JtTemp = 3.000000;
  AnyVar JpeTemp = 3.000000;
  AnyVar PEFactorTemp = 5.000000;
};

pectoralis_major_thoracic_part_8 = {
  AnyVar Epsilon0Temp = 0.053000;
  AnyVar K1Temp = 10.000000;
  AnyVar K2Temp = 0.000000;
  AnyVar FcfastTemp = 0.400000;
  AnyVar JtTemp = 3.000000;
  AnyVar JpeTemp = 3.000000;
  AnyVar PEFactorTemp = 5.000000;
};

pectoralis_major_thoracic_part_9 = {
  AnyVar Epsilon0Temp = 0.053000;
  AnyVar K1Temp = 10.000000;
  AnyVar K2Temp = 0.000000;
  AnyVar FcfastTemp = 0.400000;
  AnyVar JtTemp = 3.000000;
  AnyVar JpeTemp = 3.000000;
  AnyVar PEFactorTemp = 5.000000;
};

pectoralis_major_thoracic_part_10 = {
  AnyVar Epsilon0Temp = 0.053000;
  AnyVar K1Temp = 10.000000;
  AnyVar K2Temp = 0.000000;
  AnyVar FcfastTemp = 0.400000;
  AnyVar JtTemp = 3.000000;
  AnyVar JpeTemp = 3.000000;
  AnyVar PEFactorTemp = 5.000000;
};

pectoralis_major_clavicular_part_1 = {
  AnyVar Epsilon0Temp = 0.053000;
  AnyVar K1Temp = 10.000000;
  AnyVar K2Temp = 0.000000;
  AnyVar FcfastTemp = 0.400000;
  AnyVar JtTemp = 3.000000;
  AnyVar JpeTemp = 3.000000;
  AnyVar PEFactorTemp = 5.000000;
};

pectoralis_major_clavicular_part_2 = {
  AnyVar Epsilon0Temp = 0.053000;
  AnyVar K1Temp = 10.000000;
  AnyVar K2Temp = 0.000000;
  AnyVar FcfastTemp = 0.400000;
  AnyVar JtTemp = 3.000000;
  AnyVar JpeTemp = 3.000000;
  AnyVar PEFactorTemp = 5.000000;
};

pectoralis_major_clavicular_part_3 = {
  AnyVar Epsilon0Temp = 0.053000;
  AnyVar K1Temp = 10.000000;
  AnyVar K2Temp = 0.000000;
  AnyVar FcfastTemp = 0.400000;
  AnyVar JtTemp = 3.000000;
  AnyVar JpeTemp = 3.000000;
  AnyVar PEFactorTemp = 5.000000;
};

pectoralis_major_clavicular_part_4 = {
  AnyVar Epsilon0Temp = 0.053000;
  AnyVar K1Temp = 10.000000;
  AnyVar K2Temp = 0.000000;
  AnyVar FcfastTemp = 0.400000;
  AnyVar JtTemp = 3.000000;
  AnyVar JpeTemp = 3.000000;
  AnyVar PEFactorTemp = 5.000000;
};

pectoralis_major_clavicular_part_5 = {
  AnyVar Epsilon0Temp = 0.053000;
  AnyVar K1Temp = 10.000000;
  AnyVar K2Temp = 0.000000;
  AnyVar FcfastTemp = 0.400000;
  AnyVar JtTemp = 3.000000;
  AnyVar JpeTemp = 3.000000;
  AnyVar PEFactorTemp = 5.000000;
};

pectoralis_minor_1 = {
  AnyVar Epsilon0Temp = 0.053000;
  AnyVar K1Temp = 10.000000;
  AnyVar K2Temp = 0.000000;
  AnyVar FcfastTemp = 0.400000;
  AnyVar JtTemp = 3.000000;
  AnyVar JpeTemp = 3.000000;
  AnyVar PEFactorTemp = 5.000000;
};

pectoralis_minor_2 = {
  AnyVar Epsilon0Temp = 0.053000;
  AnyVar K1Temp = 10.000000;
  AnyVar K2Temp = 0.000000;
  AnyVar FcfastTemp = 0.400000;
  AnyVar JtTemp = 3.000000;
  AnyVar JpeTemp = 3.000000;
  AnyVar PEFactorTemp = 5.000000;
};

pectoralis_minor_3 = {
  AnyVar Epsilon0Temp = 0.053000;
  AnyVar K1Temp = 10.000000;
  AnyVar K2Temp = 0.000000;
  AnyVar FcfastTemp = 0.400000;
  AnyVar JtTemp = 3.000000;
  AnyVar JpeTemp = 3.000000;
  AnyVar PEFactorTemp = 5.000000;
};

pectoralis_minor_4 = {
  AnyVar Epsilon0Temp = 0.053000;
  AnyVar K1Temp = 10.000000;
  AnyVar K2Temp = 0.000000;
  AnyVar FcfastTemp = 0.400000;
  AnyVar JtTemp = 3.000000;
  AnyVar JpeTemp = 3.000000;
  AnyVar PEFactorTemp = 5.000000;
};

rhomboideus_1 = {
  AnyVar Epsilon0Temp = 0.053000;
  AnyVar K1Temp = 10.000000;
  AnyVar K2Temp = 0.000000;
  AnyVar FcfastTemp = 0.400000;
  AnyVar JtTemp = 3.000000;
  AnyVar JpeTemp = 3.000000;
  AnyVar PEFactorTemp = 5.000000;
};

rhomboideus_2 = {
  AnyVar Epsilon0Temp = 0.053000;
  AnyVar K1Temp = 10.000000;
  AnyVar K2Temp = 0.000000;
  AnyVar FcfastTemp = 0.400000;
  AnyVar JtTemp = 3.000000;
  AnyVar JpeTemp = 3.000000;
  AnyVar PEFactorTemp = 5.000000;
};

rhomboideus_3 = {
  AnyVar Epsilon0Temp = 0.053000;
  AnyVar K1Temp = 10.000000;
  AnyVar K2Temp = 0.000000;
  AnyVar FcfastTemp = 0.400000;
  AnyVar JtTemp = 3.000000;
  AnyVar JpeTemp = 3.000000;
  AnyVar PEFactorTemp = 5.000000;
};

serratus_anterior_1 = {
  AnyVar Epsilon0Temp = 0.053000;
  AnyVar K1Temp = 10.000000;
  AnyVar K2Temp = 0.000000;
  AnyVar FcfastTemp = 0.400000;
  AnyVar JtTemp = 3.000000;
  AnyVar JpeTemp = 3.000000;
  AnyVar PEFactorTemp = 5.000000;
};

serratus_anterior_2 = {
  AnyVar Epsilon0Temp = 0.053000;
  AnyVar K1Temp = 10.000000;
  AnyVar K2Temp = 0.000000;
  AnyVar FcfastTemp = 0.400000;
  AnyVar JtTemp = 3.000000;
  AnyVar JpeTemp = 3.000000;
  AnyVar PEFactorTemp = 5.000000;
};

serratus_anterior_3 = {
  AnyVar Epsilon0Temp = 0.053000;
  AnyVar K1Temp = 10.000000;
  AnyVar K2Temp = 0.000000;
  AnyVar FcfastTemp = 0.400000;
  AnyVar JtTemp = 3.000000;
  AnyVar JpeTemp = 3.000000;
  AnyVar PEFactorTemp = 5.000000;
};

serratus_anterior_4 = {
  AnyVar Epsilon0Temp = 0.053000;
  AnyVar K1Temp = 10.000000;
  AnyVar K2Temp = 0.000000;
  AnyVar FcfastTemp = 0.400000;
  AnyVar JtTemp = 3.000000;
  AnyVar JpeTemp = 3.000000;
  AnyVar PEFactorTemp = 5.000000;
};

serratus_anterior_5 = {
  AnyVar Epsilon0Temp = 0.053000;
  AnyVar K1Temp = 10.000000;
  AnyVar K2Temp = 0.000000;
  AnyVar FcfastTemp = 0.400000;
  AnyVar JtTemp = 3.000000;
  AnyVar JpeTemp = 3.000000;
  AnyVar PEFactorTemp = 5.000000;
};

serratus_anterior_6 = {
  AnyVar Epsilon0Temp = 0.053000;
  AnyVar K1Temp = 10.000000;
  AnyVar K2Temp = 0.000000;
  AnyVar FcfastTemp = 0.400000;
  AnyVar JtTemp = 3.000000;
  AnyVar JpeTemp = 3.000000;
  AnyVar PEFactorTemp = 5.000000;
};

subscapularis_1 = {
  AnyVar Epsilon0Temp = 0.053000;
  AnyVar K1Temp = 10.000000;
  AnyVar K2Temp = 0.000000;
  AnyVar FcfastTemp = 0.400000;
  AnyVar JtTemp = 3.000000;
  AnyVar JpeTemp = 3.000000;
  AnyVar PEFactorTemp = 5.000000;
};

subscapularis_2 = {
  AnyVar Epsilon0Temp = 0.053000;
  AnyVar K1Temp = 10.000000;
  AnyVar K2Temp = 0.000000;
  AnyVar FcfastTemp = 0.400000;
  AnyVar JtTemp = 3.000000;
  AnyVar JpeTemp = 3.000000;
  AnyVar PEFactorTemp = 5.000000;
};

subscapularis_3 = {
  AnyVar Epsilon0Temp = 0.053000;
  AnyVar K1Temp = 10.000000;
  AnyVar K2Temp = 0.000000;
  AnyVar FcfastTemp = 0.400000;
  AnyVar JtTemp = 3.000000;
  AnyVar JpeTemp = 3.000000;
  AnyVar PEFactorTemp = 5.000000;
};

subscapularis_4 = {
  AnyVar Epsilon0Temp = 0.053000;
  AnyVar K1Temp = 10.000000;
  AnyVar K2Temp = 0.000000;
  AnyVar FcfastTemp = 0.400000;
  AnyVar JtTemp = 3.000000;
  AnyVar JpeTemp = 3.000000;
  AnyVar PEFactorTemp = 5.000000;
};

subscapularis_5 = {
  AnyVar Epsilon0Temp = 0.053000;
  AnyVar K1Temp = 10.000000;
  AnyVar K2Temp = 0.000000;
  AnyVar FcfastTemp = 0.400000;
  AnyVar JtTemp = 3.000000;
  AnyVar JpeTemp = 3.000000;
  AnyVar PEFactorTemp = 5.000000;
};

subscapularis_6 = {
  AnyVar Epsilon0Temp = 0.053000;
  AnyVar K1Temp = 10.000000;
  AnyVar K2Temp = 0.000000;
  AnyVar FcfastTemp = 0.400000;
  AnyVar JtTemp = 3.000000;
  AnyVar JpeTemp = 3.000000;
  AnyVar PEFactorTemp = 5.000000;
};

supraspinatus_1 = {
  AnyVar Epsilon0Temp = 0.053000;
  AnyVar K1Temp = 10.000000;
  AnyVar K2Temp = 0.000000;
  AnyVar FcfastTemp = 0.400000;
  AnyVar JtTemp = 3.000000;
  AnyVar JpeTemp = 3.000000;
  AnyVar PEFactorTemp = 5.000000;
};

supraspinatus_2 = {
  AnyVar Epsilon0Temp = 0.053000;
  AnyVar K1Temp = 10.000000;
  AnyVar K2Temp = 0.000000;
  AnyVar FcfastTemp = 0.400000;
  AnyVar JtTemp = 3.000000;
  AnyVar JpeTemp = 3.000000;
  AnyVar PEFactorTemp = 5.000000;
};

supraspinatus_3 = {
  AnyVar Epsilon0Temp = 0.053000;
  AnyVar K1Temp = 10.000000;
  AnyVar K2Temp = 0.000000;
  AnyVar FcfastTemp = 0.400000;
  AnyVar JtTemp = 3.000000;
  AnyVar JpeTemp = 3.000000;
  AnyVar PEFactorTemp = 5.000000;
};

supraspinatus_4 = {
  AnyVar Epsilon0Temp = 0.053000;
  AnyVar K1Temp = 10.000000;
  AnyVar K2Temp = 0.000000;
  AnyVar FcfastTemp = 0.400000;
  AnyVar JtTemp = 3.000000;
  AnyVar JpeTemp = 3.000000;
  AnyVar PEFactorTemp = 5.000000;
};

supraspinatus_5 = {
  AnyVar Epsilon0Temp = 0.053000;
  AnyVar K1Temp = 10.000000;
  AnyVar K2Temp = 0.000000;
  AnyVar FcfastTemp = 0.400000;
  AnyVar JtTemp = 3.000000;
  AnyVar JpeTemp = 3.000000;
  AnyVar PEFactorTemp = 5.000000;
};

supraspinatus_6 = {
  AnyVar Epsilon0Temp = 0.053000;
  AnyVar K1Temp = 10.000000;
  AnyVar K2Temp = 0.000000;
  AnyVar FcfastTemp = 0.400000;
  AnyVar JtTemp = 3.000000;
  AnyVar JpeTemp = 3.000000;
  AnyVar PEFactorTemp = 5.000000;
};

teres_major_1 = {
  AnyVar Epsilon0Temp = 0.053000;
  AnyVar K1Temp = 10.000000;
  AnyVar K2Temp = 0.000000;
  AnyVar FcfastTemp = 0.400000;
  AnyVar JtTemp = 3.000000;
  AnyVar JpeTemp = 3.000000;
  AnyVar PEFactorTemp = 5.000000;
};

teres_major_2 = {
  AnyVar Epsilon0Temp = 0.053000;
  AnyVar K1Temp = 10.000000;
  AnyVar K2Temp = 0.000000;
  AnyVar FcfastTemp = 0.400000;
  AnyVar JtTemp = 3.000000;
  AnyVar JpeTemp = 3.000000;
  AnyVar PEFactorTemp = 5.000000;
};

teres_major_3 = {
  AnyVar Epsilon0Temp = 0.053000;
  AnyVar K1Temp = 10.000000;
  AnyVar K2Temp = 0.000000;
  AnyVar FcfastTemp = 0.400000;
  AnyVar JtTemp = 3.000000;
  AnyVar JpeTemp = 3.000000;
  AnyVar PEFactorTemp = 5.000000;
};

teres_major_4 = {
  AnyVar Epsilon0Temp = 0.053000;
  AnyVar K1Temp = 10.000000;
  AnyVar K2Temp = 0.000000;
  AnyVar FcfastTemp = 0.400000;
  AnyVar JtTemp = 3.000000;
  AnyVar JpeTemp = 3.000000;
  AnyVar PEFactorTemp = 5.000000;
};

teres_major_5 = {
  AnyVar Epsilon0Temp = 0.053000;
  AnyVar K1Temp = 10.000000;
  AnyVar K2Temp = 0.000000;
  AnyVar FcfastTemp = 0.400000;
  AnyVar JtTemp = 3.000000;
  AnyVar JpeTemp = 3.000000;
  AnyVar PEFactorTemp = 5.000000;
};

teres_major_6 = {
  AnyVar Epsilon0Temp = 0.053000;
  AnyVar K1Temp = 10.000000;
  AnyVar K2Temp = 0.000000;
  AnyVar FcfastTemp = 0.400000;
  AnyVar JtTemp = 3.000000;
  AnyVar JpeTemp = 3.000000;
  AnyVar PEFactorTemp = 5.000000;
};

teres_minor_1 = {
  AnyVar Epsilon0Temp = 0.053000;
  AnyVar K1Temp = 10.000000;
  AnyVar K2Temp = 0.000000;
  AnyVar FcfastTemp = 0.400000;
  AnyVar JtTemp = 3.000000;
  AnyVar JpeTemp = 3.000000;
  AnyVar PEFactorTemp = 5.000000;
};

teres_minor_2 = {
  AnyVar Epsilon0Temp = 0.053000;
  AnyVar K1Temp = 10.000000;
  AnyVar K2Temp = 0.000000;
  AnyVar FcfastTemp = 0.400000;
  AnyVar JtTemp = 3.000000;
  AnyVar JpeTemp = 3.000000;
  AnyVar PEFactorTemp = 5.000000;
};

teres_minor_3 = {
  AnyVar Epsilon0Temp = 0.053000;
  AnyVar K1Temp = 10.000000;
  AnyVar K2Temp = 0.000000;
  AnyVar FcfastTemp = 0.400000;
  AnyVar JtTemp = 3.000000;
  AnyVar JpeTemp = 3.000000;
  AnyVar PEFactorTemp = 5.000000;
};

teres_minor_4 = {
  AnyVar Epsilon0Temp = 0.053000;
  AnyVar K1Temp = 10.000000;
  AnyVar K2Temp = 0.000000;
  AnyVar FcfastTemp = 0.400000;
  AnyVar JtTemp = 3.000000;
  AnyVar JpeTemp = 3.000000;
  AnyVar PEFactorTemp = 5.000000;
};

teres_minor_5 = {
  AnyVar Epsilon0Temp = 0.053000;
  AnyVar K1Temp = 10.000000;
  AnyVar K2Temp = 0.000000;
  AnyVar FcfastTemp = 0.400000;
  AnyVar JtTemp = 3.000000;
  AnyVar JpeTemp = 3.000000;
  AnyVar PEFactorTemp = 5.000000;
};

teres_minor_6 = {
  AnyVar Epsilon0Temp = 0.053000;
  AnyVar K1Temp = 10.000000;
  AnyVar K2Temp = 0.000000;
  AnyVar FcfastTemp = 0.400000;
  AnyVar JtTemp = 3.000000;
  AnyVar JpeTemp = 3.000000;
  AnyVar PEFactorTemp = 5.000000;
};

trapezius_scapular_part_1 = {
  AnyVar Epsilon0Temp = 0.053000;
  AnyVar K1Temp = 10.000000;
  AnyVar K2Temp = 0.000000;
  AnyVar FcfastTemp = 0.400000;
  AnyVar JtTemp = 3.000000;
  AnyVar JpeTemp = 3.000000;
  AnyVar PEFactorTemp = 5.000000;
};

trapezius_scapular_part_2 = {
  AnyVar Epsilon0Temp = 0.053000;
  AnyVar K1Temp = 10.000000;
  AnyVar K2Temp = 0.000000;
  AnyVar FcfastTemp = 0.400000;
  AnyVar JtTemp = 3.000000;
  AnyVar JpeTemp = 3.000000;
  AnyVar PEFactorTemp = 5.000000;
};

trapezius_scapular_part_3 = {
  AnyVar Epsilon0Temp = 0.053000;
  AnyVar K1Temp = 10.000000;
  AnyVar K2Temp = 0.000000;
  AnyVar FcfastTemp = 0.400000;
  AnyVar JtTemp = 3.000000;
  AnyVar JpeTemp = 3.000000;
  AnyVar PEFactorTemp = 5.000000;
};

trapezius_scapular_part_4 = {
  AnyVar Epsilon0Temp = 0.053000;
  AnyVar K1Temp = 10.000000;
  AnyVar K2Temp = 0.000000;
  AnyVar FcfastTemp = 0.400000;
  AnyVar JtTemp = 3.000000;
  AnyVar JpeTemp = 3.000000;
  AnyVar PEFactorTemp = 5.000000;
};

trapezius_scapular_part_5 = {
  AnyVar Epsilon0Temp = 0.053000;
  AnyVar K1Temp = 10.000000;
  AnyVar K2Temp = 0.000000;
  AnyVar FcfastTemp = 0.400000;
  AnyVar JtTemp = 3.000000;
  AnyVar JpeTemp = 3.000000;
  AnyVar PEFactorTemp = 5.000000;
};

trapezius_scapular_part_6 = {
  AnyVar Epsilon0Temp = 0.053000;
  AnyVar K1Temp = 10.000000;
  AnyVar K2Temp = 0.000000;
  AnyVar FcfastTemp = 0.400000;
  AnyVar JtTemp = 3.000000;
  AnyVar JpeTemp = 3.000000;
  AnyVar PEFactorTemp = 5.000000;
};

trapezius_clavicular_part_1 = {
  AnyVar Epsilon0Temp = 0.053000;
  AnyVar K1Temp = 10.000000;
  AnyVar K2Temp = 0.000000;
  AnyVar FcfastTemp = 0.400000;
  AnyVar JtTemp = 3.000000;
  AnyVar JpeTemp = 3.000000;
  AnyVar PEFactorTemp = 5.000000;
};

trapezius_clavicular_part_2 = {
  AnyVar Epsilon0Temp = 0.053000;
  AnyVar K1Temp = 10.000000;
  AnyVar K2Temp = 0.000000;
  AnyVar FcfastTemp = 0.400000;
  AnyVar JtTemp = 3.000000;
  AnyVar JpeTemp = 3.000000;
  AnyVar PEFactorTemp = 5.000000;
};

trapezius_clavicular_part_3 = {
  AnyVar Epsilon0Temp = 0.053000;
  AnyVar K1Temp = 10.000000;
  AnyVar K2Temp = 0.000000;
  AnyVar FcfastTemp = 0.400000;
  AnyVar JtTemp = 3.000000;
  AnyVar JpeTemp = 3.000000;
  AnyVar PEFactorTemp = 5.000000;
};

trapezius_clavicular_part_4 = {
  AnyVar Epsilon0Temp = 0.053000;
  AnyVar K1Temp = 10.000000;
  AnyVar K2Temp = 0.000000;
  AnyVar FcfastTemp = 0.400000;
  AnyVar JtTemp = 3.000000;
  AnyVar JpeTemp = 3.000000;
  AnyVar PEFactorTemp = 5.000000;
};

trapezius_clavicular_part_5 = {
  AnyVar Epsilon0Temp = 0.053000;
  AnyVar K1Temp = 10.000000;
  AnyVar K2Temp = 0.000000;
  AnyVar FcfastTemp = 0.400000;
  AnyVar JtTemp = 3.000000;
  AnyVar JpeTemp = 3.000000;
  AnyVar PEFactorTemp = 5.000000;
};

trapezius_clavicular_part_6 = {
  AnyVar Epsilon0Temp = 0.053000;
  AnyVar K1Temp = 10.000000;
  AnyVar K2Temp = 0.000000;
  AnyVar FcfastTemp = 0.400000;
  AnyVar JtTemp = 3.000000;
  AnyVar JpeTemp = 3.000000;
  AnyVar PEFactorTemp = 5.000000;
};
// Veeger1997
// Parameters for modeling the upper extremity
// H.E.J. Veeger, Bing Yu, Kai-Nan and R. H. Rozendal
// J. Biomechanics, Vol.30, No. 6, pp. 647-652, 1997


Triceps_LH_1 = {

  AnyVar Gamma0Temp = (pi/180)* 30; // mayo study speciem #4 Veeger1997
  AnyVar Epsilon0Temp = 0.053000;
  AnyVar K1Temp = 10.000000;
  AnyVar K2Temp = 0.000000;
  AnyVar FcfastTemp = 0.400000;
  AnyVar JtTemp = 3.000000;
  AnyVar JpeTemp = 3.000000;
  AnyVar PEFactorTemp = 5.000000;
};

Triceps_LH_2 = {

  AnyVar Gamma0Temp = (pi/180)* 30; // mayo study speciem #4 Veeger1997
  AnyVar Epsilon0Temp = 0.053000;
  AnyVar K1Temp = 10.000000;
  AnyVar K2Temp = 0.000000;
  AnyVar FcfastTemp = 0.400000;
  AnyVar JtTemp = 3.000000;
  AnyVar JpeTemp = 3.000000;
  AnyVar PEFactorTemp = 5.000000;
};

Brachialis_1 = {

  AnyVar Gamma0Temp = (pi/180)*15; // mayo study speciem #4 Veeger1997
  AnyVar Epsilon0Temp = 0.053000;
  AnyVar K1Temp = 10.000000;
  AnyVar K2Temp = 0.000000;
  AnyVar FcfastTemp = 0.400000;
  AnyVar JtTemp = 3.000000;
  AnyVar JpeTemp = 3.000000;
  AnyVar PEFactorTemp = 5.000000;
};

Brachialis_2 = {
  AnyVar Gamma0Temp =(pi/180)*15; // mayo study speciem #4 Veeger1997
  AnyVar Epsilon0Temp = 0.053000;
  AnyVar K1Temp = 10.000000;
  AnyVar K2Temp = 0.000000;
  AnyVar FcfastTemp = 0.400000;
  AnyVar JtTemp = 3.000000;
  AnyVar JpeTemp = 3.000000;
  AnyVar PEFactorTemp = 5.000000;
};

Triceps_ME_1 = {

  AnyVar Gamma0Temp = (pi/180)*45; // mayo study speciem #4 Veeger1997
  AnyVar Epsilon0Temp = 0.053000;
  AnyVar K1Temp = 10.000000;
  AnyVar K2Temp = 0.000000;
  AnyVar FcfastTemp = 0.400000;
  AnyVar JtTemp = 3.000000;
  AnyVar JpeTemp = 3.000000;
  AnyVar PEFactorTemp = 5.000000;
};

Triceps_ME_2 = {

  AnyVar Gamma0Temp = (pi/180)*45; // mayo study speciem #4 Veeger1997
  AnyVar Epsilon0Temp = 0.053000;
  AnyVar K1Temp = 10.000000;
  AnyVar K2Temp = 0.000000;
  AnyVar FcfastTemp = 0.400000;
  AnyVar JtTemp = 3.000000;
  AnyVar JpeTemp = 3.000000;
  AnyVar PEFactorTemp = 5.000000;
};

Triceps_LA_1 = {

  AnyVar Gamma0Temp = (pi/180)*30; // mayo study speciem #4 Veeger1997
  AnyVar Epsilon0Temp = 0.053000;
  AnyVar K1Temp = 10.000000;
  AnyVar K2Temp = 0.000000;
  AnyVar FcfastTemp = 0.400000;
  AnyVar JtTemp = 3.000000;
  AnyVar JpeTemp = 3.000000;
  AnyVar PEFactorTemp = 5.000000;
};

Triceps_LA_2 = {

  AnyVar Gamma0Temp = (pi/180)*30; // mayo study speciem #4 Veeger1997
  AnyVar Epsilon0Temp = 0.053000;
  AnyVar K1Temp = 10.000000;
  AnyVar K2Temp = 0.000000;
  AnyVar FcfastTemp = 0.400000;
  AnyVar JtTemp = 3.000000;
  AnyVar JpeTemp = 3.000000;
  AnyVar PEFactorTemp = 5.000000;
};

Brach_rad_1 = {

  AnyVar Gamma0Temp = (pi/180)*15; // mayo study speciem #4 Veeger1997
  AnyVar Epsilon0Temp = 0.053000;
  AnyVar K1Temp = 10.000000;
  AnyVar K2Temp = 0.000000;
  AnyVar FcfastTemp = 0.400000;
  AnyVar JtTemp = 3.000000;
  AnyVar JpeTemp = 3.000000;
  AnyVar PEFactorTemp = 5.000000;
};

Brach_rad_2 = {

  AnyVar Gamma0Temp = (pi/180)*15; // mayo study speciem #4 Veeger1997
  AnyVar Epsilon0Temp = 0.053000;
  AnyVar K1Temp = 10.000000;
  AnyVar K2Temp = 0.000000;
  AnyVar FcfastTemp = 0.400000;
  AnyVar JtTemp = 3.000000;
  AnyVar JpeTemp = 3.000000;
  AnyVar PEFactorTemp = 5.000000;
};

Anconeus_1 = {

  AnyVar Gamma0Temp = (pi/180)*30; // mayo study speciem #4 Veeger1997
  AnyVar Epsilon0Temp = 0.053000;
  AnyVar K1Temp = 10.000000;
  AnyVar K2Temp = 0.000000;
  AnyVar FcfastTemp = 0.400000;
  AnyVar JtTemp = 3.000000;
  AnyVar JpeTemp = 3.000000;
  AnyVar PEFactorTemp = 5.000000;
};

Anconeus_2 = {

  AnyVar Gamma0Temp = (pi/180)*30; // mayo study speciem #4 Veeger1997
  AnyVar Epsilon0Temp = 0.053000;
  AnyVar K1Temp = 10.000000;
  AnyVar K2Temp = 0.000000;
  AnyVar FcfastTemp = 0.400000;
  AnyVar JtTemp = 3.000000;
  AnyVar JpeTemp = 3.000000;
  AnyVar PEFactorTemp = 5.000000;
};

Pronator_teres_caput_humeral_1 = {

  AnyVar Gamma0Temp = (pi/180)*15; // mayo study speciem #4 Veeger1997
  AnyVar Epsilon0Temp = 0.053000;
  AnyVar K1Temp = 10.000000;
  AnyVar K2Temp = 0.000000;
  AnyVar FcfastTemp = 0.400000;
  AnyVar JtTemp = 3.000000;
  AnyVar JpeTemp = 3.000000;
  AnyVar PEFactorTemp = 5.000000;
};

Pronator_teres_caput_humeral_2 = {

  AnyVar Gamma0Temp = (pi/180)*15; // mayo study speciem #4 Veeger1997
  AnyVar Epsilon0Temp = 0.053000;
  AnyVar K1Temp = 10.000000;
  AnyVar K2Temp = 0.000000;
  AnyVar FcfastTemp = 0.400000;
  AnyVar JtTemp = 3.000000;
  AnyVar JpeTemp = 3.000000;
  AnyVar PEFactorTemp = 5.000000;
};

Pronator_teres_caput_ulnare_1 = {

  AnyVar Gamma0Temp = (pi/180)*15; // mayo study speciem #4 Veeger1997
  AnyVar Epsilon0Temp = 0.053000;
  AnyVar K1Temp = 10.000000;
  AnyVar K2Temp = 0.000000;
  AnyVar FcfastTemp = 0.400000;
  AnyVar JtTemp = 3.000000;
  AnyVar JpeTemp = 3.000000;
  AnyVar PEFactorTemp = 5.000000;
};

Supinator_humerus_part_1 = {

  AnyVar Gamma0Temp = (pi/180)*15; // mayo study speciem #4 Veeger1997
  AnyVar Epsilon0Temp = 0.053000;
  AnyVar K1Temp = 10.000000;
  AnyVar K2Temp = 0.000000;
  AnyVar FcfastTemp = 0.400000;
  AnyVar JtTemp = 3.000000;
  AnyVar JpeTemp = 3.000000;
  AnyVar PEFactorTemp = 5.000000;
};

Supinator_humerus_part_2 = {

  AnyVar Gamma0Temp = (pi/180)*15; // mayo study speciem #4 Veeger1997
  AnyVar Epsilon0Temp = 0.053000;
  AnyVar K1Temp = 10.000000;
  AnyVar K2Temp = 0.000000;
  AnyVar FcfastTemp = 0.400000;
  AnyVar JtTemp = 3.000000;
  AnyVar JpeTemp = 3.000000;
  AnyVar PEFactorTemp = 5.000000;
};

Supinator_ulna_part_1 = {
 AnyVar Gamma0Temp = (pi/180)*15; // mayo study speciem #4 Veeger1997
  AnyVar Epsilon0Temp = 0.053000;
  AnyVar K1Temp = 10.000000;
  AnyVar K2Temp = 0.000000;
  AnyVar FcfastTemp = 0.400000;
  AnyVar JtTemp = 3.000000;
  AnyVar JpeTemp = 3.000000;
  AnyVar PEFactorTemp = 5.000000;
};

Supinator_ulna_part_2 = {
 AnyVar Gamma0Temp = (pi/180)*15; // mayo study speciem #4 Veeger1997
  AnyVar Epsilon0Temp = 0.053000;
  AnyVar K1Temp = 10.000000;
  AnyVar K2Temp = 0.000000;
  AnyVar FcfastTemp = 0.400000;
  AnyVar JtTemp = 3.000000;
  AnyVar JpeTemp = 3.000000;
  AnyVar PEFactorTemp = 5.000000;
};

Pron_quadr_1 = {

  AnyVar Gamma0Temp = (pi/180)*15; // mayo study speciem #4 Veeger1997
  AnyVar Epsilon0Temp = 0.053000;
  AnyVar K1Temp = 10.000000;
  AnyVar K2Temp = 0.000000;
  AnyVar FcfastTemp = 0.400000;
  AnyVar JtTemp = 3.000000;
  AnyVar JpeTemp = 3.000000;
  AnyVar PEFactorTemp = 5.000000;
};

Pron_quadr_2 = {

  AnyVar Gamma0Temp = (pi/180)*15; // mayo study speciem #4 Veeger1997
  AnyVar Epsilon0Temp = 0.053000;
  AnyVar K1Temp = 10.000000;
  AnyVar K2Temp = 0.000000;
  AnyVar FcfastTemp = 0.400000;
  AnyVar JtTemp = 3.000000;
  AnyVar JpeTemp = 3.000000;
  AnyVar PEFactorTemp = 5.000000;
};


#if (BM_HAND_MODEL == _HAND_MODEL_OFF_) | (BM_HAND_MODEL == _HAND_MODEL_ANYBODY_)

Extensor_Pollicis_Longus = {
  AnyVar Epsilon0Temp = 0.053000;
  AnyVar K1Temp = 10.000000;
  AnyVar K2Temp = 0.000000;
  AnyVar FcfastTemp = 0.400000;
  AnyVar JtTemp = 3.000000;
  AnyVar JpeTemp = 3.000000;
  AnyVar PEFactorTemp = 5.000000;
};
 Extensor_Pollicis_Brevis = {
 AnyVar Epsilon0Temp = 0.053000;
  AnyVar K1Temp = 10.000000;
  AnyVar K2Temp = 0.000000;
  AnyVar FcfastTemp = 0.400000;
  AnyVar JtTemp = 3.000000;
  AnyVar JpeTemp = 3.000000;
  AnyVar PEFactorTemp = 5.000000;
};
Abductor_Pollicis_Longus = {
 AnyVar Epsilon0Temp = 0.053000;
  AnyVar K1Temp = 10.000000;
  AnyVar K2Temp = 0.000000;
  AnyVar FcfastTemp = 0.400000;
  AnyVar JtTemp = 3.000000;
  AnyVar JpeTemp = 3.000000;
  AnyVar PEFactorTemp = 5.000000;
};

Extensor_Indicis = {
  AnyVar Epsilon0Temp = 0.053000;
  AnyVar K1Temp = 10.000000;
  AnyVar K2Temp = 0.000000;
  AnyVar FcfastTemp = 0.400000;
  AnyVar JtTemp = 3.000000;
  AnyVar JpeTemp = 3.000000;
  AnyVar PEFactorTemp = 5.000000;
};

Extensor_Carpi_Ulnaris = {
 AnyVar Epsilon0Temp = 0.053000;
  AnyVar K1Temp = 10.000000;
  AnyVar K2Temp = 0.000000;
  AnyVar FcfastTemp = 0.400000;
  AnyVar JtTemp = 3.000000;
  AnyVar JpeTemp = 3.000000;
  AnyVar PEFactorTemp = 5.000000;
};

//Fake muscle with no anatomical sense
Intrinsic_Muscle_1 = {
 AnyVar Epsilon0Temp = 0.053000;
  AnyVar K1Temp = 10.000000;
  AnyVar K2Temp = 0.000000;
  AnyVar FcfastTemp = 0.400000;
  AnyVar JtTemp = 3.000000;
  AnyVar JpeTemp = 3.000000;
  AnyVar PEFactorTemp = 5.000000;
};

Extensor_Carpi_Radialis_Brevis = {
  AnyVar Epsilon0Temp = 0.053000;
  AnyVar K1Temp = 10.000000;
  AnyVar K2Temp = 0.000000;
  AnyVar FcfastTemp = 0.400000;
  AnyVar JtTemp = 3.000000;
  AnyVar JpeTemp = 3.000000;
  AnyVar PEFactorTemp = 5.000000;
};
Extensor_Carpi_Radialis_Longus = {
   AnyVar Epsilon0Temp = 0.053000;

  AnyVar K1Temp = 10.000000;
  AnyVar K2Temp = 0.000000;
  AnyVar FcfastTemp = 0.400000;
  AnyVar JtTemp = 3.000000;
  AnyVar JpeTemp = 3.000000;
  AnyVar PEFactorTemp = 5.000000;
};


Flexor_Carpi_Radialis = {
 AnyVar Epsilon0Temp = 0.053000;
  AnyVar K1Temp = 10.000000;
  AnyVar K2Temp = 0.000000;
  AnyVar FcfastTemp = 0.400000;
  AnyVar JtTemp = 3.000000;
  AnyVar JpeTemp = 3.000000;
  AnyVar PEFactorTemp = 5.000000;
};
Flexor_Carpi_Ulnaris = {
 AnyVar Epsilon0Temp = 0.053000;
  AnyVar K1Temp = 10.000000;
  AnyVar K2Temp = 0.000000;
  AnyVar FcfastTemp = 0.400000;
  AnyVar JtTemp = 3.000000;
  AnyVar JpeTemp = 3.000000;
  AnyVar PEFactorTemp = 5.000000;
};

Palmaris_Longus = {
  AnyVar Epsilon0Temp = 0.053000;
  AnyVar K1Temp = 10.000000;
  AnyVar K2Temp = 0.000000;
  AnyVar FcfastTemp = 0.400000;
  AnyVar JtTemp = 3.000000;
  AnyVar JpeTemp = 3.000000;
  AnyVar PEFactorTemp = 5.000000;
};


Flexor_Digitorum_Superficialis_Digit5 = {
  AnyVar Epsilon0Temp = 0.053000;
  AnyVar K1Temp = 10.000000;
  AnyVar K2Temp = 0.000000;
  AnyVar FcfastTemp = 0.400000;
  AnyVar JtTemp = 3.000000;
  AnyVar JpeTemp = 3.000000;
  AnyVar PEFactorTemp = 5.000000;
};
Flexor_Digitorum_Superficialis_Digit4 = {
  AnyVar Epsilon0Temp = 0.053000;
  AnyVar K1Temp = 10.000000;
  AnyVar K2Temp = 0.000000;
  AnyVar FcfastTemp = 0.400000;
  AnyVar JtTemp = 3.000000;
  AnyVar JpeTemp = 3.000000;
  AnyVar PEFactorTemp = 5.000000;
};

Flexor_Digitorum_Superficialis_Digit3 = {
  AnyVar Epsilon0Temp = 0.053000;
  AnyVar K1Temp = 10.000000;
  AnyVar K2Temp = 0.000000;
  AnyVar FcfastTemp = 0.400000;
  AnyVar JtTemp = 3.000000;
  AnyVar JpeTemp = 3.000000;
  AnyVar PEFactorTemp = 5.000000;
};

Flexor_Digitorum_Superficialis_Digit2 = {
  AnyVar Epsilon0Temp = 0.053000;
  AnyVar K1Temp = 10.000000;
  AnyVar K2Temp = 0.000000;
  AnyVar FcfastTemp = 0.400000;
  AnyVar JtTemp = 3.000000;
  AnyVar JpeTemp = 3.000000;
  AnyVar PEFactorTemp = 5.000000;
};

Flexor_Digitorum_Profundus_Digit5 = {
  AnyVar Epsilon0Temp = 0.053000;
  AnyVar K1Temp = 10.000000;
  AnyVar K2Temp = 0.000000;
  AnyVar FcfastTemp = 0.400000;
  AnyVar JtTemp = 3.000000;
  AnyVar JpeTemp = 3.000000;
  AnyVar PEFactorTemp = 5.000000;
};

Flexor_Digitorum_Profundus_Digit4 = {
  AnyVar Epsilon0Temp = 0.053000;
  AnyVar K1Temp = 10.000000;
  AnyVar K2Temp = 0.000000;
  AnyVar FcfastTemp = 0.400000;
  AnyVar JtTemp = 3.000000;
  AnyVar JpeTemp = 3.000000;
  AnyVar PEFactorTemp = 5.000000;
};

Flexor_Digitorum_Profundus_Digit3 = {
  AnyVar Epsilon0Temp = 0.053000;
  AnyVar K1Temp = 10.000000;
  AnyVar K2Temp = 0.000000;
  AnyVar FcfastTemp = 0.400000;
  AnyVar JtTemp = 3.000000;
  AnyVar JpeTemp = 3.000000;
  AnyVar PEFactorTemp = 5.000000;
};

Flexor_Digitorum_Profundus_Digit2 = {
  AnyVar Epsilon0Temp = 0.053000;
  AnyVar K1Temp = 10.000000;
  AnyVar K2Temp = 0.000000;
  AnyVar FcfastTemp = 0.400000;
  AnyVar JtTemp = 3.000000;
  AnyVar JpeTemp = 3.000000;
  AnyVar PEFactorTemp = 5.000000;
};

Extensor_Digitorum_Digit5 = {
  AnyVar Epsilon0Temp = 0.053000;
  AnyVar K1Temp = 10.000000;
  AnyVar K2Temp = 0.000000;
  AnyVar FcfastTemp = 0.400000;
  AnyVar JtTemp = 3.000000;
  AnyVar JpeTemp = 3.000000;
  AnyVar PEFactorTemp = 5.000000;
};

Extensor_Digitorum_Digit4 = {
  AnyVar Epsilon0Temp = 0.053000;
  AnyVar K1Temp = 10.000000;
  AnyVar K2Temp = 0.000000;
  AnyVar FcfastTemp = 0.400000;
  AnyVar JtTemp = 3.000000;
  AnyVar JpeTemp = 3.000000;
  AnyVar PEFactorTemp = 5.000000;
};

Extensor_Digitorum_Digit3 = {
  AnyVar Epsilon0Temp = 0.053000;
  AnyVar K1Temp = 10.000000;
  AnyVar K2Temp = 0.000000;
  AnyVar FcfastTemp = 0.400000;
  AnyVar JtTemp = 3.000000;
  AnyVar JpeTemp = 3.000000;
  AnyVar PEFactorTemp = 5.000000;
};

Extensor_Digitorum_Digit2 = {
  AnyVar Epsilon0Temp = 0.053000;
  AnyVar K1Temp = 10.000000;
  AnyVar K2Temp = 0.000000;
  AnyVar FcfastTemp = 0.400000;
  AnyVar JtTemp = 3.000000;
  AnyVar JpeTemp = 3.000000;
  AnyVar PEFactorTemp = 5.000000;
};

Extensor_Digiti_Minimi = {
  AnyVar Epsilon0Temp = 0.053000;
  AnyVar K1Temp = 10.000000;
  AnyVar K2Temp = 0.000000;
  AnyVar FcfastTemp = 0.400000;
  AnyVar JtTemp = 3.000000;
  AnyVar JpeTemp = 3.000000;
  AnyVar PEFactorTemp = 5.000000;
};


Flexor_Pollicis_Longus = {
  AnyVar Epsilon0Temp = 0.053000;
  AnyVar K1Temp = 10.000000;
  AnyVar K2Temp = 0.000000;
  AnyVar FcfastTemp = 0.400000;
  AnyVar JtTemp = 3.000000;
  AnyVar JpeTemp = 3.000000;
  AnyVar PEFactorTemp = 5.000000;
};

//ADDED by loopluc
Abductor_Digiti_Minimi = {
  AnyVar EpsilonbarTemp = 0.053000;
  AnyVar K1Temp = 10.000000;
  AnyVar K2Temp = 0.000000;
  AnyVar FcfastTemp = 0.400000;
  AnyVar JtTemp = 3.000000;
  AnyVar JpeTemp = 3.000000;
  AnyVar PEFactorTemp = 5.000000;
};

Flexor_Digiti_Minimi = {
  AnyVar EpsilonbarTemp = 0.053000;
  AnyVar K1Temp = 10.000000;
  AnyVar K2Temp = 0.000000;
  AnyVar FcfastTemp = 0.400000;
  AnyVar JtTemp = 3.000000;
  AnyVar JpeTemp = 3.000000;
  AnyVar PEFactorTemp = 5.000000;
};

Palmar_Interosseous_Digit2 = {
  AnyVar EpsilonbarTemp = 0.053000;
  AnyVar K1Temp = 10.000000;
  AnyVar K2Temp = 0.000000;
  AnyVar FcfastTemp = 0.400000;
  AnyVar JtTemp = 3.000000;
  AnyVar JpeTemp = 3.000000;
  AnyVar PEFactorTemp = 5.000000;
};

Palmar_Interosseous_Digit4 = {
  AnyVar EpsilonbarTemp = 0.053000;
  AnyVar K1Temp = 10.000000;
  AnyVar K2Temp = 0.000000;
  AnyVar FcfastTemp = 0.400000;
  AnyVar JtTemp = 3.000000;
  AnyVar JpeTemp = 3.000000;
  AnyVar PEFactorTemp = 5.000000;
};

Palmar_Interosseous_Digit5 = {
  AnyVar EpsilonbarTemp = 0.053000;
  AnyVar K1Temp = 10.000000;
  AnyVar K2Temp = 0.000000;
  AnyVar FcfastTemp = 0.400000;
  AnyVar JtTemp = 3.000000;
  AnyVar JpeTemp = 3.000000;
  AnyVar PEFactorTemp = 5.000000;
};
//_Lumbrical
Lumbrical_Digit2 = {
AnyVar EpsilonbarTemp = 0.053000;
  AnyVar K1Temp = 10.000000;
  AnyVar K2Temp = 0.000000;
  AnyVar FcfastTemp = 0.400000;
  AnyVar JtTemp = 3.000000;
  AnyVar JpeTemp = 3.000000;
  AnyVar PEFactorTemp = 5.000000;
};
Lumbrical_Digit3 = {
AnyVar EpsilonbarTemp = 0.053000;
  AnyVar K1Temp = 10.000000;
  AnyVar K2Temp = 0.000000;
  AnyVar FcfastTemp = 0.400000;
  AnyVar JtTemp = 3.000000;
  AnyVar JpeTemp = 3.000000;
  AnyVar PEFactorTemp = 5.000000;
};
Lumbrical_Digit41 = {
AnyVar EpsilonbarTemp = 0.053000;
  AnyVar K1Temp = 10.000000;
  AnyVar K2Temp = 0.000000;
  AnyVar FcfastTemp = 0.400000;
  AnyVar JtTemp = 3.000000;
  AnyVar JpeTemp = 3.000000;
  AnyVar PEFactorTemp = 5.000000;
};
Lumbrical_Digit42 = {
AnyVar EpsilonbarTemp = 0.053000;
  AnyVar K1Temp = 10.000000;
  AnyVar K2Temp = 0.000000;
  AnyVar FcfastTemp = 0.400000;
  AnyVar JtTemp = 3.000000;
  AnyVar JpeTemp = 3.000000;
  AnyVar PEFactorTemp = 5.000000;
};
Lumbrical_Digit51 = {
AnyVar EpsilonbarTemp = 0.053000;
  AnyVar K1Temp = 10.000000;
  AnyVar K2Temp = 0.000000;
  AnyVar FcfastTemp = 0.400000;
  AnyVar JtTemp = 3.000000;
  AnyVar JpeTemp = 3.000000;
  AnyVar PEFactorTemp = 5.000000;
};
Lumbrical_Digit52 = {
AnyVar EpsilonbarTemp = 0.053000;
  AnyVar K1Temp = 10.000000;
  AnyVar K2Temp = 0.000000;
  AnyVar FcfastTemp = 0.400000;
  AnyVar JtTemp = 3.000000;
  AnyVar JpeTemp = 3.000000;
  AnyVar PEFactorTemp = 5.000000;
};
//DorsalInterosseous

DorsalInterosseous_Digit21 = {
AnyVar EpsilonbarTemp = 0.053000;
  AnyVar K1Temp = 10.000000;
  AnyVar K2Temp = 0.000000;
  AnyVar FcfastTemp = 0.400000;
  AnyVar JtTemp = 3.000000;
  AnyVar JpeTemp = 3.000000;
  AnyVar PEFactorTemp = 5.000000;
};
DorsalInterosseous_Digit22 = {
AnyVar EpsilonbarTemp = 0.053000;
  AnyVar K1Temp = 10.000000;
  AnyVar K2Temp = 0.000000;
  AnyVar FcfastTemp = 0.400000;
  AnyVar JtTemp = 3.000000;
  AnyVar JpeTemp = 3.000000;
  AnyVar PEFactorTemp = 5.000000;
};
DorsalInterosseous_Digit31 = {
AnyVar EpsilonbarTemp = 0.053000;
  AnyVar K1Temp = 10.000000;
  AnyVar K2Temp = 0.000000;
  AnyVar FcfastTemp = 0.400000;
  AnyVar JtTemp = 3.000000;
  AnyVar JpeTemp = 3.000000;
  AnyVar PEFactorTemp = 5.000000;
};
DorsalInterosseous_Digit32 = {
AnyVar EpsilonbarTemp = 0.053000;
  AnyVar K1Temp = 10.000000;
  AnyVar K2Temp = 0.000000;
  AnyVar FcfastTemp = 0.400000;
  AnyVar JtTemp = 3.000000;
  AnyVar JpeTemp = 3.000000;
  AnyVar PEFactorTemp = 5.000000;
};
DorsalInterosseous_Digit33 = {
AnyVar EpsilonbarTemp = 0.053000;
  AnyVar K1Temp = 10.000000;
  AnyVar K2Temp = 0.000000;
  AnyVar FcfastTemp = 0.400000;
  AnyVar JtTemp = 3.000000;
  AnyVar JpeTemp = 3.000000;
  AnyVar PEFactorTemp = 5.000000;
};
DorsalInterosseous_Digit34 = {
AnyVar EpsilonbarTemp = 0.053000;
  AnyVar K1Temp = 10.000000;
  AnyVar K2Temp = 0.000000;
  AnyVar FcfastTemp = 0.400000;
  AnyVar JtTemp = 3.000000;
  AnyVar JpeTemp = 3.000000;
  AnyVar PEFactorTemp = 5.000000;
};
DorsalInterosseous_Digit41 = {
AnyVar EpsilonbarTemp = 0.053000;
  AnyVar K1Temp = 10.000000;
  AnyVar K2Temp = 0.000000;
  AnyVar FcfastTemp = 0.400000;
  AnyVar JtTemp = 3.000000;
  AnyVar JpeTemp = 3.000000;
  AnyVar PEFactorTemp = 5.000000;
};
DorsalInterosseous_Digit42 = {
AnyVar EpsilonbarTemp = 0.053000;
  AnyVar K1Temp = 10.000000;
  AnyVar K2Temp = 0.000000;
  AnyVar FcfastTemp = 0.400000;
  AnyVar JtTemp = 3.000000;
  AnyVar JpeTemp = 3.000000;
  AnyVar PEFactorTemp = 5.000000;
};
Abductor_Pollicis_Brevis = {
AnyVar EpsilonbarTemp = 0.053000;
  AnyVar K1Temp = 10.000000;
  AnyVar K2Temp = 0.000000;
  AnyVar FcfastTemp = 0.400000;
  AnyVar JtTemp = 3.000000;
  AnyVar JpeTemp = 3.000000;
  AnyVar PEFactorTemp = 5.000000;
};
Abductor_Pollicis = {
AnyVar EpsilonbarTemp = 0.053000;
  AnyVar K1Temp = 10.000000;
  AnyVar K2Temp = 0.000000;
  AnyVar FcfastTemp = 0.400000;
  AnyVar JtTemp = 3.000000;
  AnyVar JpeTemp = 3.000000;
  AnyVar PEFactorTemp = 5.000000;
};
Flexor_Pollicis_Brevis = {
AnyVar EpsilonbarTemp = 0.053000;
  AnyVar K1Temp = 10.000000;
  AnyVar K2Temp = 0.000000;
  AnyVar FcfastTemp = 0.400000;
  AnyVar JtTemp = 3.000000;
  AnyVar JpeTemp = 3.000000;
  AnyVar PEFactorTemp = 5.000000;
};
#endif // HAND_MODEL_OFF | HAND_MODEL_ANYBODY_


#if BM_HAND_MODEL == _HAND_MODEL_RUHM_

#include "Plzen-Muscle-parameters-shoulder-const.any"

#endif //HAND_MODEL_RUHM

//--END of loopluc
