/**^
This folder implements the simple muscle models for the shoulder arm model.
Anatomical muscles are in many cases split into
several branches (elements). Strength parameters are split between the branches,
typically by uniform split.
*/

AnyFolder DefaultMusPar = {
  AnyVar PCSAfactor ??= ......HumanModel.StrengthParameters.SpecificMuscleTensionShoulderArm; ///< PCSAfactor in N/cm^2 , the PCSA itself is given in cm^2 so F0 is in Newton`s.
};

AnyVar StrengthScaleHumerus =  .StrengthScaling.Humerus.StrengthScale;
AnyVar StrengthScaleUlna = .StrengthScaling.Ulna.StrengthScale;
AnyVar StrengthScaleHand = .StrengthScaling.Hand.StrengthScale;


/////////////////////////////////////////////
//     BicepsBrachiiBreve (1 element )     //
/////////////////////////////////////////////
AnyMuscleModel BicepsBrachiiBreve =
{
  AnyFolder& MuscleParameters = ..Data.unscaled.ModelParameters.Muscles.BicepsBrachiiBreve;
  AnyIntVar MuscleElemNo = 1; ///< The number of this element of the muscle
  AnyIntVar MuscleElemAmount = MuscleParameters.MuscleElemAmount; ///< The total amount of elements for this muscle
  F0 ??= .DefaultMusPar.PCSAfactor*PCSA; ///< Maximum force output at optimum fiber length
  Lf0 ??= MuscleParameters.OptimalFiberlength / cos(pi/180*MuscleParameters.Pennationangle); //< Optimal fiber length corrected by pennation angle
  AnyVar PCSA ??= 1e4*.StrengthScaleHumerus*MuscleParameters.MuscleVolumeSIScaled/(Lf0); ///< PCSA (cm2) of the individual element is total volumen divided by the sum of muscle element fiber lengths.
  Vol0 ??= 1e-4 * PCSA * Lf0; // New calculation of the vol for the specific muscle branch (m^3)
};


//////////////////////////////////////////////
//     BicepsBrachiiLongum (1 element )     //
//////////////////////////////////////////////
AnyMuscleModel BicepsBrachiiLongum =
{
  AnyFolder& MuscleParameters = ..Data.unscaled.ModelParameters.Muscles.BicepsBrachiiLongum;
  AnyIntVar MuscleElemNo = 1; ///< The number of this element of the muscle
  AnyIntVar MuscleElemAmount = MuscleParameters.MuscleElemAmount; ///< The total amount of elements for this muscle
  F0 ??= .DefaultMusPar.PCSAfactor*PCSA; ///< Maximum force output at optimum fiber length
  Lf0 ??= MuscleParameters.OptimalFiberlength / cos(pi/180*MuscleParameters.Pennationangle); //< Optimal fiber length corrected by pennation angle
  AnyVar PCSA ??= 1e4*.StrengthScaleHumerus*MuscleParameters.MuscleVolumeSIScaled/(Lf0); ///< PCSA (cm2) of the individual element is total volumen divided by the sum of muscle element fiber lengths.
  Vol0 ??= 1e-4 * PCSA * Lf0; // New calculation of the vol for the specific muscle branch (m^3)
};


///////////////////////////////////////////
//     Coracobrachialis (6 elements)     //
///////////////////////////////////////////
AnyMuscleModel Coracobrachialis1 =
{
  AnyFolder& MuscleParameters = ..Data.unscaled.ModelParameters.Muscles.Coracobrachialis;
  AnyIntVar MuscleElemNo = 1; ///< The number of this element of the muscle
  AnyIntVar MuscleElemAmount = MuscleParameters.MuscleElemAmount; ///< The total amount of elements for this muscle
  F0 ??= .DefaultMusPar.PCSAfactor*PCSA; ///< Maximum force output at optimum fiber length
  Lf0 ??= MuscleParameters.OptimalFiberlength / cos(pi/180*MuscleParameters.Pennationangle); //< Optimal fiber length corrected by pennation angle
  AnyVar PCSA ??= 1e4*.StrengthScaleHumerus*MuscleParameters.MuscleVolumeSIScaled/(.Coracobrachialis1.Lf0 +.Coracobrachialis2.Lf0 +.Coracobrachialis3.Lf0 +.Coracobrachialis4.Lf0 +.Coracobrachialis5.Lf0 +.Coracobrachialis6.Lf0 ); ///< PCSA (cm2) of the individual element is total volumen divided by the sum of muscle element fiber lengths.
  Vol0 ??= 1e-4 * PCSA * Lf0; // New calculation of the vol for the specific muscle branch (m^3)
};

AnyMuscleModel Coracobrachialis2 =
{
  AnyFolder& MuscleParameters = ..Data.unscaled.ModelParameters.Muscles.Coracobrachialis;
  AnyIntVar MuscleElemNo = 2; ///< The number of this element of the muscle
  AnyIntVar MuscleElemAmount = MuscleParameters.MuscleElemAmount; ///< The total amount of elements for this muscle
  F0 ??= .DefaultMusPar.PCSAfactor*PCSA; ///< Maximum force output at optimum fiber length
  Lf0 ??= MuscleParameters.OptimalFiberlength / cos(pi/180*MuscleParameters.Pennationangle); //< Optimal fiber length corrected by pennation angle
  AnyVar PCSA ??= 1e4*.StrengthScaleHumerus*MuscleParameters.MuscleVolumeSIScaled/(.Coracobrachialis1.Lf0 +.Coracobrachialis2.Lf0 +.Coracobrachialis3.Lf0 +.Coracobrachialis4.Lf0 +.Coracobrachialis5.Lf0 +.Coracobrachialis6.Lf0 ); ///< PCSA (cm2) of the individual element is total volumen divided by the sum of muscle element fiber lengths.
  Vol0 ??= 1e-4 * PCSA * Lf0; // New calculation of the vol for the specific muscle branch (m^3)
};

AnyMuscleModel Coracobrachialis3 =
{
  AnyFolder& MuscleParameters = ..Data.unscaled.ModelParameters.Muscles.Coracobrachialis;
  AnyIntVar MuscleElemNo = 3; ///< The number of this element of the muscle
  AnyIntVar MuscleElemAmount = MuscleParameters.MuscleElemAmount; ///< The total amount of elements for this muscle
  F0 ??= .DefaultMusPar.PCSAfactor*PCSA; ///< Maximum force output at optimum fiber length
  Lf0 ??= MuscleParameters.OptimalFiberlength / cos(pi/180*MuscleParameters.Pennationangle); //< Optimal fiber length corrected by pennation angle
  AnyVar PCSA ??= 1e4*.StrengthScaleHumerus*MuscleParameters.MuscleVolumeSIScaled/(.Coracobrachialis1.Lf0 +.Coracobrachialis2.Lf0 +.Coracobrachialis3.Lf0 +.Coracobrachialis4.Lf0 +.Coracobrachialis5.Lf0 +.Coracobrachialis6.Lf0 ); ///< PCSA (cm2) of the individual element is total volumen divided by the sum of muscle element fiber lengths.
  Vol0 ??= 1e-4 * PCSA * Lf0; // New calculation of the vol for the specific muscle branch (m^3)
};

AnyMuscleModel Coracobrachialis4 =
{
  AnyFolder& MuscleParameters = ..Data.unscaled.ModelParameters.Muscles.Coracobrachialis;
  AnyIntVar MuscleElemNo = 4; ///< The number of this element of the muscle
  AnyIntVar MuscleElemAmount = MuscleParameters.MuscleElemAmount; ///< The total amount of elements for this muscle
  F0 ??= .DefaultMusPar.PCSAfactor*PCSA; ///< Maximum force output at optimum fiber length
  Lf0 ??= MuscleParameters.OptimalFiberlength / cos(pi/180*MuscleParameters.Pennationangle); //< Optimal fiber length corrected by pennation angle
  AnyVar PCSA ??= 1e4*.StrengthScaleHumerus*MuscleParameters.MuscleVolumeSIScaled/(.Coracobrachialis1.Lf0 +.Coracobrachialis2.Lf0 +.Coracobrachialis3.Lf0 +.Coracobrachialis4.Lf0 +.Coracobrachialis5.Lf0 +.Coracobrachialis6.Lf0 ); ///< PCSA (cm2) of the individual element is total volumen divided by the sum of muscle element fiber lengths.
  Vol0 ??= 1e-4 * PCSA * Lf0; // New calculation of the vol for the specific muscle branch (m^3)
};

AnyMuscleModel Coracobrachialis5 =
{
  AnyFolder& MuscleParameters = ..Data.unscaled.ModelParameters.Muscles.Coracobrachialis;
  AnyIntVar MuscleElemNo = 5; ///< The number of this element of the muscle
  AnyIntVar MuscleElemAmount = MuscleParameters.MuscleElemAmount; ///< The total amount of elements for this muscle
  F0 ??= .DefaultMusPar.PCSAfactor*PCSA; ///< Maximum force output at optimum fiber length
  Lf0 ??= MuscleParameters.OptimalFiberlength / cos(pi/180*MuscleParameters.Pennationangle); //< Optimal fiber length corrected by pennation angle
  AnyVar PCSA ??= 1e4*.StrengthScaleHumerus*MuscleParameters.MuscleVolumeSIScaled/(.Coracobrachialis1.Lf0 +.Coracobrachialis2.Lf0 +.Coracobrachialis3.Lf0 +.Coracobrachialis4.Lf0 +.Coracobrachialis5.Lf0 +.Coracobrachialis6.Lf0 ); ///< PCSA (cm2) of the individual element is total volumen divided by the sum of muscle element fiber lengths.
  Vol0 ??= 1e-4 * PCSA * Lf0; // New calculation of the vol for the specific muscle branch (m^3)
};

AnyMuscleModel Coracobrachialis6 =
{
  AnyFolder& MuscleParameters = ..Data.unscaled.ModelParameters.Muscles.Coracobrachialis;
  AnyIntVar MuscleElemNo = 6; ///< The number of this element of the muscle
  AnyIntVar MuscleElemAmount = MuscleParameters.MuscleElemAmount; ///< The total amount of elements for this muscle
  F0 ??= .DefaultMusPar.PCSAfactor*PCSA; ///< Maximum force output at optimum fiber length
  Lf0 ??= MuscleParameters.OptimalFiberlength / cos(pi/180*MuscleParameters.Pennationangle); //< Optimal fiber length corrected by pennation angle
  AnyVar PCSA ??= 1e4*.StrengthScaleHumerus*MuscleParameters.MuscleVolumeSIScaled/(.Coracobrachialis1.Lf0 +.Coracobrachialis2.Lf0 +.Coracobrachialis3.Lf0 +.Coracobrachialis4.Lf0 +.Coracobrachialis5.Lf0 +.Coracobrachialis6.Lf0 ); ///< PCSA (cm2) of the individual element is total volumen divided by the sum of muscle element fiber lengths.
  Vol0 ??= 1e-4 * PCSA * Lf0; // New calculation of the vol for the specific muscle branch (m^3)
};


#if BM_ARM_DELTOID_WRAPPING == OFF
/////////////////////////////////////////////////////
//     deltoideus_scapular_part_1 (1 element )     //
/////////////////////////////////////////////////////
AnyMuscleModel deltoideus_scapular_part_1 =
{
  AnyFolder& MuscleParameters = ..Data.unscaled.ModelParameters.Muscles.deltoideus_scapular_part_1;
  AnyIntVar MuscleElemNo = 1; ///< The number of this element of the muscle
  AnyIntVar MuscleElemAmount = MuscleParameters.MuscleElemAmount; ///< The total amount of elements for this muscle
  F0 ??= .DefaultMusPar.PCSAfactor*PCSA; ///< Maximum force output at optimum fiber length
  Lf0 ??= MuscleParameters.OptimalFiberlength / cos(pi/180*MuscleParameters.Pennationangle); //< Optimal fiber length corrected by pennation angle
  AnyVar PCSA ??= 1e4*.StrengthScaleHumerus*MuscleParameters.MuscleVolumeSIScaled/(Lf0); ///< PCSA (cm2) of the individual element is total volumen divided by the sum of muscle element fiber lengths.
  Vol0 ??= 1e-4 * PCSA * Lf0; // New calculation of the vol for the specific muscle branch (m^3)
};


#endif


#if BM_ARM_DELTOID_WRAPPING == OFF
/////////////////////////////////////////////////////
//     deltoideus_scapular_part_2 (1 element )     //
/////////////////////////////////////////////////////
AnyMuscleModel deltoideus_scapular_part_2 =
{
  AnyFolder& MuscleParameters = ..Data.unscaled.ModelParameters.Muscles.deltoideus_scapular_part_2;
  AnyIntVar MuscleElemNo = 1; ///< The number of this element of the muscle
  AnyIntVar MuscleElemAmount = MuscleParameters.MuscleElemAmount; ///< The total amount of elements for this muscle
  F0 ??= .DefaultMusPar.PCSAfactor*PCSA; ///< Maximum force output at optimum fiber length
  Lf0 ??= MuscleParameters.OptimalFiberlength / cos(pi/180*MuscleParameters.Pennationangle); //< Optimal fiber length corrected by pennation angle
  AnyVar PCSA ??= 1e4*.StrengthScaleHumerus*MuscleParameters.MuscleVolumeSIScaled/(Lf0); ///< PCSA (cm2) of the individual element is total volumen divided by the sum of muscle element fiber lengths.
  Vol0 ??= 1e-4 * PCSA * Lf0; // New calculation of the vol for the specific muscle branch (m^3)
};


#endif


#if BM_ARM_DELTOID_WRAPPING == OFF
/////////////////////////////////////////////////////
//     deltoideus_scapular_part_3 (1 element )     //
/////////////////////////////////////////////////////
AnyMuscleModel deltoideus_scapular_part_3 =
{
  AnyFolder& MuscleParameters = ..Data.unscaled.ModelParameters.Muscles.deltoideus_scapular_part_3;
  AnyIntVar MuscleElemNo = 1; ///< The number of this element of the muscle
  AnyIntVar MuscleElemAmount = MuscleParameters.MuscleElemAmount; ///< The total amount of elements for this muscle
  F0 ??= .DefaultMusPar.PCSAfactor*PCSA; ///< Maximum force output at optimum fiber length
  Lf0 ??= MuscleParameters.OptimalFiberlength / cos(pi/180*MuscleParameters.Pennationangle); //< Optimal fiber length corrected by pennation angle
  AnyVar PCSA ??= 1e4*.StrengthScaleHumerus*MuscleParameters.MuscleVolumeSIScaled/(Lf0); ///< PCSA (cm2) of the individual element is total volumen divided by the sum of muscle element fiber lengths.
  Vol0 ??= 1e-4 * PCSA * Lf0; // New calculation of the vol for the specific muscle branch (m^3)
};


#endif


#if BM_ARM_DELTOID_WRAPPING == OFF
/////////////////////////////////////////////////////
//     deltoideus_scapular_part_4 (1 element )     //
/////////////////////////////////////////////////////
AnyMuscleModel deltoideus_scapular_part_4 =
{
  AnyFolder& MuscleParameters = ..Data.unscaled.ModelParameters.Muscles.deltoideus_scapular_part_4;
  AnyIntVar MuscleElemNo = 1; ///< The number of this element of the muscle
  AnyIntVar MuscleElemAmount = MuscleParameters.MuscleElemAmount; ///< The total amount of elements for this muscle
  F0 ??= .DefaultMusPar.PCSAfactor*PCSA; ///< Maximum force output at optimum fiber length
  Lf0 ??= MuscleParameters.OptimalFiberlength / cos(pi/180*MuscleParameters.Pennationangle); //< Optimal fiber length corrected by pennation angle
  AnyVar PCSA ??= 1e4*.StrengthScaleHumerus*MuscleParameters.MuscleVolumeSIScaled/(Lf0); ///< PCSA (cm2) of the individual element is total volumen divided by the sum of muscle element fiber lengths.
  Vol0 ??= 1e-4 * PCSA * Lf0; // New calculation of the vol for the specific muscle branch (m^3)
};


#endif


#if BM_ARM_DELTOID_WRAPPING == OFF
/////////////////////////////////////////////////////
//     deltoideus_scapular_part_5 (1 element )     //
/////////////////////////////////////////////////////
AnyMuscleModel deltoideus_scapular_part_5 =
{
  AnyFolder& MuscleParameters = ..Data.unscaled.ModelParameters.Muscles.deltoideus_scapular_part_5;
  AnyIntVar MuscleElemNo = 1; ///< The number of this element of the muscle
  AnyIntVar MuscleElemAmount = MuscleParameters.MuscleElemAmount; ///< The total amount of elements for this muscle
  F0 ??= .DefaultMusPar.PCSAfactor*PCSA; ///< Maximum force output at optimum fiber length
  Lf0 ??= MuscleParameters.OptimalFiberlength / cos(pi/180*MuscleParameters.Pennationangle); //< Optimal fiber length corrected by pennation angle
  AnyVar PCSA ??= 1e4*.StrengthScaleHumerus*MuscleParameters.MuscleVolumeSIScaled/(Lf0); ///< PCSA (cm2) of the individual element is total volumen divided by the sum of muscle element fiber lengths.
  Vol0 ??= 1e-4 * PCSA * Lf0; // New calculation of the vol for the specific muscle branch (m^3)
};


#endif


#if BM_ARM_DELTOID_WRAPPING == OFF
/////////////////////////////////////////////////////
//     deltoideus_scapular_part_6 (1 element )     //
/////////////////////////////////////////////////////
AnyMuscleModel deltoideus_scapular_part_6 =
{
  AnyFolder& MuscleParameters = ..Data.unscaled.ModelParameters.Muscles.deltoideus_scapular_part_6;
  AnyIntVar MuscleElemNo = 1; ///< The number of this element of the muscle
  AnyIntVar MuscleElemAmount = MuscleParameters.MuscleElemAmount; ///< The total amount of elements for this muscle
  F0 ??= .DefaultMusPar.PCSAfactor*PCSA; ///< Maximum force output at optimum fiber length
  Lf0 ??= MuscleParameters.OptimalFiberlength / cos(pi/180*MuscleParameters.Pennationangle); //< Optimal fiber length corrected by pennation angle
  AnyVar PCSA ??= 1e4*.StrengthScaleHumerus*MuscleParameters.MuscleVolumeSIScaled/(Lf0); ///< PCSA (cm2) of the individual element is total volumen divided by the sum of muscle element fiber lengths.
  Vol0 ??= 1e-4 * PCSA * Lf0; // New calculation of the vol for the specific muscle branch (m^3)
};


#endif


#if BM_ARM_DELTOID_WRAPPING == OFF
///////////////////////////////////////////////////////
//     deltoideus_clavicular_part_1 (1 element )     //
///////////////////////////////////////////////////////
AnyMuscleModel deltoideus_clavicular_part_1 =
{
  AnyFolder& MuscleParameters = ..Data.unscaled.ModelParameters.Muscles.deltoideus_clavicular_part_1;
  AnyIntVar MuscleElemNo = 1; ///< The number of this element of the muscle
  AnyIntVar MuscleElemAmount = MuscleParameters.MuscleElemAmount; ///< The total amount of elements for this muscle
  F0 ??= .DefaultMusPar.PCSAfactor*PCSA; ///< Maximum force output at optimum fiber length
  Lf0 ??= MuscleParameters.OptimalFiberlength / cos(pi/180*MuscleParameters.Pennationangle); //< Optimal fiber length corrected by pennation angle
  AnyVar PCSA ??= 1e4*.StrengthScaleHumerus*MuscleParameters.MuscleVolumeSIScaled/(Lf0); ///< PCSA (cm2) of the individual element is total volumen divided by the sum of muscle element fiber lengths.
  Vol0 ??= 1e-4 * PCSA * Lf0; // New calculation of the vol for the specific muscle branch (m^3)
};


#endif


#if BM_ARM_DELTOID_WRAPPING == OFF
///////////////////////////////////////////////////////
//     deltoideus_clavicular_part_2 (1 element )     //
///////////////////////////////////////////////////////
AnyMuscleModel deltoideus_clavicular_part_2 =
{
  AnyFolder& MuscleParameters = ..Data.unscaled.ModelParameters.Muscles.deltoideus_clavicular_part_2;
  AnyIntVar MuscleElemNo = 1; ///< The number of this element of the muscle
  AnyIntVar MuscleElemAmount = MuscleParameters.MuscleElemAmount; ///< The total amount of elements for this muscle
  F0 ??= .DefaultMusPar.PCSAfactor*PCSA; ///< Maximum force output at optimum fiber length
  Lf0 ??= MuscleParameters.OptimalFiberlength / cos(pi/180*MuscleParameters.Pennationangle); //< Optimal fiber length corrected by pennation angle
  AnyVar PCSA ??= 1e4*.StrengthScaleHumerus*MuscleParameters.MuscleVolumeSIScaled/(Lf0); ///< PCSA (cm2) of the individual element is total volumen divided by the sum of muscle element fiber lengths.
  Vol0 ??= 1e-4 * PCSA * Lf0; // New calculation of the vol for the specific muscle branch (m^3)
};


#endif


#if BM_ARM_DELTOID_WRAPPING == OFF
///////////////////////////////////////////////////////
//     deltoideus_clavicular_part_3 (1 element )     //
///////////////////////////////////////////////////////
AnyMuscleModel deltoideus_clavicular_part_3 =
{
  AnyFolder& MuscleParameters = ..Data.unscaled.ModelParameters.Muscles.deltoideus_clavicular_part_3;
  AnyIntVar MuscleElemNo = 1; ///< The number of this element of the muscle
  AnyIntVar MuscleElemAmount = MuscleParameters.MuscleElemAmount; ///< The total amount of elements for this muscle
  F0 ??= .DefaultMusPar.PCSAfactor*PCSA; ///< Maximum force output at optimum fiber length
  Lf0 ??= MuscleParameters.OptimalFiberlength / cos(pi/180*MuscleParameters.Pennationangle); //< Optimal fiber length corrected by pennation angle
  AnyVar PCSA ??= 1e4*.StrengthScaleHumerus*MuscleParameters.MuscleVolumeSIScaled/(Lf0); ///< PCSA (cm2) of the individual element is total volumen divided by the sum of muscle element fiber lengths.
  Vol0 ??= 1e-4 * PCSA * Lf0; // New calculation of the vol for the specific muscle branch (m^3)
};


#endif


#if BM_ARM_DELTOID_WRAPPING == OFF
///////////////////////////////////////////////////////
//     deltoideus_clavicular_part_4 (1 element )     //
///////////////////////////////////////////////////////
AnyMuscleModel deltoideus_clavicular_part_4 =
{
  AnyFolder& MuscleParameters = ..Data.unscaled.ModelParameters.Muscles.deltoideus_clavicular_part_4;
  AnyIntVar MuscleElemNo = 1; ///< The number of this element of the muscle
  AnyIntVar MuscleElemAmount = MuscleParameters.MuscleElemAmount; ///< The total amount of elements for this muscle
  F0 ??= .DefaultMusPar.PCSAfactor*PCSA; ///< Maximum force output at optimum fiber length
  Lf0 ??= MuscleParameters.OptimalFiberlength / cos(pi/180*MuscleParameters.Pennationangle); //< Optimal fiber length corrected by pennation angle
  AnyVar PCSA ??= 1e4*.StrengthScaleHumerus*MuscleParameters.MuscleVolumeSIScaled/(Lf0); ///< PCSA (cm2) of the individual element is total volumen divided by the sum of muscle element fiber lengths.
  Vol0 ??= 1e-4 * PCSA * Lf0; // New calculation of the vol for the specific muscle branch (m^3)
};


#endif


#if BM_ARM_DELTOID_WRAPPING == OFF
///////////////////////////////////////////////////////
//     deltoideus_clavicular_part_5 (1 element )     //
///////////////////////////////////////////////////////
AnyMuscleModel deltoideus_clavicular_part_5 =
{
  AnyFolder& MuscleParameters = ..Data.unscaled.ModelParameters.Muscles.deltoideus_clavicular_part_5;
  AnyIntVar MuscleElemNo = 1; ///< The number of this element of the muscle
  AnyIntVar MuscleElemAmount = MuscleParameters.MuscleElemAmount; ///< The total amount of elements for this muscle
  F0 ??= .DefaultMusPar.PCSAfactor*PCSA; ///< Maximum force output at optimum fiber length
  Lf0 ??= MuscleParameters.OptimalFiberlength / cos(pi/180*MuscleParameters.Pennationangle); //< Optimal fiber length corrected by pennation angle
  AnyVar PCSA ??= 1e4*.StrengthScaleHumerus*MuscleParameters.MuscleVolumeSIScaled/(Lf0); ///< PCSA (cm2) of the individual element is total volumen divided by the sum of muscle element fiber lengths.
  Vol0 ??= 1e-4 * PCSA * Lf0; // New calculation of the vol for the specific muscle branch (m^3)
};


#endif


#if BM_ARM_DELTOID_WRAPPING == OFF
///////////////////////////////////////////////////////
//     deltoideus_clavicular_part_6 (1 element )     //
///////////////////////////////////////////////////////
AnyMuscleModel deltoideus_clavicular_part_6 =
{
  AnyFolder& MuscleParameters = ..Data.unscaled.ModelParameters.Muscles.deltoideus_clavicular_part_6;
  AnyIntVar MuscleElemNo = 1; ///< The number of this element of the muscle
  AnyIntVar MuscleElemAmount = MuscleParameters.MuscleElemAmount; ///< The total amount of elements for this muscle
  F0 ??= .DefaultMusPar.PCSAfactor*PCSA; ///< Maximum force output at optimum fiber length
  Lf0 ??= MuscleParameters.OptimalFiberlength / cos(pi/180*MuscleParameters.Pennationangle); //< Optimal fiber length corrected by pennation angle
  AnyVar PCSA ??= 1e4*.StrengthScaleHumerus*MuscleParameters.MuscleVolumeSIScaled/(Lf0); ///< PCSA (cm2) of the individual element is total volumen divided by the sum of muscle element fiber lengths.
  Vol0 ??= 1e-4 * PCSA * Lf0; // New calculation of the vol for the specific muscle branch (m^3)
};


#endif


#if BM_ARM_DELTOID_WRAPPING != OFF
//////////////////////////////////////////////
//     DeltoideusPosterior (4 elements)     //
//////////////////////////////////////////////
AnyMuscleModel DeltoideusPosterior1 =
{
  AnyFolder& MuscleParameters = ..Data.unscaled.ModelParameters.Muscles.DeltoideusPosterior;
  AnyIntVar MuscleElemNo = 1; ///< The number of this element of the muscle
  AnyIntVar MuscleElemAmount = MuscleParameters.MuscleElemAmount; ///< The total amount of elements for this muscle
  F0 ??= .DefaultMusPar.PCSAfactor*PCSA; ///< Maximum force output at optimum fiber length
  Lf0 ??= MuscleParameters.OptimalFiberlength / cos(pi/180*MuscleParameters.Pennationangle); //< Optimal fiber length corrected by pennation angle
  AnyVar PCSA ??= 1e4*.StrengthScaleHumerus*MuscleParameters.MuscleVolumeSIScaled/(.DeltoideusPosterior1.Lf0 +.DeltoideusPosterior2.Lf0 +.DeltoideusPosterior3.Lf0 +.DeltoideusPosterior4.Lf0 ); ///< PCSA (cm2) of the individual element is total volumen divided by the sum of muscle element fiber lengths.
  Vol0 ??= 1e-4 * PCSA * Lf0; // New calculation of the vol for the specific muscle branch (m^3)
};

AnyMuscleModel DeltoideusPosterior2 =
{
  AnyFolder& MuscleParameters = ..Data.unscaled.ModelParameters.Muscles.DeltoideusPosterior;
  AnyIntVar MuscleElemNo = 2; ///< The number of this element of the muscle
  AnyIntVar MuscleElemAmount = MuscleParameters.MuscleElemAmount; ///< The total amount of elements for this muscle
  F0 ??= .DefaultMusPar.PCSAfactor*PCSA; ///< Maximum force output at optimum fiber length
  Lf0 ??= MuscleParameters.OptimalFiberlength / cos(pi/180*MuscleParameters.Pennationangle); //< Optimal fiber length corrected by pennation angle
  AnyVar PCSA ??= 1e4*.StrengthScaleHumerus*MuscleParameters.MuscleVolumeSIScaled/(.DeltoideusPosterior1.Lf0 +.DeltoideusPosterior2.Lf0 +.DeltoideusPosterior3.Lf0 +.DeltoideusPosterior4.Lf0 ); ///< PCSA (cm2) of the individual element is total volumen divided by the sum of muscle element fiber lengths.
  Vol0 ??= 1e-4 * PCSA * Lf0; // New calculation of the vol for the specific muscle branch (m^3)
};

AnyMuscleModel DeltoideusPosterior3 =
{
  AnyFolder& MuscleParameters = ..Data.unscaled.ModelParameters.Muscles.DeltoideusPosterior;
  AnyIntVar MuscleElemNo = 3; ///< The number of this element of the muscle
  AnyIntVar MuscleElemAmount = MuscleParameters.MuscleElemAmount; ///< The total amount of elements for this muscle
  F0 ??= .DefaultMusPar.PCSAfactor*PCSA; ///< Maximum force output at optimum fiber length
  Lf0 ??= MuscleParameters.OptimalFiberlength / cos(pi/180*MuscleParameters.Pennationangle); //< Optimal fiber length corrected by pennation angle
  AnyVar PCSA ??= 1e4*.StrengthScaleHumerus*MuscleParameters.MuscleVolumeSIScaled/(.DeltoideusPosterior1.Lf0 +.DeltoideusPosterior2.Lf0 +.DeltoideusPosterior3.Lf0 +.DeltoideusPosterior4.Lf0 ); ///< PCSA (cm2) of the individual element is total volumen divided by the sum of muscle element fiber lengths.
  Vol0 ??= 1e-4 * PCSA * Lf0; // New calculation of the vol for the specific muscle branch (m^3)
};

AnyMuscleModel DeltoideusPosterior4 =
{
  AnyFolder& MuscleParameters = ..Data.unscaled.ModelParameters.Muscles.DeltoideusPosterior;
  AnyIntVar MuscleElemNo = 4; ///< The number of this element of the muscle
  AnyIntVar MuscleElemAmount = MuscleParameters.MuscleElemAmount; ///< The total amount of elements for this muscle
  F0 ??= .DefaultMusPar.PCSAfactor*PCSA; ///< Maximum force output at optimum fiber length
  Lf0 ??= MuscleParameters.OptimalFiberlength / cos(pi/180*MuscleParameters.Pennationangle); //< Optimal fiber length corrected by pennation angle
  AnyVar PCSA ??= 1e4*.StrengthScaleHumerus*MuscleParameters.MuscleVolumeSIScaled/(.DeltoideusPosterior1.Lf0 +.DeltoideusPosterior2.Lf0 +.DeltoideusPosterior3.Lf0 +.DeltoideusPosterior4.Lf0 ); ///< PCSA (cm2) of the individual element is total volumen divided by the sum of muscle element fiber lengths.
  Vol0 ??= 1e-4 * PCSA * Lf0; // New calculation of the vol for the specific muscle branch (m^3)
};


#endif


#if BM_ARM_DELTOID_WRAPPING != OFF
////////////////////////////////////////////
//     DeltoideusLateral (4 elements)     //
////////////////////////////////////////////
AnyMuscleModel DeltoideusLateral1 =
{
  AnyFolder& MuscleParameters = ..Data.unscaled.ModelParameters.Muscles.DeltoideusLateral;
  AnyIntVar MuscleElemNo = 1; ///< The number of this element of the muscle
  AnyIntVar MuscleElemAmount = MuscleParameters.MuscleElemAmount; ///< The total amount of elements for this muscle
  F0 ??= .DefaultMusPar.PCSAfactor*PCSA; ///< Maximum force output at optimum fiber length
  Lf0 ??= MuscleParameters.OptimalFiberlength / cos(pi/180*MuscleParameters.Pennationangle); //< Optimal fiber length corrected by pennation angle
  AnyVar PCSA ??= 1e4*.StrengthScaleHumerus*MuscleParameters.MuscleVolumeSIScaled/(.DeltoideusLateral1.Lf0 +.DeltoideusLateral2.Lf0 +.DeltoideusLateral3.Lf0 +.DeltoideusLateral4.Lf0 ); ///< PCSA (cm2) of the individual element is total volumen divided by the sum of muscle element fiber lengths.
  Vol0 ??= 1e-4 * PCSA * Lf0; // New calculation of the vol for the specific muscle branch (m^3)
};

AnyMuscleModel DeltoideusLateral2 =
{
  AnyFolder& MuscleParameters = ..Data.unscaled.ModelParameters.Muscles.DeltoideusLateral;
  AnyIntVar MuscleElemNo = 2; ///< The number of this element of the muscle
  AnyIntVar MuscleElemAmount = MuscleParameters.MuscleElemAmount; ///< The total amount of elements for this muscle
  F0 ??= .DefaultMusPar.PCSAfactor*PCSA; ///< Maximum force output at optimum fiber length
  Lf0 ??= MuscleParameters.OptimalFiberlength / cos(pi/180*MuscleParameters.Pennationangle); //< Optimal fiber length corrected by pennation angle
  AnyVar PCSA ??= 1e4*.StrengthScaleHumerus*MuscleParameters.MuscleVolumeSIScaled/(.DeltoideusLateral1.Lf0 +.DeltoideusLateral2.Lf0 +.DeltoideusLateral3.Lf0 +.DeltoideusLateral4.Lf0 ); ///< PCSA (cm2) of the individual element is total volumen divided by the sum of muscle element fiber lengths.
  Vol0 ??= 1e-4 * PCSA * Lf0; // New calculation of the vol for the specific muscle branch (m^3)
};

AnyMuscleModel DeltoideusLateral3 =
{
  AnyFolder& MuscleParameters = ..Data.unscaled.ModelParameters.Muscles.DeltoideusLateral;
  AnyIntVar MuscleElemNo = 3; ///< The number of this element of the muscle
  AnyIntVar MuscleElemAmount = MuscleParameters.MuscleElemAmount; ///< The total amount of elements for this muscle
  F0 ??= .DefaultMusPar.PCSAfactor*PCSA; ///< Maximum force output at optimum fiber length
  Lf0 ??= MuscleParameters.OptimalFiberlength / cos(pi/180*MuscleParameters.Pennationangle); //< Optimal fiber length corrected by pennation angle
  AnyVar PCSA ??= 1e4*.StrengthScaleHumerus*MuscleParameters.MuscleVolumeSIScaled/(.DeltoideusLateral1.Lf0 +.DeltoideusLateral2.Lf0 +.DeltoideusLateral3.Lf0 +.DeltoideusLateral4.Lf0 ); ///< PCSA (cm2) of the individual element is total volumen divided by the sum of muscle element fiber lengths.
  Vol0 ??= 1e-4 * PCSA * Lf0; // New calculation of the vol for the specific muscle branch (m^3)
};

AnyMuscleModel DeltoideusLateral4 =
{
  AnyFolder& MuscleParameters = ..Data.unscaled.ModelParameters.Muscles.DeltoideusLateral;
  AnyIntVar MuscleElemNo = 4; ///< The number of this element of the muscle
  AnyIntVar MuscleElemAmount = MuscleParameters.MuscleElemAmount; ///< The total amount of elements for this muscle
  F0 ??= .DefaultMusPar.PCSAfactor*PCSA; ///< Maximum force output at optimum fiber length
  Lf0 ??= MuscleParameters.OptimalFiberlength / cos(pi/180*MuscleParameters.Pennationangle); //< Optimal fiber length corrected by pennation angle
  AnyVar PCSA ??= 1e4*.StrengthScaleHumerus*MuscleParameters.MuscleVolumeSIScaled/(.DeltoideusLateral1.Lf0 +.DeltoideusLateral2.Lf0 +.DeltoideusLateral3.Lf0 +.DeltoideusLateral4.Lf0 ); ///< PCSA (cm2) of the individual element is total volumen divided by the sum of muscle element fiber lengths.
  Vol0 ??= 1e-4 * PCSA * Lf0; // New calculation of the vol for the specific muscle branch (m^3)
};


#endif


#if BM_ARM_DELTOID_WRAPPING != OFF
/////////////////////////////////////////////
//     DeltoideusAnterior (4 elements)     //
/////////////////////////////////////////////
AnyMuscleModel DeltoideusAnterior1 =
{
  AnyFolder& MuscleParameters = ..Data.unscaled.ModelParameters.Muscles.DeltoideusAnterior;
  AnyIntVar MuscleElemNo = 1; ///< The number of this element of the muscle
  AnyIntVar MuscleElemAmount = MuscleParameters.MuscleElemAmount; ///< The total amount of elements for this muscle
  F0 ??= .DefaultMusPar.PCSAfactor*PCSA; ///< Maximum force output at optimum fiber length
  Lf0 ??= MuscleParameters.OptimalFiberlength / cos(pi/180*MuscleParameters.Pennationangle); //< Optimal fiber length corrected by pennation angle
  AnyVar PCSA ??= 1e4*.StrengthScaleHumerus*MuscleParameters.MuscleVolumeSIScaled/(.DeltoideusAnterior1.Lf0 +.DeltoideusAnterior2.Lf0 +.DeltoideusAnterior3.Lf0 +.DeltoideusAnterior4.Lf0 ); ///< PCSA (cm2) of the individual element is total volumen divided by the sum of muscle element fiber lengths.
  Vol0 ??= 1e-4 * PCSA * Lf0; // New calculation of the vol for the specific muscle branch (m^3)
};

AnyMuscleModel DeltoideusAnterior2 =
{
  AnyFolder& MuscleParameters = ..Data.unscaled.ModelParameters.Muscles.DeltoideusAnterior;
  AnyIntVar MuscleElemNo = 2; ///< The number of this element of the muscle
  AnyIntVar MuscleElemAmount = MuscleParameters.MuscleElemAmount; ///< The total amount of elements for this muscle
  F0 ??= .DefaultMusPar.PCSAfactor*PCSA; ///< Maximum force output at optimum fiber length
  Lf0 ??= MuscleParameters.OptimalFiberlength / cos(pi/180*MuscleParameters.Pennationangle); //< Optimal fiber length corrected by pennation angle
  AnyVar PCSA ??= 1e4*.StrengthScaleHumerus*MuscleParameters.MuscleVolumeSIScaled/(.DeltoideusAnterior1.Lf0 +.DeltoideusAnterior2.Lf0 +.DeltoideusAnterior3.Lf0 +.DeltoideusAnterior4.Lf0 ); ///< PCSA (cm2) of the individual element is total volumen divided by the sum of muscle element fiber lengths.
  Vol0 ??= 1e-4 * PCSA * Lf0; // New calculation of the vol for the specific muscle branch (m^3)
};

AnyMuscleModel DeltoideusAnterior3 =
{
  AnyFolder& MuscleParameters = ..Data.unscaled.ModelParameters.Muscles.DeltoideusAnterior;
  AnyIntVar MuscleElemNo = 3; ///< The number of this element of the muscle
  AnyIntVar MuscleElemAmount = MuscleParameters.MuscleElemAmount; ///< The total amount of elements for this muscle
  F0 ??= .DefaultMusPar.PCSAfactor*PCSA; ///< Maximum force output at optimum fiber length
  Lf0 ??= MuscleParameters.OptimalFiberlength / cos(pi/180*MuscleParameters.Pennationangle); //< Optimal fiber length corrected by pennation angle
  AnyVar PCSA ??= 1e4*.StrengthScaleHumerus*MuscleParameters.MuscleVolumeSIScaled/(.DeltoideusAnterior1.Lf0 +.DeltoideusAnterior2.Lf0 +.DeltoideusAnterior3.Lf0 +.DeltoideusAnterior4.Lf0 ); ///< PCSA (cm2) of the individual element is total volumen divided by the sum of muscle element fiber lengths.
  Vol0 ??= 1e-4 * PCSA * Lf0; // New calculation of the vol for the specific muscle branch (m^3)
};

AnyMuscleModel DeltoideusAnterior4 =
{
  AnyFolder& MuscleParameters = ..Data.unscaled.ModelParameters.Muscles.DeltoideusAnterior;
  AnyIntVar MuscleElemNo = 4; ///< The number of this element of the muscle
  AnyIntVar MuscleElemAmount = MuscleParameters.MuscleElemAmount; ///< The total amount of elements for this muscle
  F0 ??= .DefaultMusPar.PCSAfactor*PCSA; ///< Maximum force output at optimum fiber length
  Lf0 ??= MuscleParameters.OptimalFiberlength / cos(pi/180*MuscleParameters.Pennationangle); //< Optimal fiber length corrected by pennation angle
  AnyVar PCSA ??= 1e4*.StrengthScaleHumerus*MuscleParameters.MuscleVolumeSIScaled/(.DeltoideusAnterior1.Lf0 +.DeltoideusAnterior2.Lf0 +.DeltoideusAnterior3.Lf0 +.DeltoideusAnterior4.Lf0 ); ///< PCSA (cm2) of the individual element is total volumen divided by the sum of muscle element fiber lengths.
  Vol0 ??= 1e-4 * PCSA * Lf0; // New calculation of the vol for the specific muscle branch (m^3)
};


#endif


////////////////////////////////////////
//     Infraspinatus (6 elements)     //
////////////////////////////////////////
AnyMuscleModel Infraspinatus1 =
{
  AnyFolder& MuscleParameters = ..Data.unscaled.ModelParameters.Muscles.Infraspinatus;
  AnyIntVar MuscleElemNo = 1; ///< The number of this element of the muscle
  AnyIntVar MuscleElemAmount = MuscleParameters.MuscleElemAmount; ///< The total amount of elements for this muscle
  F0 ??= .DefaultMusPar.PCSAfactor*PCSA; ///< Maximum force output at optimum fiber length
  Lf0 ??= MuscleParameters.OptimalFiberlength / cos(pi/180*MuscleParameters.Pennationangle); //< Optimal fiber length corrected by pennation angle
  AnyVar PCSA ??= 1e4*.StrengthScaleHumerus*MuscleParameters.MuscleVolumeSIScaled/(.Infraspinatus1.Lf0 +.Infraspinatus2.Lf0 +.Infraspinatus3.Lf0 +.Infraspinatus4.Lf0 +.Infraspinatus5.Lf0 +.Infraspinatus6.Lf0 ); ///< PCSA (cm2) of the individual element is total volumen divided by the sum of muscle element fiber lengths.
  Vol0 ??= 1e-4 * PCSA * Lf0; // New calculation of the vol for the specific muscle branch (m^3)
};

AnyMuscleModel Infraspinatus2 =
{
  AnyFolder& MuscleParameters = ..Data.unscaled.ModelParameters.Muscles.Infraspinatus;
  AnyIntVar MuscleElemNo = 2; ///< The number of this element of the muscle
  AnyIntVar MuscleElemAmount = MuscleParameters.MuscleElemAmount; ///< The total amount of elements for this muscle
  F0 ??= .DefaultMusPar.PCSAfactor*PCSA; ///< Maximum force output at optimum fiber length
  Lf0 ??= MuscleParameters.OptimalFiberlength / cos(pi/180*MuscleParameters.Pennationangle); //< Optimal fiber length corrected by pennation angle
  AnyVar PCSA ??= 1e4*.StrengthScaleHumerus*MuscleParameters.MuscleVolumeSIScaled/(.Infraspinatus1.Lf0 +.Infraspinatus2.Lf0 +.Infraspinatus3.Lf0 +.Infraspinatus4.Lf0 +.Infraspinatus5.Lf0 +.Infraspinatus6.Lf0 ); ///< PCSA (cm2) of the individual element is total volumen divided by the sum of muscle element fiber lengths.
  Vol0 ??= 1e-4 * PCSA * Lf0; // New calculation of the vol for the specific muscle branch (m^3)
};

AnyMuscleModel Infraspinatus3 =
{
  AnyFolder& MuscleParameters = ..Data.unscaled.ModelParameters.Muscles.Infraspinatus;
  AnyIntVar MuscleElemNo = 3; ///< The number of this element of the muscle
  AnyIntVar MuscleElemAmount = MuscleParameters.MuscleElemAmount; ///< The total amount of elements for this muscle
  F0 ??= .DefaultMusPar.PCSAfactor*PCSA; ///< Maximum force output at optimum fiber length
  Lf0 ??= MuscleParameters.OptimalFiberlength / cos(pi/180*MuscleParameters.Pennationangle); //< Optimal fiber length corrected by pennation angle
  AnyVar PCSA ??= 1e4*.StrengthScaleHumerus*MuscleParameters.MuscleVolumeSIScaled/(.Infraspinatus1.Lf0 +.Infraspinatus2.Lf0 +.Infraspinatus3.Lf0 +.Infraspinatus4.Lf0 +.Infraspinatus5.Lf0 +.Infraspinatus6.Lf0 ); ///< PCSA (cm2) of the individual element is total volumen divided by the sum of muscle element fiber lengths.
  Vol0 ??= 1e-4 * PCSA * Lf0; // New calculation of the vol for the specific muscle branch (m^3)
};

AnyMuscleModel Infraspinatus4 =
{
  AnyFolder& MuscleParameters = ..Data.unscaled.ModelParameters.Muscles.Infraspinatus;
  AnyIntVar MuscleElemNo = 4; ///< The number of this element of the muscle
  AnyIntVar MuscleElemAmount = MuscleParameters.MuscleElemAmount; ///< The total amount of elements for this muscle
  F0 ??= .DefaultMusPar.PCSAfactor*PCSA; ///< Maximum force output at optimum fiber length
  Lf0 ??= MuscleParameters.OptimalFiberlength / cos(pi/180*MuscleParameters.Pennationangle); //< Optimal fiber length corrected by pennation angle
  AnyVar PCSA ??= 1e4*.StrengthScaleHumerus*MuscleParameters.MuscleVolumeSIScaled/(.Infraspinatus1.Lf0 +.Infraspinatus2.Lf0 +.Infraspinatus3.Lf0 +.Infraspinatus4.Lf0 +.Infraspinatus5.Lf0 +.Infraspinatus6.Lf0 ); ///< PCSA (cm2) of the individual element is total volumen divided by the sum of muscle element fiber lengths.
  Vol0 ??= 1e-4 * PCSA * Lf0; // New calculation of the vol for the specific muscle branch (m^3)
};

AnyMuscleModel Infraspinatus5 =
{
  AnyFolder& MuscleParameters = ..Data.unscaled.ModelParameters.Muscles.Infraspinatus;
  AnyIntVar MuscleElemNo = 5; ///< The number of this element of the muscle
  AnyIntVar MuscleElemAmount = MuscleParameters.MuscleElemAmount; ///< The total amount of elements for this muscle
  F0 ??= .DefaultMusPar.PCSAfactor*PCSA; ///< Maximum force output at optimum fiber length
  Lf0 ??= MuscleParameters.OptimalFiberlength / cos(pi/180*MuscleParameters.Pennationangle); //< Optimal fiber length corrected by pennation angle
  AnyVar PCSA ??= 1e4*.StrengthScaleHumerus*MuscleParameters.MuscleVolumeSIScaled/(.Infraspinatus1.Lf0 +.Infraspinatus2.Lf0 +.Infraspinatus3.Lf0 +.Infraspinatus4.Lf0 +.Infraspinatus5.Lf0 +.Infraspinatus6.Lf0 ); ///< PCSA (cm2) of the individual element is total volumen divided by the sum of muscle element fiber lengths.
  Vol0 ??= 1e-4 * PCSA * Lf0; // New calculation of the vol for the specific muscle branch (m^3)
};

AnyMuscleModel Infraspinatus6 =
{
  AnyFolder& MuscleParameters = ..Data.unscaled.ModelParameters.Muscles.Infraspinatus;
  AnyIntVar MuscleElemNo = 6; ///< The number of this element of the muscle
  AnyIntVar MuscleElemAmount = MuscleParameters.MuscleElemAmount; ///< The total amount of elements for this muscle
  F0 ??= .DefaultMusPar.PCSAfactor*PCSA; ///< Maximum force output at optimum fiber length
  Lf0 ??= MuscleParameters.OptimalFiberlength / cos(pi/180*MuscleParameters.Pennationangle); //< Optimal fiber length corrected by pennation angle
  AnyVar PCSA ??= 1e4*.StrengthScaleHumerus*MuscleParameters.MuscleVolumeSIScaled/(.Infraspinatus1.Lf0 +.Infraspinatus2.Lf0 +.Infraspinatus3.Lf0 +.Infraspinatus4.Lf0 +.Infraspinatus5.Lf0 +.Infraspinatus6.Lf0 ); ///< PCSA (cm2) of the individual element is total volumen divided by the sum of muscle element fiber lengths.
  Vol0 ??= 1e-4 * PCSA * Lf0; // New calculation of the vol for the specific muscle branch (m^3)
};


//////////////////////////////////////////
//     LatissimusDorsi (11 elements)     //
//////////////////////////////////////////
AnyMuscleModel LatissimusDorsi1 =
{
  AnyFolder& MuscleParameters = ..Data.unscaled.ModelParameters.Muscles.LatissimusDorsi;
  AnyIntVar MuscleElemNo = 1; ///< The number of this element of the muscle
  AnyIntVar MuscleElemAmount = MuscleParameters.MuscleElemAmount; ///< The total amount of elements for this muscle
  F0 ??= .DefaultMusPar.PCSAfactor*PCSA; ///< Maximum force output at optimum fiber length
  Lf0 ??= MuscleParameters.OptimalFiberlength / cos(pi/180*MuscleParameters.Pennationangle); //< Optimal fiber length corrected by pennation angle
  AnyVar PCSA ??= 1e4*.StrengthScaleHumerus*MuscleParameters.MuscleVolumeSIScaled/(.LatissimusDorsi1.Lf0 +.LatissimusDorsi2.Lf0 +.LatissimusDorsi3.Lf0 +.LatissimusDorsi4.Lf0 +.LatissimusDorsi5.Lf0 +.LatissimusDorsi6.Lf0 +.LatissimusDorsi7.Lf0 +.LatissimusDorsi8.Lf0 +.LatissimusDorsi9.Lf0 +.LatissimusDorsi10.Lf0 +.LatissimusDorsi11.Lf0 ); ///< PCSA (cm2) of the individual element is total volumen divided by the sum of muscle element fiber lengths.
  Vol0 ??= 1e-4 * PCSA * Lf0; // New calculation of the vol for the specific muscle branch (m^3)
};

AnyMuscleModel LatissimusDorsi2 =
{
  AnyFolder& MuscleParameters = ..Data.unscaled.ModelParameters.Muscles.LatissimusDorsi;
  AnyIntVar MuscleElemNo = 2; ///< The number of this element of the muscle
  AnyIntVar MuscleElemAmount = MuscleParameters.MuscleElemAmount; ///< The total amount of elements for this muscle
  F0 ??= .DefaultMusPar.PCSAfactor*PCSA; ///< Maximum force output at optimum fiber length
  Lf0 ??= MuscleParameters.OptimalFiberlength / cos(pi/180*MuscleParameters.Pennationangle); //< Optimal fiber length corrected by pennation angle
  AnyVar PCSA ??= 1e4*.StrengthScaleHumerus*MuscleParameters.MuscleVolumeSIScaled/(.LatissimusDorsi1.Lf0 +.LatissimusDorsi2.Lf0 +.LatissimusDorsi3.Lf0 +.LatissimusDorsi4.Lf0 +.LatissimusDorsi5.Lf0 +.LatissimusDorsi6.Lf0 +.LatissimusDorsi7.Lf0 +.LatissimusDorsi8.Lf0 +.LatissimusDorsi9.Lf0 +.LatissimusDorsi10.Lf0 +.LatissimusDorsi11.Lf0 ); ///< PCSA (cm2) of the individual element is total volumen divided by the sum of muscle element fiber lengths.
  Vol0 ??= 1e-4 * PCSA * Lf0; // New calculation of the vol for the specific muscle branch (m^3)
};

AnyMuscleModel LatissimusDorsi3 =
{
  AnyFolder& MuscleParameters = ..Data.unscaled.ModelParameters.Muscles.LatissimusDorsi;
  AnyIntVar MuscleElemNo = 3; ///< The number of this element of the muscle
  AnyIntVar MuscleElemAmount = MuscleParameters.MuscleElemAmount; ///< The total amount of elements for this muscle
  F0 ??= .DefaultMusPar.PCSAfactor*PCSA; ///< Maximum force output at optimum fiber length
  Lf0 ??= MuscleParameters.OptimalFiberlength / cos(pi/180*MuscleParameters.Pennationangle); //< Optimal fiber length corrected by pennation angle
  AnyVar PCSA ??= 1e4*.StrengthScaleHumerus*MuscleParameters.MuscleVolumeSIScaled/(.LatissimusDorsi1.Lf0 +.LatissimusDorsi2.Lf0 +.LatissimusDorsi3.Lf0 +.LatissimusDorsi4.Lf0 +.LatissimusDorsi5.Lf0 +.LatissimusDorsi6.Lf0 +.LatissimusDorsi7.Lf0 +.LatissimusDorsi8.Lf0 +.LatissimusDorsi9.Lf0 +.LatissimusDorsi10.Lf0 +.LatissimusDorsi11.Lf0 ); ///< PCSA (cm2) of the individual element is total volumen divided by the sum of muscle element fiber lengths.
  Vol0 ??= 1e-4 * PCSA * Lf0; // New calculation of the vol for the specific muscle branch (m^3)
};

AnyMuscleModel LatissimusDorsi4 =
{
  AnyFolder& MuscleParameters = ..Data.unscaled.ModelParameters.Muscles.LatissimusDorsi;
  AnyIntVar MuscleElemNo = 4; ///< The number of this element of the muscle
  AnyIntVar MuscleElemAmount = MuscleParameters.MuscleElemAmount; ///< The total amount of elements for this muscle
  F0 ??= .DefaultMusPar.PCSAfactor*PCSA; ///< Maximum force output at optimum fiber length
  Lf0 ??= MuscleParameters.OptimalFiberlength / cos(pi/180*MuscleParameters.Pennationangle); //< Optimal fiber length corrected by pennation angle
  AnyVar PCSA ??= 1e4*.StrengthScaleHumerus*MuscleParameters.MuscleVolumeSIScaled/(.LatissimusDorsi1.Lf0 +.LatissimusDorsi2.Lf0 +.LatissimusDorsi3.Lf0 +.LatissimusDorsi4.Lf0 +.LatissimusDorsi5.Lf0 +.LatissimusDorsi6.Lf0 +.LatissimusDorsi7.Lf0 +.LatissimusDorsi8.Lf0 +.LatissimusDorsi9.Lf0 +.LatissimusDorsi10.Lf0 +.LatissimusDorsi11.Lf0 ); ///< PCSA (cm2) of the individual element is total volumen divided by the sum of muscle element fiber lengths.
  Vol0 ??= 1e-4 * PCSA * Lf0; // New calculation of the vol for the specific muscle branch (m^3)
};

AnyMuscleModel LatissimusDorsi5 =
{
  AnyFolder& MuscleParameters = ..Data.unscaled.ModelParameters.Muscles.LatissimusDorsi;
  AnyIntVar MuscleElemNo = 5; ///< The number of this element of the muscle
  AnyIntVar MuscleElemAmount = MuscleParameters.MuscleElemAmount; ///< The total amount of elements for this muscle
  F0 ??= .DefaultMusPar.PCSAfactor*PCSA; ///< Maximum force output at optimum fiber length
  Lf0 ??= MuscleParameters.OptimalFiberlength / cos(pi/180*MuscleParameters.Pennationangle); //< Optimal fiber length corrected by pennation angle
  AnyVar PCSA ??= 1e4*.StrengthScaleHumerus*MuscleParameters.MuscleVolumeSIScaled/(.LatissimusDorsi1.Lf0 +.LatissimusDorsi2.Lf0 +.LatissimusDorsi3.Lf0 +.LatissimusDorsi4.Lf0 +.LatissimusDorsi5.Lf0 +.LatissimusDorsi6.Lf0 +.LatissimusDorsi7.Lf0 +.LatissimusDorsi8.Lf0 +.LatissimusDorsi9.Lf0 +.LatissimusDorsi10.Lf0 +.LatissimusDorsi11.Lf0 ); ///< PCSA (cm2) of the individual element is total volumen divided by the sum of muscle element fiber lengths.
  Vol0 ??= 1e-4 * PCSA * Lf0; // New calculation of the vol for the specific muscle branch (m^3)
};

AnyMuscleModel LatissimusDorsi6 =
{
  AnyFolder& MuscleParameters = ..Data.unscaled.ModelParameters.Muscles.LatissimusDorsi;
  AnyIntVar MuscleElemNo = 6; ///< The number of this element of the muscle
  AnyIntVar MuscleElemAmount = MuscleParameters.MuscleElemAmount; ///< The total amount of elements for this muscle
  F0 ??= .DefaultMusPar.PCSAfactor*PCSA; ///< Maximum force output at optimum fiber length
  Lf0 ??= MuscleParameters.OptimalFiberlength / cos(pi/180*MuscleParameters.Pennationangle); //< Optimal fiber length corrected by pennation angle
  AnyVar PCSA ??= 1e4*.StrengthScaleHumerus*MuscleParameters.MuscleVolumeSIScaled/(.LatissimusDorsi1.Lf0 +.LatissimusDorsi2.Lf0 +.LatissimusDorsi3.Lf0 +.LatissimusDorsi4.Lf0 +.LatissimusDorsi5.Lf0 +.LatissimusDorsi6.Lf0 +.LatissimusDorsi7.Lf0 +.LatissimusDorsi8.Lf0 +.LatissimusDorsi9.Lf0 +.LatissimusDorsi10.Lf0 +.LatissimusDorsi11.Lf0 ); ///< PCSA (cm2) of the individual element is total volumen divided by the sum of muscle element fiber lengths.
  Vol0 ??= 1e-4 * PCSA * Lf0; // New calculation of the vol for the specific muscle branch (m^3)
};

AnyMuscleModel LatissimusDorsi7 =
{
  AnyFolder& MuscleParameters = ..Data.unscaled.ModelParameters.Muscles.LatissimusDorsi;
  AnyIntVar MuscleElemNo = 7; ///< The number of this element of the muscle
  AnyIntVar MuscleElemAmount = MuscleParameters.MuscleElemAmount; ///< The total amount of elements for this muscle
  F0 ??= .DefaultMusPar.PCSAfactor*PCSA; ///< Maximum force output at optimum fiber length
  Lf0 ??= MuscleParameters.OptimalFiberlength / cos(pi/180*MuscleParameters.Pennationangle); //< Optimal fiber length corrected by pennation angle
  AnyVar PCSA ??= 1e4*.StrengthScaleHumerus*MuscleParameters.MuscleVolumeSIScaled/(.LatissimusDorsi1.Lf0 +.LatissimusDorsi2.Lf0 +.LatissimusDorsi3.Lf0 +.LatissimusDorsi4.Lf0 +.LatissimusDorsi5.Lf0 +.LatissimusDorsi6.Lf0 +.LatissimusDorsi7.Lf0 +.LatissimusDorsi8.Lf0 +.LatissimusDorsi9.Lf0 +.LatissimusDorsi10.Lf0 +.LatissimusDorsi11.Lf0 ); ///< PCSA (cm2) of the individual element is total volumen divided by the sum of muscle element fiber lengths.
  Vol0 ??= 1e-4 * PCSA * Lf0; // New calculation of the vol for the specific muscle branch (m^3)
};

AnyMuscleModel LatissimusDorsi8 =
{
  AnyFolder& MuscleParameters = ..Data.unscaled.ModelParameters.Muscles.LatissimusDorsi;
  AnyIntVar MuscleElemNo = 8; ///< The number of this element of the muscle
  AnyIntVar MuscleElemAmount = MuscleParameters.MuscleElemAmount; ///< The total amount of elements for this muscle
  F0 ??= .DefaultMusPar.PCSAfactor*PCSA; ///< Maximum force output at optimum fiber length
  Lf0 ??= MuscleParameters.OptimalFiberlength / cos(pi/180*MuscleParameters.Pennationangle); //< Optimal fiber length corrected by pennation angle
  AnyVar PCSA ??= 1e4*.StrengthScaleHumerus*MuscleParameters.MuscleVolumeSIScaled/(.LatissimusDorsi1.Lf0 +.LatissimusDorsi2.Lf0 +.LatissimusDorsi3.Lf0 +.LatissimusDorsi4.Lf0 +.LatissimusDorsi5.Lf0 +.LatissimusDorsi6.Lf0 +.LatissimusDorsi7.Lf0 +.LatissimusDorsi8.Lf0 +.LatissimusDorsi9.Lf0 +.LatissimusDorsi10.Lf0 +.LatissimusDorsi11.Lf0 ); ///< PCSA (cm2) of the individual element is total volumen divided by the sum of muscle element fiber lengths.
  Vol0 ??= 1e-4 * PCSA * Lf0; // New calculation of the vol for the specific muscle branch (m^3)
};

AnyMuscleModel LatissimusDorsi9 =
{
  AnyFolder& MuscleParameters = ..Data.unscaled.ModelParameters.Muscles.LatissimusDorsi;
  AnyIntVar MuscleElemNo = 9; ///< The number of this element of the muscle
  AnyIntVar MuscleElemAmount = MuscleParameters.MuscleElemAmount; ///< The total amount of elements for this muscle
  F0 ??= .DefaultMusPar.PCSAfactor*PCSA; ///< Maximum force output at optimum fiber length
  Lf0 ??= MuscleParameters.OptimalFiberlength / cos(pi/180*MuscleParameters.Pennationangle); //< Optimal fiber length corrected by pennation angle
  AnyVar PCSA ??= 1e4*.StrengthScaleHumerus*MuscleParameters.MuscleVolumeSIScaled/(.LatissimusDorsi1.Lf0 +.LatissimusDorsi2.Lf0 +.LatissimusDorsi3.Lf0 +.LatissimusDorsi4.Lf0 +.LatissimusDorsi5.Lf0 +.LatissimusDorsi6.Lf0 +.LatissimusDorsi7.Lf0 +.LatissimusDorsi8.Lf0 +.LatissimusDorsi9.Lf0 +.LatissimusDorsi10.Lf0 +.LatissimusDorsi11.Lf0 ); ///< PCSA (cm2) of the individual element is total volumen divided by the sum of muscle element fiber lengths.
  Vol0 ??= 1e-4 * PCSA * Lf0; // New calculation of the vol for the specific muscle branch (m^3)
};

AnyMuscleModel LatissimusDorsi10 =
{
  AnyFolder& MuscleParameters = ..Data.unscaled.ModelParameters.Muscles.LatissimusDorsi;
  AnyIntVar MuscleElemNo = 10; ///< The number of this element of the muscle
  AnyIntVar MuscleElemAmount = MuscleParameters.MuscleElemAmount; ///< The total amount of elements for this muscle
  F0 ??= .DefaultMusPar.PCSAfactor*PCSA; ///< Maximum force output at optimum fiber length
  Lf0 ??= MuscleParameters.OptimalFiberlength / cos(pi/180*MuscleParameters.Pennationangle); //< Optimal fiber length corrected by pennation angle
  AnyVar PCSA ??= 1e4*.StrengthScaleHumerus*MuscleParameters.MuscleVolumeSIScaled/(.LatissimusDorsi1.Lf0 +.LatissimusDorsi2.Lf0 +.LatissimusDorsi3.Lf0 +.LatissimusDorsi4.Lf0 +.LatissimusDorsi5.Lf0 +.LatissimusDorsi6.Lf0 +.LatissimusDorsi7.Lf0 +.LatissimusDorsi8.Lf0 +.LatissimusDorsi9.Lf0 +.LatissimusDorsi10.Lf0 +.LatissimusDorsi11.Lf0 ); ///< PCSA (cm2) of the individual element is total volumen divided by the sum of muscle element fiber lengths.
  Vol0 ??= 1e-4 * PCSA * Lf0; // New calculation of the vol for the specific muscle branch (m^3)
};

AnyMuscleModel LatissimusDorsi11 =
{
  AnyFolder& MuscleParameters = ..Data.unscaled.ModelParameters.Muscles.LatissimusDorsi;
  AnyIntVar MuscleElemNo = 11; ///< The number of this element of the muscle
  AnyIntVar MuscleElemAmount = MuscleParameters.MuscleElemAmount; ///< The total amount of elements for this muscle
  F0 ??= .DefaultMusPar.PCSAfactor*PCSA; ///< Maximum force output at optimum fiber length
  Lf0 ??= MuscleParameters.OptimalFiberlength / cos(pi/180*MuscleParameters.Pennationangle); //< Optimal fiber length corrected by pennation angle
  AnyVar PCSA ??= 1e4*.StrengthScaleHumerus*MuscleParameters.MuscleVolumeSIScaled/(.LatissimusDorsi1.Lf0 +.LatissimusDorsi2.Lf0 +.LatissimusDorsi3.Lf0 +.LatissimusDorsi4.Lf0 +.LatissimusDorsi5.Lf0 +.LatissimusDorsi6.Lf0 +.LatissimusDorsi7.Lf0 +.LatissimusDorsi8.Lf0 +.LatissimusDorsi9.Lf0 +.LatissimusDorsi10.Lf0 +.LatissimusDorsi11.Lf0 ); ///< PCSA (cm2) of the individual element is total volumen divided by the sum of muscle element fiber lengths.
  Vol0 ??= 1e-4 * PCSA * Lf0; // New calculation of the vol for the specific muscle branch (m^3)
};


//////////////////////////////////////////
//     LevatorScapulae (4 elements)     //
//////////////////////////////////////////
AnyMuscleModel LevatorScapulae1 =
{
  AnyFolder& MuscleParameters = ..Data.unscaled.ModelParameters.Muscles.LevatorScapulae;
  AnyIntVar MuscleElemNo = 1; ///< The number of this element of the muscle
  AnyIntVar MuscleElemAmount = MuscleParameters.MuscleElemAmount; ///< The total amount of elements for this muscle
  F0 ??= .DefaultMusPar.PCSAfactor*PCSA; ///< Maximum force output at optimum fiber length
  Lf0 ??= MuscleParameters.OptimalFiberlength / cos(pi/180*MuscleParameters.Pennationangle); //< Optimal fiber length corrected by pennation angle
  AnyVar PCSA ??= 1e4*.StrengthScaleHumerus*MuscleParameters.MuscleVolumeSIScaled/(.LevatorScapulae1.Lf0 +.LevatorScapulae2.Lf0 +.LevatorScapulae3.Lf0 +.LevatorScapulae4.Lf0 ); ///< PCSA (cm2) of the individual element is total volumen divided by the sum of muscle element fiber lengths.
  Vol0 ??= 1e-4 * PCSA * Lf0; // New calculation of the vol for the specific muscle branch (m^3)
};

AnyMuscleModel LevatorScapulae2 =
{
  AnyFolder& MuscleParameters = ..Data.unscaled.ModelParameters.Muscles.LevatorScapulae;
  AnyIntVar MuscleElemNo = 2; ///< The number of this element of the muscle
  AnyIntVar MuscleElemAmount = MuscleParameters.MuscleElemAmount; ///< The total amount of elements for this muscle
  F0 ??= .DefaultMusPar.PCSAfactor*PCSA; ///< Maximum force output at optimum fiber length
  Lf0 ??= MuscleParameters.OptimalFiberlength / cos(pi/180*MuscleParameters.Pennationangle); //< Optimal fiber length corrected by pennation angle
  AnyVar PCSA ??= 1e4*.StrengthScaleHumerus*MuscleParameters.MuscleVolumeSIScaled/(.LevatorScapulae1.Lf0 +.LevatorScapulae2.Lf0 +.LevatorScapulae3.Lf0 +.LevatorScapulae4.Lf0 ); ///< PCSA (cm2) of the individual element is total volumen divided by the sum of muscle element fiber lengths.
  Vol0 ??= 1e-4 * PCSA * Lf0; // New calculation of the vol for the specific muscle branch (m^3)
};

AnyMuscleModel LevatorScapulae3 =
{
  AnyFolder& MuscleParameters = ..Data.unscaled.ModelParameters.Muscles.LevatorScapulae;
  AnyIntVar MuscleElemNo = 3; ///< The number of this element of the muscle
  AnyIntVar MuscleElemAmount = MuscleParameters.MuscleElemAmount; ///< The total amount of elements for this muscle
  F0 ??= .DefaultMusPar.PCSAfactor*PCSA; ///< Maximum force output at optimum fiber length
  Lf0 ??= MuscleParameters.OptimalFiberlength / cos(pi/180*MuscleParameters.Pennationangle); //< Optimal fiber length corrected by pennation angle
  AnyVar PCSA ??= 1e4*.StrengthScaleHumerus*MuscleParameters.MuscleVolumeSIScaled/(.LevatorScapulae1.Lf0 +.LevatorScapulae2.Lf0 +.LevatorScapulae3.Lf0 +.LevatorScapulae4.Lf0 ); ///< PCSA (cm2) of the individual element is total volumen divided by the sum of muscle element fiber lengths.
  Vol0 ??= 1e-4 * PCSA * Lf0; // New calculation of the vol for the specific muscle branch (m^3)
};

AnyMuscleModel LevatorScapulae4 =
{
  AnyFolder& MuscleParameters = ..Data.unscaled.ModelParameters.Muscles.LevatorScapulae;
  AnyIntVar MuscleElemNo = 4; ///< The number of this element of the muscle
  AnyIntVar MuscleElemAmount = MuscleParameters.MuscleElemAmount; ///< The total amount of elements for this muscle
  F0 ??= .DefaultMusPar.PCSAfactor*PCSA; ///< Maximum force output at optimum fiber length
  Lf0 ??= MuscleParameters.OptimalFiberlength / cos(pi/180*MuscleParameters.Pennationangle); //< Optimal fiber length corrected by pennation angle
  AnyVar PCSA ??= 1e4*.StrengthScaleHumerus*MuscleParameters.MuscleVolumeSIScaled/(.LevatorScapulae1.Lf0 +.LevatorScapulae2.Lf0 +.LevatorScapulae3.Lf0 +.LevatorScapulae4.Lf0 ); ///< PCSA (cm2) of the individual element is total volumen divided by the sum of muscle element fiber lengths.
  Vol0 ??= 1e-4 * PCSA * Lf0; // New calculation of the vol for the specific muscle branch (m^3)
};


//////////////////////////////////////////////////////
//     PectoralisMajorSternocostal (10 elements)     //
//////////////////////////////////////////////////////
AnyMuscleModel PectoralisMajorSternocostal1 =
{
  AnyFolder& MuscleParameters = ..Data.unscaled.ModelParameters.Muscles.PectoralisMajorSternocostal;
  AnyIntVar MuscleElemNo = 1; ///< The number of this element of the muscle
  AnyIntVar MuscleElemAmount = MuscleParameters.MuscleElemAmount; ///< The total amount of elements for this muscle
  F0 ??= .DefaultMusPar.PCSAfactor*PCSA; ///< Maximum force output at optimum fiber length
  Lf0 ??= MuscleParameters.OptimalFiberlength / cos(pi/180*MuscleParameters.Pennationangle); //< Optimal fiber length corrected by pennation angle
  AnyVar PCSA ??= 1e4*.StrengthScaleHumerus*MuscleParameters.MuscleVolumeSIScaled/(.PectoralisMajorSternocostal1.Lf0 +.PectoralisMajorSternocostal2.Lf0 +.PectoralisMajorSternocostal3.Lf0 +.PectoralisMajorSternocostal4.Lf0 +.PectoralisMajorSternocostal5.Lf0 +.PectoralisMajorSternocostal6.Lf0 +.PectoralisMajorSternocostal7.Lf0 +.PectoralisMajorSternocostal8.Lf0 +.PectoralisMajorSternocostal9.Lf0 +.PectoralisMajorSternocostal10.Lf0 ); ///< PCSA (cm2) of the individual element is total volumen divided by the sum of muscle element fiber lengths.
  Vol0 ??= 1e-4 * PCSA * Lf0; // New calculation of the vol for the specific muscle branch (m^3)
};

AnyMuscleModel PectoralisMajorSternocostal2 =
{
  AnyFolder& MuscleParameters = ..Data.unscaled.ModelParameters.Muscles.PectoralisMajorSternocostal;
  AnyIntVar MuscleElemNo = 2; ///< The number of this element of the muscle
  AnyIntVar MuscleElemAmount = MuscleParameters.MuscleElemAmount; ///< The total amount of elements for this muscle
  F0 ??= .DefaultMusPar.PCSAfactor*PCSA; ///< Maximum force output at optimum fiber length
  Lf0 ??= MuscleParameters.OptimalFiberlength / cos(pi/180*MuscleParameters.Pennationangle); //< Optimal fiber length corrected by pennation angle
  AnyVar PCSA ??= 1e4*.StrengthScaleHumerus*MuscleParameters.MuscleVolumeSIScaled/(.PectoralisMajorSternocostal1.Lf0 +.PectoralisMajorSternocostal2.Lf0 +.PectoralisMajorSternocostal3.Lf0 +.PectoralisMajorSternocostal4.Lf0 +.PectoralisMajorSternocostal5.Lf0 +.PectoralisMajorSternocostal6.Lf0 +.PectoralisMajorSternocostal7.Lf0 +.PectoralisMajorSternocostal8.Lf0 +.PectoralisMajorSternocostal9.Lf0 +.PectoralisMajorSternocostal10.Lf0 ); ///< PCSA (cm2) of the individual element is total volumen divided by the sum of muscle element fiber lengths.
  Vol0 ??= 1e-4 * PCSA * Lf0; // New calculation of the vol for the specific muscle branch (m^3)
};

AnyMuscleModel PectoralisMajorSternocostal3 =
{
  AnyFolder& MuscleParameters = ..Data.unscaled.ModelParameters.Muscles.PectoralisMajorSternocostal;
  AnyIntVar MuscleElemNo = 3; ///< The number of this element of the muscle
  AnyIntVar MuscleElemAmount = MuscleParameters.MuscleElemAmount; ///< The total amount of elements for this muscle
  F0 ??= .DefaultMusPar.PCSAfactor*PCSA; ///< Maximum force output at optimum fiber length
  Lf0 ??= MuscleParameters.OptimalFiberlength / cos(pi/180*MuscleParameters.Pennationangle); //< Optimal fiber length corrected by pennation angle
  AnyVar PCSA ??= 1e4*.StrengthScaleHumerus*MuscleParameters.MuscleVolumeSIScaled/(.PectoralisMajorSternocostal1.Lf0 +.PectoralisMajorSternocostal2.Lf0 +.PectoralisMajorSternocostal3.Lf0 +.PectoralisMajorSternocostal4.Lf0 +.PectoralisMajorSternocostal5.Lf0 +.PectoralisMajorSternocostal6.Lf0 +.PectoralisMajorSternocostal7.Lf0 +.PectoralisMajorSternocostal8.Lf0 +.PectoralisMajorSternocostal9.Lf0 +.PectoralisMajorSternocostal10.Lf0 ); ///< PCSA (cm2) of the individual element is total volumen divided by the sum of muscle element fiber lengths.
  Vol0 ??= 1e-4 * PCSA * Lf0; // New calculation of the vol for the specific muscle branch (m^3)
};

AnyMuscleModel PectoralisMajorSternocostal4 =
{
  AnyFolder& MuscleParameters = ..Data.unscaled.ModelParameters.Muscles.PectoralisMajorSternocostal;
  AnyIntVar MuscleElemNo = 4; ///< The number of this element of the muscle
  AnyIntVar MuscleElemAmount = MuscleParameters.MuscleElemAmount; ///< The total amount of elements for this muscle
  F0 ??= .DefaultMusPar.PCSAfactor*PCSA; ///< Maximum force output at optimum fiber length
  Lf0 ??= MuscleParameters.OptimalFiberlength / cos(pi/180*MuscleParameters.Pennationangle); //< Optimal fiber length corrected by pennation angle
  AnyVar PCSA ??= 1e4*.StrengthScaleHumerus*MuscleParameters.MuscleVolumeSIScaled/(.PectoralisMajorSternocostal1.Lf0 +.PectoralisMajorSternocostal2.Lf0 +.PectoralisMajorSternocostal3.Lf0 +.PectoralisMajorSternocostal4.Lf0 +.PectoralisMajorSternocostal5.Lf0 +.PectoralisMajorSternocostal6.Lf0 +.PectoralisMajorSternocostal7.Lf0 +.PectoralisMajorSternocostal8.Lf0 +.PectoralisMajorSternocostal9.Lf0 +.PectoralisMajorSternocostal10.Lf0 ); ///< PCSA (cm2) of the individual element is total volumen divided by the sum of muscle element fiber lengths.
  Vol0 ??= 1e-4 * PCSA * Lf0; // New calculation of the vol for the specific muscle branch (m^3)
};

AnyMuscleModel PectoralisMajorSternocostal5 =
{
  AnyFolder& MuscleParameters = ..Data.unscaled.ModelParameters.Muscles.PectoralisMajorSternocostal;
  AnyIntVar MuscleElemNo = 5; ///< The number of this element of the muscle
  AnyIntVar MuscleElemAmount = MuscleParameters.MuscleElemAmount; ///< The total amount of elements for this muscle
  F0 ??= .DefaultMusPar.PCSAfactor*PCSA; ///< Maximum force output at optimum fiber length
  Lf0 ??= MuscleParameters.OptimalFiberlength / cos(pi/180*MuscleParameters.Pennationangle); //< Optimal fiber length corrected by pennation angle
  AnyVar PCSA ??= 1e4*.StrengthScaleHumerus*MuscleParameters.MuscleVolumeSIScaled/(.PectoralisMajorSternocostal1.Lf0 +.PectoralisMajorSternocostal2.Lf0 +.PectoralisMajorSternocostal3.Lf0 +.PectoralisMajorSternocostal4.Lf0 +.PectoralisMajorSternocostal5.Lf0 +.PectoralisMajorSternocostal6.Lf0 +.PectoralisMajorSternocostal7.Lf0 +.PectoralisMajorSternocostal8.Lf0 +.PectoralisMajorSternocostal9.Lf0 +.PectoralisMajorSternocostal10.Lf0 ); ///< PCSA (cm2) of the individual element is total volumen divided by the sum of muscle element fiber lengths.
  Vol0 ??= 1e-4 * PCSA * Lf0; // New calculation of the vol for the specific muscle branch (m^3)
};

AnyMuscleModel PectoralisMajorSternocostal6 =
{
  AnyFolder& MuscleParameters = ..Data.unscaled.ModelParameters.Muscles.PectoralisMajorSternocostal;
  AnyIntVar MuscleElemNo = 6; ///< The number of this element of the muscle
  AnyIntVar MuscleElemAmount = MuscleParameters.MuscleElemAmount; ///< The total amount of elements for this muscle
  F0 ??= .DefaultMusPar.PCSAfactor*PCSA; ///< Maximum force output at optimum fiber length
  Lf0 ??= MuscleParameters.OptimalFiberlength / cos(pi/180*MuscleParameters.Pennationangle); //< Optimal fiber length corrected by pennation angle
  AnyVar PCSA ??= 1e4*.StrengthScaleHumerus*MuscleParameters.MuscleVolumeSIScaled/(.PectoralisMajorSternocostal1.Lf0 +.PectoralisMajorSternocostal2.Lf0 +.PectoralisMajorSternocostal3.Lf0 +.PectoralisMajorSternocostal4.Lf0 +.PectoralisMajorSternocostal5.Lf0 +.PectoralisMajorSternocostal6.Lf0 +.PectoralisMajorSternocostal7.Lf0 +.PectoralisMajorSternocostal8.Lf0 +.PectoralisMajorSternocostal9.Lf0 +.PectoralisMajorSternocostal10.Lf0 ); ///< PCSA (cm2) of the individual element is total volumen divided by the sum of muscle element fiber lengths.
  Vol0 ??= 1e-4 * PCSA * Lf0; // New calculation of the vol for the specific muscle branch (m^3)
};

AnyMuscleModel PectoralisMajorSternocostal7 =
{
  AnyFolder& MuscleParameters = ..Data.unscaled.ModelParameters.Muscles.PectoralisMajorSternocostal;
  AnyIntVar MuscleElemNo = 7; ///< The number of this element of the muscle
  AnyIntVar MuscleElemAmount = MuscleParameters.MuscleElemAmount; ///< The total amount of elements for this muscle
  F0 ??= .DefaultMusPar.PCSAfactor*PCSA; ///< Maximum force output at optimum fiber length
  Lf0 ??= MuscleParameters.OptimalFiberlength / cos(pi/180*MuscleParameters.Pennationangle); //< Optimal fiber length corrected by pennation angle
  AnyVar PCSA ??= 1e4*.StrengthScaleHumerus*MuscleParameters.MuscleVolumeSIScaled/(.PectoralisMajorSternocostal1.Lf0 +.PectoralisMajorSternocostal2.Lf0 +.PectoralisMajorSternocostal3.Lf0 +.PectoralisMajorSternocostal4.Lf0 +.PectoralisMajorSternocostal5.Lf0 +.PectoralisMajorSternocostal6.Lf0 +.PectoralisMajorSternocostal7.Lf0 +.PectoralisMajorSternocostal8.Lf0 +.PectoralisMajorSternocostal9.Lf0 +.PectoralisMajorSternocostal10.Lf0 ); ///< PCSA (cm2) of the individual element is total volumen divided by the sum of muscle element fiber lengths.
  Vol0 ??= 1e-4 * PCSA * Lf0; // New calculation of the vol for the specific muscle branch (m^3)
};

AnyMuscleModel PectoralisMajorSternocostal8 =
{
  AnyFolder& MuscleParameters = ..Data.unscaled.ModelParameters.Muscles.PectoralisMajorSternocostal;
  AnyIntVar MuscleElemNo = 8; ///< The number of this element of the muscle
  AnyIntVar MuscleElemAmount = MuscleParameters.MuscleElemAmount; ///< The total amount of elements for this muscle
  F0 ??= .DefaultMusPar.PCSAfactor*PCSA; ///< Maximum force output at optimum fiber length
  Lf0 ??= MuscleParameters.OptimalFiberlength / cos(pi/180*MuscleParameters.Pennationangle); //< Optimal fiber length corrected by pennation angle
  AnyVar PCSA ??= 1e4*.StrengthScaleHumerus*MuscleParameters.MuscleVolumeSIScaled/(.PectoralisMajorSternocostal1.Lf0 +.PectoralisMajorSternocostal2.Lf0 +.PectoralisMajorSternocostal3.Lf0 +.PectoralisMajorSternocostal4.Lf0 +.PectoralisMajorSternocostal5.Lf0 +.PectoralisMajorSternocostal6.Lf0 +.PectoralisMajorSternocostal7.Lf0 +.PectoralisMajorSternocostal8.Lf0 +.PectoralisMajorSternocostal9.Lf0 +.PectoralisMajorSternocostal10.Lf0 ); ///< PCSA (cm2) of the individual element is total volumen divided by the sum of muscle element fiber lengths.
  Vol0 ??= 1e-4 * PCSA * Lf0; // New calculation of the vol for the specific muscle branch (m^3)
};

AnyMuscleModel PectoralisMajorSternocostal9 =
{
  AnyFolder& MuscleParameters = ..Data.unscaled.ModelParameters.Muscles.PectoralisMajorSternocostal;
  AnyIntVar MuscleElemNo = 9; ///< The number of this element of the muscle
  AnyIntVar MuscleElemAmount = MuscleParameters.MuscleElemAmount; ///< The total amount of elements for this muscle
  F0 ??= .DefaultMusPar.PCSAfactor*PCSA; ///< Maximum force output at optimum fiber length
  Lf0 ??= MuscleParameters.OptimalFiberlength / cos(pi/180*MuscleParameters.Pennationangle); //< Optimal fiber length corrected by pennation angle
  AnyVar PCSA ??= 1e4*.StrengthScaleHumerus*MuscleParameters.MuscleVolumeSIScaled/(.PectoralisMajorSternocostal1.Lf0 +.PectoralisMajorSternocostal2.Lf0 +.PectoralisMajorSternocostal3.Lf0 +.PectoralisMajorSternocostal4.Lf0 +.PectoralisMajorSternocostal5.Lf0 +.PectoralisMajorSternocostal6.Lf0 +.PectoralisMajorSternocostal7.Lf0 +.PectoralisMajorSternocostal8.Lf0 +.PectoralisMajorSternocostal9.Lf0 +.PectoralisMajorSternocostal10.Lf0 ); ///< PCSA (cm2) of the individual element is total volumen divided by the sum of muscle element fiber lengths.
  Vol0 ??= 1e-4 * PCSA * Lf0; // New calculation of the vol for the specific muscle branch (m^3)
};

AnyMuscleModel PectoralisMajorSternocostal10 =
{
  AnyFolder& MuscleParameters = ..Data.unscaled.ModelParameters.Muscles.PectoralisMajorSternocostal;
  AnyIntVar MuscleElemNo = 10; ///< The number of this element of the muscle
  AnyIntVar MuscleElemAmount = MuscleParameters.MuscleElemAmount; ///< The total amount of elements for this muscle
  F0 ??= .DefaultMusPar.PCSAfactor*PCSA; ///< Maximum force output at optimum fiber length
  Lf0 ??= MuscleParameters.OptimalFiberlength / cos(pi/180*MuscleParameters.Pennationangle); //< Optimal fiber length corrected by pennation angle
  AnyVar PCSA ??= 1e4*.StrengthScaleHumerus*MuscleParameters.MuscleVolumeSIScaled/(.PectoralisMajorSternocostal1.Lf0 +.PectoralisMajorSternocostal2.Lf0 +.PectoralisMajorSternocostal3.Lf0 +.PectoralisMajorSternocostal4.Lf0 +.PectoralisMajorSternocostal5.Lf0 +.PectoralisMajorSternocostal6.Lf0 +.PectoralisMajorSternocostal7.Lf0 +.PectoralisMajorSternocostal8.Lf0 +.PectoralisMajorSternocostal9.Lf0 +.PectoralisMajorSternocostal10.Lf0 ); ///< PCSA (cm2) of the individual element is total volumen divided by the sum of muscle element fiber lengths.
  Vol0 ??= 1e-4 * PCSA * Lf0; // New calculation of the vol for the specific muscle branch (m^3)
};


////////////////////////////////////////////////////
//     PectoralisMajorClavicular (5 elements)     //
////////////////////////////////////////////////////
AnyMuscleModel PectoralisMajorClavicular1 =
{
  AnyFolder& MuscleParameters = ..Data.unscaled.ModelParameters.Muscles.PectoralisMajorClavicular;
  AnyIntVar MuscleElemNo = 1; ///< The number of this element of the muscle
  AnyIntVar MuscleElemAmount = MuscleParameters.MuscleElemAmount; ///< The total amount of elements for this muscle
  F0 ??= .DefaultMusPar.PCSAfactor*PCSA; ///< Maximum force output at optimum fiber length
  Lf0 ??= MuscleParameters.OptimalFiberlength / cos(pi/180*MuscleParameters.Pennationangle); //< Optimal fiber length corrected by pennation angle
  AnyVar PCSA ??= 1e4*.StrengthScaleHumerus*MuscleParameters.MuscleVolumeSIScaled/(.PectoralisMajorClavicular1.Lf0 +.PectoralisMajorClavicular2.Lf0 +.PectoralisMajorClavicular3.Lf0 +.PectoralisMajorClavicular4.Lf0 +.PectoralisMajorClavicular5.Lf0 ); ///< PCSA (cm2) of the individual element is total volumen divided by the sum of muscle element fiber lengths.
  Vol0 ??= 1e-4 * PCSA * Lf0; // New calculation of the vol for the specific muscle branch (m^3)
};

AnyMuscleModel PectoralisMajorClavicular2 =
{
  AnyFolder& MuscleParameters = ..Data.unscaled.ModelParameters.Muscles.PectoralisMajorClavicular;
  AnyIntVar MuscleElemNo = 2; ///< The number of this element of the muscle
  AnyIntVar MuscleElemAmount = MuscleParameters.MuscleElemAmount; ///< The total amount of elements for this muscle
  F0 ??= .DefaultMusPar.PCSAfactor*PCSA; ///< Maximum force output at optimum fiber length
  Lf0 ??= MuscleParameters.OptimalFiberlength / cos(pi/180*MuscleParameters.Pennationangle); //< Optimal fiber length corrected by pennation angle
  AnyVar PCSA ??= 1e4*.StrengthScaleHumerus*MuscleParameters.MuscleVolumeSIScaled/(.PectoralisMajorClavicular1.Lf0 +.PectoralisMajorClavicular2.Lf0 +.PectoralisMajorClavicular3.Lf0 +.PectoralisMajorClavicular4.Lf0 +.PectoralisMajorClavicular5.Lf0 ); ///< PCSA (cm2) of the individual element is total volumen divided by the sum of muscle element fiber lengths.
  Vol0 ??= 1e-4 * PCSA * Lf0; // New calculation of the vol for the specific muscle branch (m^3)
};

AnyMuscleModel PectoralisMajorClavicular3 =
{
  AnyFolder& MuscleParameters = ..Data.unscaled.ModelParameters.Muscles.PectoralisMajorClavicular;
  AnyIntVar MuscleElemNo = 3; ///< The number of this element of the muscle
  AnyIntVar MuscleElemAmount = MuscleParameters.MuscleElemAmount; ///< The total amount of elements for this muscle
  F0 ??= .DefaultMusPar.PCSAfactor*PCSA; ///< Maximum force output at optimum fiber length
  Lf0 ??= MuscleParameters.OptimalFiberlength / cos(pi/180*MuscleParameters.Pennationangle); //< Optimal fiber length corrected by pennation angle
  AnyVar PCSA ??= 1e4*.StrengthScaleHumerus*MuscleParameters.MuscleVolumeSIScaled/(.PectoralisMajorClavicular1.Lf0 +.PectoralisMajorClavicular2.Lf0 +.PectoralisMajorClavicular3.Lf0 +.PectoralisMajorClavicular4.Lf0 +.PectoralisMajorClavicular5.Lf0 ); ///< PCSA (cm2) of the individual element is total volumen divided by the sum of muscle element fiber lengths.
  Vol0 ??= 1e-4 * PCSA * Lf0; // New calculation of the vol for the specific muscle branch (m^3)
};

AnyMuscleModel PectoralisMajorClavicular4 =
{
  AnyFolder& MuscleParameters = ..Data.unscaled.ModelParameters.Muscles.PectoralisMajorClavicular;
  AnyIntVar MuscleElemNo = 4; ///< The number of this element of the muscle
  AnyIntVar MuscleElemAmount = MuscleParameters.MuscleElemAmount; ///< The total amount of elements for this muscle
  F0 ??= .DefaultMusPar.PCSAfactor*PCSA; ///< Maximum force output at optimum fiber length
  Lf0 ??= MuscleParameters.OptimalFiberlength / cos(pi/180*MuscleParameters.Pennationangle); //< Optimal fiber length corrected by pennation angle
  AnyVar PCSA ??= 1e4*.StrengthScaleHumerus*MuscleParameters.MuscleVolumeSIScaled/(.PectoralisMajorClavicular1.Lf0 +.PectoralisMajorClavicular2.Lf0 +.PectoralisMajorClavicular3.Lf0 +.PectoralisMajorClavicular4.Lf0 +.PectoralisMajorClavicular5.Lf0 ); ///< PCSA (cm2) of the individual element is total volumen divided by the sum of muscle element fiber lengths.
  Vol0 ??= 1e-4 * PCSA * Lf0; // New calculation of the vol for the specific muscle branch (m^3)
};

AnyMuscleModel PectoralisMajorClavicular5 =
{
  AnyFolder& MuscleParameters = ..Data.unscaled.ModelParameters.Muscles.PectoralisMajorClavicular;
  AnyIntVar MuscleElemNo = 5; ///< The number of this element of the muscle
  AnyIntVar MuscleElemAmount = MuscleParameters.MuscleElemAmount; ///< The total amount of elements for this muscle
  F0 ??= .DefaultMusPar.PCSAfactor*PCSA; ///< Maximum force output at optimum fiber length
  Lf0 ??= MuscleParameters.OptimalFiberlength / cos(pi/180*MuscleParameters.Pennationangle); //< Optimal fiber length corrected by pennation angle
  AnyVar PCSA ??= 1e4*.StrengthScaleHumerus*MuscleParameters.MuscleVolumeSIScaled/(.PectoralisMajorClavicular1.Lf0 +.PectoralisMajorClavicular2.Lf0 +.PectoralisMajorClavicular3.Lf0 +.PectoralisMajorClavicular4.Lf0 +.PectoralisMajorClavicular5.Lf0 ); ///< PCSA (cm2) of the individual element is total volumen divided by the sum of muscle element fiber lengths.
  Vol0 ??= 1e-4 * PCSA * Lf0; // New calculation of the vol for the specific muscle branch (m^3)
};


//////////////////////////////////////////
//     PectoralisMinor (3 elements)     //
//////////////////////////////////////////
AnyMuscleModel PectoralisMinor1 =
{
  AnyFolder& MuscleParameters = ..Data.unscaled.ModelParameters.Muscles.PectoralisMinor;
  AnyIntVar MuscleElemNo = 1; ///< The number of this element of the muscle
  AnyIntVar MuscleElemAmount = MuscleParameters.MuscleElemAmount; ///< The total amount of elements for this muscle
  F0 ??= .DefaultMusPar.PCSAfactor*PCSA; ///< Maximum force output at optimum fiber length
  Lf0 ??= MuscleParameters.OptimalFiberlength / cos(pi/180*MuscleParameters.Pennationangle); //< Optimal fiber length corrected by pennation angle
  AnyVar PCSA ??= 1e4*.StrengthScaleHumerus*MuscleParameters.MuscleVolumeSIScaled/(.PectoralisMinor1.Lf0 +.PectoralisMinor2.Lf0 +.PectoralisMinor3.Lf0 ); ///< PCSA (cm2) of the individual element is total volumen divided by the sum of muscle element fiber lengths.
  Vol0 ??= 1e-4 * PCSA * Lf0; // New calculation of the vol for the specific muscle branch (m^3)
};

AnyMuscleModel PectoralisMinor2 =
{
  AnyFolder& MuscleParameters = ..Data.unscaled.ModelParameters.Muscles.PectoralisMinor;
  AnyIntVar MuscleElemNo = 2; ///< The number of this element of the muscle
  AnyIntVar MuscleElemAmount = MuscleParameters.MuscleElemAmount; ///< The total amount of elements for this muscle
  F0 ??= .DefaultMusPar.PCSAfactor*PCSA; ///< Maximum force output at optimum fiber length
  Lf0 ??= MuscleParameters.OptimalFiberlength / cos(pi/180*MuscleParameters.Pennationangle); //< Optimal fiber length corrected by pennation angle
  AnyVar PCSA ??= 1e4*.StrengthScaleHumerus*MuscleParameters.MuscleVolumeSIScaled/(.PectoralisMinor1.Lf0 +.PectoralisMinor2.Lf0 +.PectoralisMinor3.Lf0 ); ///< PCSA (cm2) of the individual element is total volumen divided by the sum of muscle element fiber lengths.
  Vol0 ??= 1e-4 * PCSA * Lf0; // New calculation of the vol for the specific muscle branch (m^3)
};

AnyMuscleModel PectoralisMinor3 =
{
  AnyFolder& MuscleParameters = ..Data.unscaled.ModelParameters.Muscles.PectoralisMinor;
  AnyIntVar MuscleElemNo = 3; ///< The number of this element of the muscle
  AnyIntVar MuscleElemAmount = MuscleParameters.MuscleElemAmount; ///< The total amount of elements for this muscle
  F0 ??= .DefaultMusPar.PCSAfactor*PCSA; ///< Maximum force output at optimum fiber length
  Lf0 ??= MuscleParameters.OptimalFiberlength / cos(pi/180*MuscleParameters.Pennationangle); //< Optimal fiber length corrected by pennation angle
  AnyVar PCSA ??= 1e4*.StrengthScaleHumerus*MuscleParameters.MuscleVolumeSIScaled/(.PectoralisMinor1.Lf0 +.PectoralisMinor2.Lf0 +.PectoralisMinor3.Lf0 ); ///< PCSA (cm2) of the individual element is total volumen divided by the sum of muscle element fiber lengths.
  Vol0 ??= 1e-4 * PCSA * Lf0; // New calculation of the vol for the specific muscle branch (m^3)
};


//////////////////////////////////////
//     Rhomboideus (6 elements)     //
//////////////////////////////////////
AnyMuscleModel Rhomboideus1 =
{
  AnyFolder& MuscleParameters = ..Data.unscaled.ModelParameters.Muscles.Rhomboideus;
  AnyIntVar MuscleElemNo = 1; ///< The number of this element of the muscle
  AnyIntVar MuscleElemAmount = MuscleParameters.MuscleElemAmount; ///< The total amount of elements for this muscle
  F0 ??= .DefaultMusPar.PCSAfactor*PCSA; ///< Maximum force output at optimum fiber length
  Lf0 ??= MuscleParameters.OptimalFiberlength / cos(pi/180*MuscleParameters.Pennationangle); //< Optimal fiber length corrected by pennation angle
  AnyVar PCSA ??= 1e4*.StrengthScaleHumerus*MuscleParameters.MuscleVolumeSIScaled/(.Rhomboideus1.Lf0 +.Rhomboideus2.Lf0 +.Rhomboideus3.Lf0 +.Rhomboideus4.Lf0 +.Rhomboideus5.Lf0 +.Rhomboideus6.Lf0 ); ///< PCSA (cm2) of the individual element is total volumen divided by the sum of muscle element fiber lengths.
  Vol0 ??= 1e-4 * PCSA * Lf0; // New calculation of the vol for the specific muscle branch (m^3)
};

AnyMuscleModel Rhomboideus2 =
{
  AnyFolder& MuscleParameters = ..Data.unscaled.ModelParameters.Muscles.Rhomboideus;
  AnyIntVar MuscleElemNo = 2; ///< The number of this element of the muscle
  AnyIntVar MuscleElemAmount = MuscleParameters.MuscleElemAmount; ///< The total amount of elements for this muscle
  F0 ??= .DefaultMusPar.PCSAfactor*PCSA; ///< Maximum force output at optimum fiber length
  Lf0 ??= MuscleParameters.OptimalFiberlength / cos(pi/180*MuscleParameters.Pennationangle); //< Optimal fiber length corrected by pennation angle
  AnyVar PCSA ??= 1e4*.StrengthScaleHumerus*MuscleParameters.MuscleVolumeSIScaled/(.Rhomboideus1.Lf0 +.Rhomboideus2.Lf0 +.Rhomboideus3.Lf0 +.Rhomboideus4.Lf0 +.Rhomboideus5.Lf0 +.Rhomboideus6.Lf0 ); ///< PCSA (cm2) of the individual element is total volumen divided by the sum of muscle element fiber lengths.
  Vol0 ??= 1e-4 * PCSA * Lf0; // New calculation of the vol for the specific muscle branch (m^3)
};

AnyMuscleModel Rhomboideus3 =
{
  AnyFolder& MuscleParameters = ..Data.unscaled.ModelParameters.Muscles.Rhomboideus;
  AnyIntVar MuscleElemNo = 3; ///< The number of this element of the muscle
  AnyIntVar MuscleElemAmount = MuscleParameters.MuscleElemAmount; ///< The total amount of elements for this muscle
  F0 ??= .DefaultMusPar.PCSAfactor*PCSA; ///< Maximum force output at optimum fiber length
  Lf0 ??= MuscleParameters.OptimalFiberlength / cos(pi/180*MuscleParameters.Pennationangle); //< Optimal fiber length corrected by pennation angle
  AnyVar PCSA ??= 1e4*.StrengthScaleHumerus*MuscleParameters.MuscleVolumeSIScaled/(.Rhomboideus1.Lf0 +.Rhomboideus2.Lf0 +.Rhomboideus3.Lf0 +.Rhomboideus4.Lf0 +.Rhomboideus5.Lf0 +.Rhomboideus6.Lf0 ); ///< PCSA (cm2) of the individual element is total volumen divided by the sum of muscle element fiber lengths.
  Vol0 ??= 1e-4 * PCSA * Lf0; // New calculation of the vol for the specific muscle branch (m^3)
};

AnyMuscleModel Rhomboideus4 =
{
  AnyFolder& MuscleParameters = ..Data.unscaled.ModelParameters.Muscles.Rhomboideus;
  AnyIntVar MuscleElemNo = 4; ///< The number of this element of the muscle
  AnyIntVar MuscleElemAmount = MuscleParameters.MuscleElemAmount; ///< The total amount of elements for this muscle
  F0 ??= .DefaultMusPar.PCSAfactor*PCSA; ///< Maximum force output at optimum fiber length
  Lf0 ??= MuscleParameters.OptimalFiberlength / cos(pi/180*MuscleParameters.Pennationangle); //< Optimal fiber length corrected by pennation angle
  AnyVar PCSA ??= 1e4*.StrengthScaleHumerus*MuscleParameters.MuscleVolumeSIScaled/(.Rhomboideus1.Lf0 +.Rhomboideus2.Lf0 +.Rhomboideus3.Lf0 +.Rhomboideus4.Lf0 +.Rhomboideus5.Lf0 +.Rhomboideus6.Lf0 ); ///< PCSA (cm2) of the individual element is total volumen divided by the sum of muscle element fiber lengths.
  Vol0 ??= 1e-4 * PCSA * Lf0; // New calculation of the vol for the specific muscle branch (m^3)
};

AnyMuscleModel Rhomboideus5 =
{
  AnyFolder& MuscleParameters = ..Data.unscaled.ModelParameters.Muscles.Rhomboideus;
  AnyIntVar MuscleElemNo = 5; ///< The number of this element of the muscle
  AnyIntVar MuscleElemAmount = MuscleParameters.MuscleElemAmount; ///< The total amount of elements for this muscle
  F0 ??= .DefaultMusPar.PCSAfactor*PCSA; ///< Maximum force output at optimum fiber length
  Lf0 ??= MuscleParameters.OptimalFiberlength / cos(pi/180*MuscleParameters.Pennationangle); //< Optimal fiber length corrected by pennation angle
  AnyVar PCSA ??= 1e4*.StrengthScaleHumerus*MuscleParameters.MuscleVolumeSIScaled/(.Rhomboideus1.Lf0 +.Rhomboideus2.Lf0 +.Rhomboideus3.Lf0 +.Rhomboideus4.Lf0 +.Rhomboideus5.Lf0 +.Rhomboideus6.Lf0 ); ///< PCSA (cm2) of the individual element is total volumen divided by the sum of muscle element fiber lengths.
  Vol0 ??= 1e-4 * PCSA * Lf0; // New calculation of the vol for the specific muscle branch (m^3)
};

AnyMuscleModel Rhomboideus6 =
{
  AnyFolder& MuscleParameters = ..Data.unscaled.ModelParameters.Muscles.Rhomboideus;
  AnyIntVar MuscleElemNo = 6; ///< The number of this element of the muscle
  AnyIntVar MuscleElemAmount = MuscleParameters.MuscleElemAmount; ///< The total amount of elements for this muscle
  F0 ??= .DefaultMusPar.PCSAfactor*PCSA; ///< Maximum force output at optimum fiber length
  Lf0 ??= MuscleParameters.OptimalFiberlength / cos(pi/180*MuscleParameters.Pennationangle); //< Optimal fiber length corrected by pennation angle
  AnyVar PCSA ??= 1e4*.StrengthScaleHumerus*MuscleParameters.MuscleVolumeSIScaled/(.Rhomboideus1.Lf0 +.Rhomboideus2.Lf0 +.Rhomboideus3.Lf0 +.Rhomboideus4.Lf0 +.Rhomboideus5.Lf0 +.Rhomboideus6.Lf0 ); ///< PCSA (cm2) of the individual element is total volumen divided by the sum of muscle element fiber lengths.
  Vol0 ??= 1e-4 * PCSA * Lf0; // New calculation of the vol for the specific muscle branch (m^3)
};


///////////////////////////////////////////
//     SerratusAnterior (9 elements)     //
///////////////////////////////////////////
AnyMuscleModel SerratusAnterior1 =
{
  AnyFolder& MuscleParameters = ..Data.unscaled.ModelParameters.Muscles.SerratusAnterior;
  AnyIntVar MuscleElemNo = 1; ///< The number of this element of the muscle
  AnyIntVar MuscleElemAmount = MuscleParameters.MuscleElemAmount; ///< The total amount of elements for this muscle
  F0 ??= .DefaultMusPar.PCSAfactor*PCSA; ///< Maximum force output at optimum fiber length
  Lf0 ??= MuscleParameters.OptimalFiberlength / cos(pi/180*MuscleParameters.Pennationangle); //< Optimal fiber length corrected by pennation angle
  AnyVar PCSA ??= 1e4*.StrengthScaleHumerus*MuscleParameters.MuscleVolumeSIScaled/(.SerratusAnterior1.Lf0 +.SerratusAnterior2.Lf0 +.SerratusAnterior3.Lf0 +.SerratusAnterior4.Lf0 +.SerratusAnterior5.Lf0 +.SerratusAnterior6.Lf0 +.SerratusAnterior7.Lf0 +.SerratusAnterior8.Lf0 +.SerratusAnterior9.Lf0 ); ///< PCSA (cm2) of the individual element is total volumen divided by the sum of muscle element fiber lengths.
  Vol0 ??= 1e-4 * PCSA * Lf0; // New calculation of the vol for the specific muscle branch (m^3)
};

AnyMuscleModel SerratusAnterior2 =
{
  AnyFolder& MuscleParameters = ..Data.unscaled.ModelParameters.Muscles.SerratusAnterior;
  AnyIntVar MuscleElemNo = 2; ///< The number of this element of the muscle
  AnyIntVar MuscleElemAmount = MuscleParameters.MuscleElemAmount; ///< The total amount of elements for this muscle
  F0 ??= .DefaultMusPar.PCSAfactor*PCSA; ///< Maximum force output at optimum fiber length
  Lf0 ??= MuscleParameters.OptimalFiberlength / cos(pi/180*MuscleParameters.Pennationangle); //< Optimal fiber length corrected by pennation angle
  AnyVar PCSA ??= 1e4*.StrengthScaleHumerus*MuscleParameters.MuscleVolumeSIScaled/(.SerratusAnterior1.Lf0 +.SerratusAnterior2.Lf0 +.SerratusAnterior3.Lf0 +.SerratusAnterior4.Lf0 +.SerratusAnterior5.Lf0 +.SerratusAnterior6.Lf0 +.SerratusAnterior7.Lf0 +.SerratusAnterior8.Lf0 +.SerratusAnterior9.Lf0 ); ///< PCSA (cm2) of the individual element is total volumen divided by the sum of muscle element fiber lengths.
  Vol0 ??= 1e-4 * PCSA * Lf0; // New calculation of the vol for the specific muscle branch (m^3)
};

AnyMuscleModel SerratusAnterior3 =
{
  AnyFolder& MuscleParameters = ..Data.unscaled.ModelParameters.Muscles.SerratusAnterior;
  AnyIntVar MuscleElemNo = 3; ///< The number of this element of the muscle
  AnyIntVar MuscleElemAmount = MuscleParameters.MuscleElemAmount; ///< The total amount of elements for this muscle
  F0 ??= .DefaultMusPar.PCSAfactor*PCSA; ///< Maximum force output at optimum fiber length
  Lf0 ??= MuscleParameters.OptimalFiberlength / cos(pi/180*MuscleParameters.Pennationangle); //< Optimal fiber length corrected by pennation angle
  AnyVar PCSA ??= 1e4*.StrengthScaleHumerus*MuscleParameters.MuscleVolumeSIScaled/(.SerratusAnterior1.Lf0 +.SerratusAnterior2.Lf0 +.SerratusAnterior3.Lf0 +.SerratusAnterior4.Lf0 +.SerratusAnterior5.Lf0 +.SerratusAnterior6.Lf0 +.SerratusAnterior7.Lf0 +.SerratusAnterior8.Lf0 +.SerratusAnterior9.Lf0 ); ///< PCSA (cm2) of the individual element is total volumen divided by the sum of muscle element fiber lengths.
  Vol0 ??= 1e-4 * PCSA * Lf0; // New calculation of the vol for the specific muscle branch (m^3)
};

AnyMuscleModel SerratusAnterior4 =
{
  AnyFolder& MuscleParameters = ..Data.unscaled.ModelParameters.Muscles.SerratusAnterior;
  AnyIntVar MuscleElemNo = 4; ///< The number of this element of the muscle
  AnyIntVar MuscleElemAmount = MuscleParameters.MuscleElemAmount; ///< The total amount of elements for this muscle
  F0 ??= .DefaultMusPar.PCSAfactor*PCSA; ///< Maximum force output at optimum fiber length
  Lf0 ??= MuscleParameters.OptimalFiberlength / cos(pi/180*MuscleParameters.Pennationangle); //< Optimal fiber length corrected by pennation angle
  AnyVar PCSA ??= 1e4*.StrengthScaleHumerus*MuscleParameters.MuscleVolumeSIScaled/(.SerratusAnterior1.Lf0 +.SerratusAnterior2.Lf0 +.SerratusAnterior3.Lf0 +.SerratusAnterior4.Lf0 +.SerratusAnterior5.Lf0 +.SerratusAnterior6.Lf0 +.SerratusAnterior7.Lf0 +.SerratusAnterior8.Lf0 +.SerratusAnterior9.Lf0 ); ///< PCSA (cm2) of the individual element is total volumen divided by the sum of muscle element fiber lengths.
  Vol0 ??= 1e-4 * PCSA * Lf0; // New calculation of the vol for the specific muscle branch (m^3)
};

AnyMuscleModel SerratusAnterior5 =
{
  AnyFolder& MuscleParameters = ..Data.unscaled.ModelParameters.Muscles.SerratusAnterior;
  AnyIntVar MuscleElemNo = 5; ///< The number of this element of the muscle
  AnyIntVar MuscleElemAmount = MuscleParameters.MuscleElemAmount; ///< The total amount of elements for this muscle
  F0 ??= .DefaultMusPar.PCSAfactor*PCSA; ///< Maximum force output at optimum fiber length
  Lf0 ??= MuscleParameters.OptimalFiberlength / cos(pi/180*MuscleParameters.Pennationangle); //< Optimal fiber length corrected by pennation angle
  AnyVar PCSA ??= 1e4*.StrengthScaleHumerus*MuscleParameters.MuscleVolumeSIScaled/(.SerratusAnterior1.Lf0 +.SerratusAnterior2.Lf0 +.SerratusAnterior3.Lf0 +.SerratusAnterior4.Lf0 +.SerratusAnterior5.Lf0 +.SerratusAnterior6.Lf0 +.SerratusAnterior7.Lf0 +.SerratusAnterior8.Lf0 +.SerratusAnterior9.Lf0 ); ///< PCSA (cm2) of the individual element is total volumen divided by the sum of muscle element fiber lengths.
  Vol0 ??= 1e-4 * PCSA * Lf0; // New calculation of the vol for the specific muscle branch (m^3)
};

AnyMuscleModel SerratusAnterior6 =
{
  AnyFolder& MuscleParameters = ..Data.unscaled.ModelParameters.Muscles.SerratusAnterior;
  AnyIntVar MuscleElemNo = 6; ///< The number of this element of the muscle
  AnyIntVar MuscleElemAmount = MuscleParameters.MuscleElemAmount; ///< The total amount of elements for this muscle
  F0 ??= .DefaultMusPar.PCSAfactor*PCSA; ///< Maximum force output at optimum fiber length
  Lf0 ??= MuscleParameters.OptimalFiberlength / cos(pi/180*MuscleParameters.Pennationangle); //< Optimal fiber length corrected by pennation angle
  AnyVar PCSA ??= 1e4*.StrengthScaleHumerus*MuscleParameters.MuscleVolumeSIScaled/(.SerratusAnterior1.Lf0 +.SerratusAnterior2.Lf0 +.SerratusAnterior3.Lf0 +.SerratusAnterior4.Lf0 +.SerratusAnterior5.Lf0 +.SerratusAnterior6.Lf0 +.SerratusAnterior7.Lf0 +.SerratusAnterior8.Lf0 +.SerratusAnterior9.Lf0 ); ///< PCSA (cm2) of the individual element is total volumen divided by the sum of muscle element fiber lengths.
  Vol0 ??= 1e-4 * PCSA * Lf0; // New calculation of the vol for the specific muscle branch (m^3)
};

AnyMuscleModel SerratusAnterior7 =
{
  AnyFolder& MuscleParameters = ..Data.unscaled.ModelParameters.Muscles.SerratusAnterior;
  AnyIntVar MuscleElemNo = 7; ///< The number of this element of the muscle
  AnyIntVar MuscleElemAmount = MuscleParameters.MuscleElemAmount; ///< The total amount of elements for this muscle
  F0 ??= .DefaultMusPar.PCSAfactor*PCSA; ///< Maximum force output at optimum fiber length
  Lf0 ??= MuscleParameters.OptimalFiberlength / cos(pi/180*MuscleParameters.Pennationangle); //< Optimal fiber length corrected by pennation angle
  AnyVar PCSA ??= 1e4*.StrengthScaleHumerus*MuscleParameters.MuscleVolumeSIScaled/(.SerratusAnterior1.Lf0 +.SerratusAnterior2.Lf0 +.SerratusAnterior3.Lf0 +.SerratusAnterior4.Lf0 +.SerratusAnterior5.Lf0 +.SerratusAnterior6.Lf0 +.SerratusAnterior7.Lf0 +.SerratusAnterior8.Lf0 +.SerratusAnterior9.Lf0 ); ///< PCSA (cm2) of the individual element is total volumen divided by the sum of muscle element fiber lengths.
  Vol0 ??= 1e-4 * PCSA * Lf0; // New calculation of the vol for the specific muscle branch (m^3)
};

AnyMuscleModel SerratusAnterior8 =
{
  AnyFolder& MuscleParameters = ..Data.unscaled.ModelParameters.Muscles.SerratusAnterior;
  AnyIntVar MuscleElemNo = 8; ///< The number of this element of the muscle
  AnyIntVar MuscleElemAmount = MuscleParameters.MuscleElemAmount; ///< The total amount of elements for this muscle
  F0 ??= .DefaultMusPar.PCSAfactor*PCSA; ///< Maximum force output at optimum fiber length
  Lf0 ??= MuscleParameters.OptimalFiberlength / cos(pi/180*MuscleParameters.Pennationangle); //< Optimal fiber length corrected by pennation angle
  AnyVar PCSA ??= 1e4*.StrengthScaleHumerus*MuscleParameters.MuscleVolumeSIScaled/(.SerratusAnterior1.Lf0 +.SerratusAnterior2.Lf0 +.SerratusAnterior3.Lf0 +.SerratusAnterior4.Lf0 +.SerratusAnterior5.Lf0 +.SerratusAnterior6.Lf0 +.SerratusAnterior7.Lf0 +.SerratusAnterior8.Lf0 +.SerratusAnterior9.Lf0 ); ///< PCSA (cm2) of the individual element is total volumen divided by the sum of muscle element fiber lengths.
  Vol0 ??= 1e-4 * PCSA * Lf0; // New calculation of the vol for the specific muscle branch (m^3)
};

AnyMuscleModel SerratusAnterior9 =
{
  AnyFolder& MuscleParameters = ..Data.unscaled.ModelParameters.Muscles.SerratusAnterior;
  AnyIntVar MuscleElemNo = 9; ///< The number of this element of the muscle
  AnyIntVar MuscleElemAmount = MuscleParameters.MuscleElemAmount; ///< The total amount of elements for this muscle
  F0 ??= .DefaultMusPar.PCSAfactor*PCSA; ///< Maximum force output at optimum fiber length
  Lf0 ??= MuscleParameters.OptimalFiberlength / cos(pi/180*MuscleParameters.Pennationangle); //< Optimal fiber length corrected by pennation angle
  AnyVar PCSA ??= 1e4*.StrengthScaleHumerus*MuscleParameters.MuscleVolumeSIScaled/(.SerratusAnterior1.Lf0 +.SerratusAnterior2.Lf0 +.SerratusAnterior3.Lf0 +.SerratusAnterior4.Lf0 +.SerratusAnterior5.Lf0 +.SerratusAnterior6.Lf0 +.SerratusAnterior7.Lf0 +.SerratusAnterior8.Lf0 +.SerratusAnterior9.Lf0 ); ///< PCSA (cm2) of the individual element is total volumen divided by the sum of muscle element fiber lengths.
  Vol0 ??= 1e-4 * PCSA * Lf0; // New calculation of the vol for the specific muscle branch (m^3)
};


//////////////////////////////////////////////
//     Sternocleidomastoid (2 elements)     //
//////////////////////////////////////////////
AnyMuscleModel Sternocleidomastoid1 =
{
  AnyFolder& MuscleParameters = ..Data.unscaled.ModelParameters.Muscles.Sternocleidomastoid;
  AnyIntVar MuscleElemNo = 1; ///< The number of this element of the muscle
  AnyIntVar MuscleElemAmount = MuscleParameters.MuscleElemAmount; ///< The total amount of elements for this muscle
  F0 ??= .DefaultMusPar.PCSAfactor*PCSA; ///< Maximum force output at optimum fiber length
  Lf0 ??= MuscleParameters.OptimalFiberlength / cos(pi/180*MuscleParameters.Pennationangle); //< Optimal fiber length corrected by pennation angle
  AnyVar PCSA ??= 1e4*.StrengthScaleHumerus*MuscleParameters.MuscleVolumeSIScaled/(.Sternocleidomastoid1.Lf0 +.Sternocleidomastoid2.Lf0 ); ///< PCSA (cm2) of the individual element is total volumen divided by the sum of muscle element fiber lengths.
  Vol0 ??= 1e-4 * PCSA * Lf0; // New calculation of the vol for the specific muscle branch (m^3)
};

AnyMuscleModel Sternocleidomastoid2 =
{
  AnyFolder& MuscleParameters = ..Data.unscaled.ModelParameters.Muscles.Sternocleidomastoid;
  AnyIntVar MuscleElemNo = 2; ///< The number of this element of the muscle
  AnyIntVar MuscleElemAmount = MuscleParameters.MuscleElemAmount; ///< The total amount of elements for this muscle
  F0 ??= .DefaultMusPar.PCSAfactor*PCSA; ///< Maximum force output at optimum fiber length
  Lf0 ??= MuscleParameters.OptimalFiberlength / cos(pi/180*MuscleParameters.Pennationangle); //< Optimal fiber length corrected by pennation angle
  AnyVar PCSA ??= 1e4*.StrengthScaleHumerus*MuscleParameters.MuscleVolumeSIScaled/(.Sternocleidomastoid1.Lf0 +.Sternocleidomastoid2.Lf0 ); ///< PCSA (cm2) of the individual element is total volumen divided by the sum of muscle element fiber lengths.
  Vol0 ??= 1e-4 * PCSA * Lf0; // New calculation of the vol for the specific muscle branch (m^3)
};


////////////////////////////////////////
//     Subscapularis (6 elements)     //
////////////////////////////////////////
AnyMuscleModel Subscapularis1 =
{
  AnyFolder& MuscleParameters = ..Data.unscaled.ModelParameters.Muscles.Subscapularis;
  AnyIntVar MuscleElemNo = 1; ///< The number of this element of the muscle
  AnyIntVar MuscleElemAmount = MuscleParameters.MuscleElemAmount; ///< The total amount of elements for this muscle
  F0 ??= .DefaultMusPar.PCSAfactor*PCSA; ///< Maximum force output at optimum fiber length
  Lf0 ??= MuscleParameters.OptimalFiberlength / cos(pi/180*MuscleParameters.Pennationangle); //< Optimal fiber length corrected by pennation angle
  AnyVar PCSA ??= 1e4*.StrengthScaleHumerus*MuscleParameters.MuscleVolumeSIScaled/(.Subscapularis1.Lf0 +.Subscapularis2.Lf0 +.Subscapularis3.Lf0 +.Subscapularis4.Lf0 +.Subscapularis5.Lf0 +.Subscapularis6.Lf0 ); ///< PCSA (cm2) of the individual element is total volumen divided by the sum of muscle element fiber lengths.
  Vol0 ??= 1e-4 * PCSA * Lf0; // New calculation of the vol for the specific muscle branch (m^3)
};

AnyMuscleModel Subscapularis2 =
{
  AnyFolder& MuscleParameters = ..Data.unscaled.ModelParameters.Muscles.Subscapularis;
  AnyIntVar MuscleElemNo = 2; ///< The number of this element of the muscle
  AnyIntVar MuscleElemAmount = MuscleParameters.MuscleElemAmount; ///< The total amount of elements for this muscle
  F0 ??= .DefaultMusPar.PCSAfactor*PCSA; ///< Maximum force output at optimum fiber length
  Lf0 ??= MuscleParameters.OptimalFiberlength / cos(pi/180*MuscleParameters.Pennationangle); //< Optimal fiber length corrected by pennation angle
  AnyVar PCSA ??= 1e4*.StrengthScaleHumerus*MuscleParameters.MuscleVolumeSIScaled/(.Subscapularis1.Lf0 +.Subscapularis2.Lf0 +.Subscapularis3.Lf0 +.Subscapularis4.Lf0 +.Subscapularis5.Lf0 +.Subscapularis6.Lf0 ); ///< PCSA (cm2) of the individual element is total volumen divided by the sum of muscle element fiber lengths.
  Vol0 ??= 1e-4 * PCSA * Lf0; // New calculation of the vol for the specific muscle branch (m^3)
};

AnyMuscleModel Subscapularis3 =
{
  AnyFolder& MuscleParameters = ..Data.unscaled.ModelParameters.Muscles.Subscapularis;
  AnyIntVar MuscleElemNo = 3; ///< The number of this element of the muscle
  AnyIntVar MuscleElemAmount = MuscleParameters.MuscleElemAmount; ///< The total amount of elements for this muscle
  F0 ??= .DefaultMusPar.PCSAfactor*PCSA; ///< Maximum force output at optimum fiber length
  Lf0 ??= MuscleParameters.OptimalFiberlength / cos(pi/180*MuscleParameters.Pennationangle); //< Optimal fiber length corrected by pennation angle
  AnyVar PCSA ??= 1e4*.StrengthScaleHumerus*MuscleParameters.MuscleVolumeSIScaled/(.Subscapularis1.Lf0 +.Subscapularis2.Lf0 +.Subscapularis3.Lf0 +.Subscapularis4.Lf0 +.Subscapularis5.Lf0 +.Subscapularis6.Lf0 ); ///< PCSA (cm2) of the individual element is total volumen divided by the sum of muscle element fiber lengths.
  Vol0 ??= 1e-4 * PCSA * Lf0; // New calculation of the vol for the specific muscle branch (m^3)
};

AnyMuscleModel Subscapularis4 =
{
  AnyFolder& MuscleParameters = ..Data.unscaled.ModelParameters.Muscles.Subscapularis;
  AnyIntVar MuscleElemNo = 4; ///< The number of this element of the muscle
  AnyIntVar MuscleElemAmount = MuscleParameters.MuscleElemAmount; ///< The total amount of elements for this muscle
  F0 ??= .DefaultMusPar.PCSAfactor*PCSA; ///< Maximum force output at optimum fiber length
  Lf0 ??= MuscleParameters.OptimalFiberlength / cos(pi/180*MuscleParameters.Pennationangle); //< Optimal fiber length corrected by pennation angle
  AnyVar PCSA ??= 1e4*.StrengthScaleHumerus*MuscleParameters.MuscleVolumeSIScaled/(.Subscapularis1.Lf0 +.Subscapularis2.Lf0 +.Subscapularis3.Lf0 +.Subscapularis4.Lf0 +.Subscapularis5.Lf0 +.Subscapularis6.Lf0 ); ///< PCSA (cm2) of the individual element is total volumen divided by the sum of muscle element fiber lengths.
  Vol0 ??= 1e-4 * PCSA * Lf0; // New calculation of the vol for the specific muscle branch (m^3)
};

AnyMuscleModel Subscapularis5 =
{
  AnyFolder& MuscleParameters = ..Data.unscaled.ModelParameters.Muscles.Subscapularis;
  AnyIntVar MuscleElemNo = 5; ///< The number of this element of the muscle
  AnyIntVar MuscleElemAmount = MuscleParameters.MuscleElemAmount; ///< The total amount of elements for this muscle
  F0 ??= .DefaultMusPar.PCSAfactor*PCSA; ///< Maximum force output at optimum fiber length
  Lf0 ??= MuscleParameters.OptimalFiberlength / cos(pi/180*MuscleParameters.Pennationangle); //< Optimal fiber length corrected by pennation angle
  AnyVar PCSA ??= 1e4*.StrengthScaleHumerus*MuscleParameters.MuscleVolumeSIScaled/(.Subscapularis1.Lf0 +.Subscapularis2.Lf0 +.Subscapularis3.Lf0 +.Subscapularis4.Lf0 +.Subscapularis5.Lf0 +.Subscapularis6.Lf0 ); ///< PCSA (cm2) of the individual element is total volumen divided by the sum of muscle element fiber lengths.
  Vol0 ??= 1e-4 * PCSA * Lf0; // New calculation of the vol for the specific muscle branch (m^3)
};
AnyMuscleModel Subscapularis6 =
{
  AnyFolder& MuscleParameters = ..Data.unscaled.ModelParameters.Muscles.Subscapularis;
  AnyIntVar MuscleElemNo = 6; ///< The number of this element of the muscle
  AnyIntVar MuscleElemAmount = MuscleParameters.MuscleElemAmount; ///< The total amount of elements for this muscle
  F0 ??= .DefaultMusPar.PCSAfactor*PCSA; ///< Maximum force output at optimum fiber length
  Lf0 ??= MuscleParameters.OptimalFiberlength / cos(pi/180*MuscleParameters.Pennationangle); //< Optimal fiber length corrected by pennation angle
  AnyVar PCSA ??= 1e4*.StrengthScaleHumerus*MuscleParameters.MuscleVolumeSIScaled/(.Subscapularis1.Lf0 +.Subscapularis2.Lf0 +.Subscapularis3.Lf0 +.Subscapularis4.Lf0 +.Subscapularis5.Lf0 +.Subscapularis6.Lf0 ); ///< PCSA (cm2) of the individual element is total volumen divided by the sum of muscle element fiber lengths.
  Vol0 ??= 1e-4 * PCSA * Lf0; // New calculation of the vol for the specific muscle branch (m^3)
};


////////////////////////////////////////
//     Supraspinatus (6 elements)     //
////////////////////////////////////////
AnyMuscleModel Supraspinatus1 =
{
  AnyFolder& MuscleParameters = ..Data.unscaled.ModelParameters.Muscles.Supraspinatus;
  AnyIntVar MuscleElemNo = 1; ///< The number of this element of the muscle
  AnyIntVar MuscleElemAmount = MuscleParameters.MuscleElemAmount; ///< The total amount of elements for this muscle
  F0 ??= .DefaultMusPar.PCSAfactor*PCSA; ///< Maximum force output at optimum fiber length
  Lf0 ??= MuscleParameters.OptimalFiberlength / cos(pi/180*MuscleParameters.Pennationangle); //< Optimal fiber length corrected by pennation angle
  AnyVar PCSA ??= 1e4*.StrengthScaleHumerus*MuscleParameters.MuscleVolumeSIScaled/(.Supraspinatus1.Lf0 +.Supraspinatus2.Lf0 +.Supraspinatus3.Lf0 +.Supraspinatus4.Lf0 +.Supraspinatus5.Lf0 +.Supraspinatus6.Lf0 ); ///< PCSA (cm2) of the individual element is total volumen divided by the sum of muscle element fiber lengths.
  Vol0 ??= 1e-4 * PCSA * Lf0; // New calculation of the vol for the specific muscle branch (m^3)
};

AnyMuscleModel Supraspinatus2 =
{
  AnyFolder& MuscleParameters = ..Data.unscaled.ModelParameters.Muscles.Supraspinatus;
  AnyIntVar MuscleElemNo = 2; ///< The number of this element of the muscle
  AnyIntVar MuscleElemAmount = MuscleParameters.MuscleElemAmount; ///< The total amount of elements for this muscle
  F0 ??= .DefaultMusPar.PCSAfactor*PCSA; ///< Maximum force output at optimum fiber length
  Lf0 ??= MuscleParameters.OptimalFiberlength / cos(pi/180*MuscleParameters.Pennationangle); //< Optimal fiber length corrected by pennation angle
  AnyVar PCSA ??= 1e4*.StrengthScaleHumerus*MuscleParameters.MuscleVolumeSIScaled/(.Supraspinatus1.Lf0 +.Supraspinatus2.Lf0 +.Supraspinatus3.Lf0 +.Supraspinatus4.Lf0 +.Supraspinatus5.Lf0 +.Supraspinatus6.Lf0 ); ///< PCSA (cm2) of the individual element is total volumen divided by the sum of muscle element fiber lengths.
  Vol0 ??= 1e-4 * PCSA * Lf0; // New calculation of the vol for the specific muscle branch (m^3)
};

AnyMuscleModel Supraspinatus3 =
{
  AnyFolder& MuscleParameters = ..Data.unscaled.ModelParameters.Muscles.Supraspinatus;
  AnyIntVar MuscleElemNo = 3; ///< The number of this element of the muscle
  AnyIntVar MuscleElemAmount = MuscleParameters.MuscleElemAmount; ///< The total amount of elements for this muscle
  F0 ??= .DefaultMusPar.PCSAfactor*PCSA; ///< Maximum force output at optimum fiber length
  Lf0 ??= MuscleParameters.OptimalFiberlength / cos(pi/180*MuscleParameters.Pennationangle); //< Optimal fiber length corrected by pennation angle
  AnyVar PCSA ??= 1e4*.StrengthScaleHumerus*MuscleParameters.MuscleVolumeSIScaled/(.Supraspinatus1.Lf0 +.Supraspinatus2.Lf0 +.Supraspinatus3.Lf0 +.Supraspinatus4.Lf0 +.Supraspinatus5.Lf0 +.Supraspinatus6.Lf0 ); ///< PCSA (cm2) of the individual element is total volumen divided by the sum of muscle element fiber lengths.
  Vol0 ??= 1e-4 * PCSA * Lf0; // New calculation of the vol for the specific muscle branch (m^3)
};

AnyMuscleModel Supraspinatus4 =
{
  AnyFolder& MuscleParameters = ..Data.unscaled.ModelParameters.Muscles.Supraspinatus;
  AnyIntVar MuscleElemNo = 4; ///< The number of this element of the muscle
  AnyIntVar MuscleElemAmount = MuscleParameters.MuscleElemAmount; ///< The total amount of elements for this muscle
  F0 ??= .DefaultMusPar.PCSAfactor*PCSA; ///< Maximum force output at optimum fiber length
  Lf0 ??= MuscleParameters.OptimalFiberlength / cos(pi/180*MuscleParameters.Pennationangle); //< Optimal fiber length corrected by pennation angle
  AnyVar PCSA ??= 1e4*.StrengthScaleHumerus*MuscleParameters.MuscleVolumeSIScaled/(.Supraspinatus1.Lf0 +.Supraspinatus2.Lf0 +.Supraspinatus3.Lf0 +.Supraspinatus4.Lf0 +.Supraspinatus5.Lf0 +.Supraspinatus6.Lf0 ); ///< PCSA (cm2) of the individual element is total volumen divided by the sum of muscle element fiber lengths.
  Vol0 ??= 1e-4 * PCSA * Lf0; // New calculation of the vol for the specific muscle branch (m^3)
};

AnyMuscleModel Supraspinatus5 =
{
  AnyFolder& MuscleParameters = ..Data.unscaled.ModelParameters.Muscles.Supraspinatus;
  AnyIntVar MuscleElemNo = 5; ///< The number of this element of the muscle
  AnyIntVar MuscleElemAmount = MuscleParameters.MuscleElemAmount; ///< The total amount of elements for this muscle
  F0 ??= .DefaultMusPar.PCSAfactor*PCSA; ///< Maximum force output at optimum fiber length
  Lf0 ??= MuscleParameters.OptimalFiberlength / cos(pi/180*MuscleParameters.Pennationangle); //< Optimal fiber length corrected by pennation angle
  AnyVar PCSA ??= 1e4*.StrengthScaleHumerus*MuscleParameters.MuscleVolumeSIScaled/(.Supraspinatus1.Lf0 +.Supraspinatus2.Lf0 +.Supraspinatus3.Lf0 +.Supraspinatus4.Lf0 +.Supraspinatus5.Lf0 +.Supraspinatus6.Lf0 ); ///< PCSA (cm2) of the individual element is total volumen divided by the sum of muscle element fiber lengths.
  Vol0 ??= 1e-4 * PCSA * Lf0; // New calculation of the vol for the specific muscle branch (m^3)
};

AnyMuscleModel Supraspinatus6 =
{
  AnyFolder& MuscleParameters = ..Data.unscaled.ModelParameters.Muscles.Supraspinatus;
  AnyIntVar MuscleElemNo = 6; ///< The number of this element of the muscle
  AnyIntVar MuscleElemAmount = MuscleParameters.MuscleElemAmount; ///< The total amount of elements for this muscle
  F0 ??= .DefaultMusPar.PCSAfactor*PCSA; ///< Maximum force output at optimum fiber length
  Lf0 ??= MuscleParameters.OptimalFiberlength / cos(pi/180*MuscleParameters.Pennationangle); //< Optimal fiber length corrected by pennation angle
  AnyVar PCSA ??= 1e4*.StrengthScaleHumerus*MuscleParameters.MuscleVolumeSIScaled/(.Supraspinatus1.Lf0 +.Supraspinatus2.Lf0 +.Supraspinatus3.Lf0 +.Supraspinatus4.Lf0 +.Supraspinatus5.Lf0 +.Supraspinatus6.Lf0 ); ///< PCSA (cm2) of the individual element is total volumen divided by the sum of muscle element fiber lengths.
  Vol0 ??= 1e-4 * PCSA * Lf0; // New calculation of the vol for the specific muscle branch (m^3)
};


/////////////////////////////////////
//     TeresMajor (6 elements)     //
/////////////////////////////////////
AnyMuscleModel TeresMajor1 =
{
  AnyFolder& MuscleParameters = ..Data.unscaled.ModelParameters.Muscles.TeresMajor;
  AnyIntVar MuscleElemNo = 1; ///< The number of this element of the muscle
  AnyIntVar MuscleElemAmount = MuscleParameters.MuscleElemAmount; ///< The total amount of elements for this muscle
  F0 ??= .DefaultMusPar.PCSAfactor*PCSA; ///< Maximum force output at optimum fiber length
  Lf0 ??= MuscleParameters.OptimalFiberlength / cos(pi/180*MuscleParameters.Pennationangle); //< Optimal fiber length corrected by pennation angle
  AnyVar PCSA ??= 1e4*.StrengthScaleHumerus*MuscleParameters.MuscleVolumeSIScaled/(.TeresMajor1.Lf0 +.TeresMajor2.Lf0 +.TeresMajor3.Lf0 +.TeresMajor4.Lf0 +.TeresMajor5.Lf0 +.TeresMajor6.Lf0 ); ///< PCSA (cm2) of the individual element is total volumen divided by the sum of muscle element fiber lengths.
  Vol0 ??= 1e-4 * PCSA * Lf0; // New calculation of the vol for the specific muscle branch (m^3)
};

AnyMuscleModel TeresMajor2 =
{
  AnyFolder& MuscleParameters = ..Data.unscaled.ModelParameters.Muscles.TeresMajor;
  AnyIntVar MuscleElemNo = 2; ///< The number of this element of the muscle
  AnyIntVar MuscleElemAmount = MuscleParameters.MuscleElemAmount; ///< The total amount of elements for this muscle
  F0 ??= .DefaultMusPar.PCSAfactor*PCSA; ///< Maximum force output at optimum fiber length
  Lf0 ??= MuscleParameters.OptimalFiberlength / cos(pi/180*MuscleParameters.Pennationangle); //< Optimal fiber length corrected by pennation angle
  AnyVar PCSA ??= 1e4*.StrengthScaleHumerus*MuscleParameters.MuscleVolumeSIScaled/(.TeresMajor1.Lf0 +.TeresMajor2.Lf0 +.TeresMajor3.Lf0 +.TeresMajor4.Lf0 +.TeresMajor5.Lf0 +.TeresMajor6.Lf0 ); ///< PCSA (cm2) of the individual element is total volumen divided by the sum of muscle element fiber lengths.
  Vol0 ??= 1e-4 * PCSA * Lf0; // New calculation of the vol for the specific muscle branch (m^3)
};

AnyMuscleModel TeresMajor3 =
{
  AnyFolder& MuscleParameters = ..Data.unscaled.ModelParameters.Muscles.TeresMajor;
  AnyIntVar MuscleElemNo = 3; ///< The number of this element of the muscle
  AnyIntVar MuscleElemAmount = MuscleParameters.MuscleElemAmount; ///< The total amount of elements for this muscle
  F0 ??= .DefaultMusPar.PCSAfactor*PCSA; ///< Maximum force output at optimum fiber length
  Lf0 ??= MuscleParameters.OptimalFiberlength / cos(pi/180*MuscleParameters.Pennationangle); //< Optimal fiber length corrected by pennation angle
  AnyVar PCSA ??= 1e4*.StrengthScaleHumerus*MuscleParameters.MuscleVolumeSIScaled/(.TeresMajor1.Lf0 +.TeresMajor2.Lf0 +.TeresMajor3.Lf0 +.TeresMajor4.Lf0 +.TeresMajor5.Lf0 +.TeresMajor6.Lf0 ); ///< PCSA (cm2) of the individual element is total volumen divided by the sum of muscle element fiber lengths.
  Vol0 ??= 1e-4 * PCSA * Lf0; // New calculation of the vol for the specific muscle branch (m^3)
};

AnyMuscleModel TeresMajor4 =
{
  AnyFolder& MuscleParameters = ..Data.unscaled.ModelParameters.Muscles.TeresMajor;
  AnyIntVar MuscleElemNo = 4; ///< The number of this element of the muscle
  AnyIntVar MuscleElemAmount = MuscleParameters.MuscleElemAmount; ///< The total amount of elements for this muscle
  F0 ??= .DefaultMusPar.PCSAfactor*PCSA; ///< Maximum force output at optimum fiber length
  Lf0 ??= MuscleParameters.OptimalFiberlength / cos(pi/180*MuscleParameters.Pennationangle); //< Optimal fiber length corrected by pennation angle
  AnyVar PCSA ??= 1e4*.StrengthScaleHumerus*MuscleParameters.MuscleVolumeSIScaled/(.TeresMajor1.Lf0 +.TeresMajor2.Lf0 +.TeresMajor3.Lf0 +.TeresMajor4.Lf0 +.TeresMajor5.Lf0 +.TeresMajor6.Lf0 ); ///< PCSA (cm2) of the individual element is total volumen divided by the sum of muscle element fiber lengths.
  Vol0 ??= 1e-4 * PCSA * Lf0; // New calculation of the vol for the specific muscle branch (m^3)
};

AnyMuscleModel TeresMajor5 =
{
  AnyFolder& MuscleParameters = ..Data.unscaled.ModelParameters.Muscles.TeresMajor;
  AnyIntVar MuscleElemNo = 5; ///< The number of this element of the muscle
  AnyIntVar MuscleElemAmount = MuscleParameters.MuscleElemAmount; ///< The total amount of elements for this muscle
  F0 ??= .DefaultMusPar.PCSAfactor*PCSA; ///< Maximum force output at optimum fiber length
  Lf0 ??= MuscleParameters.OptimalFiberlength / cos(pi/180*MuscleParameters.Pennationangle); //< Optimal fiber length corrected by pennation angle
  AnyVar PCSA ??= 1e4*.StrengthScaleHumerus*MuscleParameters.MuscleVolumeSIScaled/(.TeresMajor1.Lf0 +.TeresMajor2.Lf0 +.TeresMajor3.Lf0 +.TeresMajor4.Lf0 +.TeresMajor5.Lf0 +.TeresMajor6.Lf0 ); ///< PCSA (cm2) of the individual element is total volumen divided by the sum of muscle element fiber lengths.
  Vol0 ??= 1e-4 * PCSA * Lf0; // New calculation of the vol for the specific muscle branch (m^3)
};

AnyMuscleModel TeresMajor6 =
{
  AnyFolder& MuscleParameters = ..Data.unscaled.ModelParameters.Muscles.TeresMajor;
  AnyIntVar MuscleElemNo = 6; ///< The number of this element of the muscle
  AnyIntVar MuscleElemAmount = MuscleParameters.MuscleElemAmount; ///< The total amount of elements for this muscle
  F0 ??= .DefaultMusPar.PCSAfactor*PCSA; ///< Maximum force output at optimum fiber length
  Lf0 ??= MuscleParameters.OptimalFiberlength / cos(pi/180*MuscleParameters.Pennationangle); //< Optimal fiber length corrected by pennation angle
  AnyVar PCSA ??= 1e4*.StrengthScaleHumerus*MuscleParameters.MuscleVolumeSIScaled/(.TeresMajor1.Lf0 +.TeresMajor2.Lf0 +.TeresMajor3.Lf0 +.TeresMajor4.Lf0 +.TeresMajor5.Lf0 +.TeresMajor6.Lf0 ); ///< PCSA (cm2) of the individual element is total volumen divided by the sum of muscle element fiber lengths.
  Vol0 ??= 1e-4 * PCSA * Lf0; // New calculation of the vol for the specific muscle branch (m^3)
};


/////////////////////////////////////
//     TeresMinor (6 elements)     //
/////////////////////////////////////
AnyMuscleModel TeresMinor1 =
{
  AnyFolder& MuscleParameters = ..Data.unscaled.ModelParameters.Muscles.TeresMinor;
  AnyIntVar MuscleElemNo = 1; ///< The number of this element of the muscle
  AnyIntVar MuscleElemAmount = MuscleParameters.MuscleElemAmount; ///< The total amount of elements for this muscle
  F0 ??= .DefaultMusPar.PCSAfactor*PCSA; ///< Maximum force output at optimum fiber length
  Lf0 ??= MuscleParameters.OptimalFiberlength / cos(pi/180*MuscleParameters.Pennationangle); //< Optimal fiber length corrected by pennation angle
  AnyVar PCSA ??= 1e4*.StrengthScaleHumerus*MuscleParameters.MuscleVolumeSIScaled/(.TeresMinor1.Lf0 +.TeresMinor2.Lf0 +.TeresMinor3.Lf0 +.TeresMinor4.Lf0 +.TeresMinor5.Lf0 +.TeresMinor6.Lf0 ); ///< PCSA (cm2) of the individual element is total volumen divided by the sum of muscle element fiber lengths.
  Vol0 ??= 1e-4 * PCSA * Lf0; // New calculation of the vol for the specific muscle branch (m^3)
};

AnyMuscleModel TeresMinor2 =
{
  AnyFolder& MuscleParameters = ..Data.unscaled.ModelParameters.Muscles.TeresMinor;
  AnyIntVar MuscleElemNo = 2; ///< The number of this element of the muscle
  AnyIntVar MuscleElemAmount = MuscleParameters.MuscleElemAmount; ///< The total amount of elements for this muscle
  F0 ??= .DefaultMusPar.PCSAfactor*PCSA; ///< Maximum force output at optimum fiber length
  Lf0 ??= MuscleParameters.OptimalFiberlength / cos(pi/180*MuscleParameters.Pennationangle); //< Optimal fiber length corrected by pennation angle
  AnyVar PCSA ??= 1e4*.StrengthScaleHumerus*MuscleParameters.MuscleVolumeSIScaled/(.TeresMinor1.Lf0 +.TeresMinor2.Lf0 +.TeresMinor3.Lf0 +.TeresMinor4.Lf0 +.TeresMinor5.Lf0 +.TeresMinor6.Lf0 ); ///< PCSA (cm2) of the individual element is total volumen divided by the sum of muscle element fiber lengths.
  Vol0 ??= 1e-4 * PCSA * Lf0; // New calculation of the vol for the specific muscle branch (m^3)
};

AnyMuscleModel TeresMinor3 =
{
  AnyFolder& MuscleParameters = ..Data.unscaled.ModelParameters.Muscles.TeresMinor;
  AnyIntVar MuscleElemNo = 3; ///< The number of this element of the muscle
  AnyIntVar MuscleElemAmount = MuscleParameters.MuscleElemAmount; ///< The total amount of elements for this muscle
  F0 ??= .DefaultMusPar.PCSAfactor*PCSA; ///< Maximum force output at optimum fiber length
  Lf0 ??= MuscleParameters.OptimalFiberlength / cos(pi/180*MuscleParameters.Pennationangle); //< Optimal fiber length corrected by pennation angle
  AnyVar PCSA ??= 1e4*.StrengthScaleHumerus*MuscleParameters.MuscleVolumeSIScaled/(.TeresMinor1.Lf0 +.TeresMinor2.Lf0 +.TeresMinor3.Lf0 +.TeresMinor4.Lf0 +.TeresMinor5.Lf0 +.TeresMinor6.Lf0 ); ///< PCSA (cm2) of the individual element is total volumen divided by the sum of muscle element fiber lengths.
  Vol0 ??= 1e-4 * PCSA * Lf0; // New calculation of the vol for the specific muscle branch (m^3)
};

AnyMuscleModel TeresMinor4 =
{
  AnyFolder& MuscleParameters = ..Data.unscaled.ModelParameters.Muscles.TeresMinor;
  AnyIntVar MuscleElemNo = 4; ///< The number of this element of the muscle
  AnyIntVar MuscleElemAmount = MuscleParameters.MuscleElemAmount; ///< The total amount of elements for this muscle
  F0 ??= .DefaultMusPar.PCSAfactor*PCSA; ///< Maximum force output at optimum fiber length
  Lf0 ??= MuscleParameters.OptimalFiberlength / cos(pi/180*MuscleParameters.Pennationangle); //< Optimal fiber length corrected by pennation angle
  AnyVar PCSA ??= 1e4*.StrengthScaleHumerus*MuscleParameters.MuscleVolumeSIScaled/(.TeresMinor1.Lf0 +.TeresMinor2.Lf0 +.TeresMinor3.Lf0 +.TeresMinor4.Lf0 +.TeresMinor5.Lf0 +.TeresMinor6.Lf0 ); ///< PCSA (cm2) of the individual element is total volumen divided by the sum of muscle element fiber lengths.
  Vol0 ??= 1e-4 * PCSA * Lf0; // New calculation of the vol for the specific muscle branch (m^3)
};

AnyMuscleModel TeresMinor5 =
{
  AnyFolder& MuscleParameters = ..Data.unscaled.ModelParameters.Muscles.TeresMinor;
  AnyIntVar MuscleElemNo = 5; ///< The number of this element of the muscle
  AnyIntVar MuscleElemAmount = MuscleParameters.MuscleElemAmount; ///< The total amount of elements for this muscle
  F0 ??= .DefaultMusPar.PCSAfactor*PCSA; ///< Maximum force output at optimum fiber length
  Lf0 ??= MuscleParameters.OptimalFiberlength / cos(pi/180*MuscleParameters.Pennationangle); //< Optimal fiber length corrected by pennation angle
  AnyVar PCSA ??= 1e4*.StrengthScaleHumerus*MuscleParameters.MuscleVolumeSIScaled/(.TeresMinor1.Lf0 +.TeresMinor2.Lf0 +.TeresMinor3.Lf0 +.TeresMinor4.Lf0 +.TeresMinor5.Lf0 +.TeresMinor6.Lf0 ); ///< PCSA (cm2) of the individual element is total volumen divided by the sum of muscle element fiber lengths.
  Vol0 ??= 1e-4 * PCSA * Lf0; // New calculation of the vol for the specific muscle branch (m^3)
};

AnyMuscleModel TeresMinor6 =
{
  AnyFolder& MuscleParameters = ..Data.unscaled.ModelParameters.Muscles.TeresMinor;
  AnyIntVar MuscleElemNo = 6; ///< The number of this element of the muscle
  AnyIntVar MuscleElemAmount = MuscleParameters.MuscleElemAmount; ///< The total amount of elements for this muscle
  F0 ??= .DefaultMusPar.PCSAfactor*PCSA; ///< Maximum force output at optimum fiber length
  Lf0 ??= MuscleParameters.OptimalFiberlength / cos(pi/180*MuscleParameters.Pennationangle); //< Optimal fiber length corrected by pennation angle
  AnyVar PCSA ??= 1e4*.StrengthScaleHumerus*MuscleParameters.MuscleVolumeSIScaled/(.TeresMinor1.Lf0 +.TeresMinor2.Lf0 +.TeresMinor3.Lf0 +.TeresMinor4.Lf0 +.TeresMinor5.Lf0 +.TeresMinor6.Lf0 ); ///< PCSA (cm2) of the individual element is total volumen divided by the sum of muscle element fiber lengths.
  Vol0 ??= 1e-4 * PCSA * Lf0; // New calculation of the vol for the specific muscle branch (m^3)
};


////////////////////////////////////////////
//     TrapeziusScapular (14 elements)     //
////////////////////////////////////////////
AnyMuscleModel TrapeziusScapular1 =
{
  AnyFolder& MuscleParameters = ..Data.unscaled.ModelParameters.Muscles.TrapeziusScapular;
  AnyIntVar MuscleElemNo = 1; ///< The number of this element of the muscle
  AnyIntVar MuscleElemAmount = MuscleParameters.MuscleElemAmount; ///< The total amount of elements for this muscle
  F0 ??= .DefaultMusPar.PCSAfactor*PCSA; ///< Maximum force output at optimum fiber length
  Lf0 ??= MuscleParameters.OptimalFiberlength / cos(pi/180*MuscleParameters.Pennationangle); //< Optimal fiber length corrected by pennation angle
  AnyVar PCSA ??= 1e4*.StrengthScaleHumerus*MuscleParameters.MuscleVolumeSIScaled/(.TrapeziusScapular1.Lf0 +.TrapeziusScapular2.Lf0 +.TrapeziusScapular3.Lf0 +.TrapeziusScapular4.Lf0 +.TrapeziusScapular5.Lf0 +.TrapeziusScapular6.Lf0 +.TrapeziusScapular7.Lf0 +.TrapeziusScapular8.Lf0 +.TrapeziusScapular9.Lf0 +.TrapeziusScapular10.Lf0 +.TrapeziusScapular11.Lf0 +.TrapeziusScapular12.Lf0 +.TrapeziusScapular13.Lf0 +.TrapeziusScapular14.Lf0 ); ///< PCSA (cm2) of the individual element is total volumen divided by the sum of muscle element fiber lengths.
  Vol0 ??= 1e-4 * PCSA * Lf0; // New calculation of the vol for the specific muscle branch (m^3)
};

AnyMuscleModel TrapeziusScapular2 =
{
  AnyFolder& MuscleParameters = ..Data.unscaled.ModelParameters.Muscles.TrapeziusScapular;
  AnyIntVar MuscleElemNo = 2; ///< The number of this element of the muscle
  AnyIntVar MuscleElemAmount = MuscleParameters.MuscleElemAmount; ///< The total amount of elements for this muscle
  F0 ??= .DefaultMusPar.PCSAfactor*PCSA; ///< Maximum force output at optimum fiber length
  Lf0 ??= MuscleParameters.OptimalFiberlength / cos(pi/180*MuscleParameters.Pennationangle); //< Optimal fiber length corrected by pennation angle
  AnyVar PCSA ??= 1e4*.StrengthScaleHumerus*MuscleParameters.MuscleVolumeSIScaled/(.TrapeziusScapular1.Lf0 +.TrapeziusScapular2.Lf0 +.TrapeziusScapular3.Lf0 +.TrapeziusScapular4.Lf0 +.TrapeziusScapular5.Lf0 +.TrapeziusScapular6.Lf0 +.TrapeziusScapular7.Lf0 +.TrapeziusScapular8.Lf0 +.TrapeziusScapular9.Lf0 +.TrapeziusScapular10.Lf0 +.TrapeziusScapular11.Lf0 +.TrapeziusScapular12.Lf0 +.TrapeziusScapular13.Lf0 +.TrapeziusScapular14.Lf0 ); ///< PCSA (cm2) of the individual element is total volumen divided by the sum of muscle element fiber lengths.
  Vol0 ??= 1e-4 * PCSA * Lf0; // New calculation of the vol for the specific muscle branch (m^3)
};

AnyMuscleModel TrapeziusScapular3 =
{
  AnyFolder& MuscleParameters = ..Data.unscaled.ModelParameters.Muscles.TrapeziusScapular;
  AnyIntVar MuscleElemNo = 3; ///< The number of this element of the muscle
  AnyIntVar MuscleElemAmount = MuscleParameters.MuscleElemAmount; ///< The total amount of elements for this muscle
  F0 ??= .DefaultMusPar.PCSAfactor*PCSA; ///< Maximum force output at optimum fiber length
  Lf0 ??= MuscleParameters.OptimalFiberlength / cos(pi/180*MuscleParameters.Pennationangle); //< Optimal fiber length corrected by pennation angle
  AnyVar PCSA ??= 1e4*.StrengthScaleHumerus*MuscleParameters.MuscleVolumeSIScaled/(.TrapeziusScapular1.Lf0 +.TrapeziusScapular2.Lf0 +.TrapeziusScapular3.Lf0 +.TrapeziusScapular4.Lf0 +.TrapeziusScapular5.Lf0 +.TrapeziusScapular6.Lf0 +.TrapeziusScapular7.Lf0 +.TrapeziusScapular8.Lf0 +.TrapeziusScapular9.Lf0 +.TrapeziusScapular10.Lf0 +.TrapeziusScapular11.Lf0 +.TrapeziusScapular12.Lf0 +.TrapeziusScapular13.Lf0 +.TrapeziusScapular14.Lf0 ); ///< PCSA (cm2) of the individual element is total volumen divided by the sum of muscle element fiber lengths.
  Vol0 ??= 1e-4 * PCSA * Lf0; // New calculation of the vol for the specific muscle branch (m^3)
};

AnyMuscleModel TrapeziusScapular4 =
{
  AnyFolder& MuscleParameters = ..Data.unscaled.ModelParameters.Muscles.TrapeziusScapular;
  AnyIntVar MuscleElemNo = 4; ///< The number of this element of the muscle
  AnyIntVar MuscleElemAmount = MuscleParameters.MuscleElemAmount; ///< The total amount of elements for this muscle
  F0 ??= .DefaultMusPar.PCSAfactor*PCSA; ///< Maximum force output at optimum fiber length
  Lf0 ??= MuscleParameters.OptimalFiberlength / cos(pi/180*MuscleParameters.Pennationangle); //< Optimal fiber length corrected by pennation angle
  AnyVar PCSA ??= 1e4*.StrengthScaleHumerus*MuscleParameters.MuscleVolumeSIScaled/(.TrapeziusScapular1.Lf0 +.TrapeziusScapular2.Lf0 +.TrapeziusScapular3.Lf0 +.TrapeziusScapular4.Lf0 +.TrapeziusScapular5.Lf0 +.TrapeziusScapular6.Lf0 +.TrapeziusScapular7.Lf0 +.TrapeziusScapular8.Lf0 +.TrapeziusScapular9.Lf0 +.TrapeziusScapular10.Lf0 +.TrapeziusScapular11.Lf0 +.TrapeziusScapular12.Lf0 +.TrapeziusScapular13.Lf0 +.TrapeziusScapular14.Lf0 ); ///< PCSA (cm2) of the individual element is total volumen divided by the sum of muscle element fiber lengths.
  Vol0 ??= 1e-4 * PCSA * Lf0; // New calculation of the vol for the specific muscle branch (m^3)
};

AnyMuscleModel TrapeziusScapular5 =
{
  AnyFolder& MuscleParameters = ..Data.unscaled.ModelParameters.Muscles.TrapeziusScapular;
  AnyIntVar MuscleElemNo = 5; ///< The number of this element of the muscle
  AnyIntVar MuscleElemAmount = MuscleParameters.MuscleElemAmount; ///< The total amount of elements for this muscle
  F0 ??= .DefaultMusPar.PCSAfactor*PCSA; ///< Maximum force output at optimum fiber length
  Lf0 ??= MuscleParameters.OptimalFiberlength / cos(pi/180*MuscleParameters.Pennationangle); //< Optimal fiber length corrected by pennation angle
  AnyVar PCSA ??= 1e4*.StrengthScaleHumerus*MuscleParameters.MuscleVolumeSIScaled/(.TrapeziusScapular1.Lf0 +.TrapeziusScapular2.Lf0 +.TrapeziusScapular3.Lf0 +.TrapeziusScapular4.Lf0 +.TrapeziusScapular5.Lf0 +.TrapeziusScapular6.Lf0 +.TrapeziusScapular7.Lf0 +.TrapeziusScapular8.Lf0 +.TrapeziusScapular9.Lf0 +.TrapeziusScapular10.Lf0 +.TrapeziusScapular11.Lf0 +.TrapeziusScapular12.Lf0 +.TrapeziusScapular13.Lf0 +.TrapeziusScapular14.Lf0 ); ///< PCSA (cm2) of the individual element is total volumen divided by the sum of muscle element fiber lengths.
  Vol0 ??= 1e-4 * PCSA * Lf0; // New calculation of the vol for the specific muscle branch (m^3)
};

AnyMuscleModel TrapeziusScapular6 =
{
  AnyFolder& MuscleParameters = ..Data.unscaled.ModelParameters.Muscles.TrapeziusScapular;
  AnyIntVar MuscleElemNo = 6; ///< The number of this element of the muscle
  AnyIntVar MuscleElemAmount = MuscleParameters.MuscleElemAmount; ///< The total amount of elements for this muscle
  F0 ??= .DefaultMusPar.PCSAfactor*PCSA; ///< Maximum force output at optimum fiber length
  Lf0 ??= MuscleParameters.OptimalFiberlength / cos(pi/180*MuscleParameters.Pennationangle); //< Optimal fiber length corrected by pennation angle
  AnyVar PCSA ??= 1e4*.StrengthScaleHumerus*MuscleParameters.MuscleVolumeSIScaled/(.TrapeziusScapular1.Lf0 +.TrapeziusScapular2.Lf0 +.TrapeziusScapular3.Lf0 +.TrapeziusScapular4.Lf0 +.TrapeziusScapular5.Lf0 +.TrapeziusScapular6.Lf0 +.TrapeziusScapular7.Lf0 +.TrapeziusScapular8.Lf0 +.TrapeziusScapular9.Lf0 +.TrapeziusScapular10.Lf0 +.TrapeziusScapular11.Lf0 +.TrapeziusScapular12.Lf0 +.TrapeziusScapular13.Lf0 +.TrapeziusScapular14.Lf0 ); ///< PCSA (cm2) of the individual element is total volumen divided by the sum of muscle element fiber lengths.
  Vol0 ??= 1e-4 * PCSA * Lf0; // New calculation of the vol for the specific muscle branch (m^3)
};

AnyMuscleModel TrapeziusScapular7 =
{
  AnyFolder& MuscleParameters = ..Data.unscaled.ModelParameters.Muscles.TrapeziusScapular;
  AnyIntVar MuscleElemNo = 7; ///< The number of this element of the muscle
  AnyIntVar MuscleElemAmount = MuscleParameters.MuscleElemAmount; ///< The total amount of elements for this muscle
  F0 ??= .DefaultMusPar.PCSAfactor*PCSA; ///< Maximum force output at optimum fiber length
  Lf0 ??= MuscleParameters.OptimalFiberlength / cos(pi/180*MuscleParameters.Pennationangle); //< Optimal fiber length corrected by pennation angle
  AnyVar PCSA ??= 1e4*.StrengthScaleHumerus*MuscleParameters.MuscleVolumeSIScaled/(.TrapeziusScapular1.Lf0 +.TrapeziusScapular2.Lf0 +.TrapeziusScapular3.Lf0 +.TrapeziusScapular4.Lf0 +.TrapeziusScapular5.Lf0 +.TrapeziusScapular6.Lf0 +.TrapeziusScapular7.Lf0 +.TrapeziusScapular8.Lf0 +.TrapeziusScapular9.Lf0 +.TrapeziusScapular10.Lf0 +.TrapeziusScapular11.Lf0 +.TrapeziusScapular12.Lf0 +.TrapeziusScapular13.Lf0 +.TrapeziusScapular14.Lf0 ); ///< PCSA (cm2) of the individual element is total volumen divided by the sum of muscle element fiber lengths.
  Vol0 ??= 1e-4 * PCSA * Lf0; // New calculation of the vol for the specific muscle branch (m^3)
};

AnyMuscleModel TrapeziusScapular8 =
{
  AnyFolder& MuscleParameters = ..Data.unscaled.ModelParameters.Muscles.TrapeziusScapular;
  AnyIntVar MuscleElemNo = 8; ///< The number of this element of the muscle
  AnyIntVar MuscleElemAmount = MuscleParameters.MuscleElemAmount; ///< The total amount of elements for this muscle
  F0 ??= .DefaultMusPar.PCSAfactor*PCSA; ///< Maximum force output at optimum fiber length
  Lf0 ??= MuscleParameters.OptimalFiberlength / cos(pi/180*MuscleParameters.Pennationangle); //< Optimal fiber length corrected by pennation angle
  AnyVar PCSA ??= 1e4*.StrengthScaleHumerus*MuscleParameters.MuscleVolumeSIScaled/(.TrapeziusScapular1.Lf0 +.TrapeziusScapular2.Lf0 +.TrapeziusScapular3.Lf0 +.TrapeziusScapular4.Lf0 +.TrapeziusScapular5.Lf0 +.TrapeziusScapular6.Lf0 +.TrapeziusScapular7.Lf0 +.TrapeziusScapular8.Lf0 +.TrapeziusScapular9.Lf0 +.TrapeziusScapular10.Lf0 +.TrapeziusScapular11.Lf0 +.TrapeziusScapular12.Lf0 +.TrapeziusScapular13.Lf0 +.TrapeziusScapular14.Lf0 ); ///< PCSA (cm2) of the individual element is total volumen divided by the sum of muscle element fiber lengths.
  Vol0 ??= 1e-4 * PCSA * Lf0; // New calculation of the vol for the specific muscle branch (m^3)
};

AnyMuscleModel TrapeziusScapular9 =
{
  AnyFolder& MuscleParameters = ..Data.unscaled.ModelParameters.Muscles.TrapeziusScapular;
  AnyIntVar MuscleElemNo = 9; ///< The number of this element of the muscle
  AnyIntVar MuscleElemAmount = MuscleParameters.MuscleElemAmount; ///< The total amount of elements for this muscle
  F0 ??= .DefaultMusPar.PCSAfactor*PCSA; ///< Maximum force output at optimum fiber length
  Lf0 ??= MuscleParameters.OptimalFiberlength / cos(pi/180*MuscleParameters.Pennationangle); //< Optimal fiber length corrected by pennation angle
  AnyVar PCSA ??= 1e4*.StrengthScaleHumerus*MuscleParameters.MuscleVolumeSIScaled/(.TrapeziusScapular1.Lf0 +.TrapeziusScapular2.Lf0 +.TrapeziusScapular3.Lf0 +.TrapeziusScapular4.Lf0 +.TrapeziusScapular5.Lf0 +.TrapeziusScapular6.Lf0 +.TrapeziusScapular7.Lf0 +.TrapeziusScapular8.Lf0 +.TrapeziusScapular9.Lf0 +.TrapeziusScapular10.Lf0 +.TrapeziusScapular11.Lf0 +.TrapeziusScapular12.Lf0 +.TrapeziusScapular13.Lf0 +.TrapeziusScapular14.Lf0 ); ///< PCSA (cm2) of the individual element is total volumen divided by the sum of muscle element fiber lengths.
  Vol0 ??= 1e-4 * PCSA * Lf0; // New calculation of the vol for the specific muscle branch (m^3)
};

AnyMuscleModel TrapeziusScapular10 =
{
  AnyFolder& MuscleParameters = ..Data.unscaled.ModelParameters.Muscles.TrapeziusScapular;
  AnyIntVar MuscleElemNo = 10; ///< The number of this element of the muscle
  AnyIntVar MuscleElemAmount = MuscleParameters.MuscleElemAmount; ///< The total amount of elements for this muscle
  F0 ??= .DefaultMusPar.PCSAfactor*PCSA; ///< Maximum force output at optimum fiber length
  Lf0 ??= MuscleParameters.OptimalFiberlength / cos(pi/180*MuscleParameters.Pennationangle); //< Optimal fiber length corrected by pennation angle
  AnyVar PCSA ??= 1e4*.StrengthScaleHumerus*MuscleParameters.MuscleVolumeSIScaled/(.TrapeziusScapular1.Lf0 +.TrapeziusScapular2.Lf0 +.TrapeziusScapular3.Lf0 +.TrapeziusScapular4.Lf0 +.TrapeziusScapular5.Lf0 +.TrapeziusScapular6.Lf0 +.TrapeziusScapular7.Lf0 +.TrapeziusScapular8.Lf0 +.TrapeziusScapular9.Lf0 +.TrapeziusScapular10.Lf0 +.TrapeziusScapular11.Lf0 +.TrapeziusScapular12.Lf0 +.TrapeziusScapular13.Lf0 +.TrapeziusScapular14.Lf0 ); ///< PCSA (cm2) of the individual element is total volumen divided by the sum of muscle element fiber lengths.
  Vol0 ??= 1e-4 * PCSA * Lf0; // New calculation of the vol for the specific muscle branch (m^3)
};

AnyMuscleModel TrapeziusScapular11 =
{
  AnyFolder& MuscleParameters = ..Data.unscaled.ModelParameters.Muscles.TrapeziusScapular;
  AnyIntVar MuscleElemNo = 11; ///< The number of this element of the muscle
  AnyIntVar MuscleElemAmount = MuscleParameters.MuscleElemAmount; ///< The total amount of elements for this muscle
  F0 ??= .DefaultMusPar.PCSAfactor*PCSA; ///< Maximum force output at optimum fiber length
  Lf0 ??= MuscleParameters.OptimalFiberlength / cos(pi/180*MuscleParameters.Pennationangle); //< Optimal fiber length corrected by pennation angle
  AnyVar PCSA ??= 1e4*.StrengthScaleHumerus*MuscleParameters.MuscleVolumeSIScaled/(.TrapeziusScapular1.Lf0 +.TrapeziusScapular2.Lf0 +.TrapeziusScapular3.Lf0 +.TrapeziusScapular4.Lf0 +.TrapeziusScapular5.Lf0 +.TrapeziusScapular6.Lf0 +.TrapeziusScapular7.Lf0 +.TrapeziusScapular8.Lf0 +.TrapeziusScapular9.Lf0 +.TrapeziusScapular10.Lf0 +.TrapeziusScapular11.Lf0 +.TrapeziusScapular12.Lf0 +.TrapeziusScapular13.Lf0 +.TrapeziusScapular14.Lf0 ); ///< PCSA (cm2) of the individual element is total volumen divided by the sum of muscle element fiber lengths.
  Vol0 ??= 1e-4 * PCSA * Lf0; // New calculation of the vol for the specific muscle branch (m^3)
};

AnyMuscleModel TrapeziusScapular12 =
{
  AnyFolder& MuscleParameters = ..Data.unscaled.ModelParameters.Muscles.TrapeziusScapular;
  AnyIntVar MuscleElemNo = 12; ///< The number of this element of the muscle
  AnyIntVar MuscleElemAmount = MuscleParameters.MuscleElemAmount; ///< The total amount of elements for this muscle
  F0 ??= .DefaultMusPar.PCSAfactor*PCSA; ///< Maximum force output at optimum fiber length
  Lf0 ??= MuscleParameters.OptimalFiberlength / cos(pi/180*MuscleParameters.Pennationangle); //< Optimal fiber length corrected by pennation angle
  AnyVar PCSA ??= 1e4*.StrengthScaleHumerus*MuscleParameters.MuscleVolumeSIScaled/(.TrapeziusScapular1.Lf0 +.TrapeziusScapular2.Lf0 +.TrapeziusScapular3.Lf0 +.TrapeziusScapular4.Lf0 +.TrapeziusScapular5.Lf0 +.TrapeziusScapular6.Lf0 +.TrapeziusScapular7.Lf0 +.TrapeziusScapular8.Lf0 +.TrapeziusScapular9.Lf0 +.TrapeziusScapular10.Lf0 +.TrapeziusScapular11.Lf0 +.TrapeziusScapular12.Lf0 +.TrapeziusScapular13.Lf0 +.TrapeziusScapular14.Lf0 ); ///< PCSA (cm2) of the individual element is total volumen divided by the sum of muscle element fiber lengths.
  Vol0 ??= 1e-4 * PCSA * Lf0; // New calculation of the vol for the specific muscle branch (m^3)
};

AnyMuscleModel TrapeziusScapular13 =
{
  AnyFolder& MuscleParameters = ..Data.unscaled.ModelParameters.Muscles.TrapeziusScapular;
  AnyIntVar MuscleElemNo = 13; ///< The number of this element of the muscle
  AnyIntVar MuscleElemAmount = MuscleParameters.MuscleElemAmount; ///< The total amount of elements for this muscle
  F0 ??= .DefaultMusPar.PCSAfactor*PCSA; ///< Maximum force output at optimum fiber length
  Lf0 ??= MuscleParameters.OptimalFiberlength / cos(pi/180*MuscleParameters.Pennationangle); //< Optimal fiber length corrected by pennation angle
  AnyVar PCSA ??= 1e4*.StrengthScaleHumerus*MuscleParameters.MuscleVolumeSIScaled/(.TrapeziusScapular1.Lf0 +.TrapeziusScapular2.Lf0 +.TrapeziusScapular3.Lf0 +.TrapeziusScapular4.Lf0 +.TrapeziusScapular5.Lf0 +.TrapeziusScapular6.Lf0 +.TrapeziusScapular7.Lf0 +.TrapeziusScapular8.Lf0 +.TrapeziusScapular9.Lf0 +.TrapeziusScapular10.Lf0 +.TrapeziusScapular11.Lf0 +.TrapeziusScapular12.Lf0 +.TrapeziusScapular13.Lf0 +.TrapeziusScapular14.Lf0 ); ///< PCSA (cm2) of the individual element is total volumen divided by the sum of muscle element fiber lengths.
  Vol0 ??= 1e-4 * PCSA * Lf0; // New calculation of the vol for the specific muscle branch (m^3)
};

AnyMuscleModel TrapeziusScapular14 =
{
  AnyFolder& MuscleParameters = ..Data.unscaled.ModelParameters.Muscles.TrapeziusScapular;
  AnyIntVar MuscleElemNo = 14; ///< The number of this element of the muscle
  AnyIntVar MuscleElemAmount = MuscleParameters.MuscleElemAmount; ///< The total amount of elements for this muscle
  F0 ??= .DefaultMusPar.PCSAfactor*PCSA; ///< Maximum force output at optimum fiber length
  Lf0 ??= MuscleParameters.OptimalFiberlength / cos(pi/180*MuscleParameters.Pennationangle); //< Optimal fiber length corrected by pennation angle
  AnyVar PCSA ??= 1e4*.StrengthScaleHumerus*MuscleParameters.MuscleVolumeSIScaled/(.TrapeziusScapular1.Lf0 +.TrapeziusScapular2.Lf0 +.TrapeziusScapular3.Lf0 +.TrapeziusScapular4.Lf0 +.TrapeziusScapular5.Lf0 +.TrapeziusScapular6.Lf0 +.TrapeziusScapular7.Lf0 +.TrapeziusScapular8.Lf0 +.TrapeziusScapular9.Lf0 +.TrapeziusScapular10.Lf0 +.TrapeziusScapular11.Lf0 +.TrapeziusScapular12.Lf0 +.TrapeziusScapular13.Lf0 +.TrapeziusScapular14.Lf0 ); ///< PCSA (cm2) of the individual element is total volumen divided by the sum of muscle element fiber lengths.
  Vol0 ??= 1e-4 * PCSA * Lf0; // New calculation of the vol for the specific muscle branch (m^3)
};


//////////////////////////////////////////////
//     TrapeziusClavicular (6 elements)     //
//////////////////////////////////////////////
AnyMuscleModel TrapeziusClavicular1 =
{
  AnyFolder& MuscleParameters = ..Data.unscaled.ModelParameters.Muscles.TrapeziusClavicular;
  AnyIntVar MuscleElemNo = 1; ///< The number of this element of the muscle
  AnyIntVar MuscleElemAmount = MuscleParameters.MuscleElemAmount; ///< The total amount of elements for this muscle
  F0 ??= .DefaultMusPar.PCSAfactor*PCSA; ///< Maximum force output at optimum fiber length
  Lf0 ??= MuscleParameters.OptimalFiberlength / cos(pi/180*MuscleParameters.Pennationangle); //< Optimal fiber length corrected by pennation angle
  AnyVar PCSA ??= 1e4*.StrengthScaleHumerus*MuscleParameters.MuscleVolumeSIScaled/(.TrapeziusClavicular1.Lf0 +.TrapeziusClavicular2.Lf0 +.TrapeziusClavicular3.Lf0 +.TrapeziusClavicular4.Lf0 +.TrapeziusClavicular5.Lf0 +.TrapeziusClavicular6.Lf0 ); ///< PCSA (cm2) of the individual element is total volumen divided by the sum of muscle element fiber lengths.
  Vol0 ??= 1e-4 * PCSA * Lf0; // New calculation of the vol for the specific muscle branch (m^3)
};

AnyMuscleModel TrapeziusClavicular2 =
{
  AnyFolder& MuscleParameters = ..Data.unscaled.ModelParameters.Muscles.TrapeziusClavicular;
  AnyIntVar MuscleElemNo = 2; ///< The number of this element of the muscle
  AnyIntVar MuscleElemAmount = MuscleParameters.MuscleElemAmount; ///< The total amount of elements for this muscle
  F0 ??= .DefaultMusPar.PCSAfactor*PCSA; ///< Maximum force output at optimum fiber length
  Lf0 ??= MuscleParameters.OptimalFiberlength / cos(pi/180*MuscleParameters.Pennationangle); //< Optimal fiber length corrected by pennation angle
  AnyVar PCSA ??= 1e4*.StrengthScaleHumerus*MuscleParameters.MuscleVolumeSIScaled/(.TrapeziusClavicular1.Lf0 +.TrapeziusClavicular2.Lf0 +.TrapeziusClavicular3.Lf0 +.TrapeziusClavicular4.Lf0 +.TrapeziusClavicular5.Lf0 +.TrapeziusClavicular6.Lf0 ); ///< PCSA (cm2) of the individual element is total volumen divided by the sum of muscle element fiber lengths.
  Vol0 ??= 1e-4 * PCSA * Lf0; // New calculation of the vol for the specific muscle branch (m^3)
};

AnyMuscleModel TrapeziusClavicular3 =
{
  AnyFolder& MuscleParameters = ..Data.unscaled.ModelParameters.Muscles.TrapeziusClavicular;
  AnyIntVar MuscleElemNo = 3; ///< The number of this element of the muscle
  AnyIntVar MuscleElemAmount = MuscleParameters.MuscleElemAmount; ///< The total amount of elements for this muscle
  F0 ??= .DefaultMusPar.PCSAfactor*PCSA; ///< Maximum force output at optimum fiber length
  Lf0 ??= MuscleParameters.OptimalFiberlength / cos(pi/180*MuscleParameters.Pennationangle); //< Optimal fiber length corrected by pennation angle
  AnyVar PCSA ??= 1e4*.StrengthScaleHumerus*MuscleParameters.MuscleVolumeSIScaled/(.TrapeziusClavicular1.Lf0 +.TrapeziusClavicular2.Lf0 +.TrapeziusClavicular3.Lf0 +.TrapeziusClavicular4.Lf0 +.TrapeziusClavicular5.Lf0 +.TrapeziusClavicular6.Lf0 ); ///< PCSA (cm2) of the individual element is total volumen divided by the sum of muscle element fiber lengths.
  Vol0 ??= 1e-4 * PCSA * Lf0; // New calculation of the vol for the specific muscle branch (m^3)
};

AnyMuscleModel TrapeziusClavicular4 =
{
  AnyFolder& MuscleParameters = ..Data.unscaled.ModelParameters.Muscles.TrapeziusClavicular;
  AnyIntVar MuscleElemNo = 4; ///< The number of this element of the muscle
  AnyIntVar MuscleElemAmount = MuscleParameters.MuscleElemAmount; ///< The total amount of elements for this muscle
  F0 ??= .DefaultMusPar.PCSAfactor*PCSA; ///< Maximum force output at optimum fiber length
  Lf0 ??= MuscleParameters.OptimalFiberlength / cos(pi/180*MuscleParameters.Pennationangle); //< Optimal fiber length corrected by pennation angle
  AnyVar PCSA ??= 1e4*.StrengthScaleHumerus*MuscleParameters.MuscleVolumeSIScaled/(.TrapeziusClavicular1.Lf0 +.TrapeziusClavicular2.Lf0 +.TrapeziusClavicular3.Lf0 +.TrapeziusClavicular4.Lf0 +.TrapeziusClavicular5.Lf0 +.TrapeziusClavicular6.Lf0 ); ///< PCSA (cm2) of the individual element is total volumen divided by the sum of muscle element fiber lengths.
  Vol0 ??= 1e-4 * PCSA * Lf0; // New calculation of the vol for the specific muscle branch (m^3)
};

AnyMuscleModel TrapeziusClavicular5 =
{
  AnyFolder& MuscleParameters = ..Data.unscaled.ModelParameters.Muscles.TrapeziusClavicular;
  AnyIntVar MuscleElemNo = 5; ///< The number of this element of the muscle
  AnyIntVar MuscleElemAmount = MuscleParameters.MuscleElemAmount; ///< The total amount of elements for this muscle
  F0 ??= .DefaultMusPar.PCSAfactor*PCSA; ///< Maximum force output at optimum fiber length
  Lf0 ??= MuscleParameters.OptimalFiberlength / cos(pi/180*MuscleParameters.Pennationangle); //< Optimal fiber length corrected by pennation angle
  AnyVar PCSA ??= 1e4*.StrengthScaleHumerus*MuscleParameters.MuscleVolumeSIScaled/(.TrapeziusClavicular1.Lf0 +.TrapeziusClavicular2.Lf0 +.TrapeziusClavicular3.Lf0 +.TrapeziusClavicular4.Lf0 +.TrapeziusClavicular5.Lf0 +.TrapeziusClavicular6.Lf0 ); ///< PCSA (cm2) of the individual element is total volumen divided by the sum of muscle element fiber lengths.
  Vol0 ??= 1e-4 * PCSA * Lf0; // New calculation of the vol for the specific muscle branch (m^3)
};

AnyMuscleModel TrapeziusClavicular6 =
{
  AnyFolder& MuscleParameters = ..Data.unscaled.ModelParameters.Muscles.TrapeziusClavicular;
  AnyIntVar MuscleElemNo = 6; ///< The number of this element of the muscle
  AnyIntVar MuscleElemAmount = MuscleParameters.MuscleElemAmount; ///< The total amount of elements for this muscle
  F0 ??= .DefaultMusPar.PCSAfactor*PCSA; ///< Maximum force output at optimum fiber length
  Lf0 ??= MuscleParameters.OptimalFiberlength / cos(pi/180*MuscleParameters.Pennationangle); //< Optimal fiber length corrected by pennation angle
  AnyVar PCSA ??= 1e4*.StrengthScaleHumerus*MuscleParameters.MuscleVolumeSIScaled/(.TrapeziusClavicular1.Lf0 +.TrapeziusClavicular2.Lf0 +.TrapeziusClavicular3.Lf0 +.TrapeziusClavicular4.Lf0 +.TrapeziusClavicular5.Lf0 +.TrapeziusClavicular6.Lf0 ); ///< PCSA (cm2) of the individual element is total volumen divided by the sum of muscle element fiber lengths.
  Vol0 ??= 1e-4 * PCSA * Lf0; // New calculation of the vol for the specific muscle branch (m^3)
};


///////////////////////////////////////////////
//     TricepsBrachiiLongum (2 elements)     //
///////////////////////////////////////////////
AnyMuscleModel TricepsBrachiiLongum1 =
{
  AnyFolder& MuscleParameters = ..Data.unscaled.ModelParameters.Muscles.TricepsBrachiiLongum;
  AnyIntVar MuscleElemNo = 1; ///< The number of this element of the muscle
  AnyIntVar MuscleElemAmount = MuscleParameters.MuscleElemAmount; ///< The total amount of elements for this muscle
  F0 ??= .DefaultMusPar.PCSAfactor*PCSA; ///< Maximum force output at optimum fiber length
  Lf0 ??= MuscleParameters.OptimalFiberlength / cos(pi/180*MuscleParameters.Pennationangle); //< Optimal fiber length corrected by pennation angle
  AnyVar PCSA ??= 1e4*.StrengthScaleHumerus*MuscleParameters.MuscleVolumeSIScaled/(.TricepsBrachiiLongum1.Lf0 +.TricepsBrachiiLongum2.Lf0 ); ///< PCSA (cm2) of the individual element is total volumen divided by the sum of muscle element fiber lengths.
  Vol0 ??= 1e-4 * PCSA * Lf0; // New calculation of the vol for the specific muscle branch (m^3)
};

AnyMuscleModel TricepsBrachiiLongum2 =
{
  AnyFolder& MuscleParameters = ..Data.unscaled.ModelParameters.Muscles.TricepsBrachiiLongum;
  AnyIntVar MuscleElemNo = 2; ///< The number of this element of the muscle
  AnyIntVar MuscleElemAmount = MuscleParameters.MuscleElemAmount; ///< The total amount of elements for this muscle
  F0 ??= .DefaultMusPar.PCSAfactor*PCSA; ///< Maximum force output at optimum fiber length
  Lf0 ??= MuscleParameters.OptimalFiberlength / cos(pi/180*MuscleParameters.Pennationangle); //< Optimal fiber length corrected by pennation angle
  AnyVar PCSA ??= 1e4*.StrengthScaleHumerus*MuscleParameters.MuscleVolumeSIScaled/(.TricepsBrachiiLongum1.Lf0 +.TricepsBrachiiLongum2.Lf0 ); ///< PCSA (cm2) of the individual element is total volumen divided by the sum of muscle element fiber lengths.
  Vol0 ??= 1e-4 * PCSA * Lf0; // New calculation of the vol for the specific muscle branch (m^3)
};


/////////////////////////////////////
//     Brachialis (2 elements)     //
/////////////////////////////////////
AnyMuscleModel Brachialis1 =
{
  AnyFolder& MuscleParameters = ..Data.unscaled.ModelParameters.Muscles.Brachialis;
  AnyIntVar MuscleElemNo = 1; ///< The number of this element of the muscle
  AnyIntVar MuscleElemAmount = MuscleParameters.MuscleElemAmount; ///< The total amount of elements for this muscle
  F0 ??= .DefaultMusPar.PCSAfactor*PCSA; ///< Maximum force output at optimum fiber length
  Lf0 ??= MuscleParameters.OptimalFiberlength / cos(pi/180*MuscleParameters.Pennationangle); //< Optimal fiber length corrected by pennation angle
  AnyVar PCSA ??= 1e4*.StrengthScaleHumerus*MuscleParameters.MuscleVolumeSIScaled/(.Brachialis1.Lf0 +.Brachialis2.Lf0 ); ///< PCSA (cm2) of the individual element is total volumen divided by the sum of muscle element fiber lengths.
  Vol0 ??= 1e-4 * PCSA * Lf0; // New calculation of the vol for the specific muscle branch (m^3)
};

AnyMuscleModel Brachialis2 =
{
  AnyFolder& MuscleParameters = ..Data.unscaled.ModelParameters.Muscles.Brachialis;
  AnyIntVar MuscleElemNo = 2; ///< The number of this element of the muscle
  AnyIntVar MuscleElemAmount = MuscleParameters.MuscleElemAmount; ///< The total amount of elements for this muscle
  F0 ??= .DefaultMusPar.PCSAfactor*PCSA; ///< Maximum force output at optimum fiber length
  Lf0 ??= MuscleParameters.OptimalFiberlength / cos(pi/180*MuscleParameters.Pennationangle); //< Optimal fiber length corrected by pennation angle
  AnyVar PCSA ??= 1e4*.StrengthScaleHumerus*MuscleParameters.MuscleVolumeSIScaled/(.Brachialis1.Lf0 +.Brachialis2.Lf0 ); ///< PCSA (cm2) of the individual element is total volumen divided by the sum of muscle element fiber lengths.
  Vol0 ??= 1e-4 * PCSA * Lf0; // New calculation of the vol for the specific muscle branch (m^3)
};


////////////////////////////////////////////////
//     TricepsBrachiiMediale (2 elements)     //
////////////////////////////////////////////////
AnyMuscleModel TricepsBrachiiMediale1 =
{
  AnyFolder& MuscleParameters = ..Data.unscaled.ModelParameters.Muscles.TricepsBrachiiMediale;
  AnyIntVar MuscleElemNo = 1; ///< The number of this element of the muscle
  AnyIntVar MuscleElemAmount = MuscleParameters.MuscleElemAmount; ///< The total amount of elements for this muscle
  F0 ??= .DefaultMusPar.PCSAfactor*PCSA; ///< Maximum force output at optimum fiber length
  Lf0 ??= MuscleParameters.OptimalFiberlength / cos(pi/180*MuscleParameters.Pennationangle); //< Optimal fiber length corrected by pennation angle
  AnyVar PCSA ??= 1e4*.StrengthScaleHumerus*MuscleParameters.MuscleVolumeSIScaled/(.TricepsBrachiiMediale1.Lf0 +.TricepsBrachiiMediale2.Lf0 ); ///< PCSA (cm2) of the individual element is total volumen divided by the sum of muscle element fiber lengths.
  Vol0 ??= 1e-4 * PCSA * Lf0; // New calculation of the vol for the specific muscle branch (m^3)
};

AnyMuscleModel TricepsBrachiiMediale2 =
{
  AnyFolder& MuscleParameters = ..Data.unscaled.ModelParameters.Muscles.TricepsBrachiiMediale;
  AnyIntVar MuscleElemNo = 2; ///< The number of this element of the muscle
  AnyIntVar MuscleElemAmount = MuscleParameters.MuscleElemAmount; ///< The total amount of elements for this muscle
  F0 ??= .DefaultMusPar.PCSAfactor*PCSA; ///< Maximum force output at optimum fiber length
  Lf0 ??= MuscleParameters.OptimalFiberlength / cos(pi/180*MuscleParameters.Pennationangle); //< Optimal fiber length corrected by pennation angle
  AnyVar PCSA ??= 1e4*.StrengthScaleHumerus*MuscleParameters.MuscleVolumeSIScaled/(.TricepsBrachiiMediale1.Lf0 +.TricepsBrachiiMediale2.Lf0 ); ///< PCSA (cm2) of the individual element is total volumen divided by the sum of muscle element fiber lengths.
  Vol0 ??= 1e-4 * PCSA * Lf0; // New calculation of the vol for the specific muscle branch (m^3)
};


/////////////////////////////////////////////////
//     TricepsBrachiiLaterale (2 elements)     //
/////////////////////////////////////////////////
AnyMuscleModel TricepsBrachiiLaterale1 =
{
  AnyFolder& MuscleParameters = ..Data.unscaled.ModelParameters.Muscles.TricepsBrachiiLaterale;
  AnyIntVar MuscleElemNo = 1; ///< The number of this element of the muscle
  AnyIntVar MuscleElemAmount = MuscleParameters.MuscleElemAmount; ///< The total amount of elements for this muscle
  F0 ??= .DefaultMusPar.PCSAfactor*PCSA; ///< Maximum force output at optimum fiber length
  Lf0 ??= MuscleParameters.OptimalFiberlength / cos(pi/180*MuscleParameters.Pennationangle); //< Optimal fiber length corrected by pennation angle
  AnyVar PCSA ??= 1e4*.StrengthScaleHumerus*MuscleParameters.MuscleVolumeSIScaled/(.TricepsBrachiiLaterale1.Lf0 +.TricepsBrachiiLaterale2.Lf0 ); ///< PCSA (cm2) of the individual element is total volumen divided by the sum of muscle element fiber lengths.
  Vol0 ??= 1e-4 * PCSA * Lf0; // New calculation of the vol for the specific muscle branch (m^3)
};

AnyMuscleModel TricepsBrachiiLaterale2 =
{
  AnyFolder& MuscleParameters = ..Data.unscaled.ModelParameters.Muscles.TricepsBrachiiLaterale;
  AnyIntVar MuscleElemNo = 2; ///< The number of this element of the muscle
  AnyIntVar MuscleElemAmount = MuscleParameters.MuscleElemAmount; ///< The total amount of elements for this muscle
  F0 ??= .DefaultMusPar.PCSAfactor*PCSA; ///< Maximum force output at optimum fiber length
  Lf0 ??= MuscleParameters.OptimalFiberlength / cos(pi/180*MuscleParameters.Pennationangle); //< Optimal fiber length corrected by pennation angle
  AnyVar PCSA ??= 1e4*.StrengthScaleHumerus*MuscleParameters.MuscleVolumeSIScaled/(.TricepsBrachiiLaterale1.Lf0 +.TricepsBrachiiLaterale2.Lf0 ); ///< PCSA (cm2) of the individual element is total volumen divided by the sum of muscle element fiber lengths.
  Vol0 ??= 1e-4 * PCSA * Lf0; // New calculation of the vol for the specific muscle branch (m^3)
};


//////////////////////////////////////////
//     Brachioradialis (2 elements)     //
//////////////////////////////////////////
AnyMuscleModel Brachioradialis1 =
{
  AnyFolder& MuscleParameters = ..Data.unscaled.ModelParameters.Muscles.Brachioradialis;
  AnyIntVar MuscleElemNo = 1; ///< The number of this element of the muscle
  AnyIntVar MuscleElemAmount = MuscleParameters.MuscleElemAmount; ///< The total amount of elements for this muscle
  F0 ??= .DefaultMusPar.PCSAfactor*PCSA; ///< Maximum force output at optimum fiber length
  Lf0 ??= MuscleParameters.OptimalFiberlength / cos(pi/180*MuscleParameters.Pennationangle); //< Optimal fiber length corrected by pennation angle
  AnyVar PCSA ??= 1e4*.StrengthScaleUlna*MuscleParameters.MuscleVolumeSIScaled/(.Brachioradialis1.Lf0 +.Brachioradialis2.Lf0 ); ///< PCSA (cm2) of the individual element is total volumen divided by the sum of muscle element fiber lengths.
  Vol0 ??= 1e-4 * PCSA * Lf0; // New calculation of the vol for the specific muscle branch (m^3)
};

AnyMuscleModel Brachioradialis2 =
{
  AnyFolder& MuscleParameters = ..Data.unscaled.ModelParameters.Muscles.Brachioradialis;
  AnyIntVar MuscleElemNo = 2; ///< The number of this element of the muscle
  AnyIntVar MuscleElemAmount = MuscleParameters.MuscleElemAmount; ///< The total amount of elements for this muscle
  F0 ??= .DefaultMusPar.PCSAfactor*PCSA; ///< Maximum force output at optimum fiber length
  Lf0 ??= MuscleParameters.OptimalFiberlength / cos(pi/180*MuscleParameters.Pennationangle); //< Optimal fiber length corrected by pennation angle
  AnyVar PCSA ??= 1e4*.StrengthScaleUlna*MuscleParameters.MuscleVolumeSIScaled/(.Brachioradialis1.Lf0 +.Brachioradialis2.Lf0 ); ///< PCSA (cm2) of the individual element is total volumen divided by the sum of muscle element fiber lengths.
  Vol0 ??= 1e-4 * PCSA * Lf0; // New calculation of the vol for the specific muscle branch (m^3)
};


///////////////////////////////////
//     Anconeus (2 elements)     //
///////////////////////////////////
AnyMuscleModel Anconeus1 =
{
  AnyFolder& MuscleParameters = ..Data.unscaled.ModelParameters.Muscles.Anconeus;
  AnyIntVar MuscleElemNo = 1; ///< The number of this element of the muscle
  AnyIntVar MuscleElemAmount = MuscleParameters.MuscleElemAmount; ///< The total amount of elements for this muscle
  F0 ??= .DefaultMusPar.PCSAfactor*PCSA; ///< Maximum force output at optimum fiber length
  Lf0 ??= MuscleParameters.OptimalFiberlength / cos(pi/180*MuscleParameters.Pennationangle); //< Optimal fiber length corrected by pennation angle
  AnyVar PCSA ??= 1e4*.StrengthScaleUlna*MuscleParameters.MuscleVolumeSIScaled/(.Anconeus1.Lf0 +.Anconeus2.Lf0 ); ///< PCSA (cm2) of the individual element is total volumen divided by the sum of muscle element fiber lengths.
  Vol0 ??= 1e-4 * PCSA * Lf0; // New calculation of the vol for the specific muscle branch (m^3)
};

AnyMuscleModel Anconeus2 =
{
  AnyFolder& MuscleParameters = ..Data.unscaled.ModelParameters.Muscles.Anconeus;
  AnyIntVar MuscleElemNo = 2; ///< The number of this element of the muscle
  AnyIntVar MuscleElemAmount = MuscleParameters.MuscleElemAmount; ///< The total amount of elements for this muscle
  F0 ??= .DefaultMusPar.PCSAfactor*PCSA; ///< Maximum force output at optimum fiber length
  Lf0 ??= MuscleParameters.OptimalFiberlength / cos(pi/180*MuscleParameters.Pennationangle); //< Optimal fiber length corrected by pennation angle
  AnyVar PCSA ??= 1e4*.StrengthScaleUlna*MuscleParameters.MuscleVolumeSIScaled/(.Anconeus1.Lf0 +.Anconeus2.Lf0 ); ///< PCSA (cm2) of the individual element is total volumen divided by the sum of muscle element fiber lengths.
  Vol0 ??= 1e-4 * PCSA * Lf0; // New calculation of the vol for the specific muscle branch (m^3)
};


///////////////////////////////////////////////
//     PronatorTeresHumeral (2 elements)     //
///////////////////////////////////////////////
AnyMuscleModel PronatorTeresHumeral1 =
{
  AnyFolder& MuscleParameters = ..Data.unscaled.ModelParameters.Muscles.PronatorTeresHumeral;
  AnyIntVar MuscleElemNo = 1; ///< The number of this element of the muscle
  AnyIntVar MuscleElemAmount = MuscleParameters.MuscleElemAmount; ///< The total amount of elements for this muscle
  F0 ??= .DefaultMusPar.PCSAfactor*PCSA; ///< Maximum force output at optimum fiber length
  Lf0 ??= MuscleParameters.OptimalFiberlength / cos(pi/180*MuscleParameters.Pennationangle); //< Optimal fiber length corrected by pennation angle
  AnyVar PCSA ??= 1e4*.StrengthScaleUlna*MuscleParameters.MuscleVolumeSIScaled/(.PronatorTeresHumeral1.Lf0 +.PronatorTeresHumeral2.Lf0 ); ///< PCSA (cm2) of the individual element is total volumen divided by the sum of muscle element fiber lengths.
  Vol0 ??= 1e-4 * PCSA * Lf0; // New calculation of the vol for the specific muscle branch (m^3)
};

AnyMuscleModel PronatorTeresHumeral2 =
{
  AnyFolder& MuscleParameters = ..Data.unscaled.ModelParameters.Muscles.PronatorTeresHumeral;
  AnyIntVar MuscleElemNo = 2; ///< The number of this element of the muscle
  AnyIntVar MuscleElemAmount = MuscleParameters.MuscleElemAmount; ///< The total amount of elements for this muscle
  F0 ??= .DefaultMusPar.PCSAfactor*PCSA; ///< Maximum force output at optimum fiber length
  Lf0 ??= MuscleParameters.OptimalFiberlength / cos(pi/180*MuscleParameters.Pennationangle); //< Optimal fiber length corrected by pennation angle
  AnyVar PCSA ??= 1e4*.StrengthScaleUlna*MuscleParameters.MuscleVolumeSIScaled/(.PronatorTeresHumeral1.Lf0 +.PronatorTeresHumeral2.Lf0 ); ///< PCSA (cm2) of the individual element is total volumen divided by the sum of muscle element fiber lengths.
  Vol0 ??= 1e-4 * PCSA * Lf0; // New calculation of the vol for the specific muscle branch (m^3)
};


//////////////////////////////////////////////
//     PronatorTeresUlnare (1 element )     //
//////////////////////////////////////////////
AnyMuscleModel PronatorTeresUlnare =
{
  AnyFolder& MuscleParameters = ..Data.unscaled.ModelParameters.Muscles.PronatorTeresUlnare;
  AnyIntVar MuscleElemNo = 1; ///< The number of this element of the muscle
  AnyIntVar MuscleElemAmount = MuscleParameters.MuscleElemAmount; ///< The total amount of elements for this muscle
  F0 ??= .DefaultMusPar.PCSAfactor*PCSA; ///< Maximum force output at optimum fiber length
  Lf0 ??= MuscleParameters.OptimalFiberlength / cos(pi/180*MuscleParameters.Pennationangle); //< Optimal fiber length corrected by pennation angle
  AnyVar PCSA ??= 1e4*.StrengthScaleUlna*MuscleParameters.MuscleVolumeSIScaled/(Lf0); ///< PCSA (cm2) of the individual element is total volumen divided by the sum of muscle element fiber lengths.
  Vol0 ??= 1e-4 * PCSA * Lf0; // New calculation of the vol for the specific muscle branch (m^3)
};


///////////////////////////////////////////
//     SupinatorHumerus (2 elements)     //
///////////////////////////////////////////
AnyMuscleModel SupinatorHumerus1 =
{
  AnyFolder& MuscleParameters = ..Data.unscaled.ModelParameters.Muscles.SupinatorHumerus;
  AnyIntVar MuscleElemNo = 1; ///< The number of this element of the muscle
  AnyIntVar MuscleElemAmount = MuscleParameters.MuscleElemAmount; ///< The total amount of elements for this muscle
  F0 ??= .DefaultMusPar.PCSAfactor*PCSA; ///< Maximum force output at optimum fiber length
  Lf0 ??= MuscleParameters.OptimalFiberlength / cos(pi/180*MuscleParameters.Pennationangle); //< Optimal fiber length corrected by pennation angle
  AnyVar PCSA ??= 1e4*.StrengthScaleUlna*MuscleParameters.MuscleVolumeSIScaled/(.SupinatorHumerus1.Lf0 +.SupinatorHumerus2.Lf0 ); ///< PCSA (cm2) of the individual element is total volumen divided by the sum of muscle element fiber lengths.
  Vol0 ??= 1e-4 * PCSA * Lf0; // New calculation of the vol for the specific muscle branch (m^3)
};

AnyMuscleModel SupinatorHumerus2 =
{
  AnyFolder& MuscleParameters = ..Data.unscaled.ModelParameters.Muscles.SupinatorHumerus;
  AnyIntVar MuscleElemNo = 2; ///< The number of this element of the muscle
  AnyIntVar MuscleElemAmount = MuscleParameters.MuscleElemAmount; ///< The total amount of elements for this muscle
  F0 ??= .DefaultMusPar.PCSAfactor*PCSA; ///< Maximum force output at optimum fiber length
  Lf0 ??= MuscleParameters.OptimalFiberlength / cos(pi/180*MuscleParameters.Pennationangle); //< Optimal fiber length corrected by pennation angle
  AnyVar PCSA ??= 1e4*.StrengthScaleUlna*MuscleParameters.MuscleVolumeSIScaled/(.SupinatorHumerus1.Lf0 +.SupinatorHumerus2.Lf0 ); ///< PCSA (cm2) of the individual element is total volumen divided by the sum of muscle element fiber lengths.
  Vol0 ??= 1e-4 * PCSA * Lf0; // New calculation of the vol for the specific muscle branch (m^3)
};


//////////////////////////////////////////
//     SupinatorUlnare (2 elements)     //
//////////////////////////////////////////
AnyMuscleModel SupinatorUlnare1 =
{
  AnyFolder& MuscleParameters = ..Data.unscaled.ModelParameters.Muscles.SupinatorUlnare;
  AnyIntVar MuscleElemNo = 1; ///< The number of this element of the muscle
  AnyIntVar MuscleElemAmount = MuscleParameters.MuscleElemAmount; ///< The total amount of elements for this muscle
  F0 ??= .DefaultMusPar.PCSAfactor*PCSA; ///< Maximum force output at optimum fiber length
  Lf0 ??= MuscleParameters.OptimalFiberlength / cos(pi/180*MuscleParameters.Pennationangle); //< Optimal fiber length corrected by pennation angle
  AnyVar PCSA ??= 1e4*.StrengthScaleUlna*MuscleParameters.MuscleVolumeSIScaled/(.SupinatorUlnare1.Lf0 +.SupinatorUlnare2.Lf0 ); ///< PCSA (cm2) of the individual element is total volumen divided by the sum of muscle element fiber lengths.
  Vol0 ??= 1e-4 * PCSA * Lf0; // New calculation of the vol for the specific muscle branch (m^3)
};

AnyMuscleModel SupinatorUlnare2 =
{
  AnyFolder& MuscleParameters = ..Data.unscaled.ModelParameters.Muscles.SupinatorUlnare;
  AnyIntVar MuscleElemNo = 2; ///< The number of this element of the muscle
  AnyIntVar MuscleElemAmount = MuscleParameters.MuscleElemAmount; ///< The total amount of elements for this muscle
  F0 ??= .DefaultMusPar.PCSAfactor*PCSA; ///< Maximum force output at optimum fiber length
  Lf0 ??= MuscleParameters.OptimalFiberlength / cos(pi/180*MuscleParameters.Pennationangle); //< Optimal fiber length corrected by pennation angle
  AnyVar PCSA ??= 1e4*.StrengthScaleUlna*MuscleParameters.MuscleVolumeSIScaled/(.SupinatorUlnare1.Lf0 +.SupinatorUlnare2.Lf0 ); ///< PCSA (cm2) of the individual element is total volumen divided by the sum of muscle element fiber lengths.
  Vol0 ??= 1e-4 * PCSA * Lf0; // New calculation of the vol for the specific muscle branch (m^3)
};


////////////////////////////////////////////
//     PronatorQuadratus (2 elements)     //
////////////////////////////////////////////
AnyMuscleModel PronatorQuadratus1 =
{
  AnyFolder& MuscleParameters = ..Data.unscaled.ModelParameters.Muscles.PronatorQuadratus;
  AnyIntVar MuscleElemNo = 1; ///< The number of this element of the muscle
  AnyIntVar MuscleElemAmount = MuscleParameters.MuscleElemAmount; ///< The total amount of elements for this muscle
  F0 ??= .DefaultMusPar.PCSAfactor*PCSA; ///< Maximum force output at optimum fiber length
  Lf0 ??= MuscleParameters.OptimalFiberlength / cos(pi/180*MuscleParameters.Pennationangle); //< Optimal fiber length corrected by pennation angle
  AnyVar PCSA ??= 1e4*.StrengthScaleUlna*MuscleParameters.MuscleVolumeSIScaled/(.PronatorQuadratus1.Lf0 +.PronatorQuadratus2.Lf0 ); ///< PCSA (cm2) of the individual element is total volumen divided by the sum of muscle element fiber lengths.
  Vol0 ??= 1e-4 * PCSA * Lf0; // New calculation of the vol for the specific muscle branch (m^3)
};

AnyMuscleModel PronatorQuadratus2 =
{
  AnyFolder& MuscleParameters = ..Data.unscaled.ModelParameters.Muscles.PronatorQuadratus;
  AnyIntVar MuscleElemNo = 2; ///< The number of this element of the muscle
  AnyIntVar MuscleElemAmount = MuscleParameters.MuscleElemAmount; ///< The total amount of elements for this muscle
  F0 ??= .DefaultMusPar.PCSAfactor*PCSA; ///< Maximum force output at optimum fiber length
  Lf0 ??= MuscleParameters.OptimalFiberlength / cos(pi/180*MuscleParameters.Pennationangle); //< Optimal fiber length corrected by pennation angle
  AnyVar PCSA ??= 1e4*.StrengthScaleUlna*MuscleParameters.MuscleVolumeSIScaled/(.PronatorQuadratus1.Lf0 +.PronatorQuadratus2.Lf0 ); ///< PCSA (cm2) of the individual element is total volumen divided by the sum of muscle element fiber lengths.
  Vol0 ??= 1e-4 * PCSA * Lf0; // New calculation of the vol for the specific muscle branch (m^3)
};


/////////////////////////////////////////////////
//     ExtensorPollicisLongus (1 element )     //
/////////////////////////////////////////////////
AnyMuscleModel ExtensorPollicisLongus =
{
  AnyFolder& MuscleParameters = ..Data.unscaled.ModelParameters.Muscles.ExtensorPollicisLongus;
  AnyIntVar MuscleElemNo = 1; ///< The number of this element of the muscle
  AnyIntVar MuscleElemAmount = MuscleParameters.MuscleElemAmount; ///< The total amount of elements for this muscle
  F0 ??= .DefaultMusPar.PCSAfactor*PCSA; ///< Maximum force output at optimum fiber length
  Lf0 ??= MuscleParameters.OptimalFiberlength / cos(pi/180*MuscleParameters.Pennationangle); //< Optimal fiber length corrected by pennation angle
  AnyVar PCSA ??= 1e4*.StrengthScaleUlna*MuscleParameters.MuscleVolumeSIScaled/(Lf0); ///< PCSA (cm2) of the individual element is total volumen divided by the sum of muscle element fiber lengths.
  Vol0 ??= 1e-4 * PCSA * Lf0; // New calculation of the vol for the specific muscle branch (m^3)
};


/////////////////////////////////////////////////
//     ExtensorPollicisBrevis (1 element )     //
/////////////////////////////////////////////////
AnyMuscleModel ExtensorPollicisBrevis =
{
  AnyFolder& MuscleParameters = ..Data.unscaled.ModelParameters.Muscles.ExtensorPollicisBrevis;
  AnyIntVar MuscleElemNo = 1; ///< The number of this element of the muscle
  AnyIntVar MuscleElemAmount = MuscleParameters.MuscleElemAmount; ///< The total amount of elements for this muscle
  F0 ??= .DefaultMusPar.PCSAfactor*PCSA; ///< Maximum force output at optimum fiber length
  Lf0 ??= MuscleParameters.OptimalFiberlength / cos(pi/180*MuscleParameters.Pennationangle); //< Optimal fiber length corrected by pennation angle
  AnyVar PCSA ??= 1e4*.StrengthScaleUlna*MuscleParameters.MuscleVolumeSIScaled/(Lf0); ///< PCSA (cm2) of the individual element is total volumen divided by the sum of muscle element fiber lengths.
  Vol0 ??= 1e-4 * PCSA * Lf0; // New calculation of the vol for the specific muscle branch (m^3)
};


/////////////////////////////////////////////////
//     AbductorPollicisLongus (1 element )     //
/////////////////////////////////////////////////
AnyMuscleModel AbductorPollicisLongus =
{
  AnyFolder& MuscleParameters = ..Data.unscaled.ModelParameters.Muscles.AbductorPollicisLongus;
  AnyIntVar MuscleElemNo = 1; ///< The number of this element of the muscle
  AnyIntVar MuscleElemAmount = MuscleParameters.MuscleElemAmount; ///< The total amount of elements for this muscle
  F0 ??= .DefaultMusPar.PCSAfactor*PCSA; ///< Maximum force output at optimum fiber length
  Lf0 ??= MuscleParameters.OptimalFiberlength / cos(pi/180*MuscleParameters.Pennationangle); //< Optimal fiber length corrected by pennation angle
  AnyVar PCSA ??= 1e4*.StrengthScaleUlna*MuscleParameters.MuscleVolumeSIScaled/(Lf0); ///< PCSA (cm2) of the individual element is total volumen divided by the sum of muscle element fiber lengths.
  Vol0 ??= 1e-4 * PCSA * Lf0; // New calculation of the vol for the specific muscle branch (m^3)
};


//////////////////////////////////////////
//     ExtensorIndicis (1 element )     //
//////////////////////////////////////////
AnyMuscleModel ExtensorIndicis =
{
  AnyFolder& MuscleParameters = ..Data.unscaled.ModelParameters.Muscles.ExtensorIndicis;
  AnyIntVar MuscleElemNo = 1; ///< The number of this element of the muscle
  AnyIntVar MuscleElemAmount = MuscleParameters.MuscleElemAmount; ///< The total amount of elements for this muscle
  F0 ??= .DefaultMusPar.PCSAfactor*PCSA; ///< Maximum force output at optimum fiber length
  Lf0 ??= MuscleParameters.OptimalFiberlength / cos(pi/180*MuscleParameters.Pennationangle); //< Optimal fiber length corrected by pennation angle
  AnyVar PCSA ??= 1e4*.StrengthScaleUlna*MuscleParameters.MuscleVolumeSIScaled/(Lf0); ///< PCSA (cm2) of the individual element is total volumen divided by the sum of muscle element fiber lengths.
  Vol0 ??= 1e-4 * PCSA * Lf0; // New calculation of the vol for the specific muscle branch (m^3)
};


///////////////////////////////////////////////
//     ExtensorCarpiUlnaris (1 element )     //
///////////////////////////////////////////////
AnyMuscleModel ExtensorCarpiUlnaris =
{
  AnyFolder& MuscleParameters = ..Data.unscaled.ModelParameters.Muscles.ExtensorCarpiUlnaris;
  AnyIntVar MuscleElemNo = 1; ///< The number of this element of the muscle
  AnyIntVar MuscleElemAmount = MuscleParameters.MuscleElemAmount; ///< The total amount of elements for this muscle
  F0 ??= .DefaultMusPar.PCSAfactor*PCSA; ///< Maximum force output at optimum fiber length
  Lf0 ??= MuscleParameters.OptimalFiberlength / cos(pi/180*MuscleParameters.Pennationangle); //< Optimal fiber length corrected by pennation angle
  AnyVar PCSA ??= 1e4*.StrengthScaleUlna*MuscleParameters.MuscleVolumeSIScaled/(Lf0); ///< PCSA (cm2) of the individual element is total volumen divided by the sum of muscle element fiber lengths.
  Vol0 ??= 1e-4 * PCSA * Lf0; // New calculation of the vol for the specific muscle branch (m^3)
};


//////////////////////////////////////////////////////
//     ExtensorCarpiRadialisLongus (1 element )     //
//////////////////////////////////////////////////////
AnyMuscleModel ExtensorCarpiRadialisLongus =
{
  AnyFolder& MuscleParameters = ..Data.unscaled.ModelParameters.Muscles.ExtensorCarpiRadialisLongus;
  AnyIntVar MuscleElemNo = 1; ///< The number of this element of the muscle
  AnyIntVar MuscleElemAmount = MuscleParameters.MuscleElemAmount; ///< The total amount of elements for this muscle
  F0 ??= .DefaultMusPar.PCSAfactor*PCSA; ///< Maximum force output at optimum fiber length
  Lf0 ??= MuscleParameters.OptimalFiberlength / cos(pi/180*MuscleParameters.Pennationangle); //< Optimal fiber length corrected by pennation angle
  AnyVar PCSA ??= 1e4*.StrengthScaleUlna*MuscleParameters.MuscleVolumeSIScaled/(Lf0); ///< PCSA (cm2) of the individual element is total volumen divided by the sum of muscle element fiber lengths.
  Vol0 ??= 1e-4 * PCSA * Lf0; // New calculation of the vol for the specific muscle branch (m^3)
};


//////////////////////////////////////////////////////
//     ExtensorCarpiRadialisBrevis (1 element )     //
//////////////////////////////////////////////////////
AnyMuscleModel ExtensorCarpiRadialisBrevis =
{
  AnyFolder& MuscleParameters = ..Data.unscaled.ModelParameters.Muscles.ExtensorCarpiRadialisBrevis;
  AnyIntVar MuscleElemNo = 1; ///< The number of this element of the muscle
  AnyIntVar MuscleElemAmount = MuscleParameters.MuscleElemAmount; ///< The total amount of elements for this muscle
  F0 ??= .DefaultMusPar.PCSAfactor*PCSA; ///< Maximum force output at optimum fiber length
  Lf0 ??= MuscleParameters.OptimalFiberlength / cos(pi/180*MuscleParameters.Pennationangle); //< Optimal fiber length corrected by pennation angle
  AnyVar PCSA ??= 1e4*.StrengthScaleUlna*MuscleParameters.MuscleVolumeSIScaled/(Lf0); ///< PCSA (cm2) of the individual element is total volumen divided by the sum of muscle element fiber lengths.
  Vol0 ??= 1e-4 * PCSA * Lf0; // New calculation of the vol for the specific muscle branch (m^3)
};


//////////////////////////////////////////////
//     FlexorCarpiRadialis (1 element )     //
//////////////////////////////////////////////
AnyMuscleModel FlexorCarpiRadialis =
{
  AnyFolder& MuscleParameters = ..Data.unscaled.ModelParameters.Muscles.FlexorCarpiRadialis;
  AnyIntVar MuscleElemNo = 1; ///< The number of this element of the muscle
  AnyIntVar MuscleElemAmount = MuscleParameters.MuscleElemAmount; ///< The total amount of elements for this muscle
  F0 ??= .DefaultMusPar.PCSAfactor*PCSA; ///< Maximum force output at optimum fiber length
  Lf0 ??= MuscleParameters.OptimalFiberlength / cos(pi/180*MuscleParameters.Pennationangle); //< Optimal fiber length corrected by pennation angle
  AnyVar PCSA ??= 1e4*.StrengthScaleUlna*MuscleParameters.MuscleVolumeSIScaled/(Lf0); ///< PCSA (cm2) of the individual element is total volumen divided by the sum of muscle element fiber lengths.
  Vol0 ??= 1e-4 * PCSA * Lf0; // New calculation of the vol for the specific muscle branch (m^3)
};


/////////////////////////////////////////////
//     FlexorCarpiUlnaris (1 element )     //
/////////////////////////////////////////////
AnyMuscleModel FlexorCarpiUlnaris =
{
  AnyFolder& MuscleParameters = ..Data.unscaled.ModelParameters.Muscles.FlexorCarpiUlnaris;
  AnyIntVar MuscleElemNo = 1; ///< The number of this element of the muscle
  AnyIntVar MuscleElemAmount = MuscleParameters.MuscleElemAmount; ///< The total amount of elements for this muscle
  F0 ??= .DefaultMusPar.PCSAfactor*PCSA; ///< Maximum force output at optimum fiber length
  Lf0 ??= MuscleParameters.OptimalFiberlength / cos(pi/180*MuscleParameters.Pennationangle); //< Optimal fiber length corrected by pennation angle
  AnyVar PCSA ??= 1e4*.StrengthScaleUlna*MuscleParameters.MuscleVolumeSIScaled/(Lf0); ///< PCSA (cm2) of the individual element is total volumen divided by the sum of muscle element fiber lengths.
  Vol0 ??= 1e-4 * PCSA * Lf0; // New calculation of the vol for the specific muscle branch (m^3)
};


/////////////////////////////////////////
//     PalmarisLongus (1 element )     //
/////////////////////////////////////////
AnyMuscleModel PalmarisLongus =
{
  AnyFolder& MuscleParameters = ..Data.unscaled.ModelParameters.Muscles.PalmarisLongus;
  AnyIntVar MuscleElemNo = 1; ///< The number of this element of the muscle
  AnyIntVar MuscleElemAmount = MuscleParameters.MuscleElemAmount; ///< The total amount of elements for this muscle
  F0 ??= .DefaultMusPar.PCSAfactor*PCSA; ///< Maximum force output at optimum fiber length
  Lf0 ??= MuscleParameters.OptimalFiberlength / cos(pi/180*MuscleParameters.Pennationangle); //< Optimal fiber length corrected by pennation angle
  AnyVar PCSA ??= 1e4*.StrengthScaleUlna*MuscleParameters.MuscleVolumeSIScaled/(Lf0); ///< PCSA (cm2) of the individual element is total volumen divided by the sum of muscle element fiber lengths.
  Vol0 ??= 1e-4 * PCSA * Lf0; // New calculation of the vol for the specific muscle branch (m^3)
};


/////////////////////////////////////////////////////////////
//     FlexorDigitorumSuperficialisDigit5 (1 element )     //
/////////////////////////////////////////////////////////////
AnyMuscleModel FlexorDigitorumSuperficialisDigit5 =
{
  AnyFolder& MuscleParameters = ..Data.unscaled.ModelParameters.Muscles.FlexorDigitorumSuperficialisDigit5;
  AnyIntVar MuscleElemNo = 1; ///< The number of this element of the muscle
  AnyIntVar MuscleElemAmount = MuscleParameters.MuscleElemAmount; ///< The total amount of elements for this muscle
  F0 ??= .DefaultMusPar.PCSAfactor*PCSA; ///< Maximum force output at optimum fiber length
  Lf0 ??= MuscleParameters.OptimalFiberlength / cos(pi/180*MuscleParameters.Pennationangle); //< Optimal fiber length corrected by pennation angle
  AnyVar PCSA ??= 1e4*.StrengthScaleUlna*MuscleParameters.MuscleVolumeSIScaled/(Lf0); ///< PCSA (cm2) of the individual element is total volumen divided by the sum of muscle element fiber lengths.
  Vol0 ??= 1e-4 * PCSA * Lf0; // New calculation of the vol for the specific muscle branch (m^3)
};


/////////////////////////////////////////////////////////////
//     FlexorDigitorumSuperficialisDigit4 (1 element )     //
/////////////////////////////////////////////////////////////
AnyMuscleModel FlexorDigitorumSuperficialisDigit4 =
{
  AnyFolder& MuscleParameters = ..Data.unscaled.ModelParameters.Muscles.FlexorDigitorumSuperficialisDigit4;
  AnyIntVar MuscleElemNo = 1; ///< The number of this element of the muscle
  AnyIntVar MuscleElemAmount = MuscleParameters.MuscleElemAmount; ///< The total amount of elements for this muscle
  F0 ??= .DefaultMusPar.PCSAfactor*PCSA; ///< Maximum force output at optimum fiber length
  Lf0 ??= MuscleParameters.OptimalFiberlength / cos(pi/180*MuscleParameters.Pennationangle); //< Optimal fiber length corrected by pennation angle
  AnyVar PCSA ??= 1e4*.StrengthScaleUlna*MuscleParameters.MuscleVolumeSIScaled/(Lf0); ///< PCSA (cm2) of the individual element is total volumen divided by the sum of muscle element fiber lengths.
  Vol0 ??= 1e-4 * PCSA * Lf0; // New calculation of the vol for the specific muscle branch (m^3)
};


/////////////////////////////////////////////////////////////
//     FlexorDigitorumSuperficialisDigit3 (1 element )     //
/////////////////////////////////////////////////////////////
AnyMuscleModel FlexorDigitorumSuperficialisDigit3 =
{
  AnyFolder& MuscleParameters = ..Data.unscaled.ModelParameters.Muscles.FlexorDigitorumSuperficialisDigit3;
  AnyIntVar MuscleElemNo = 1; ///< The number of this element of the muscle
  AnyIntVar MuscleElemAmount = MuscleParameters.MuscleElemAmount; ///< The total amount of elements for this muscle
  F0 ??= .DefaultMusPar.PCSAfactor*PCSA; ///< Maximum force output at optimum fiber length
  Lf0 ??= MuscleParameters.OptimalFiberlength / cos(pi/180*MuscleParameters.Pennationangle); //< Optimal fiber length corrected by pennation angle
  AnyVar PCSA ??= 1e4*.StrengthScaleUlna*MuscleParameters.MuscleVolumeSIScaled/(Lf0); ///< PCSA (cm2) of the individual element is total volumen divided by the sum of muscle element fiber lengths.
  Vol0 ??= 1e-4 * PCSA * Lf0; // New calculation of the vol for the specific muscle branch (m^3)
};


/////////////////////////////////////////////////////////////
//     FlexorDigitorumSuperficialisDigit2 (1 element )     //
/////////////////////////////////////////////////////////////
AnyMuscleModel FlexorDigitorumSuperficialisDigit2 =
{
  AnyFolder& MuscleParameters = ..Data.unscaled.ModelParameters.Muscles.FlexorDigitorumSuperficialisDigit2;
  AnyIntVar MuscleElemNo = 1; ///< The number of this element of the muscle
  AnyIntVar MuscleElemAmount = MuscleParameters.MuscleElemAmount; ///< The total amount of elements for this muscle
  F0 ??= .DefaultMusPar.PCSAfactor*PCSA; ///< Maximum force output at optimum fiber length
  Lf0 ??= MuscleParameters.OptimalFiberlength / cos(pi/180*MuscleParameters.Pennationangle); //< Optimal fiber length corrected by pennation angle
  AnyVar PCSA ??= 1e4*.StrengthScaleUlna*MuscleParameters.MuscleVolumeSIScaled/(Lf0); ///< PCSA (cm2) of the individual element is total volumen divided by the sum of muscle element fiber lengths.
  Vol0 ??= 1e-4 * PCSA * Lf0; // New calculation of the vol for the specific muscle branch (m^3)
};


/////////////////////////////////////////////////////////
//     FlexorDigitorumProfundusDigit5 (1 element )     //
/////////////////////////////////////////////////////////
AnyMuscleModel FlexorDigitorumProfundusDigit5 =
{
  AnyFolder& MuscleParameters = ..Data.unscaled.ModelParameters.Muscles.FlexorDigitorumProfundusDigit5;
  AnyIntVar MuscleElemNo = 1; ///< The number of this element of the muscle
  AnyIntVar MuscleElemAmount = MuscleParameters.MuscleElemAmount; ///< The total amount of elements for this muscle
  F0 ??= .DefaultMusPar.PCSAfactor*PCSA; ///< Maximum force output at optimum fiber length
  Lf0 ??= MuscleParameters.OptimalFiberlength / cos(pi/180*MuscleParameters.Pennationangle); //< Optimal fiber length corrected by pennation angle
  AnyVar PCSA ??= 1e4*.StrengthScaleUlna*MuscleParameters.MuscleVolumeSIScaled/(Lf0); ///< PCSA (cm2) of the individual element is total volumen divided by the sum of muscle element fiber lengths.
  Vol0 ??= 1e-4 * PCSA * Lf0; // New calculation of the vol for the specific muscle branch (m^3)
};


/////////////////////////////////////////////////////////
//     FlexorDigitorumProfundusDigit4 (1 element )     //
/////////////////////////////////////////////////////////
AnyMuscleModel FlexorDigitorumProfundusDigit4 =
{
  AnyFolder& MuscleParameters = ..Data.unscaled.ModelParameters.Muscles.FlexorDigitorumProfundusDigit4;
  AnyIntVar MuscleElemNo = 1; ///< The number of this element of the muscle
  AnyIntVar MuscleElemAmount = MuscleParameters.MuscleElemAmount; ///< The total amount of elements for this muscle
  F0 ??= .DefaultMusPar.PCSAfactor*PCSA; ///< Maximum force output at optimum fiber length
  Lf0 ??= MuscleParameters.OptimalFiberlength / cos(pi/180*MuscleParameters.Pennationangle); //< Optimal fiber length corrected by pennation angle
  AnyVar PCSA ??= 1e4*.StrengthScaleUlna*MuscleParameters.MuscleVolumeSIScaled/(Lf0); ///< PCSA (cm2) of the individual element is total volumen divided by the sum of muscle element fiber lengths.
  Vol0 ??= 1e-4 * PCSA * Lf0; // New calculation of the vol for the specific muscle branch (m^3)
};


/////////////////////////////////////////////////////////
//     FlexorDigitorumProfundusDigit3 (1 element )     //
/////////////////////////////////////////////////////////
AnyMuscleModel FlexorDigitorumProfundusDigit3 =
{
  AnyFolder& MuscleParameters = ..Data.unscaled.ModelParameters.Muscles.FlexorDigitorumProfundusDigit3;
  AnyIntVar MuscleElemNo = 1; ///< The number of this element of the muscle
  AnyIntVar MuscleElemAmount = MuscleParameters.MuscleElemAmount; ///< The total amount of elements for this muscle
  F0 ??= .DefaultMusPar.PCSAfactor*PCSA; ///< Maximum force output at optimum fiber length
  Lf0 ??= MuscleParameters.OptimalFiberlength / cos(pi/180*MuscleParameters.Pennationangle); //< Optimal fiber length corrected by pennation angle
  AnyVar PCSA ??= 1e4*.StrengthScaleUlna*MuscleParameters.MuscleVolumeSIScaled/(Lf0); ///< PCSA (cm2) of the individual element is total volumen divided by the sum of muscle element fiber lengths.
  Vol0 ??= 1e-4 * PCSA * Lf0; // New calculation of the vol for the specific muscle branch (m^3)
};


/////////////////////////////////////////////////////////
//     FlexorDigitorumProfundusDigit2 (1 element )     //
/////////////////////////////////////////////////////////
AnyMuscleModel FlexorDigitorumProfundusDigit2 =
{
  AnyFolder& MuscleParameters = ..Data.unscaled.ModelParameters.Muscles.FlexorDigitorumProfundusDigit2;
  AnyIntVar MuscleElemNo = 1; ///< The number of this element of the muscle
  AnyIntVar MuscleElemAmount = MuscleParameters.MuscleElemAmount; ///< The total amount of elements for this muscle
  F0 ??= .DefaultMusPar.PCSAfactor*PCSA; ///< Maximum force output at optimum fiber length
  Lf0 ??= MuscleParameters.OptimalFiberlength / cos(pi/180*MuscleParameters.Pennationangle); //< Optimal fiber length corrected by pennation angle
  AnyVar PCSA ??= 1e4*.StrengthScaleUlna*MuscleParameters.MuscleVolumeSIScaled/(Lf0); ///< PCSA (cm2) of the individual element is total volumen divided by the sum of muscle element fiber lengths.
  Vol0 ??= 1e-4 * PCSA * Lf0; // New calculation of the vol for the specific muscle branch (m^3)
};


//////////////////////////////////////////////////
//     ExtensorDigitorumDigit5 (1 element )     //
//////////////////////////////////////////////////
AnyMuscleModel ExtensorDigitorumDigit5 =
{
  AnyFolder& MuscleParameters = ..Data.unscaled.ModelParameters.Muscles.ExtensorDigitorumDigit5;
  AnyIntVar MuscleElemNo = 1; ///< The number of this element of the muscle
  AnyIntVar MuscleElemAmount = MuscleParameters.MuscleElemAmount; ///< The total amount of elements for this muscle
  F0 ??= .DefaultMusPar.PCSAfactor*PCSA; ///< Maximum force output at optimum fiber length
  Lf0 ??= MuscleParameters.OptimalFiberlength / cos(pi/180*MuscleParameters.Pennationangle); //< Optimal fiber length corrected by pennation angle
  AnyVar PCSA ??= 1e4*.StrengthScaleUlna*MuscleParameters.MuscleVolumeSIScaled/(Lf0); ///< PCSA (cm2) of the individual element is total volumen divided by the sum of muscle element fiber lengths.
  Vol0 ??= 1e-4 * PCSA * Lf0; // New calculation of the vol for the specific muscle branch (m^3)
};


//////////////////////////////////////////////////
//     ExtensorDigitorumDigit4 (1 element )     //
//////////////////////////////////////////////////
AnyMuscleModel ExtensorDigitorumDigit4 =
{
  AnyFolder& MuscleParameters = ..Data.unscaled.ModelParameters.Muscles.ExtensorDigitorumDigit4;
  AnyIntVar MuscleElemNo = 1; ///< The number of this element of the muscle
  AnyIntVar MuscleElemAmount = MuscleParameters.MuscleElemAmount; ///< The total amount of elements for this muscle
  F0 ??= .DefaultMusPar.PCSAfactor*PCSA; ///< Maximum force output at optimum fiber length
  Lf0 ??= MuscleParameters.OptimalFiberlength / cos(pi/180*MuscleParameters.Pennationangle); //< Optimal fiber length corrected by pennation angle
  AnyVar PCSA ??= 1e4*.StrengthScaleUlna*MuscleParameters.MuscleVolumeSIScaled/(Lf0); ///< PCSA (cm2) of the individual element is total volumen divided by the sum of muscle element fiber lengths.
  Vol0 ??= 1e-4 * PCSA * Lf0; // New calculation of the vol for the specific muscle branch (m^3)
};


//////////////////////////////////////////////////
//     ExtensorDigitorumDigit3 (1 element )     //
//////////////////////////////////////////////////
AnyMuscleModel ExtensorDigitorumDigit3 =
{
  AnyFolder& MuscleParameters = ..Data.unscaled.ModelParameters.Muscles.ExtensorDigitorumDigit3;
  AnyIntVar MuscleElemNo = 1; ///< The number of this element of the muscle
  AnyIntVar MuscleElemAmount = MuscleParameters.MuscleElemAmount; ///< The total amount of elements for this muscle
  F0 ??= .DefaultMusPar.PCSAfactor*PCSA; ///< Maximum force output at optimum fiber length
  Lf0 ??= MuscleParameters.OptimalFiberlength / cos(pi/180*MuscleParameters.Pennationangle); //< Optimal fiber length corrected by pennation angle
  AnyVar PCSA ??= 1e4*.StrengthScaleUlna*MuscleParameters.MuscleVolumeSIScaled/(Lf0); ///< PCSA (cm2) of the individual element is total volumen divided by the sum of muscle element fiber lengths.
  Vol0 ??= 1e-4 * PCSA * Lf0; // New calculation of the vol for the specific muscle branch (m^3)
};


//////////////////////////////////////////////////
//     ExtensorDigitorumDigit2 (1 element )     //
//////////////////////////////////////////////////
AnyMuscleModel ExtensorDigitorumDigit2 =
{
  AnyFolder& MuscleParameters = ..Data.unscaled.ModelParameters.Muscles.ExtensorDigitorumDigit2;
  AnyIntVar MuscleElemNo = 1; ///< The number of this element of the muscle
  AnyIntVar MuscleElemAmount = MuscleParameters.MuscleElemAmount; ///< The total amount of elements for this muscle
  F0 ??= .DefaultMusPar.PCSAfactor*PCSA; ///< Maximum force output at optimum fiber length
  Lf0 ??= MuscleParameters.OptimalFiberlength / cos(pi/180*MuscleParameters.Pennationangle); //< Optimal fiber length corrected by pennation angle
  AnyVar PCSA ??= 1e4*.StrengthScaleUlna*MuscleParameters.MuscleVolumeSIScaled/(Lf0); ///< PCSA (cm2) of the individual element is total volumen divided by the sum of muscle element fiber lengths.
  Vol0 ??= 1e-4 * PCSA * Lf0; // New calculation of the vol for the specific muscle branch (m^3)
};


///////////////////////////////////////////////
//     ExtensorDigitiMinimi (1 element )     //
///////////////////////////////////////////////
AnyMuscleModel ExtensorDigitiMinimi =
{
  AnyFolder& MuscleParameters = ..Data.unscaled.ModelParameters.Muscles.ExtensorDigitiMinimi;
  AnyIntVar MuscleElemNo = 1; ///< The number of this element of the muscle
  AnyIntVar MuscleElemAmount = MuscleParameters.MuscleElemAmount; ///< The total amount of elements for this muscle
  F0 ??= .DefaultMusPar.PCSAfactor*PCSA; ///< Maximum force output at optimum fiber length
  Lf0 ??= MuscleParameters.OptimalFiberlength / cos(pi/180*MuscleParameters.Pennationangle); //< Optimal fiber length corrected by pennation angle
  AnyVar PCSA ??= 1e4*.StrengthScaleUlna*MuscleParameters.MuscleVolumeSIScaled/(Lf0); ///< PCSA (cm2) of the individual element is total volumen divided by the sum of muscle element fiber lengths.
  Vol0 ??= 1e-4 * PCSA * Lf0; // New calculation of the vol for the specific muscle branch (m^3)
};


///////////////////////////////////////////////
//     FlexorPollicisLongus (1 element )     //
///////////////////////////////////////////////
AnyMuscleModel FlexorPollicisLongus =
{
  AnyFolder& MuscleParameters = ..Data.unscaled.ModelParameters.Muscles.FlexorPollicisLongus;
  AnyIntVar MuscleElemNo = 1; ///< The number of this element of the muscle
  AnyIntVar MuscleElemAmount = MuscleParameters.MuscleElemAmount; ///< The total amount of elements for this muscle
  F0 ??= .DefaultMusPar.PCSAfactor*PCSA; ///< Maximum force output at optimum fiber length
  Lf0 ??= MuscleParameters.OptimalFiberlength / cos(pi/180*MuscleParameters.Pennationangle); //< Optimal fiber length corrected by pennation angle
  AnyVar PCSA ??= 1e4*.StrengthScaleUlna*MuscleParameters.MuscleVolumeSIScaled/(Lf0); ///< PCSA (cm2) of the individual element is total volumen divided by the sum of muscle element fiber lengths.
  Vol0 ??= 1e-4 * PCSA * Lf0; // New calculation of the vol for the specific muscle branch (m^3)
};
