SelectedOutput.Right = {

  AnyFolder ShoulderArm = {


    AnyFolder JointReactionForce = {

      /// Lateral positive
      AnyVar SternoClavicular_MedioLateralForce = ....Right.ShoulderArm.Jnt.SternoClavicularJoint.Constraints.Reaction.Fout[0];
      /// Superior positive
      AnyVar SternoClavicular_InferoSuperiorForce = ....Right.ShoulderArm.Jnt.SternoClavicularJoint.Constraints.Reaction.Fout[1];
      /// Posterior positive
      AnyVar SternoClavicular_AnteroPosteriorForce = ....Right.ShoulderArm.Jnt.SternoClavicularJoint.Constraints.Reaction.Fout[2];
      // Thorax scj ref, warning : rotated regarding to thorax ref

      /// Lateral positive
      AnyVar AcromioClavicular_MedioLateralForce = ....Right.ShoulderArm.Jnt.AcromioClavicularJoint.Constraints.Reaction.Fout[0];
      /// Superior positive
      AnyVar AcromioClavicular_InferoSuperiorForce = ....Right.ShoulderArm.Jnt.AcromioClavicularJoint.Constraints.Reaction.Fout[1];
      /// Posterior positive
      AnyVar AcromioClavicular_AnteroPosteriorForce = ....Right.ShoulderArm.Jnt.AcromioClavicularJoint.Constraints.Reaction.Fout[2];
      // Clavicula acj ref

      // include 3 reaction point of scapula
//      AnyVar ScapulaAIPushForce = ....Right.ShoulderArm.Jnt.ScapulaAIThoraxNodeReaction.Ft;
//      AnyVar ScapulaTSPushForce = ....Right.ShoulderArm.Jnt.ScapulaTSThoraxNodeReaction.Ft;
//      AnyVar ConoidLigamentPullForce = ....Right.ShoulderArm.Jnt.ConoidLigamentReaction.Ft;
//      AnyVar TrapezoidLigamentPullForce = ....Right.ShoulderArm.Jnt.TrapezoidLigamentReaction.Ft;


      /// Distraction positive
      AnyVar GlenoHumeral_DistractionForce = ....Right.ShoulderArm.Jnt.GHReactions.ResultanForce.FTotalLocal[0];
      /// Superior positive
      AnyVar GlenoHumeral_InferoSuperiorForce = ....Right.ShoulderArm.Jnt.GHReactions.ResultanForce.FTotalLocal[1];
      /// Posterior positive
      AnyVar GlenoHumeral_AnteroPosteriorForce = ....Right.ShoulderArm.Jnt.GHReactions.ResultanForce.FTotalLocal[2];
      // scapula gh ref


      /// Medial positive
      AnyVar ElbowHumeroUlnar_MedioLateralForce = ....Right.ShoulderArm.Jnt.HumeroUlnarJoint.Constraints.Reaction.Fout[0];
      /// Proximal positive
      AnyVar ElbowHumeroUlnar_ProximoDistalForce = ....Right.ShoulderArm.Jnt.HumeroUlnarJoint.Constraints.Reaction.Fout[1];
      /// Anterior positive
      AnyVar ElbowHumeroUlnar_AnteroPosteriorForce = ....Right.ShoulderArm.Jnt.HumeroUlnarJoint.Constraints.Reaction.Fout[2];
      /// Internal positive
      AnyVar ElbowHumeroUlnar_AxialMoment = ....Right.ShoulderArm.MomentMeasure.ElbowJointReactionMoments.Mlocal[1];
      /// Medial positive
      AnyVar ElbowHumeroUlnar_LateralMoment = ....Right.ShoulderArm.MomentMeasure.ElbowJointReactionMoments.Mlocal[2];
      // humerus fe ref

      /// Ulnar positive
      AnyVar ProximalRadioUlnar_RadialForce = ....Right.ShoulderArm.Jnt.ProximalRadioUlnarJoint.ReacForce.Fout[0];
      /// Dorsal positive
      AnyVar ProximalRadioUlnar_DorsoVolarForce = ....Right.ShoulderArm.Jnt.ProximalRadioUlnarJoint.ReacForce.Fout[1];
      // ulna ps2Reac ref

      /// Distal Positive
      AnyVar RadioHumeral_ProximoDistalForce = ....Right.ShoulderArm.Jnt.HumeroRadialJoint.ReacForce.Fout[0];
      // radius ps2Reac ref

      /// Ulnar positive
      AnyVar DistalRadioUlnar_RadialForce = ....Right.ShoulderArm.Jnt.DistalRadioUlnarJoint.Constraints.Reaction.Fout[0];
      /// Volar positive
      AnyVar DistalRadioUlnar_DorsoVolarForce = ....Right.ShoulderArm.Jnt.DistalRadioUlnarJoint.Constraints.Reaction.Fout[1];
      // ulna us ref

      /// Ulnar positive
      AnyVar WristRadioCarpal_RadialForce = ....Right.ShoulderArm.Jnt.WristJointFlexion.Constraints.Reaction.Fout[1];
      /// Proximal positive
      AnyVar WristRadioCarpal_ProximoDistalForce = ....Right.ShoulderArm.Jnt.WristJointFlexion.Constraints.Reaction.Fout[0];
      /// Dorsal positive
      AnyVar WristRadioCarpal_DorsoVolarForce = ....Right.ShoulderArm.Jnt.WristJointFlexion.Constraints.Reaction.Fout[2];
      /// Internal positive
      AnyVar WristRadioCarpal_AxialMoment = ....Right.ShoulderArm.MomentMeasure.WristJointReactionMoments.Mlocal[0];
      // radius wj ref
      #if BM_HAND_MODEL != _HAND_MODEL_OFF_
      AnyFolder Hand = {
        /// Proximal positive
        AnyVar Thumb_CMC_ProximoDistalForce = .....Right.ShoulderArm.Seg.Hand.Finger1.Jnt.CMCFlexion.Constraints.Reaction.Fout[1];
        /// Palmar positive
        AnyVar Thumb_CMC_DorsalPalmarForce = .....Right.ShoulderArm.Seg.Hand.Finger1.Jnt.CMCFlexion.Constraints.Reaction.Fout[0];
        /// Radial positive
        AnyVar Thumb_CMC_RadialForce = .....Right.ShoulderArm.Seg.Hand.Finger1.Jnt.CMCFlexion.Constraints.Reaction.Fout[2];

        /// Proximal positive
        AnyVar Thumb_MCP_ProximoDistalForce = .....Right.ShoulderArm.Seg.Hand.Finger1.Jnt.MCPFlexion.Constraints.Reaction.Fout[1];
        /// Palmar positive
        AnyVar Thumb_MCP_DorsalPalmarForce = .....Right.ShoulderArm.Seg.Hand.Finger1.Jnt.MCPFlexion.Constraints.Reaction.Fout[0];
        /// Radial positive
        AnyVar Thumb_MCP_RadialForce = .....Right.ShoulderArm.Seg.Hand.Finger1.Jnt.MCPFlexion.Constraints.Reaction.Fout[2];

        /// Proximal positive
        AnyVar Thumb_DIP_ProximoDistalForce = .....Right.ShoulderArm.Seg.Hand.Finger1.Jnt.DIP.Constraints.Reaction.Fout[1];
        /// Palmar positive
        AnyVar Thumb_DIP_DorsalPalmarForce = .....Right.ShoulderArm.Seg.Hand.Finger1.Jnt.DIP.Constraints.Reaction.Fout[0];
        /// Radial positive
        AnyVar Thumb_DIP_RadialForce = .....Right.ShoulderArm.Seg.Hand.Finger1.Jnt.DIP.Constraints.Reaction.Fout[2];

        /// Proximal positive
        AnyVar Finger2_CMC_ProximoDistalForce = .....Right.ShoulderArm.Seg.Hand.Finger2.Jnt.CMC.Constraints.Reaction.Fout[1];
        /// Palmar positive
        AnyVar Finger2_CMC_DorsalPalmarForce = .....Right.ShoulderArm.Seg.Hand.Finger2.Jnt.CMC.Constraints.Reaction.Fout[0];
        /// Radial positive
        AnyVar Finger2_CMC_RadialForce = .....Right.ShoulderArm.Seg.Hand.Finger2.Jnt.CMC.Constraints.Reaction.Fout[2];

        /// Proximal positive
        AnyVar Finger2_MCP_ProximoDistalForce = .....Right.ShoulderArm.Seg.Hand.Finger2.Jnt.MCP.Constraints.Reaction.Fout[1];
        /// Palmar positive
        AnyVar Finger2_MCP_DorsalPalmarForce = .....Right.ShoulderArm.Seg.Hand.Finger2.Jnt.MCP.Constraints.Reaction.Fout[0];
        /// Radial positive
        AnyVar Finger2_MCP_RadialForce = .....Right.ShoulderArm.Seg.Hand.Finger2.Jnt.MCP.Constraints.Reaction.Fout[2];

        /// Proximal positive
        AnyVar Finger2_PIP_ProximoDistalForce = .....Right.ShoulderArm.Seg.Hand.Finger2.Jnt.PIP.Constraints.Reaction.Fout[1];
        /// Palmar positive
        AnyVar Finger2_PIP_DorsalPalmarForce = .....Right.ShoulderArm.Seg.Hand.Finger2.Jnt.PIP.Constraints.Reaction.Fout[0];
        /// Radial positive
        AnyVar Finger2_PIP_RadialForce = .....Right.ShoulderArm.Seg.Hand.Finger2.Jnt.PIP.Constraints.Reaction.Fout[2];

        /// Proximal positive
        AnyVar Finger2_DIP_ProximoDistalForce = .....Right.ShoulderArm.Seg.Hand.Finger2.Jnt.DIP.Constraints.Reaction.Fout[1];
        /// Palmar positive
        AnyVar Finger2_DIP_DorsalPalmarForce = .....Right.ShoulderArm.Seg.Hand.Finger2.Jnt.DIP.Constraints.Reaction.Fout[0];
        /// Radial positive
        AnyVar Finger2_DIP_RadialForce = .....Right.ShoulderArm.Seg.Hand.Finger2.Jnt.DIP.Constraints.Reaction.Fout[2];


        /// Proximal positive
        AnyVar Finger3_CMC_ProximoDistalForce = .....Right.ShoulderArm.Seg.Hand.Finger3.Jnt.CMC.Constraints.Reaction.Fout[1];
        /// Palmar positive
        AnyVar Finger3_CMC_DorsalPalmarForce = .....Right.ShoulderArm.Seg.Hand.Finger3.Jnt.CMC.Constraints.Reaction.Fout[0];
        /// Radial positive
        AnyVar Finger3_CMC_RadialForce = .....Right.ShoulderArm.Seg.Hand.Finger3.Jnt.CMC.Constraints.Reaction.Fout[2];

        /// Proximal positive
        AnyVar Finger3_MCP_ProximoDistalForce = .....Right.ShoulderArm.Seg.Hand.Finger3.Jnt.MCP.Constraints.Reaction.Fout[1];
        /// Palmar positive
        AnyVar Finger3_MCP_DorsalPalmarForce = .....Right.ShoulderArm.Seg.Hand.Finger3.Jnt.MCP.Constraints.Reaction.Fout[0];
        /// Radial positive
        AnyVar Finger3_MCP_RadialForce = .....Right.ShoulderArm.Seg.Hand.Finger3.Jnt.MCP.Constraints.Reaction.Fout[2];

        /// Proximal positive
        AnyVar Finger3_PIP_ProximoDistalForce = .....Right.ShoulderArm.Seg.Hand.Finger3.Jnt.PIP.Constraints.Reaction.Fout[1];
        /// Palmar positive
        AnyVar Finger3_PIP_DorsalPalmarForce = .....Right.ShoulderArm.Seg.Hand.Finger3.Jnt.PIP.Constraints.Reaction.Fout[0];
        /// Radial positive
        AnyVar Finger3_PIP_RadialForce = .....Right.ShoulderArm.Seg.Hand.Finger3.Jnt.PIP.Constraints.Reaction.Fout[2];

        /// Proximal positive
        AnyVar Finger3_DIP_ProximoDistalForce = .....Right.ShoulderArm.Seg.Hand.Finger3.Jnt.DIP.Constraints.Reaction.Fout[1];
        /// Palmar positive
        AnyVar Finger3_DIP_DorsalPalmarForce = .....Right.ShoulderArm.Seg.Hand.Finger3.Jnt.DIP.Constraints.Reaction.Fout[0];
        /// Radial positive
        AnyVar Finger3_DIP_RadialForce = .....Right.ShoulderArm.Seg.Hand.Finger3.Jnt.DIP.Constraints.Reaction.Fout[2];


        /// Proximal positive
        AnyVar Finger4_CMC_ProximoDistalForce = .....Right.ShoulderArm.Seg.Hand.Finger4.Jnt.CMC.Constraints.Reaction.Fout[1];
        /// Palmar positive
        AnyVar Finger4_CMC_DorsalPalmarForce = .....Right.ShoulderArm.Seg.Hand.Finger4.Jnt.CMC.Constraints.Reaction.Fout[0];
        /// Radial positive
        AnyVar Finger4_CMC_RadialForce = .....Right.ShoulderArm.Seg.Hand.Finger4.Jnt.CMC.Constraints.Reaction.Fout[2];

        /// Proximal positive
        AnyVar Finger4_MCP_ProximoDistalForce = .....Right.ShoulderArm.Seg.Hand.Finger4.Jnt.MCP.Constraints.Reaction.Fout[1];
        /// Palmar positive
        AnyVar Finger4_MCP_DorsalPalmarForce = .....Right.ShoulderArm.Seg.Hand.Finger4.Jnt.MCP.Constraints.Reaction.Fout[0];
        /// Radial positive
        AnyVar Finger4_MCP_RadialForce = .....Right.ShoulderArm.Seg.Hand.Finger4.Jnt.MCP.Constraints.Reaction.Fout[2];

        /// Proximal positive
        AnyVar Finger4_PIP_ProximoDistalForce = .....Right.ShoulderArm.Seg.Hand.Finger4.Jnt.PIP.Constraints.Reaction.Fout[1];
        /// Palmar positive
        AnyVar Finger4_PIP_DorsalPalmarForce = .....Right.ShoulderArm.Seg.Hand.Finger4.Jnt.PIP.Constraints.Reaction.Fout[0];
        /// Radial positive
        AnyVar Finger4_PIP_RadialForce = .....Right.ShoulderArm.Seg.Hand.Finger4.Jnt.PIP.Constraints.Reaction.Fout[2];

        /// Proximal positive
        AnyVar Finger4_DIP_ProximoDistalForce = .....Right.ShoulderArm.Seg.Hand.Finger4.Jnt.DIP.Constraints.Reaction.Fout[1];
        /// Palmar positive
        AnyVar Finger4_DIP_DorsalPalmarForce = .....Right.ShoulderArm.Seg.Hand.Finger4.Jnt.DIP.Constraints.Reaction.Fout[0];
        /// Radial positive
        AnyVar Finger4_DIP_RadialForce = .....Right.ShoulderArm.Seg.Hand.Finger4.Jnt.DIP.Constraints.Reaction.Fout[2];


        /// Proximal positive
        AnyVar Finger5_CMC_ProximoDistalForce = .....Right.ShoulderArm.Seg.Hand.Finger5.Jnt.CMC.Constraints.Reaction.Fout[1];
        /// Palmar positive
        AnyVar Finger5_CMC_DorsalPalmarForce = .....Right.ShoulderArm.Seg.Hand.Finger5.Jnt.CMC.Constraints.Reaction.Fout[0];
        /// Radial positive
        AnyVar Finger5_CMC_RadialForce = .....Right.ShoulderArm.Seg.Hand.Finger5.Jnt.CMC.Constraints.Reaction.Fout[2];

        /// Proximal positive
        AnyVar Finger5_MCP_ProximoDistalForce = .....Right.ShoulderArm.Seg.Hand.Finger5.Jnt.MCP.Constraints.Reaction.Fout[1];
        /// Palmar positive
        AnyVar Finger5_MCP_DorsalPalmarForce = .....Right.ShoulderArm.Seg.Hand.Finger5.Jnt.MCP.Constraints.Reaction.Fout[0];
        /// Radial positive
        AnyVar Finger5_MCP_RadialForce = .....Right.ShoulderArm.Seg.Hand.Finger5.Jnt.MCP.Constraints.Reaction.Fout[2];

        /// Proximal positive
        AnyVar Finger5_PIP_ProximoDistalForce = .....Right.ShoulderArm.Seg.Hand.Finger5.Jnt.PIP.Constraints.Reaction.Fout[1];
        /// Palmar positive
        AnyVar Finger5_PIP_DorsalPalmarForce = .....Right.ShoulderArm.Seg.Hand.Finger5.Jnt.PIP.Constraints.Reaction.Fout[0];
        /// Radial positive
        AnyVar Finger5_PIP_RadialForce = .....Right.ShoulderArm.Seg.Hand.Finger5.Jnt.PIP.Constraints.Reaction.Fout[2];

        /// Proximal positive
        AnyVar Finger5_DIP_ProximoDistalForce = .....Right.ShoulderArm.Seg.Hand.Finger5.Jnt.DIP.Constraints.Reaction.Fout[1];
        /// Palmar positive
        AnyVar Finger5_DIP_DorsalPalmarForce = .....Right.ShoulderArm.Seg.Hand.Finger5.Jnt.DIP.Constraints.Reaction.Fout[0];
        /// Radial positive
        AnyVar Finger5_DIP_RadialForce = .....Right.ShoulderArm.Seg.Hand.Finger5.Jnt.DIP.Constraints.Reaction.Fout[2];
      };
      #endif
    }; //End JointReactionForce


    AnyFolder JointMomentMeasure = {


      AnyVar GlenoHumeralAbduction = ....Right.ShoulderArm.MomentMeasure.GHNetMomentMuscles.GHAbduction;
      // Scapula.gh.Rotnode ref
      AnyVar GlenoHumeralFlexion = ....Right.ShoulderArm.MomentMeasure.GHNetMomentMuscles.GHFlexion;
      // Scapula.gh.Rotnode ref
      AnyVar GlenoHumeralExternalRotation = ....Right.ShoulderArm.MomentMeasure.GHNetMomentMuscles.GHExternalRotation;
      // Scapula.gh.Rotnode ref

      AnyVar ElbowFlexion = ....Right.ShoulderArm.MomentMeasure.ElbowFlexionNetMomentMuscles.ElbowFlexion;
      // Humerus.fe.Rotnode ref

      AnyVar ElbowPronation = ....Right.ShoulderArm.MomentMeasure.ElbowPronationNetMomentMuscles.ElbowPronation;
      // Ulna.ps2.Rotnode ref

      AnyVar WristFlexion = ....Right.ShoulderArm.MomentMeasure.WristFlexionNetMomentMuscles.WristFlexion;
      // Radius.wj.Rotnode ref

      AnyVar WristAbduction = ....Right.ShoulderArm.MomentMeasure.WristAbductionNetMomentMuscles.WristAbduction;
      // WristJointSeg.RadialUlnarDeviation.Rotnode ref


    }; //End JointMomentMeasure


    AnyFolder Muscles = {


//      AnySearchFun MuscleList = {
//        Search =
//        #if BM_ARM_MUSCLES_RIGHT == OFF
//         ".....Right.ShoulderArm.JointMuscles.*.*.dof0.Muscle.*.Activity";
//        #else
//         ".....Right.ShoulderArm.Mus.*.Activity";
//        #endif
//      };
//
//      AnyVar Envelope = max(MuscleList());
//
//

    }; //End Muscles


  }; //End Arm


}; //End Right
