SelectedOutput.Right = {

  AnyFolder ShoulderArm = {


    AnyFolder JointReactionForce = {

      /// Lateral positive
      AnyVar SternoClavicular_MedioLateralForce = ....Right.ShoulderArm.Jnt.SCLinCon.Reaction.Fout[0];
      /// Superior positive
      AnyVar SternoClavicular_InferoSuperiorForce = ....Right.ShoulderArm.Jnt.SCLinCon.Reaction.Fout[1];
      /// Posterior positive
      AnyVar SternoClavicular_AnteroPosteriorForce = ....Right.ShoulderArm.Jnt.SCLinCon.Reaction.Fout[2];
      // Thorax scj ref, warning : rotated regarding to thorax ref

      /// Lateral positive
      AnyVar AcromioClavicular_MedioLateralForce = ....Right.ShoulderArm.Jnt.ACLinCon.Reaction.Fout[0];
      /// Superior positive
      AnyVar AcromioClavicular_InferoSuperiorForce = ....Right.ShoulderArm.Jnt.ACLinCon.Reaction.Fout[1];
      /// Posterior positive
      AnyVar AcromioClavicular_AnteroPosteriorForce = ....Right.ShoulderArm.Jnt.ACLinCon.Reaction.Fout[2];
      // Clavicula acj ref

      // include 3 reaction point of scapula
//      AnyVar ScapulaAIPushForce = ....Right.ShoulderArm.Jnt.ScapulaAIThoraxNodeReaction.Ft;
//      AnyVar ScapulaTSPushForce = ....Right.ShoulderArm.Jnt.ScapulaTSThoraxNodeReaction.Ft;
//      AnyVar ConoidLigamentPullForce = ....Right.ShoulderArm.Jnt.ConoidLigamentReaction.Ft;
//      AnyVar TrapezoidLigamentPullForce = ....Right.ShoulderArm.Jnt.TrapezoidLigamentReaction.Ft;


      /// Distraction positive
      AnyVar GlenoHumeral_DistractionForce = ....Right.ShoulderArm.Jnt.GHReactionsNoMuscles.Fout[0];
      /// Superior positive
      AnyVar GlenoHumeral_InferoSuperiorForce = ....Right.ShoulderArm.Jnt.GHReactionsNoMuscles.Fout[1];
      /// Posterior positive
      AnyVar GlenoHumeral_AnteroPosteriorForce = ....Right.ShoulderArm.Jnt.GHReactionsNoMuscles.Fout[2];
      // scapula gh ref

      /// Medial positive
      AnyVar ElbowHumeroUlnar_MedioLateralForce = ....Right.ShoulderArm.Jnt.FE.Constraints.Reaction.Fout[0];
      /// Proximal positive
      AnyVar ElbowHumeroUlnar_ProximoDistalForce = ....Right.ShoulderArm.Jnt.FE.Constraints.Reaction.Fout[1];
      /// Anterior positive
      AnyVar ElbowHumeroUlnar_AnteroPosteriorForce = ....Right.ShoulderArm.Jnt.FE.Constraints.Reaction.Fout[2];
      /// Internal positive
      AnyVar ElbowHumeroUlnar_AxialMoment = ....Right.ShoulderArm.MomentMeasure.ElbowJointReactionMoments.Mlocal[1];
      /// Medial positive
      AnyVar ElbowHumeroUlnar_LateralMoment = ....Right.ShoulderArm.MomentMeasure.ElbowJointReactionMoments.Mlocal[2];
      // humerus fe ref

      /// Ulnar positive
      AnyVar ProximalRadioUlnar_RadialForce = ....Right.ShoulderArm.Jnt.PSProximalReacForce.Fout[1];
      /// Dorsal positive
      AnyVar ProximalRadioUlnar_DorsoVolarForce = ....Right.ShoulderArm.Jnt.PSProximalReacForce.Fout[2];
      // ulna ps2Reac ref

      /// Distal Positive
      AnyVar RadioHumeral_ProximoDistalForce = ....Right.ShoulderArm.Jnt.PSProximalReacForce.Fout[0];
      // radius ps2Reac ref

      /// Ulnar positive
      AnyVar DistalRadioUlnar_RadialForce = ....Right.ShoulderArm.Jnt.PSLinDistalConstraint.Reaction.Fout[0];
      /// Volar positive
      AnyVar DistalRadioUlnar_DorsoVolarForce = ....Right.ShoulderArm.Jnt.PSLinDistalConstraint.Reaction.Fout[1];
      // ulna us ref

      /// Ulnar positive
      AnyVar WristRadioCarpal_RadialForce = ....Right.ShoulderArm.Jnt.WristJointFlexion.Constraints.Reaction.Fout[1];
      /// Proximal positive
      AnyVar WristRadioCarpal_ProximoDistalForce = ....Right.ShoulderArm.Jnt.WristJointFlexion.Constraints.Reaction.Fout[0];
      /// Dorsal positive
      AnyVar WristRadioCarpal_DorsoVolarForce = ....Right.ShoulderArm.Jnt.WristJointFlexion.Constraints.Reaction.Fout[2];
      /// Internal positive
      AnyVar WristRadioCarpal_AxialMoment = ....Right.ShoulderArm.MomentMeasure.WristJointReactionMoments.Mlocal[0];
      // radius wj ref


    }; //End JointReactionForce


    AnyFolder JointMomentMeasure = {


      AnyVar GlenoHumeralAbduction = ....Right.ShoulderArm.JointMuscles.GHJnt.GlenohumeralAbduction.dof0.Muscle.PosMuscle.Fm
                                   - ....Right.ShoulderArm.JointMuscles.GHJnt.GlenohumeralAbduction.dof0.Muscle.NegMuscle.Fm;
                                   // Scapula.gh.Rotnode ref

      AnyVar GlenoHumeralFlexion = ....Right.ShoulderArm.JointMuscles.GHJnt.GlenohumeralFlexion.dof0.Muscle.PosMuscle.Fm
                                 - ....Right.ShoulderArm.JointMuscles.GHJnt.GlenohumeralFlexion.dof0.Muscle.NegMuscle.Fm;
                                 // Scapula.gh.Rotnode ref

      AnyVar GlenoHumeralExternalRotation = ....Right.ShoulderArm.JointMuscles.GHJnt.GlenohumeralExternalRotation.dof0.Muscle.PosMuscle.Fm
                                          - ....Right.ShoulderArm.JointMuscles.GHJnt.GlenohumeralExternalRotation.dof0.Muscle.NegMuscle.Fm;
                                          // Scapula.gh.Rotnode ref

      AnyVar ElbowFlexion = ....Right.ShoulderArm.JointMuscles.FEJnt.ElbowFlexion.dof0.Muscle.PosMuscle.Fm
                          - ....Right.ShoulderArm.JointMuscles.FEJnt.ElbowFlexion.dof0.Muscle.NegMuscle.Fm;
                          // Humerus.fe.Rotnode ref

      AnyVar ElbowPronation = ....Right.ShoulderArm.JointMuscles.FEJnt.ElbowPronation.dof0.Muscle.PosMuscle.Fm
                            - ....Right.ShoulderArm.JointMuscles.FEJnt.ElbowPronation.dof0.Muscle.NegMuscle.Fm;
                            // Ulna.ps2.Rotnode ref

      AnyVar WristFlexion = ....Right.ShoulderArm.JointMuscles.WristJnt.WristFlexion.dof0.Muscle.PosMuscle.Fm
                          - ....Right.ShoulderArm.JointMuscles.WristJnt.WristFlexion.dof0.Muscle.NegMuscle.Fm;
                          // Radius.wj.Rotnode ref

      AnyVar WristAbduction = ....Right.ShoulderArm.JointMuscles.WristJnt.WristAbduction.dof0.Muscle.PosMuscle.Fm
                            - ....Right.ShoulderArm.JointMuscles.WristJnt.WristAbduction.dof0.Muscle.NegMuscle.Fm;
                            // WristJointSeg.RadialUlnarDeviation.Rotnode ref


    }; //End JointMomentMeasure


    AnyFolder Muscles = {


      AnySearchFun MuscleList1 = {
        Search = ".....Right.ShoulderArm.JointMuscles.*.*.dof0.Muscle.*.Activity";
      };

      AnySearchFun MuscleList2 = {
        Search = ".....Right.ShoulderArm.Mus.*.Activity";
      };

      AnyVar Envelope = max({max(MuscleList1()), max(MuscleList2())});


    }; //End Muscles


  }; //End Arm


}; //End Right
