/**
This is the root file for the shoulder-arm model

This model contains data from two different persons. Most of the data that has been used in this model comes from the Dutch
Shoulder Group and can be found on the following webpage http://www.fbw.vu.nl/research/Lijn_A4/shoulder/overview.htm
The model is built using data from subject 2 from the VU study and subject 2 from the
MAYO study.

The files, which contains the name "forearm", are built on data from the MAYO study
The model contains the following files:
"Seg.any" Inertia properties of all segments and definitions of surfaces used for wrapping
"ClavicleMuscleGeometry.any" nodes for muscle attacments VU sub2
"HumerusMuscleGeometry".any" nodes for muscle attacments VU sub2
"RadiusMuscleGeometry.any" nodes for muscle attacments MAYO sub2
"ScapulaMuscleGeometry.any" nodes for muscle attacments VU sub2
"UlnaMuscleGeometry.any"nodes for muscle attacments VU sub2
"jnt.any" joint definitions for the shoulder and arm
"jnt.nomuscles.any" special joint file for the shoulder and arm to be used when no muscles is used, all joints has reaction forces applied
"ArtificialRakeForDeltoidMuscle.any" this the file which contains an artificial segment used for controlling the wrapping of the deltoid muscle
"AddOnOutsideBlockForKinematics.any" adding stuff for the scapulo-thoracic gliding plane to the thorax segment
"AddOnOutsideBlockForMuscles.any" adding wrapping geometries to segments which are not part of the block
"Glove.any" model of a glove which simulates the strength capabilities of the hand
"GloveMuscle.any" muscles for the glove here the strength of the glove can be adjusted
"muscle.any" muscle definitons for the shoulder and upper arm
"muscle-parameters-shoulder.any" muscle strength parameters for the arm
"muscle-parameters-shoulder-const.any" muscle strength parameters for the arm
"muscle-parameters-shoulder-const_simple.any" muscle strength parameters for the arm
"WristMuscle.any" this files adds artificial muscles to the wrist
"PosDumperRight.any"  this file is used for dumping the coordinates and orientations of the segments in a right shoulder
"PosDumperLeft.any"   this file is used for dumping the coordinates and orientations of the segments in a left shoulder

The raw data from http://www.fbw.vu.nl/research/Lijn_A4/shoulder/overview.htm has been converted using a small Matlab program,
which automatically transforms the global coordinates into local coordinates on the segments.

Related articles (The first line in each reference are the key used in the script)

Helm1991
F.C.T. van der Helm and R. Veenbaas
Modeling the mechanical efect of muscles with large attachment sites: aplication to the shoulder mechanism
Journal of Biomechanics, vol. 24, no. 12, pp. 1151-1163, 1991

Veeger1991
H.E.J. Veeger, F.C.T. van der Helm, L.H.V. van der Woude, G.M. Pronk and R.H. Rozendal
Inertia and muscle contraction parameters for musculoskeletal modelling of the shoulder mechanism
Journal of Biomechanics, vol. 24, no. 7, pp. 615-629, 1991

Helm1994
F.C.T. van der Helm
A finite element musculoskeletal model of the shoulder mechanism
Journal of Biomechanics, vol. 27, no. 5, pp. 551-569, 1994

Happee1995
The control of shoulder muscles during goal
directed movements, an inverse dynamic analysis
R. Happee and F.C.T. Van der Helm
J. Biomechanics, vol. 28, no. 10, pp. 1179-1191, 1995

Helm1992
Geometry parameters for musculoskeletal modeling of the shoulder system
Journal of biomechanics Vol. 25 no. 2, pp. 129-144, 1992
Note: this reference is used for the geometry used for the definition of many of the geometries
which are used for muscle wrapping

Veeger1997
DirkJan (H.E.J.) Veeger, Bing Yu, Kai Nan An
Orientation of axes in the elbow and forearm for biomechanical modeling
Proceedings of the first conference of the ISG

The segment coordinatesystem are according to the ISB proposal, please see
http://www.fbw.vu.nl/research/Lijn_A4/shoulder/isg/proposal/protocol.htm

Muscles spanning the wrist has been added the data for these muscles originates from these articles
Jacobson
Jacobson, M. D., R. Raab, B. M. Fazeli, R. A. Abrams, M. J. Botte, and R. L. Lieber.
Architectural design of the human intrinsic hand muscles.
J. Hand Surg. [Am.] 17:804809, 1992.

Lieber1
Lieber, R. L., M. D. Jacobson, B. M. Fazeli, R. A. Abrams, and M. J. Botte.
Architecture of selected muscles of the arm and forearm: Anatomy and implications for tendon transfer.
J. Hand Surg. [Am.] 17:787-798, 1992.

Lieber2
Lieber, R. L., B. M. Fazeli, and M. J. Botte.
Architecture of selected wrist flexor and extensor muscles.
J. Hand Surg. [Am.] 15:244-250, 1990.

Murray
Muray, W.M.,T.S. Buchanan, and S.L. Delp.
Scaling of peak moment arms with the elbow and forearm position
J. Biomech. Vol. 28, pp. 513-525, 1995


Known issues:

1: The model seems to be too weak for the load applied when doing pushups. This is a sign that the shoulder needs more
adjustments before it becomes reliable
2: More work has to be done on muscle calibration. At present one posture is used for calibrating all muscles.
The file "shouldercalibration.any", which defines this, can be found in the applications in the Application directory

NOTE:
The comment "Correction" generally means that numbers have been changed and do not follow the published data

http://www.fbw.vu.nl/research/Lijn_A4/shoulder/isg/proposal/protocol.htm

The arm has the following basic dof, which can be controlled by combinations joint drivers directly or indirectly through
connections to the environment

SternoClavicularProtraction
SternoClavicularElevation
SternoClavicularAxialRotation

GlenohumeralFlexion
GlenohumeralAbduction
GlenohumeralExternalRotation

ElbowFlexion
ElbowPronation

WristFlexion
WristAbduction

The model consist of the following joints:

SC SternoClavicular: spherical joint
AC AcromioClavicular: spherical joint
GH Glenohumeral joint: spherical (normal reactions of the spherical joint is not used unstead they are created so that they fall
within the glenoid cavity the file, please see the file GHReactions.any for details)

AI One dimensional constraint between the scapula and the thorax at the bonylandmark AI om scapula
AA One dimensional constraint between the scapula and the thorax at the bonylandmark AA om scapula

ConoideumLigament : the lenght of this segment is driven to a constant lenght

FE Flexion extension of the elbow: revolute joint

PS pronation supination joint or the forearm: combination of joints in distal and proximal end of the radius bone that leaves one dof
free which is pronation/supination of the forearm

Wrist joint: created as two revolute joints where the axis of rotations are not coincident

*/
AnyDoc ArmDoc ={
   DocumentationLink = AMMR_PATH_DOC + "/body/shoulder_arm_model.html";
};

// TODO: REMOVE FROM HERE, INITIALIZE THROUGH BuildTools
#ifndef BM_ARM_DATASET
  // default dataset
  #if _ARM_DETAILED_HAND_WHICH == "RUHM"
  #define BM_ARM_DATASET "ArmData1.2"
  #else
  #define BM_ARM_DATASET "ArmData1.1"
  #endif
#endif

#ifndef BM_ARM_DATASET_PATH
  #path BM_ARM_DATASET_PATH "../ARM/"+BM_ARM_DATASET
#endif


AnyFolder ModelParameters = {
  #include "<BM_ARM_DATASET_PATH>/ArmModelParameters.any"
};

AnyFolder STL = {
  #include "<BM_ARM_DATASET_PATH>/STL/STL.any"
};


#include "AddOnOutsideBlockForKinematics.any"
AnyFolder MusPar = {};
AnyFolder Mus = {};

#ifndef BM_ARM_DETAILED_HAND
  #define BM_ARM_DETAILED_HAND OFF
#endif

#if (!(BM_ARM_DETAILED_HAND == ON & BM_ARM_RIGHT == ON)) & (!(BM_ARM_DETAILED_HAND == ON & BM_ARM_LEFT == ON))
  AnyRefNode &GloveInsertationNode=Seg.Hand.HandRef.PalmJoint;
  #include "Glove.any"

  #if (_LEFT_RIGHT_ == "RIGHT" & BM_ARM_RIGHT == ON & (BM_ARM_MUSCLES_RIGHT > OFF )) | (_LEFT_RIGHT_ == "LEFT" & BM_ARM_LEFT == ON & (BM_ARM_MUSCLES_LEFT > OFF))
    #include "GloveMuscle.any"
  #endif
#endif


///Folder with segment for the arm
AnyFolder Seg={
  #include "Seg.any"
  #if (!(BM_ARM_DETAILED_HAND == ON & BM_ARM_RIGHT == ON)) & (!(BM_ARM_DETAILED_HAND == ON & BM_ARM_LEFT == ON))

  #include "HandSeg.any"
  Hand={
    AnyRefFrame &CarpalsRef = Ref;
    AnyRefFrame &HandRef = Ref;
    AnyRefFrame &Finger1MetaRef = Ref;
    AnyRefFrame &Finger2MetaRef = Ref;
    AnyRefFrame &Finger3MetaRef = Ref;
    AnyRefFrame &Finger4MetaRef = Ref;
    AnyRefFrame &Finger5MetaRef = Ref;
  };

  #else

  AnyFolder Hand = {
    AnyComponentDefinition CDef = {
      SubGroupRegexSearch = "^(Finger\d{1})\.([_[:alnum:]]+)\.([_[:alnum:]]+).*?";
      SubGroupRegexReplace = "$1/$3";
    };
    // temporarily needed references for detailed hand
    AnyFolder &GScaling = ..Scaling;
    AnyFolder &MassScaling = ..MassScaling;
    AnyFolder &StrengthScaling = ..StrengthScaling;

    #include "../Hand/HandSeg.any"
    AnyRefFrame &CarpalsRef = Carpals.CarpalsRef;
    AnyRefFrame &HandRef = Carpals;
    AnyRefFrame &Finger1MetaRef = Finger1.Seg.Metacarpal;
    AnyRefFrame &Finger2MetaRef = Finger2.Seg.Metacarpal;
    AnyRefFrame &Finger3MetaRef = Finger3.Seg.Metacarpal;
    AnyRefFrame &Finger4MetaRef = Finger4.Seg.Metacarpal;
    AnyRefFrame &Finger5MetaRef = Finger5.Seg.Metacarpal;
	//Further references @loopluc
    AnyRefFrame &Finger1ProximalRef = Finger1.Seg.ProximalPhalanx;
    AnyRefFrame &Finger2ProximalRef = Finger2.Seg.ProximalPhalanx;
    AnyRefFrame &Finger3ProximalRef = Finger3.Seg.ProximalPhalanx;
    AnyRefFrame &Finger4ProximalRef = Finger4.Seg.ProximalPhalanx;
    AnyRefFrame &Finger5ProximalRef = Finger5.Seg.ProximalPhalanx;

    AnyRefFrame &Finger2MiddleRef = Finger2.Seg.MiddlePhalanx;
    AnyRefFrame &Finger3MiddleRef = Finger3.Seg.MiddlePhalanx;
    AnyRefFrame &Finger4MiddleRef = Finger4.Seg.MiddlePhalanx;
    AnyRefFrame &Finger5MiddleRef = Finger5.Seg.MiddlePhalanx;

    AnyRefFrame &Finger1DistalRef = Finger1.Seg.DistalPhalanx;
    AnyRefFrame &Finger2DistalRef = Finger2.Seg.DistalPhalanx;
    AnyRefFrame &Finger3DistalRef = Finger3.Seg.DistalPhalanx;
    AnyRefFrame &Finger4DistalRef = Finger4.Seg.DistalPhalanx;
    AnyRefFrame &Finger5DistalRef = Finger5.Seg.DistalPhalanx;

    #if (_ARM_DETAILED_HAND_WHICH =="RUHM")
    AnyFolder &Finger2TendonIns = Finger2.IntrinsicMusclePoints;
    AnyFolder &Finger3TendonIns = Finger3.IntrinsicMusclePoints;
    AnyFolder &Finger4TendonIns = Finger4.IntrinsicMusclePoints;
    AnyFolder &Finger5TendonIns = Finger5.IntrinsicMusclePoints;
    #endif

    //Chao edit:
    AnyRefFrame &Finger2O1 = Finger2.Seg.DistalPhalanx.ProximalJointSurfaceNode;
    AnyRefFrame &Finger2O2 = Finger2.Seg.MiddlePhalanx.DistalJointNode;
    AnyRefFrame &Finger2O3 = Finger2.Seg.MiddlePhalanx.ProximalJointSurfaceNode;
    AnyRefFrame &Finger2O4 = Finger2.Seg.ProximalPhalanx.DistalJointNode;
    AnyRefFrame &Finger2O5 = Finger2.Seg.ProximalPhalanx.ProximalJointSurfaceNode;
    AnyRefFrame &Finger2O6 = Finger2.Seg.Metacarpal.DistalJointNode;

    AnyRefFrame &Finger3O1 = Finger3.Seg.DistalPhalanx.ProximalJointSurfaceNode;
    AnyRefFrame &Finger3O2 = Finger3.Seg.MiddlePhalanx.DistalJointNode;
    AnyRefFrame &Finger3O3 = Finger3.Seg.MiddlePhalanx.ProximalJointSurfaceNode;
    AnyRefFrame &Finger3O4 = Finger3.Seg.ProximalPhalanx.DistalJointNode;
    AnyRefFrame &Finger3O5 = Finger3.Seg.ProximalPhalanx.ProximalJointSurfaceNode;
    AnyRefFrame &Finger3O6 = Finger3.Seg.Metacarpal.DistalJointNode;

    AnyRefFrame &Finger4O1 = Finger4.Seg.DistalPhalanx.ProximalJointSurfaceNode;
    AnyRefFrame &Finger4O2 = Finger4.Seg.MiddlePhalanx.DistalJointNode;
    AnyRefFrame &Finger4O3 = Finger4.Seg.MiddlePhalanx.ProximalJointSurfaceNode;
    AnyRefFrame &Finger4O4 = Finger4.Seg.ProximalPhalanx.DistalJointNode;
    AnyRefFrame &Finger4O5 = Finger4.Seg.ProximalPhalanx.ProximalJointSurfaceNode;
    AnyRefFrame &Finger4O6 = Finger4.Seg.Metacarpal.DistalJointNode;


    AnyRefFrame &Finger5O1 = Finger5.Seg.DistalPhalanx.ProximalJointSurfaceNode;
    AnyRefFrame &Finger5O2 = Finger5.Seg.MiddlePhalanx.DistalJointNode;
    AnyRefFrame &Finger5O3 = Finger5.Seg.MiddlePhalanx.ProximalJointSurfaceNode;
    AnyRefFrame &Finger5O4 = Finger5.Seg.ProximalPhalanx.DistalJointNode;
    AnyRefFrame &Finger5O5 = Finger5.Seg.ProximalPhalanx.ProximalJointSurfaceNode;
    AnyRefFrame &Finger5O6 = Finger5.Seg.Metacarpal.DistalJointNode;


    };

  #endif

//  #include "NodeForScalingExt.any"
};

#if (((_LEFT_RIGHT_ == "RIGHT") & (BM_ARM_RIGHT == ON) & (BM_ARM_MUSCLES_RIGHT == OFF )) | ((_LEFT_RIGHT_ == "LEFT") & (BM_ARM_LEFT == ON & (BM_ARM_MUSCLES_LEFT == OFF))))
  #include "JointMuscles.any"
#endif


///Joints for the arm
AnyFolder Jnt ={
  #include "Jnt.any"

  #if (((_LEFT_RIGHT_ == "RIGHT") & ((BM_ARM_RIGHT == ON) & (BM_ARM_MUSCLES_RIGHT == OFF ))) | ((_LEFT_RIGHT_ == "LEFT") & (BM_ARM_LEFT == ON & (BM_ARM_MUSCLES_LEFT == OFF))))
    #include "GHReactionsNoMuscles.any"  //This is needed when there is no muscles in the model
  #endif
}; //End Jnt


Mus =
{
    //These files contains wrapping geometries and attachement nodes for the muscles
    //This way of structuring makes it possible to have models using the same kinematics but
    //using different muscle configurations, since all muscle nodes and geometry has been
    //separated in the included files below
    #include "ScapulaMuscleGeometry.any"
    #include "ClavicleMuscleGeometry.any"
    #include "<BM_ARM_DATASET_PATH>/HumerusMuscleGeometry.any"
    #include "<BM_ARM_DATASET_PATH>/RadiusMuscleGeometry.any"
    #include "<BM_ARM_DATASET_PATH>/UlnaMuscleGeometry.any"

    #include "AddOnOutSideBlockForMuscles.any"
#if BM_ARM_DELTOID_WRAPPING == _DELTOID_WRAPPING_RAKE_
    #include "ArtificialRakeForDeltoidMuscle.any"
#else
    #include "DeltoidWrap.any"
#endif

};


//Muscles for the arm
#if (_LEFT_RIGHT_ == "RIGHT" & BM_ARM_RIGHT == ON & (BM_ARM_MUSCLES_RIGHT > OFF )) | (_LEFT_RIGHT_ == "LEFT" & BM_ARM_LEFT == ON & (BM_ARM_MUSCLES_LEFT > OFF))
Mus ={
    #include "Muscle.any"
}; //End Mus

//Muscle strength paramters
MusPar = {
  AnyFolder ConstParam ={
    AnyVar MusStress =..StrengthRef.SpecificMuscleTensionShoulderArm*0.01; //0.9;             // N/mm^2
    AnyVar MusStressForearm = ..StrengthRef.SpecificMuscleTensionShoulderArm*0.01*10^6;//0.9*10^6;  // N/m^2
    AnyVar MusStressHand = ..StrengthRef.SpecificMuscleTensionHand*0.01;//0.9*10^6;  // N/m^2
    /////////////////////////////////////////////////////////////////////////////////////////
    AnyVar MusStressEx = ..StrengthRef.SpecificMuscleTensionEx*0.01;//0.9*10^6;  // N/m^2
    AnyVar MusStressIn = ..StrengthRef.SpecificMuscleTensionIn*0.01;//0.9*10^6;  // N/m^2
    /////////////////////////////////////////////////////////////////////////////////////////

    AnyVar MusDensity =1060;             //kg/m^3
  };

  #if (_LEFT_RIGHT_ == "RIGHT" & BM_ARM_RIGHT == ON & (BM_ARM_MUSCLES_RIGHT == _MUSCLES_SIMPLE_ )) | (_LEFT_RIGHT_ == "LEFT" & BM_ARM_LEFT == ON & (BM_ARM_MUSCLES_LEFT == _MUSCLES_SIMPLE_))
    //This the parameters if a simple muscle model are being used, contains only F0
    #include "Muscle-parameters-shoulder-simple.any"
  #else
    //This block contains the muscle parameters for the 3 element muscle model
    #include "Muscle-parameters-shoulder.any"
    #include "Muscle-parameters-shoulder-const.any"
  #endif

};//End MusPar

#endif

//Summation of masses in the arm
AnyFolder MassSummation={
  AnyVar Mass=.Seg.Scapula.Mass+.Seg.Clavicula.Mass+.Seg.Ulna.Mass+.Seg.Humerus.Mass+.Seg.Radius.Mass+.Seg.Hand.Mass;
};

InterfaceFolder={
   #include "Interface.any"
   #if (!(BM_ARM_DETAILED_HAND == ON & BM_ARM_RIGHT == ON)) & (!(BM_ARM_DETAILED_HAND == ON & BM_ARM_LEFT == ON))
   #else
   #include "../Hand/Interface.any"
   #endif
};

#ifdef DONT_USE_INITIAL_POSITION_FROM_MANNEQUIN
  //
#else
  #include "InitialPositions.any"
#endif

MannequinValuesFolder ={
  #include "MannequinValuesFromModel.any"
};
