AnyFolder Humerus = {
  //AnyVar Mass = 2.57; // Veeger1997 subject no.4.
  AnyVar Mass = 0.028*.BodyParameters.BodyMass; //Winter
  AnyVar Length = 0.340079;
  AnyVar Density = .BodyParameters.Density;
};

//AnyVec3 gh = Main.Model.HumanModel.Right.ShoulderArm.Seg.Humerus.gh.r;
//AnyVec3 fe = Main.Model.HumanModel.Right.ShoulderArm.Seg.Humerus.fe.r;
//AnyVar upperarml = sqrt((gh[0]-fe[0])^2+(gh[1]-fe[1])^2+(gh[2]-fe[2])^2);
//
AnyFolder Ulna = {
  //AnyVar Mass = 1.09/2; // Veeger1997 subject no.4.
  AnyVar Mass = (0.016*.BodyParameters.BodyMass)/2; //Winter
 AnyVar Length = 0.2690167;
  AnyVar Density = .BodyParameters.Density;
};

//AnyVec3 fe1 = Main.Model.HumanModel.Right.ShoulderArm.Seg.Ulna.fe.r;
//AnyVec3 wj  = Main.Model.HumanModel.Right.ShoulderArm.Seg.Hand.wj.r;
//AnyVar lowerarml = sqrt((fe1[0]-wj[0])^2+(fe1[1]-wj[1])^2+(fe1[2]-wj[2])^2);
//
AnyFolder Radius = {
  //AnyVar Mass = 1.09/2; // Veeger1997 subject no.4.
  AnyVar Mass = (0.016*.BodyParameters.BodyMass)/2; //Winter
  AnyVar Length = 0.2690167;
  AnyVar Density = .BodyParameters.Density;
};

AnyFolder Clavicula = {
    AnyVar Mass=0.5; // calculated from: 0.7 kg of muscle (subject 2 of shoulder data) + 0.3 kg estimated mass of clavicle and scapula bone.
  AnyVar Density = .BodyParameters.Density;
};

AnyFolder Scapula = {
  AnyVar Mass=0.5; // calculated from: 0.7 kg of muscle (subject 2 of shoulder data) + 0.3 kg estimated mass of clavicle and scapula bone.
  AnyVar Density = .BodyParameters.Density;
};

AnyFolder Hand = {
  AnyVar Mass = 0.006*.BodyParameters.BodyMass; //Winter
  AnyVar Density = .BodyParameters.Density;
  //The hand can be scaled as a function of the following two propties
  //Handlength: Measured as distance from distal wrist crease to te tip of the long finger with the hand extended
  //the tip of the long finder with the hand extended
  AnyVar HandLength=0.182;  //this is roughly 50% percentile
  //Handbreadth: Measured as the distance across the back of the hand between
  //MCP 2 and 5.
  AnyVar HandBreadth=0.085;

  AnyVar CarpalsLength = (0.1949)*HandLength;

  AnyVar  ThumbMCLength = (0.260844)*HandLength;
  AnyVar  ThumbPPLength = (0.180002)*HandLength;
  AnyVar  ThumbDPLength = (0.138805)*HandLength;

  AnyVar  Finger2MCLength = (0.375286)*HandLength;
  AnyVar  Finger2PPLength = (0.253760)*HandLength;
  AnyVar  Finger2MPLength = (0.159697)*HandLength;
  AnyVar  Finger2DPLength = (0.104295)*HandLength;

  AnyVar  Finger3MCLength = (0.360913)*HandLength;
  AnyVar  Finger3PPLength = (0.280868)*HandLength;
  AnyVar  Finger3MPLength = (0.194885)*HandLength;
  AnyVar  Finger3DPLength = (0.111260)*HandLength;

  AnyVar  Finger4MCLength = (0.319616)*HandLength;
  AnyVar  Finger4PPLength = (0.261700)*HandLength;
  AnyVar  Finger4MPLength = (0.185207)*HandLength;
  AnyVar  Finger4DPLength = (0.113941)*HandLength;

  AnyVar  Finger5MCLength = (0.292675)*HandLength;
  AnyVar  Finger5PPLength = (0.208756)*HandLength;
  AnyVar  Finger5MPLength = (0.129041)*HandLength;
  AnyVar  Finger5DPLength = (0.099599)*HandLength;


  AnyVar ThumbMCMass = Mass/18;
  AnyVar ThumbPPMass = Mass/18;
  AnyVar ThumbDPMass = Mass/18;
  AnyVar FingerMCMass = Mass/18;
  AnyVar FingerPPMass = Mass/18;
  AnyVar FingerMPMass = Mass/18;
  AnyVar FingerDPMass = Mass/18;
};
