AnyFolder Cylinder={
//  AnySeg Cyl={
//    Mass=0;
//    Jii={0,0,0};
//    r0=..InitialPos;
//    Axes0={
//      {..InitialAxes[0][0],..InitialAxes[0][1],..InitialAxes[0][2]},
//      {..InitialAxes[1][0],..InitialAxes[1][1],..InitialAxes[1][2]},
//      {..InitialAxes[2][0],..InitialAxes[2][1],..InitialAxes[2][2]}};
//
//    AnyRefNode node1={
//       sRel=...Scale({0,0,-0.03});
//      AnySurfCylinder CylSurf={
//        Length=sqrt((..node2.sRel[0]-..node1.sRel[0])^2+(..node2.sRel[1]-..node1.sRel[1])^2+(..node2.sRel[2]-..node1.sRel[2])^2);
//        Radius=sqrt((..node2.sRel[0]-..node3.sRel[0])^2+(..node2.sRel[1]-..node3.sRel[1])^2+(..node2.sRel[2]-..node3.sRel[2])^2);
//      };
//    };
//    AnyRefNode node2={ sRel=...Scale({0,0,0.12});      };
//    AnyRefNode node3={ sRel=...Scale({0,0.014,0.12});  };
//
//
//  };
//


  AnySeg Cyl={
    Mass=0;
    Jii={0,0,0};
    r0=..InitialPos;

    Axes0={
      {..InitialAxes[0][0],..InitialAxes[0][1],..InitialAxes[0][2]},
      {..InitialAxes[1][0],..InitialAxes[1][1],..InitialAxes[1][2]},
      {..InitialAxes[2][0],..InitialAxes[2][1],..InitialAxes[2][2]}}
    *..InitialRot;

    AnyVar TranslateOnZ=-0.1;  //non zero to improve starting pos guess

    AnyRefNode node1={
//       sRel=...Scale({0,0,-0.03});
       sRel=...Scale({0,0,-0.03+.TranslateOnZ});

      AnySurfCylinder CylSurf={
        Length=sqrt((..node2.sRel[0]-..node1.sRel[0])^2+(..node2.sRel[1]-..node1.sRel[1])^2+(..node2.sRel[2]-..node1.sRel[2])^2);
        Radius=sqrt((..node2.sRel[0]-..node3.sRel[0])^2+(..node2.sRel[1]-..node3.sRel[1])^2+(..node2.sRel[2]-..node3.sRel[2])^2);
        AnyDrawParamSurf drws = {};
      };
      AnyDrawRefFrame drwf = {};
    };
    AnyRefNode node2={ sRel=...Scale({0,0,0.12+.TranslateOnZ});      };
    AnyRefNode node3={ sRel=...Scale({0,0.014,0.12+.TranslateOnZ});  };

  //AnyDrawRefFrame drw ={ScaleXYZ={1,1,1}*0.5;RGB={1,0,0};};


  };


  AnySphericalJoint SphericalJoint={
    AnyRefFrame &ref1=..StartNode;
    AnyRefFrame &ref2=.Cyl.node1;
  };

  AnyKinEqSimpleDriver CylRotDrv1={
    AnyKinLinear Lin={
      AnyRefFrame &ref1=..Cyl;
      AnyRefFrame &ref2=...EndNode;
      Ref=0;
    };
    DriverPos={0,0};
    DriverVel={0,0};
    MeasureOrganizer={0,1};
  };

  AnyKinEqSimpleDriver CylRotDrv2={
    AnyKinRotational Rot={
      AnyRefFrame &ref2=..Cyl;
      AnyRefFrame &ref1=...StartNode;
      Type=RotVector;
    };
    MeasureOrganizer={2};
    DriverPos={0};
    DriverVel={0};
  };
};
