_CODE_MACRO_(Extensor_Indicis)
_CODE_MACRO_(Abductor_Pollicis_Longus)
_CODE_MACRO_(Extensor_Pollicis_Brevis)
_CODE_MACRO_(Extensor_Pollicis_Longus)
_CODE_MACRO_(Extensor_Carpi_Radialis_Longus)
_CODE_MACRO_(Extensor_Carpi_Radialis_Brevis)
_CODE_MACRO_(Extensor_Carpi_Ulnaris)
_CODE_MACRO_(Flexor_Carpi_Ulnaris)
_CODE_MACRO_(Flexor_Carpi_Radialis)
_CODE_MACRO_(Palmaris_Longus)
_CODE_MACRO_(Flexor_Digitorum_Superficialis__Digit5)
_CODE_MACRO_(Flexor_Digitorum_Superficialis__Digit4)
_CODE_MACRO_(Flexor_Digitorum_Superficialis__Digit3)
_CODE_MACRO_(Flexor_Digitorum_Superficialis__Digit2)
_CODE_MACRO_(Flexor_Digitorum_Produndus__Digit5)
_CODE_MACRO_(Flexor_Digitorum_Profundus__Digit4)
_CODE_MACRO_(Flexor_Digitorum_Profundus__Digit3)
_CODE_MACRO_(Flexor_Digitorum_Profundus__Digit2)
_CODE_MACRO_(Extensor_Digitorum__Digit5)
_CODE_MACRO_(Extensor_Digitorum__Digit4)
_CODE_MACRO_(Extensor_Digitorum__Digit3)
_CODE_MACRO_(Extensor_Digitorum__Digit2)
_CODE_MACRO_(Extensor_Digiti_Minimi)
_CODE_MACRO_(Flexor_Pollicis_Longus)
_CODE_MACRO_(biceps_brachii_caput_breve)
_CODE_MACRO_(biceps_brachii_caput_longum)
_CODE_MACRO_(Brach_rad_1)
_CODE_MACRO_(Brach_rad_2)
_CODE_MACRO_(Pronator_teres_caput_humeral_1)
_CODE_MACRO_(Pronator_teres_caput_humeral_2)
_CODE_MACRO_(Pronator_teres_caput_ulnare_1)
_CODE_MACRO_(Supinator_humerus_part_1)
_CODE_MACRO_(Supinator_humerus_part_2)
_CODE_MACRO_(Supinator_ulna_part_1)
_CODE_MACRO_(Supinator_ulna_part_2)
_CODE_MACRO_(Pron_quadr_1)
_CODE_MACRO_(Pron_quadr_2)
_CODE_MACRO_(Brachialis_1)
_CODE_MACRO_(Brachialis_2)
_CODE_MACRO_(Triceps_LH_1)
_CODE_MACRO_(Triceps_LH_2)
_CODE_MACRO_(Triceps_ME_1)
_CODE_MACRO_(Triceps_ME_2)
_CODE_MACRO_(Triceps_LA_1)
_CODE_MACRO_(Triceps_LA_2)
_CODE_MACRO_(Anconeus_1)
_CODE_MACRO_(Anconeus_2)
_CODE_MACRO_(coracobrachialis_1)
_CODE_MACRO_(coracobrachialis_2)
_CODE_MACRO_(coracobrachialis_3)
_CODE_MACRO_(coracobrachialis_4)
_CODE_MACRO_(coracobrachialis_5)
_CODE_MACRO_(coracobrachialis_6)
_CODE_MACRO_(deltoideus_scapular_part_1)
_CODE_MACRO_(deltoideus_scapular_part_2)
#if BM_ARM_DELTOID_WRAPPING == ON
_CODE_MACRO_(deltoideus_scapular_part_2a)
_CODE_MACRO_(deltoideus_scapular_part_2b)
#endif
_CODE_MACRO_(deltoideus_scapular_part_3)
_CODE_MACRO_(deltoideus_scapular_part_4)
#if BM_ARM_DELTOID_WRAPPING == ON
_CODE_MACRO_(deltoideus_scapular_part_4a)
#endif
_CODE_MACRO_(deltoideus_scapular_part_5)
#if BM_ARM_DELTOID_WRAPPING == OFF
_CODE_MACRO_(deltoideus_scapular_part_6)
#endif
_CODE_MACRO_(deltoideus_clavicular_part_1)
#if BM_ARM_DELTOID_WRAPPING == OFF
_CODE_MACRO_(deltoideus_clavicular_part_2)
#endif
_CODE_MACRO_(deltoideus_clavicular_part_3)
_CODE_MACRO_(deltoideus_clavicular_part_4)
#if BM_ARM_DELTOID_WRAPPING == OFF
_CODE_MACRO_(deltoideus_clavicular_part_5)
#endif
_CODE_MACRO_(deltoideus_clavicular_part_6)
_CODE_MACRO_(infraspinatus_1)
_CODE_MACRO_(infraspinatus_2)
_CODE_MACRO_(infraspinatus_3)
_CODE_MACRO_(infraspinatus_4)
_CODE_MACRO_(infraspinatus_5)
_CODE_MACRO_(infraspinatus_6)
_CODE_MACRO_(latissimus_dorsi_1)
_CODE_MACRO_(latissimus_dorsi_2)
_CODE_MACRO_(latissimus_dorsi_3)
_CODE_MACRO_(latissimus_dorsi_4)
_CODE_MACRO_(latissimus_dorsi_5)
_CODE_MACRO_(pectoralis_major_thoracic_part_1)
_CODE_MACRO_(pectoralis_major_thoracic_part_2)
_CODE_MACRO_(pectoralis_major_thoracic_part_3)
_CODE_MACRO_(pectoralis_major_thoracic_part_4)
_CODE_MACRO_(pectoralis_major_thoracic_part_5)
_CODE_MACRO_(pectoralis_major_clavicular_part_1)
_CODE_MACRO_(pectoralis_major_clavicular_part_2)
_CODE_MACRO_(pectoralis_major_clavicular_part_3)
_CODE_MACRO_(pectoralis_major_clavicular_part_4)
_CODE_MACRO_(pectoralis_major_clavicular_part_5)
_CODE_MACRO_(subscapularis_1)
_CODE_MACRO_(subscapularis_2)
_CODE_MACRO_(subscapularis_3)
_CODE_MACRO_(subscapularis_4)
_CODE_MACRO_(subscapularis_5)
_CODE_MACRO_(subscapularis_6)
_CODE_MACRO_(supraspinatus_1)
_CODE_MACRO_(supraspinatus_2)
_CODE_MACRO_(supraspinatus_3)
_CODE_MACRO_(supraspinatus_4)
_CODE_MACRO_(supraspinatus_5)
_CODE_MACRO_(supraspinatus_6)
_CODE_MACRO_(teres_major_1)
_CODE_MACRO_(teres_major_2)
_CODE_MACRO_(teres_major_3)
_CODE_MACRO_(teres_major_4)
_CODE_MACRO_(teres_major_5)
_CODE_MACRO_(teres_major_6)
_CODE_MACRO_(teres_minor_1)
_CODE_MACRO_(teres_minor_2)
_CODE_MACRO_(teres_minor_3)
_CODE_MACRO_(teres_minor_4)
_CODE_MACRO_(teres_minor_5)
_CODE_MACRO_(teres_minor_6)
_CODE_MACRO_(levator_scapulae_1)
_CODE_MACRO_(levator_scapulae_2)
_CODE_MACRO_(levator_scapulae_3)
_CODE_MACRO_(levator_scapulae_4)
_CODE_MACRO_(pectoralis_minor_1)
_CODE_MACRO_(pectoralis_minor_2)
_CODE_MACRO_(pectoralis_minor_3)
_CODE_MACRO_(pectoralis_minor_4)
_CODE_MACRO_(rhomboideus_1)
_CODE_MACRO_(rhomboideus_2)
_CODE_MACRO_(rhomboideus_3)
_CODE_MACRO_(serratus_anterior_1)
_CODE_MACRO_(serratus_anterior_2)
_CODE_MACRO_(serratus_anterior_3)
_CODE_MACRO_(serratus_anterior_4)
_CODE_MACRO_(serratus_anterior_5)
_CODE_MACRO_(serratus_anterior_6)
_CODE_MACRO_(trapezius_scapular_part_1)
_CODE_MACRO_(trapezius_scapular_part_2)
_CODE_MACRO_(trapezius_scapular_part_3)
_CODE_MACRO_(trapezius_scapular_part_4)
_CODE_MACRO_(trapezius_scapular_part_5)
_CODE_MACRO_(trapezius_scapular_part_6)
_CODE_MACRO_(Sternocleidomastoid)
_CODE_MACRO_(trapezius_clavicular_part_1)
_CODE_MACRO_(trapezius_clavicular_part_2)
_CODE_MACRO_(trapezius_clavicular_part_3)
_CODE_MACRO_(trapezius_clavicular_part_4)
_CODE_MACRO_(trapezius_clavicular_part_5)
_CODE_MACRO_(trapezius_clavicular_part_6)
