AnyMuscleShortestPath  trapezius_scapular_part_1 = {
  AnyMuscleModel &MusMdl =  ..MuscleModels.trapezius_scapular_part_1;
  AnyRefNode &Org = .TrunkNodeAttachement.T12Seg.O_trapezius_scapular_part_1;
  AnyRefNode &Ins = ..Seg.Scapula.I_trapezius_scapular_part_1;
  viewMuscle = {#include "../DrawSettings/MusDrawSettings.any"};
  SPLine.StringMesh = 100;
  AnySurfCylinder &Surf =.margo_medialis;
  SPLine = {
    AnyMatrix InitWrapPos = { transf3D({1.3*.Surf.Radius, 0,0.5*.Surf.Length}, &.Surf)};
    InitWrapPosVecArr = {&InitWrapPos};
  };
};

AnyMuscleShortestPath  trapezius_scapular_part_2 = {
  AnyMuscleModel &MusMdl = ..MuscleModels.trapezius_scapular_part_2;
  AnyRefNode &Org = .TrunkNodeAttachement.T11Seg.O_trapezius_scapular_part_2;
  AnyRefNode &Ins = ..Seg.Scapula.I_trapezius_scapular_part_2;
  viewMuscle = {#include "../DrawSettings/MusDrawSettings.any"};
  SPLine.StringMesh = 100;
  AnySurfCylinder &Surf =.margo_medialis;
  SPLine = {
    AnyMatrix InitWrapPos = { transf3D({1.3*.Surf.Radius, 0,0.5*.Surf.Length}, &.Surf)};
    InitWrapPosVecArr = {&InitWrapPos};
  };
};

AnyMuscleShortestPath trapezius_scapular_part_3 = {
  AnyMuscleModel &MusMdl = ..MuscleModels.trapezius_scapular_part_3;
  AnyRefNode &Org = .TrunkNodeAttachement.T10Seg.O_trapezius_scapular_part_3;
  AnyRefNode &Ins = ..Seg.Scapula.I_trapezius_scapular_part_3;
  viewMuscle = {#include "../DrawSettings/MusDrawSettings.any"};
  SPLine.StringMesh = 100;
  AnySurfCylinder &Surf =.margo_medialis;
  SPLine.InitWrapPosVecArr = .trapezius_scapular_part_1.SPLine.InitWrapPosVecArr;
};

AnyMuscleShortestPath trapezius_scapular_part_4 = {
  AnyMuscleModel &MusMdl = ..MuscleModels.trapezius_scapular_part_4;
  AnyRefNode &Org = .TrunkNodeAttachement.T9Seg.O_trapezius_scapular_part_4;
  AnyRefNode &Ins = ..Seg.Scapula.I_trapezius_scapular_part_4;
  viewMuscle = {#include "../DrawSettings/MusDrawSettings.any"};
  SPLine.StringMesh = 100;
  AnySurfCylinder &Surf =.margo_medialis;
  SPLine.InitWrapPosVecArr = .trapezius_scapular_part_1.SPLine.InitWrapPosVecArr;
};

AnyMuscleShortestPath trapezius_scapular_part_5 = {
  AnyMuscleModel &MusMdl = ..MuscleModels.trapezius_scapular_part_5;
  AnyRefNode &Org = .TrunkNodeAttachement.T8Seg.O_trapezius_scapular_part_5;
  AnyRefNode &Ins = ..Seg.Scapula.I_trapezius_scapular_part_5;
  viewMuscle = {#include "../DrawSettings/MusDrawSettings.any"};
  SPLine.StringMesh = 100;
  AnySurfCylinder &Surf =.margo_medialis;
  SPLine.InitWrapPosVecArr = .trapezius_scapular_part_1.SPLine.InitWrapPosVecArr;
};

AnyMuscleShortestPath trapezius_scapular_part_6 = {
  AnyMuscleModel &MusMdl = ..MuscleModels.trapezius_scapular_part_6;
  AnyRefNode &Org = .TrunkNodeAttachement.T7Seg.O_trapezius_scapular_part_6;
  AnyRefNode &Ins = ..Seg.Scapula.I_trapezius_scapular_part_6;
  viewMuscle = {#include "../DrawSettings/MusDrawSettings.any"};
  SPLine.StringMesh = 100;
  AnySurfCylinder &Surf =.margo_medialis;
  SPLine.InitWrapPosVecArr = .trapezius_scapular_part_1.SPLine.InitWrapPosVecArr;
};

AnyMuscleShortestPath trapezius_scapular_part_7 = {
  AnyMuscleModel &MusMdl = ..MuscleModels.trapezius_scapular_part_7;
  AnyRefNode &Org = .TrunkNodeAttachement.T6Seg.O_trapezius_scapular_part_7;
  AnyRefNode &Ins = ..Seg.Scapula.I_trapezius_scapular_part_7;
  viewMuscle = {#include "../DrawSettings/MusDrawSettings.any"};
  SPLine.StringMesh = 100;
  AnySurfCylinder &Surf =.margo_medialis;
  SPLine.InitWrapPosVecArr = .trapezius_scapular_part_1.SPLine.InitWrapPosVecArr;
};

AnyMuscleShortestPath trapezius_scapular_part_8 = {
  AnyMuscleModel &MusMdl = ..MuscleModels.trapezius_scapular_part_8;
  AnyRefNode &Org = .TrunkNodeAttachement.T5Seg.O_trapezius_scapular_part_8;
  AnyRefNode &Ins = ..Seg.Scapula.I_trapezius_scapular_part_8;
  viewMuscle = {#include "../DrawSettings/MusDrawSettings.any"};
  SPLine.StringMesh = 100;
  AnySurfCylinder &Surf =.margo_medialis;
  SPLine.InitWrapPosVecArr = .trapezius_scapular_part_1.SPLine.InitWrapPosVecArr;
};

AnyMuscleShortestPath trapezius_scapular_part_9 = {
  AnyMuscleModel &MusMdl = ..MuscleModels.trapezius_scapular_part_9;
  AnyRefNode &Org = .TrunkNodeAttachement.T4Seg.O_trapezius_scapular_part_9;
  AnyRefNode &Ins = ..Seg.Scapula.I_trapezius_scapular_part_9;
  viewMuscle = {#include "../DrawSettings/MusDrawSettings.any"};
  SPLine.StringMesh = 100;
  AnySurfCylinder &Surf =.margo_medialis;
  SPLine.InitWrapPosVecArr = .trapezius_scapular_part_1.SPLine.InitWrapPosVecArr;
};

AnyMuscleViaPoint trapezius_scapular_part_10 = {
  AnyMuscleModel &MusMdl = ..MuscleModels.trapezius_scapular_part_10;
  AnyRefNode &Org = .TrunkNodeAttachement.T3Seg.O_trapezius_scapular_part_10;
  AnyRefNode &Ins = ..Seg.Scapula.I_trapezius_scapular_part_10;
  viewMuscle = {#include "../DrawSettings/MusDrawSettings.any"};
};

AnyMuscleViaPoint trapezius_scapular_part_11 = {
  AnyMuscleModel &MusMdl = ..MuscleModels.trapezius_scapular_part_11;
  AnyRefNode &Org = .TrunkNodeAttachement.T2Seg.O_trapezius_scapular_part_11;
  AnyRefNode &Ins = ..Seg.Scapula.I_trapezius_scapular_part_11;
  viewMuscle = {#include "../DrawSettings/MusDrawSettings.any"};
};

AnyMuscleViaPoint trapezius_scapular_part_12 = {
  AnyMuscleModel &MusMdl = ..MuscleModels.trapezius_scapular_part_12;
  AnyRefNode &Org = .TrunkNodeAttachement.T1Seg.O_trapezius_scapular_part_12;
  AnyRefNode &Ins = ..Seg.Scapula.I_trapezius_scapular_part_12;
  viewMuscle = {#include "../DrawSettings/MusDrawSettings.any"};
};


AnyMuscleViaPoint trapezius_scapular_part_13 = {
  AnyMuscleModel &MusMdl = ..MuscleModels.trapezius_scapular_part_13;
  AnyRefNode &Org = .TrunkNodeAttachement.C7Seg.O_trapezius_scapular_part_13;
  AnyRefNode &Ins = ..Seg.Scapula.I_trapezius_scapular_part_13;
  viewMuscle = {#include "../DrawSettings/MusDrawSettings.any"};
};

AnyMuscleViaPoint trapezius_scapular_part_14 = {
  AnyMuscleModel &MusMdl = ..MuscleModels.trapezius_scapular_part_14;
  AnyRefNode &Org = .TrunkNodeAttachement.C6Seg.O_trapezius_scapular_part_14;
  AnyRefNode &Ins = ..Seg.Scapula.I_trapezius_scapular_part_14;
  viewMuscle = {#include "../DrawSettings/MusDrawSettings.any"};
};
