/**
  Folder containing different R values (ratios of muscle fiber length to optimal fiber
  length) for different purposes.
*/
AnyFolder RValues = {
  AnyFloat RMinNoMuscleForce = 0.5;
  AnyFloat RMinDefault = 0.6;

  AnyFloat RMaxDefault = 1.2;
  AnyFloat RMaxActiveStretching = 1.3;
  AnyFloat RMaxPassiveForceEqualToFMax = 1.5;
};
