#class_template Template_DrawSettings  {

  //^ This is the DrawSettings file implemented as a class template.
  //^ It behaves as a class with default values which can be overridden
  //^ in your applicaiton:
  //^
  //^ .. code_block:: AnyScript
  //^
  //^    Main.DrawSettings.Muscles.Visible = Off;
  //^
  //^ It is still possible to use your own DrawSettings file.
  //^
  //^ .. code_block:: AnyScript
  //^
  //^     #path BM_DRAWSETTINGS_FILE "DrawSettings.any"
  //^

/// This is the color definitions of the nodes and segments
AnyFolder  Colors = {
  #var AnyVec3 AnyBodyRed = {149/256,51/256,55/256};    //AnyBody standard red
  #var AnyVec3 AnyBodyGreen = {47/256,131/256,80/256};  //AnyBody standard green
  #var AnyVec3 AnyBodyBlue = {82/256,85/256,111/256};   //AnyBody standard blue
  #var AnyVec3 AnyBodyYellow= {235/256,197/256,17/256}; //AnyBody standard yellow
  #var AnyVec3 AnyBodyPaleYellow = {248/256,204/256,115/256}; //AnyBody standard pale yellow
  #var AnyVec3 AnyBodyGrey = {153/256,153/256,153/256};    //AnyBody standard grey

  #var AnyVec3 Nodes = AnyBodyPaleYellow;
  #var AnyVec3 Segments =  AnyBodyPaleYellow;
};

  AnyFolder Muscle ={
    #var AnyVec3 RGB = .Colors.AnyBodyRed;
    #var AnySwitch DrawScaleOnOff =Off;
    #var AnyVar Bulging = 1;
    #var AnyVar ColorScale =1.0;
    #var AnyVec3 RGBColorScale = {0.957031, 0.785156,0.785156};
    #var AnyVar MaxStress = 1500000.000000; //N/m^2 //This number is for graphics only!
    #var AnyVar Opacity =1.0;
    AnyFolder DrawScale =
      {
        #var AnySwitchVar EnableCreasing = Off;
        #var AnyVar CreasingAngle = 0.524;
        #var AnySwitchVar EnableWireframe = Off;
        #var AnySwitchVar EnableSmoothing = On;
        #var AnyVar Param = 0.0;
        #var AnyVector ParamArray = {0.0, 0.167, 0.333, 0.5, 0.667, 0.833, 1.0};
        #var AnyFloat RGBArray = {{0.0, 0.0, 0.6}, {0.0, 0.0, 1.0}, {0.0, 1.0, 1.0}, {0.0, 1.0, 0.0}, {1.0, 1.0, 0.0}, {1.0, 0.0, 0.0}, {0.6, 0.0, 0.0}};
        #var AnyVector OpacityArray = {1.0, 1.0, 1.0, 1.0, 1.0, 1.0, 1.0};
      };
  };


    AnyFolder BonesOpacity ={

    #var AnyVar GlobalCoef = 1;

    #var AnyVar Skull = 1*GlobalCoef;
    #var AnyVar Thorax = 1*GlobalCoef;
    #var AnyVar Pelvis = 1*GlobalCoef;
    #var AnyVar Sacrum = 1*GlobalCoef;
    #var AnyVar L5 = 1*GlobalCoef;
    #var AnyVar L4 = 1*GlobalCoef;
    #var AnyVar L3 = 1*GlobalCoef;
    #var AnyVar L2 = 1*GlobalCoef;
    #var AnyVar L1 = 1*GlobalCoef;

    #var AnyVar RightFoot = 1*GlobalCoef;
    #var AnyVar RightShank = 1*GlobalCoef;
    #var AnyVar RightThigh = 1*GlobalCoef;

    #var AnyVar LeftFoot = 1*GlobalCoef;
    #var AnyVar LeftShank = 1*GlobalCoef;
    #var AnyVar LeftThigh = 1*GlobalCoef;


    #var AnyVar RightClavicula = 1*GlobalCoef;
    #var AnyVar RightScapula = 1*GlobalCoef;
    #var AnyVar RightHumerus = 1*GlobalCoef;
    #var AnyVar RightUlna = 1*GlobalCoef;
    #var AnyVar RightRadius = 1*GlobalCoef;
    #var AnyVar RightHand = 1*GlobalCoef;

    #var AnyVar LeftClavicula = 1*GlobalCoef;
    #var AnyVar LeftScapula = 1*GlobalCoef;
    #var AnyVar LeftHumerus = 1*GlobalCoef;
    #var AnyVar LeftUlna = 1*GlobalCoef;
    #var AnyVar LeftRadius = 1*GlobalCoef;
    #var AnyVar LeftHand = 1*GlobalCoef;


    // For leg TD only.
    #var AnyVar RightTalus = 1*GlobalCoef;
    #var AnyVar RightPatella = 1*GlobalCoef;

    #var AnyVar LeftTalus = 1*GlobalCoef;
    #var AnyVar LeftPatella = 1*GlobalCoef;


    // For detailed cervical model only.
    #var AnyVar C1 = 1*GlobalCoef;
    #var AnyVar C2 = 1*GlobalCoef;
    #var AnyVar C3 = 1*GlobalCoef;
    #var AnyVar C4 = 1*GlobalCoef;
    #var AnyVar C5 = 1*GlobalCoef;
    #var AnyVar C6 = 1*GlobalCoef;
    #var AnyVar C7 = 1*GlobalCoef;
  };


  AnyFolder SegmentAxes ={
    #var AnyVec3 RGB ={0,0,1};
    #var AnyVec3 ScaleXYZ ={0.0001,0.00001,0.00001};
  };
  AnyFolder BML ={
    #var AnyVec3 ScaleXYZ ={0.0006,0.0006,0.0006};
    #var AnyVec3 RGB = .Colors.AnyBodyBlue;
  };
  AnyFolder JointAxesProximal = {
    #var AnyVec3 RGB = .Colors.AnyBodyRed;
    #var AnyVec3 ScaleXYZ = {0.015,0.015,0.015};
  };
  AnyFolder JointAxesDistal = {
    #var AnyVec3 RGB = .Colors.AnyBodyGreen;
    #var AnyVec3 ScaleXYZ = {0.01,0.01,0.01};
  };


  AnyFolder SegmentNodes ={
    #var AnyVec3 ScaleXYZ ={0.0005,0.0005,0.0005};
    #var AnyVec3 RGB = .Colors.AnyBodyRed;
  };
  AnyFolder WrapGeometry ={
    #var AnyVec3 RGB ={1,1,1};
  };

   AnyFolder   DrawSettingsSupport={
    AnyFolder Lin={
      #var AnyVar   ScaleFactor=0.004;
      #var AnyVec3  RGB = {0,0,1};
      #var AnyVar Thickness = 0.004;
      #var AnyVar HeadThickness = 2*Thickness;
      #var AnyVar HeadLength = 3*Thickness;
    };
    AnyFolder Rot={
      #var AnyVar  ScaleFactor=0.08;
      #var AnyVec3 RGB = {1,0,0};
      #var AnyVar  Thickness = 0.075;
      #var AnyVar  HeadThickness = 2*Thickness;
      #var AnyVar  HeadLength = 5*Thickness;
    };
  };


  AnyFolder Marker={
#var AnyVec3   Color={0,0,1};
#var AnyVar   Radius=0.00;

  };

}; //DrawSettings
