//This file controls which calibrations to be made on the model
AnyFolder EvaluateMomentArms={


  #if RIGHT_LEG_TD | RIGHT_LEG | RIGHT_ARM
  AnyFolder Right = {};
  #endif
  #if LEFT_LEG_TD | LEFT_LEG | LEFT_ARM
  AnyFolder Left = {};
  #endif
  #if TRUNK_NECK | TRUNK
  AnyFolder Trunk = {};
  #endif

  #if RIGHT_LEG_TD & (RIGHT_LEG_TD_SIMPLE_MUSCLES | RIGHT_LEG_TD_MUS_3E)
  #include "../../LegTLEM/EvaluateMomentArmsSequenceRight.any"
  #define RIGHT_LEG_TD_MOMENTARM 1
  #else
  #define RIGHT_LEG_TD_MOMENTARM 0
  #endif

  #if LEFT_LEG_TD & (LEFT_LEG_TD_SIMPLE_MUSCLES | LEFT_LEG_TD_MUS_3E)
  #include "../../LegTLEM/EvaluateMomentArmsSequenceLeft.any"
  #define LEFT_LEG_TD_MOMENTARM 1
  #else
  #define LEFT_LEG_TD_MOMENTARM 0
  #endif

  #if RIGHT_LEG & (RIGHT_LEG_SIMPLE_MUSCLES | RIGHT_LEG_MUS_3E)
  #include "../../Leg/EvaluateMomentArmsSequenceRight.any"
  #define RIGHT_LEG_MOMENTARM 1
  #else
  #define RIGHT_LEG_MOMENTARM 0
  #endif

  #if LEFT_LEG & (LEFT_LEG_SIMPLE_MUSCLES | LEFT_LEG_MUS_3E)
  #include "../../Leg/EvaluateMomentArmsSequenceLeft.any"
  #define LEFT_LEG_MOMENTARM 1
  #else
  #define LEFT_LEG_MOMENTARM 0
  #endif

  #if RIGHT_ARM & (RIGHT_ARM_SIMPLE_MUSCLE | RIGHT_ARM_MUS_3E )
    #if TRUNK_NECK == 1
//    #include "../../Arm/MomentArmSequenceNeckRight.any"
    #else
//    #include "../../Arm/MomentArmSequenceRight.any"
    #endif
  #define RIGHT_ARM_MOMENTARM 0
  #else
  #define RIGHT_ARM_MOMENTARM 0
  #endif

  #if LEFT_ARM & (LEFT_ARM_SIMPLE_MUSCLES | LEFT_ARM_MUS_3E )
    #if TRUNK_NECK == 1
//    #include "../../Arm/MomentArmSequenceNeckLeft.any"
    #else
//    #include "../../Arm/MomentArmSequenceLeft.any"
    #endif
  #define LEFT_ARM_MOMENTARM 0
  #else
  #define LEFT_ARM_MOMENTARM 0
  #endif

//
  #if TRUNK & (TRUNK_SIMPLE_MUSCLES )
    #include "../../Trunk/EvaluateMomentArmsSequence.any"
  #define TRUNK_MOMENTARM 1
  #else
  #define TRUNK_MOMENTARM 0
  #endif

  #if TRUNK_NECK & (TRUNK_NECK_SIMPLE_MUSCLES )
//    #include "../../TrunkNeck/MomentArmSequence.any"
  #define TRUNK_NECK_MOMENTARM 0
  #else
  #define TRUNK_NECK_MOMENTARM 0
  #endif

//

//  #ifdef LumbarLigaments
////    #include "../../Trunk/MomentArmSequence.any"
//    #define LUMBAR_LIG_MOMENTARM 1
//  #else
//    #define LUMBAR_LIG_MOMENTARM 0
//  #endif
////
  #if !(RIGHT_LEG_TD_MOMENTARM | LEFT_LEG_TD_MOMENTARM | RIGHT_LEG_MOMENTARM | LEFT_LEG_MOMENTARM | RIGHT_ARM_MOMENTARM | LEFT_ARM_MOMENTARM | TRUNK_MOMENTARM | TRUNK_NECK_MOMENTARM)
  AnyOperationDummy Run_all_studies ={};
  #else
  AnyOperationSequence Run_all_studies ={};
  #endif

  #undef RIGHT_LEG_TD_MOMENTARM
  #undef LEFT_LEG_TD_MOMENTARM
  #undef RIGHT_LEG_MOMENTARM
  #undef LEFT_LEG_MOMENTARM
  #undef RIGHT_ARM_MOMENTARM
  #undef LEFT_ARM_MOMENTARM
  #undef TRUNK_MOMENTARM
  #undef TRUNK_NECK_MOMENTARM


};
