#if BM_ARM_DETAILED_HAND == ON

#define _ARM_DETAILED_HAND_WHICH "RUHM"   //ANYBODY LOOPLUC RUHM

  #define _HAND_MUSCLE_PARAMETERS_3E_HILL "OFF" // PLZEN JACOBSONLIEBER MIRAKHORLO ORIGINAL

  #if _ARM_DETAILED_HAND_WHICH == "RUHM"
    #define _HAND_MUSCLE_PARAMETERS_SIMPLE "PLZEN" // PLZEN CHAO MIRAKHORLO ORIGINAL

     //Using only one or several representatives for the extrinsic finger muscles
     #define RUHM_DETAILED_MODEL OFF
     // Using Via points within the finger phalanxes for the extrinsic finger muscles
      #ifndef RUHM_EXTRINSIC_HAND_MUSCLES_VIA
      #define RUHM_EXTRINSIC_HAND_MUSCLES_VIA OFF
      #endif

      //Switch for showing the obstacles for extrinsic and intrinsic muscles
      #define SHOW_HAND_WRAP_EX OFF
      #define SHOW_HAND_WRAP_IN OFF
  #endif

  #if _ARM_DETAILED_HAND_WHICH == "ANYBODY"
    #define _HAND_MUSCLE_PARAMETERS_SIMPLE "ORIGINAL" // PLZEN CHAO MIRAKHORLO ORIGINAL

  #endif

  #if _ARM_DETAILED_HAND_WHICH == "LOOPLUC"
    #define SHOW_TORI OFF
    #define _HAND_MUSCLE_PARAMETERS_SIMPLE "ORIGINAL"
    #define RUHM_EXTRINSIC_HAND_MUSCLES_VIA OFF

  #endif

  //Scaling of the phalanxes according to the handlength
  #define BM_HANDLENGTH_ULM ON


#endif


  //Switch for enabling the finger rythm constraints using the MoCAP model.
  #ifndef BM_HAND_FINGER_RHYTHM
  #define BM_HAND_FINGER_RHYTHM OFF
  #endif
