#if 1

  #include "LeftArmModel.any"

#else

/* THIS CODE IS REDUNDANT AND WILL BE REMOVED */

Left = {

  AnyFolder ShoulderArm = {

     #include "..\..\Arm\ShoulderArmOnlyMusclesNeck.root.any"


      //Reference to interface folder
      AnyFolder &InterfaceFolder =..Interface.Left;

      //Reference to folder
      AnyFolder &MannequinValuesFolder = ..MannequinValuesFromModel.AnyFolder_Posture.AnyFolder_Left;

      #include "../Include/SettingsShoulderArm.any"

      //-------------------------------------------------------
      // Interface references that specifies what the arm "Arm/ShoulderArm.any" should connect to
      //-------------------------------------------------------
      //This point is used for attachement of the arm to the shoulder
      AnyRefFrame &ShoulderRef = ..Trunk.SegmentsThorax.ThoraxSeg.iji;


      AnyRefNode &PelvisRef=..Trunk.SegmentsLumbar.PelvisSeg.Left;
      AnyRefNode &L1Ref=..Trunk.SegmentsLumbar.L1Seg.Left;
      AnyRefNode &L3Ref=..Trunk.SegmentsLumbar.L3Seg.Left;
      AnyFolder &TrunkFolderRef=..Trunk;

      #if TRUNK == 1
      AnyFolder &SkullSegRef =..Trunk.SegmentsThorax.SkullSeg.Left;
      AnyFolder &C1SegRef =..Trunk.SegmentsThorax.ThoraxSeg.Left;
      AnyFolder &C2SegRef =..Trunk.SegmentsThorax.ThoraxSeg.Left;
      AnyFolder &C3SegRef =..Trunk.SegmentsThorax.ThoraxSeg.Left;
      AnyFolder &C4SegRef =..Trunk.SegmentsThorax.ThoraxSeg.Left;
      AnyFolder &C5SegRef =..Trunk.SegmentsThorax.ThoraxSeg.Left;
      AnyFolder &C6SegRef =..Trunk.SegmentsThorax.ThoraxSeg.Left;
      AnyFolder &C7SegRef =..Trunk.SegmentsThorax.ThoraxSeg.Left;
      #else
      #endif

      #if TRUNK_NECK == 1
      AnyFolder &SkullSegRef =..Trunk.SegmentsThorax.SkullSeg.Left;
      AnyFolder &C1SegRef =..Trunk.SegmentsCervicalSpine.C1Seg.Left;
      AnyFolder &C2SegRef =..Trunk.SegmentsCervicalSpine.C2Seg.Left;
      AnyFolder &C3SegRef =..Trunk.SegmentsCervicalSpine.C3Seg.Left;
      AnyFolder &C4SegRef =..Trunk.SegmentsCervicalSpine.C4Seg.Left;
      AnyFolder &C5SegRef =..Trunk.SegmentsCervicalSpine.C5Seg.Left;
      AnyFolder &C6SegRef =..Trunk.SegmentsCervicalSpine.C6Seg.Left;
      AnyFolder &C7SegRef =..Trunk.SegmentsCervicalSpine.C7Seg.Left;
      #else
      #endif


      //This is a sign variable which indicates that this is the right side
      AnyVar Sign =-1;

      AnyFolder BonesOpacity = {
        AnyVar Clavicula = Main.DrawSettings.BonesOpacity.LeftClavicula;
        AnyVar Scapula = Main.DrawSettings.BonesOpacity.LeftScapula;
        AnyVar Humerus = Main.DrawSettings.BonesOpacity.LeftHumerus;
        AnyVar Ulna = Main.DrawSettings.BonesOpacity.LeftUlna;
        AnyVar Radius = Main.DrawSettings.BonesOpacity.LeftRadius;
        AnyVar Hand = Main.DrawSettings.BonesOpacity.LeftHand;
      };


      AnyFolder MomentMeasure={
        AnyForceMomentMeasure ElbowJointReactionMoments =
        {
          AnyForceBase &Force = ..Jnt.FE.Constraints.Reaction;
          AnyRefFrame &Humerusfe = ..Seg.Humerus.fe;
          AnyVec3 Mlocal = M*Humerusfe.Axes;
        };

        AnyForceMomentMeasure WristJointReactionMoments =
        {
          AnyForceBase &Force = ..Jnt.WristJointFlexion.Constraints.Reaction;
          AnyRefFrame &Radiuswj = ..Seg.Radius.wj;
          AnyVec3 Mlocal = M*Radiuswj.Axes;
        };
      };

    }; //End ShoulderArm


  };


  #include "../../Arm/LeftArmSimpleMusclesOnlyNeckSelectedOutput.any"

#endif
