#if 1

  #include "LeftLegTDModel.any"

#else

/* THIS CODE IS REDUNDANT AND WILL BE REMOVED */


Left = {

  AnyFolder Leg = {
    AnyVar Sign =-1;
    #ifdef SignRef
    #undef SignRef
    #endif
    #define SignRef 0

    #include "<TLEM_PATH_VERSION>/ModelParameters.any"
    #include "..\..\LegTLEM\LegMus3E.root.any"

    #include "../Include/SettingsLeg.any"
    AnyFolder &InterfaceFolder =..Interface.Left;
    AnyFolder &MannequinValuesFolder = ..MannequinValuesFromModel.AnyFolder_Posture.AnyFolder_Left;

    AnyFolder &Scaling =...Scaling;
    AnyFolder &StandardParameters =...Scaling.StandardParameters.Left;
    AnyFolder &GeoScaling =...Scaling.GeometricalScaling.Left;
    AnyFolder &MassScaling =...Scaling.MassScaling.Left;
    AnyFolder &FiberLengthScaling =...Scaling.FiberLengthScaling.Left;
    AnyFolder &StrengthScaling =...Scaling.StrengthScaling.Left;
    #if SUBJECT_SPECIFIC == 1
    AnyFolder &SubjectSpecificScaling =...Scaling.SubjectSpecificScaling.Left;
    #endif

    /// Reference to the coordinate system in pelvis where the hip LegTLEM data is
    /// added. This is done, since the leg muscles on the pelvis are given in their
    /// own coordinate system
    AnyRefFrame &HipNodeRef= ..Trunk.SegmentsLumbar.PelvisSeg.Left;
    AnyRefNode &PsoasMajor1= ..Trunk.SegmentsLumbar.L1Seg.PML1T_TMNodeL;
    AnyRefNode &PsoasMajor2= ..Trunk.SegmentsLumbar.L2Seg.PML2T_TMNodeL;
    AnyRefNode &PsoasMajor3= ..Trunk.SegmentsLumbar.L3Seg.PML3T_TMNodeL;
    AnyRefNode &PsoasMajor4= ..Trunk.SegmentsLumbar.L4Seg.PML4T_TMNodeL;
    AnyRefNode &PsoasMajor5= ..Trunk.SegmentsLumbar.L5Seg.PML5T_TMNodeL;

    AnyFolder BonesOpacity = {
      AnyVar Foot = Main.DrawSettings.BonesOpacity.LeftFoot;
      AnyVar Shank = Main.DrawSettings.BonesOpacity.LeftShank;
      AnyVar Thigh = Main.DrawSettings.BonesOpacity.LeftThigh;
      AnyVar Talus = Main.DrawSettings.BonesOpacity.LeftTalus;
      AnyVar Patella = Main.DrawSettings.BonesOpacity.LeftPatella;
    };


    AnyFolder MomentMeasure={
 //     AnyFolder &TrunkMuscles = ...Trunk.MusclesSpineLeft;
      #include "..\..\LegTLEM\LegMoments.any"
    };


  }; //End Leg

};


Trunk = {
  AnyRefFrame &PsoasMajorLeftReference=.Left.Leg.Seg.Thigh;
};


#include "../../LegTLEM/LeftLegMuscles3ESelectedOutput.any"
#endif
