Trunk = {
  MuscleModels.Left.PsoasMajor = {
    #if BM_LEG_MODEL_IS_TLEM
      // Use the Psoas muscles models from the TLEM model
      AnyMuscleModel &PsoasMajorT12 = ....Left.Leg.MuscleModels.PsoasMajorT12;
      AnyMuscleModel &PsoasMajorL1_1  = ....Left.Leg.MuscleModels.PsoasMajorL1_1;
      AnyMuscleModel &PsoasMajorL1_2  = ....Left.Leg.MuscleModels.PsoasMajorL1_2;
      AnyMuscleModel &PsoasMajorL2_1  = ....Left.Leg.MuscleModels.PsoasMajorL2_1;
      AnyMuscleModel &PsoasMajorL2_2  = ....Left.Leg.MuscleModels.PsoasMajorL2_2;
      AnyMuscleModel &PsoasMajorL3_1  = ....Left.Leg.MuscleModels.PsoasMajorL3_1;
      AnyMuscleModel &PsoasMajorL3_2  = ....Left.Leg.MuscleModels.PsoasMajorL3_2;
      AnyMuscleModel &PsoasMajorL4_1  = ....Left.Leg.MuscleModels.PsoasMajorL4_1;
      AnyMuscleModel &PsoasMajorL4_2  = ....Left.Leg.MuscleModels.PsoasMajorL4_2;
      AnyMuscleModel &PsoasMajorL5_1   = ....Left.Leg.MuscleModels.PsoasMajorL5_1;
      AnyMuscleModel &PsoasMajorL5_2  = ....Left.Leg.MuscleModels.PsoasMajorL5_2;
    #endif
  };
};
