#class_template Template_Mannequin (LOAD_SECTION=0, ARM_CLAVICULA_ROTATION_RHYTHM = 1) {

  //^ This is the Mannequin file implemented as a class template.
  //^ It behaves as a class with default values which can be overridden
  //^ in your applicaiton:
  //^
  //^ .. code_block:: AnyScript
  //^
  //^    Main.HumanModel.Mannequin.Posture =
  //^    {
  //^      ElbowPronation = -70;
  //^    };
  //^
  //^ It is still possible to define your own Mannequin file in your application:
  //^
  //^ .. code_block:: AnyScript
  //^
  //^     #path BM_MANNEQUIN_FILE "MyMannequinFile.any"


  /// Folder defining the posture of the HumanModel. The values are used for
  /// initial (load time) positions of the model. The values are also sometimes
  /// used for driving the model, but that is application dependent.
  AnyFolder Posture = {
    //This controls the position of the pelvi wrt. to the global reference frame
    #var AnyVar PelvisPosX=DesignVar(0.046);
    #var AnyVar PelvisPosY=DesignVar(1.16);
    #var AnyVar PelvisPosZ=DesignVar(0);

    //This controls the rotation of the pelvis wrt. to the global reference frame
    #var AnyVar PelvisRotX=DesignVar(0);
    #var AnyVar PelvisRotY=DesignVar(0);
    #var AnyVar PelvisRotZ=DesignVar(0);

    // These variables control the rotation of the thorax wrt the
    // pelvis
    #var AnyVar PelvisThoraxExtension= DesignVar(PelvisT12Extension);
    #var AnyVar PelvisThoraxLateralBending= DesignVar(PelvisT12LateralBending);
    #var AnyVar PelvisThoraxRotation= DesignVar(PelvisT12Rotation);

    #var AnyVar PelvisT12Extension=DesignVar(0);
    #var AnyVar PelvisT12LateralBending=DesignVar(0);
    #var AnyVar PelvisT12Rotation=DesignVar(0);

    #var AnyVar T1SkullExtension=DesignVar(0);
    #var AnyVar T1SkullLateralBending=DesignVar(0);
    #var AnyVar T1SkullRotation=DesignVar(0);

    #var AnyVar NeckExtension= DesignVar(T1SkullExtension);
    #var AnyVar NeckLateralBending= DesignVar(T1SkullLateralBending); // not used when neck is switched off
    #var AnyVar NeckRotation= DesignVar(T1SkullRotation);             // not used when neck is switched off

    AnyFolder Right = {
      //Arm
      #var AnyVar SternoClavicularProtraction= DesignVar(-23);   //This value is not used for initial position
      #var AnyVar SternoClavicularElevation=11.5;    //This value is not used for initial position
      #if ARM_CLAVICULA_ROTATION_RHYTHM
      /// NOTE: This value is unused. The SC ais value is not used as the SC axial rotation is controlled by a rythmn (BM_ARM_CLAVICULA_ROTATION_RHYTHM)
      #var AnyVar SternoClavicularAxialRotation=-20; //This value is not used for initial position
      #else
      #var AnyVar SternoClavicularAxialRotation=-20; //This value is not used for initial position
      #endif

      #var AnyVar GlenohumeralFlexion = DesignVar(1);
      #var AnyVar GlenohumeralAbduction = DesignVar(10);
      #var AnyVar GlenohumeralExternalRotation = DesignVar(0);

      #var AnyVar ElbowFlexion = 0.01;
      #var AnyVar ElbowPronation = -20.0;

      #var AnyVar WristFlexion = DesignVar(0);
      #var AnyVar WristAbduction = DesignVar(0);

      //Leg
      #var AnyVar HipFlexion = 0.0;
      #var AnyVar HipAbduction = 5.0;
      #var AnyVar HipExternalRotation = 0.0;

      #var AnyVar KneeFlexion = 0.0;

      #var AnyVar AnklePlantarFlexion =0.0;
      #var AnyVar SubTalarEversion =0.0;

      //Detail Hand
      AnyFolder Finger1 ={
        #var AnyVar CMCAbduction=-20;
        #var AnyVar CMCFlexion=20;
        #var AnyVar MCPFlexion= 20;
        #var AnyVar MCPAbduction= DesignVar(0);
        #var AnyVar DIPFlexion=20;
      };

      AnyFolder Finger2 ={
        #var AnyVar CMCAbduction=0;
        #var AnyVar CMCFlexion=0;
        #var AnyVar MCPFlexion=20;
        #var AnyVar MCPAbduction= DesignVar(0);
        #var AnyVar PIPFlexion=20;
        #var AnyVar DIPFlexion=20;
      };

      AnyFolder Finger3 ={
        #var AnyVar CMCAbduction=0;
        #var AnyVar CMCFlexion=0;
        #var AnyVar MCPFlexion=20;
        #var AnyVar MCPAbduction= DesignVar(0);
        #var AnyVar PIPFlexion=20;
        #var AnyVar DIPFlexion=20;
      };

      AnyFolder Finger4 ={
        #var AnyVar CMCAbduction=0;
        #var AnyVar CMCFlexion=0;
        #var AnyVar MCPFlexion=20;
        #var AnyVar MCPAbduction= DesignVar(0);
        #var AnyVar PIPFlexion=20;
        #var AnyVar DIPFlexion=20;
      };

      AnyFolder Finger5 ={
        #var AnyVar CMCAbduction=0;
        #var AnyVar CMCFlexion=0;
        #var AnyVar MCPFlexion=20;
        #var AnyVar MCPAbduction= DesignVar(0);
        #var AnyVar PIPFlexion=20;
        #var AnyVar DIPFlexion=20;
      };
    };

    AnyFolder Left = {
      //all values are set to be equal to the right side values
      //feel free to change this!

      //Arm
      #var AnyVar SternoClavicularProtraction=.Right.SternoClavicularProtraction;
      #var AnyVar SternoClavicularElevation=.Right.SternoClavicularElevation;
      #if ARM_CLAVICULA_ROTATION_RHYTHM
      /// NOTE: This value is unused. The SC ais value is not used as the SC axial rotation is controlled by a rythmn (BM_ARM_CLAVICULA_ROTATION_RHYTHM)
      #var AnyVar SternoClavicularAxialRotation=.Right.SternoClavicularAxialRotation;
      #else
      #var AnyVar SternoClavicularAxialRotation=.Right.SternoClavicularAxialRotation;  //This value is not used for initial position
      #endif
      #var AnyVar GlenohumeralFlexion = .Right.GlenohumeralFlexion ;
      #var AnyVar GlenohumeralAbduction =.Right.GlenohumeralAbduction ;
      #var AnyVar GlenohumeralExternalRotation =.Right.GlenohumeralExternalRotation ;

      #var AnyVar ElbowFlexion = .Right.ElbowFlexion;
      #var AnyVar ElbowPronation = .Right.ElbowPronation;

      #var AnyVar WristFlexion =.Right.WristFlexion;
      #var AnyVar WristAbduction =.Right.WristAbduction;

      //Leg
      #var AnyVar HipFlexion =.Right.HipFlexion;
      #var AnyVar HipAbduction =.Right.HipAbduction;
      #var AnyVar HipExternalRotation = .Right.HipExternalRotation;

      #var AnyVar KneeFlexion = .Right.KneeFlexion;

      #var AnyVar AnklePlantarFlexion = .Right.AnklePlantarFlexion ;
      #var AnyVar SubTalarEversion =.Right.SubTalarEversion;

      //Detail Hand
      AnyFolder Finger1 ={
        #var AnyVar CMCAbduction= ..Right.Finger1.CMCAbduction;
        #var AnyVar CMCFlexion= ..Right.Finger1.CMCFlexion;
        #var AnyVar MCPFlexion= ..Right.Finger1.MCPFlexion;
        #var AnyVar MCPAbduction= ..Right.Finger1.MCPAbduction;
        #var AnyVar DIPFlexion= ..Right.Finger1.DIPFlexion;
      };

      AnyFolder Finger2 ={
        #var AnyVar CMCAbduction= ..Right.Finger2.CMCAbduction;
        #var AnyVar CMCFlexion= ..Right.Finger2.CMCFlexion;
        #var AnyVar MCPFlexion= ..Right.Finger2.MCPFlexion;
        #var AnyVar MCPAbduction= ..Right.Finger2.MCPAbduction;
        #var AnyVar PIPFlexion= ..Right.Finger2.PIPFlexion;
        #var AnyVar DIPFlexion= ..Right.Finger2.DIPFlexion;
      };

      AnyFolder Finger3 ={
        #var AnyVar CMCAbduction= ..Right.Finger3.CMCAbduction;
        #var AnyVar CMCFlexion= ..Right.Finger3.CMCFlexion;
        #var AnyVar MCPFlexion= ..Right.Finger3.MCPFlexion;
        #var AnyVar MCPAbduction= ..Right.Finger3.MCPAbduction;
        #var AnyVar PIPFlexion= ..Right.Finger3.PIPFlexion;
        #var AnyVar DIPFlexion= ..Right.Finger3.DIPFlexion;
      };

      AnyFolder Finger4 ={
        #var AnyVar CMCAbduction= ..Right.Finger4.CMCAbduction;
        #var AnyVar CMCFlexion= ..Right.Finger4.CMCFlexion;
        #var AnyVar MCPFlexion= ..Right.Finger4.MCPFlexion;
        #var AnyVar MCPAbduction= ..Right.Finger4.MCPAbduction;
        #var AnyVar PIPFlexion= ..Right.Finger4.PIPFlexion;
        #var AnyVar DIPFlexion= ..Right.Finger4.DIPFlexion;
      };

      AnyFolder Finger5 ={
        #var AnyVar CMCAbduction= ..Right.Finger5.CMCAbduction;
        #var AnyVar CMCFlexion= ..Right.Finger5.CMCFlexion;
        #var AnyVar MCPFlexion= ..Right.Finger5.MCPFlexion;
        #var AnyVar MCPAbduction= ..Right.Finger5.MCPAbduction;
        #var AnyVar PIPFlexion= ..Right.Finger5.PIPFlexion;
        #var AnyVar DIPFlexion= ..Right.Finger5.DIPFlexion;
      };
    };
  };

  /// Folder defining the Posture velocity of the HumanModel. The values
  /// are sometimes used for driving the model, but that is application dependent.
  AnyFolder PostureVel={
    //This controls the position of the pelvi wrt. to the global reference frame
    #var AnyVar PelvisPosX= DesignVar(0);
    #var AnyVar PelvisPosY= DesignVar(0);
    #var AnyVar PelvisPosZ= DesignVar(0);

    //This controls the rotation of the pelvis wrt. to the global reference frame
    #var AnyVar PelvisRotX= DesignVar(0);
    #var AnyVar PelvisRotY= DesignVar(0);
    #var AnyVar PelvisRotZ= DesignVar(0);

    // These variables control the rotation of the thorax wrt the
    // pelvis
    #var AnyVar PelvisThoraxExtension= DesignVar(PelvisT12Extension);
    #var AnyVar PelvisThoraxLateralBending= DesignVar(PelvisT12LateralBending);
    #var AnyVar PelvisThoraxRotation= DesignVar(PelvisT12Rotation);

    #var AnyVar PelvisT12Extension=DesignVar(0);
    #var AnyVar PelvisT12LateralBending=DesignVar(0);
    #var AnyVar PelvisT12Rotation=DesignVar(0);


    #var AnyVar T1SkullExtension=DesignVar(0);
    #var AnyVar T1SkullLateralBending=DesignVar(0);
    #var AnyVar T1SkullRotation=DesignVar(0);

    #var AnyVar NeckExtension= DesignVar(T1SkullExtension);
    #var AnyVar NeckLateralBending= DesignVar(T1SkullLateralBending); // not used when neck is switched off
    #var AnyVar NeckRotation= DesignVar(T1SkullRotation);             // not used when neck is switched off


    AnyFolder Right = {
      //Arm
      #var AnyVar SternoClavicularProtraction= DesignVar(0);   //This value is not used for initial position
      #var AnyVar SternoClavicularElevation= DesignVar(0);    //This value is not used for initial position
      #if ARM_CLAVICULA_ROTATION_RHYTHM
      /// NOTE: This value is unused. The SC ais value is not used as the SC axial rotation is controlled by a rythmn (BM_ARM_CLAVICULA_ROTATION_RHYTHM)
      #var AnyVar SternoClavicularAxialRotation=DesignVar(0); //This value is not used for initial position
      #else
      #var AnyVar SternoClavicularAxialRotation=DesignVar(0);  //This value is not used for initial position
      #endif
      #var AnyVar GlenohumeralFlexion = DesignVar(0);
      #var AnyVar GlenohumeralAbduction = DesignVar(0);
      #var AnyVar GlenohumeralExternalRotation = DesignVar(0);

      #var AnyVar ElbowFlexion = 0.0;
      #var AnyVar ElbowPronation = 0.0;

      #var AnyVar WristFlexion = DesignVar(0);
      #var AnyVar WristAbduction = DesignVar(0);

      //Leg
      #var AnyVar HipFlexion = 0.0;
      #var AnyVar HipAbduction = 0.0;
      #var AnyVar HipExternalRotation = 0.0;

      #var AnyVar KneeFlexion = 0.0;

      #var AnyVar AnklePlantarFlexion =0.0;
      #var AnyVar SubTalarEversion =0.0;

      //Detail Hand
      AnyFolder Finger1 ={
        #var AnyVar CMCAbduction=0;
        #var AnyVar CMCFlexion=0;
        #var AnyVar MCPFlexion= 0;
        #var AnyVar MCPAbduction= 0;
        #var AnyVar DIPFlexion=0;
      };

      AnyFolder Finger2 ={
        #var AnyVar CMCAbduction=0;
        #var AnyVar CMCFlexion=0;
        #var AnyVar MCPFlexion=0;
        #var AnyVar MCPAbduction=0;
        #var AnyVar PIPFlexion=0;
        #var AnyVar DIPFlexion=0;
      };

      AnyFolder Finger3 ={
        #var AnyVar CMCAbduction=0;
        #var AnyVar CMCFlexion=0;
        #var AnyVar MCPFlexion=0;
        #var AnyVar MCPAbduction=0;
        #var AnyVar PIPFlexion=0;
        #var AnyVar DIPFlexion=0;
      };

      AnyFolder Finger4 ={
        #var AnyVar CMCAbduction=0;
        #var AnyVar CMCFlexion=0;
        #var AnyVar MCPFlexion=0;
        #var AnyVar MCPAbduction=0;
        #var AnyVar PIPFlexion=0;
        #var AnyVar DIPFlexion=0;
      };

      AnyFolder Finger5 ={
        #var AnyVar CMCAbduction=0;
        #var AnyVar CMCFlexion=0;
        #var AnyVar MCPFlexion=0;
        #var AnyVar MCPAbduction=0;
        #var AnyVar PIPFlexion=0;
        #var AnyVar DIPFlexion=0;
      };

    };

    AnyFolder Left = {
      //all values are set to be equal to the right side values
      //feel free to change this!

      //Arm
      #var AnyVar SternoClavicularProtraction=.Right.SternoClavicularProtraction;
      #var AnyVar SternoClavicularElevation=.Right.SternoClavicularElevation;
      #if ARM_CLAVICULA_ROTATION_RHYTHM
      /// NOTE: This value is unused. The SC ais value is not used as the SC axial rotation is controlled by a rythmn (BM_ARM_CLAVICULA_ROTATION_RHYTHM)
      #var AnyVar SternoClavicularAxialRotation=.Right.SternoClavicularAxialRotation; //This value is not used for initial position
      #else
      #var AnyVar SternoClavicularAxialRotation=.Right.SternoClavicularAxialRotation;  //This value is not used for initial position
      #endif
      #var AnyVar GlenohumeralFlexion = .Right.GlenohumeralFlexion ;
      #var AnyVar GlenohumeralAbduction =.Right.GlenohumeralAbduction ;
      #var AnyVar GlenohumeralExternalRotation =.Right.GlenohumeralExternalRotation ;

      #var AnyVar ElbowFlexion = .Right.ElbowFlexion;
      #var AnyVar ElbowPronation = .Right.ElbowPronation;

      #var AnyVar WristFlexion =.Right.WristFlexion;
      #var AnyVar WristAbduction =.Right.WristAbduction;

      //Leg
      #var AnyVar HipFlexion =.Right.HipFlexion;
      #var AnyVar HipAbduction =.Right.HipAbduction;
      #var AnyVar HipExternalRotation = .Right.HipExternalRotation;

      #var AnyVar KneeFlexion = .Right.KneeFlexion;

      #var AnyVar AnklePlantarFlexion = .Right.AnklePlantarFlexion ;
      #var AnyVar SubTalarEversion =.Right.SubTalarEversion;

      //Detail Hand
      AnyFolder Finger1 ={
        #var AnyVar CMCAbduction=0;
        #var AnyVar CMCFlexion=0;
        #var AnyVar MCPFlexion= 0;
        #var AnyVar MCPAbduction= 0;
        #var AnyVar DIPFlexion=0;
      };

      AnyFolder Finger2 ={
        #var AnyVar CMCAbduction=0;
        #var AnyVar CMCFlexion=0;
        #var AnyVar MCPFlexion=0;
        #var AnyVar MCPAbduction=0;
        #var AnyVar PIPFlexion=0;
        #var AnyVar DIPFlexion=0;
      };

      AnyFolder Finger3 ={
        #var AnyVar CMCAbduction=0;
        #var AnyVar CMCFlexion=0;
        #var AnyVar MCPFlexion=0;
        #var AnyVar MCPAbduction=0;
        #var AnyVar PIPFlexion=0;
        #var AnyVar DIPFlexion=0;
      };

      AnyFolder Finger4 ={
        #var AnyVar CMCAbduction=0;
        #var AnyVar CMCFlexion=0;
        #var AnyVar MCPFlexion=0;
        #var AnyVar MCPAbduction=0;
        #var AnyVar PIPFlexion=0;
        #var AnyVar DIPFlexion=0;
      };

      AnyFolder Finger5 ={
        #var AnyVar CMCAbduction=0;
        #var AnyVar CMCFlexion=0;
        #var AnyVar MCPFlexion=0;
        #var AnyVar MCPAbduction=0;
        #var AnyVar PIPFlexion=0;
        #var AnyVar DIPFlexion=0;
      };

    };
  };
  #if LOAD_SECTION == 1
  AnyFolder Load = {
    #var AnyVec3 TopVertebra = {0.000, 0.000, 0.000};

    AnyFolder Right = {
      #var AnyVec3 Shoulder  = {0.000, 0.000, 0.000};
      #var AnyVec3 Elbow     = {0.000, 0.000, 0.000};
      #var AnyVec3 Hand      = {0.000, 0.000, 0.000};
      #var AnyVec3 Hip       = {0.000, 0.000, 0.000};
      #var AnyVec3 Knee      = {0.000, 0.000, 0.000};
      #var AnyVec3 Ankle     = {0.000, 0.000, 0.000};
    };
    AnyFolder Left = {
      #var AnyVec3 Shoulder  = {0.000, 0.000, 0.000};
      #var AnyVec3 Elbow     = {0.000, 0.000, 0.000};
      #var AnyVec3 Hand      = {0.000, 0.000, 0.000};
      #var AnyVec3 Hip       = {0.000, 0.000, 0.000};
      #var AnyVec3 Knee      = {0.000, 0.000, 0.000};
      #var AnyVec3 Ankle     = {0.000, 0.000, 0.000};
    };
  };  // Loads
  #endif
};
