AnyFolder Mannequin =
{

  //^ The values in this mannequin files are initialized with "??=" which allows
  //^ the values to be overrriden in the user application.
  //^ Hence, all values in this files behaves as default values if not set by
  //^ the user.
  //^
  //^ It is good practice not to edit this file, but instead set the values directly
  //^ in your applicaiton:
  //^
  //^ .. code_block:: AnyScript
  //^
  //^    Main.HumanModel.Mannequin.Posture =
  //^    {
  //^      ElbowPronation = -70;
  //^    };
  //^


  /// Folder defining the posture of the HumanModel. The values are used for
  /// initial (load time) positions of the model. The values are also sometimes
  /// used for driving the model, but that is application dependent.
  AnyFolder Posture  =  {
    //This controls the position of the pelvi wrt. to the global reference frame
    AnyVar PelvisPosX ??= DesignVar(0.046);
    AnyVar PelvisPosY ??= DesignVar(1.16);
    AnyVar PelvisPosZ ??= DesignVar(0);

    //This controls the rotation of the pelvis wrt. to the global reference frame
    AnyVar PelvisRotX ??= DesignVar(0);
    AnyVar PelvisRotY ??= DesignVar(0);
    AnyVar PelvisRotZ ??= DesignVar(0);

    // These variables control the rotation of the thorax wrt the
    // pelvis
    AnyVar PelvisThoraxExtension ??= DesignVar(PelvisT12Extension);
    AnyVar PelvisThoraxLateralBending ??= DesignVar(PelvisT12LateralBending);
    AnyVar PelvisThoraxRotation ??= DesignVar(PelvisT12Rotation);

    AnyVar PelvisT12Extension ??= DesignVar(0);
    AnyVar PelvisT12LateralBending ??= DesignVar(0);
    AnyVar PelvisT12Rotation ??= DesignVar(0);

    AnyVar T12T1Extension ??= DesignVar(0);
    AnyVar T12T1LateralBending ??= DesignVar(0);
    AnyVar T12T1Rotation ??= DesignVar(0);

    AnyVar T1SkullExtension ??= DesignVar(0);
    AnyVar T1SkullLateralBending ??= DesignVar(0);
    AnyVar T1SkullRotation ??= DesignVar(0);

    AnyVar NeckExtension ??= DesignVar(T1SkullExtension);
    AnyVar NeckLateralBending ??= DesignVar(T1SkullLateralBending); // not used when neck is switched off
    AnyVar NeckRotation ??= DesignVar(T1SkullRotation);             // not used when neck is switched off

    AnyFolder Right  =  {
      //Arm
      AnyVar SternoClavicularProtraction ??= DesignVar(-23);   //This value is not used for initial position
      AnyVar SternoClavicularElevation ??= DesignVar(11.5);    //This value is not used for initial position
      #if BM_ARM_CLAVICULA_ROTATION_RHYTHM
      /// NOTE: This value is unused. The SC ais value is not used as the SC axial rotation is controlled by a rythmn (BM_ARM_CLAVICULA_ROTATION_RHYTHM)
      AnyVar SternoClavicularAxialRotation ??= DesignVar(-20); //This value is not used for initial position
      #else
      AnyVar SternoClavicularAxialRotation ??= DesignVar(-20); //This value is not used for initial position
      #endif

      AnyVar GlenohumeralFlexion ??= DesignVar(1);
      AnyVar GlenohumeralAbduction ??= DesignVar(10);
      AnyVar GlenohumeralExternalRotation ??= DesignVar(0);

      AnyVar ElbowFlexion ??= DesignVar(0.01);
      AnyVar ElbowPronation ??= DesignVar(-20.0);

      AnyVar WristFlexion ??= DesignVar(0);
      AnyVar WristAbduction ??= DesignVar(0);

      //Leg
      AnyVar HipFlexion ??= DesignVar(0.0);
      AnyVar HipAbduction ??= DesignVar(5.0);
      AnyVar HipExternalRotation ??= DesignVar(0.0);

      AnyVar KneeFlexion ??= DesignVar(0.0);

      AnyVar AnklePlantarFlexion ??= DesignVar(0.0);
      AnyVar SubTalarEversion ??= DesignVar(0.0);

      //Detail Foot
      AnyFolder Foot = {
        AnyVar TaloNavicularDorsiFlexion ??= 0.0;
        AnyVar TaloNavicularAbduction ??= 0.0;
        AnyVar TaloNavicularEversion ??= 0.0;
        AnyVar CalcaneoCuboidDorsiFlexion ??= 0.0;
        AnyVar CalcaneoCuboidAbduction ??= 0.0;
        AnyVar CalcaneoCuboidEversion ??= 0.0;
        AnyVar NaviculoMedialCuneiformDorsiFlexion ??= 0.0;
        AnyVar NaviculoMedialCuneiformAbduction ??= 0.0;
        AnyVar NaviculoMedialCuneiformEversion ??= 0.0;
        AnyVar NaviculoIntermediateCuneiformDorsiFlexion ??= 0.0;
        AnyVar NaviculoIntermediateCuneiformAbduction ??= 0.0;
        AnyVar NaviculoLateralCuneiformDorsiFlexion ??= 0.0;
        AnyVar NaviculoLateralCuneiformAbduction ??= 0.0;
        AnyVar TarsoMetatarsal1DorsiFlexion ??= 0.0;
        AnyVar TarsoMetatarsal1Abduction ??= 0.0;
        AnyVar TarsoMetatarsal1Eversion ??= 0.0;
        AnyVar TarsoMetatarsal2DorsiFlexion ??= 0.0;
        AnyVar TarsoMetatarsal2Abduction ??= 0.0;
        AnyVar TarsoMetatarsal3DorsiFlexion ??= 0.0;
        AnyVar TarsoMetatarsal3Abduction ??= 0.0;
        AnyVar TarsoMetatarsal4DorsiFlexion ??= 0.0;
        AnyVar TarsoMetatarsal4Abduction ??= 0.0;
        AnyVar TarsoMetatarsal5SkewDorsiFlexion ??= 0.0;
        AnyVar TarsoMetatarsal5SkewEversion ??= 0.0;
        AnyVar TarsoMetatarsal5Abduction ??= 0.0;
        AnyVar MetatarsoPhalangeal1DorsiFlexion ??= 0.0;
        AnyVar MetatarsoPhalangeal1Abduction ??= 0.0;
        AnyVar MetatarsoPhalangeal2DorsiFlexion ??= 0.0;
        AnyVar MetatarsoPhalangeal2Abduction ??= 0.0;
        AnyVar MetatarsoPhalangeal3DorsiFlexion ??= 0.0;
        AnyVar MetatarsoPhalangeal3Abduction ??= 0.0;
        AnyVar MetatarsoPhalangeal4DorsiFlexion ??= 0.0;
        AnyVar MetatarsoPhalangeal4Abduction ??= 0.0;
        AnyVar MetatarsoPhalangeal5DorsiFlexion ??= 0.0;
        AnyVar MetatarsoPhalangeal5Abduction ??= 0.0;
        AnyVar ProximoDistalPhalange1DorsiFlexion ??= 0.0;
        AnyVar ProximoMedialPhalange2DorsiFlexion ??= 0.0;
        AnyVar ProximoMedialPhalange3DorsiFlexion ??= 0.0;
        AnyVar ProximoMedialPhalange4DorsiFlexion ??= 0.0;
        AnyVar ProximoMedialPhalange5DorsiFlexion ??= 0.0;
        AnyVar MedioDistalPhalange2DorsiFlexion ??= 0.0;
        AnyVar MedioDistalPhalange3DorsiFlexion ??= 0.0;
        AnyVar MedioDistalPhalange4DorsiFlexion ??= 0.0;
        AnyVar MedioDistalPhalange5DorsiFlexion ??= 0.0;
       };

      //Detail Hand
      AnyFolder Finger1  =  {
        AnyVar CMCDeviation ??= DesignVar(-20);
        AnyVar CMCFlexion ??= DesignVar(20);
        AnyVar MCPFlexion ??= DesignVar(20);
        AnyVar MCPDeviation ??= DesignVar(0);
        AnyVar DIPFlexion ??= DesignVar(20);
      };

      AnyFolder Finger2  =  {
        AnyVar MCPFlexion ??= DesignVar(20);
        AnyVar PIPFlexion ??= DesignVar(20);
        AnyVar DIPFlexion ??= DesignVar(20);
      };

      AnyFolder Finger3 =  {
        AnyVar MCPFlexion ??= DesignVar(20);
        AnyVar PIPFlexion ??= DesignVar(20);
        AnyVar DIPFlexion ??= DesignVar(20);
      };

      AnyFolder Finger4 =  {
        AnyVar MCPFlexion ??= DesignVar(20);
        AnyVar PIPFlexion ??= DesignVar(20);
        AnyVar DIPFlexion ??= DesignVar(20);
      };

      AnyFolder Finger5 =  {
        AnyVar MCPFlexion ??= DesignVar(20);
        AnyVar PIPFlexion ??= DesignVar(20);
        AnyVar DIPFlexion ??= DesignVar(20);
      };
    };

    AnyFolder Left =  {
      //all values are set to be equal to the right side values
      //feel free to change this!

      //Arm
      AnyVar SternoClavicularProtraction ??= .Right.SternoClavicularProtraction;
      AnyVar SternoClavicularElevation ??= .Right.SternoClavicularElevation;
      #if BM_ARM_CLAVICULA_ROTATION_RHYTHM
      /// NOTE: This value is unused. The SC ais value is not used as the SC axial rotation is controlled by a rythmn (BM_ARM_CLAVICULA_ROTATION_RHYTHM)
      AnyVar SternoClavicularAxialRotation ??= .Right.SternoClavicularAxialRotation;
      #else
      AnyVar SternoClavicularAxialRotation ??= .Right.SternoClavicularAxialRotation;  //This value is not used for initial position
      #endif
      AnyVar GlenohumeralFlexion ??= .Right.GlenohumeralFlexion ;
      AnyVar GlenohumeralAbduction ??= .Right.GlenohumeralAbduction ;
      AnyVar GlenohumeralExternalRotation ??= .Right.GlenohumeralExternalRotation ;

      AnyVar ElbowFlexion ??= .Right.ElbowFlexion;
      AnyVar ElbowPronation ??= .Right.ElbowPronation;

      AnyVar WristFlexion ??= .Right.WristFlexion;
      AnyVar WristAbduction ??= .Right.WristAbduction;

      //Leg
      AnyVar HipFlexion ??= .Right.HipFlexion;
      AnyVar HipAbduction ??= .Right.HipAbduction;
      AnyVar HipExternalRotation ??= .Right.HipExternalRotation;

      AnyVar KneeFlexion ??= .Right.KneeFlexion;

      AnyVar AnklePlantarFlexion ??= .Right.AnklePlantarFlexion ;
      AnyVar SubTalarEversion ??= .Right.SubTalarEversion;

      //Detail Foot
      AnyFolder Foot = {
        AnyVar TaloNavicularDorsiFlexion ??= 0.0;
        AnyVar TaloNavicularAbduction ??= 0.0;
        AnyVar TaloNavicularEversion ??= 0.0;
        AnyVar CalcaneoCuboidDorsiFlexion ??= 0.0;
        AnyVar CalcaneoCuboidAbduction ??= 0.0;
        AnyVar CalcaneoCuboidEversion ??= 0.0;
        AnyVar NaviculoMedialCuneiformDorsiFlexion ??= 0.0;
        AnyVar NaviculoMedialCuneiformAbduction ??= 0.0;
        AnyVar NaviculoMedialCuneiformEversion ??= 0.0;
        AnyVar NaviculoIntermediateCuneiformDorsiFlexion ??= 0.0;
        AnyVar NaviculoIntermediateCuneiformAbduction ??= 0.0;
        AnyVar NaviculoLateralCuneiformDorsiFlexion ??= 0.0;
        AnyVar NaviculoLateralCuneiformAbduction ??= 0.0;
        AnyVar TarsoMetatarsal1DorsiFlexion ??= 0.0;
        AnyVar TarsoMetatarsal1Abduction ??= 0.0;
        AnyVar TarsoMetatarsal1Eversion ??= 0.0;
        AnyVar TarsoMetatarsal2DorsiFlexion ??= 0.0;
        AnyVar TarsoMetatarsal2Abduction ??= 0.0;
        AnyVar TarsoMetatarsal3DorsiFlexion ??= 0.0;
        AnyVar TarsoMetatarsal3Abduction ??= 0.0;
        AnyVar TarsoMetatarsal4DorsiFlexion ??= 0.0;
        AnyVar TarsoMetatarsal4Abduction ??= 0.0;
        AnyVar TarsoMetatarsal5SkewDorsiFlexion ??= 0.0;
        AnyVar TarsoMetatarsal5SkewEversion ??= 0.0;
        AnyVar TarsoMetatarsal5Abduction ??= 0.0;
        AnyVar MetatarsoPhalangeal1DorsiFlexion ??= 0.0;
        AnyVar MetatarsoPhalangeal1Abduction ??= 0.0;
        AnyVar MetatarsoPhalangeal2DorsiFlexion ??= 0.0;
        AnyVar MetatarsoPhalangeal2Abduction ??= 0.0;
        AnyVar MetatarsoPhalangeal3DorsiFlexion ??= 0.0;
        AnyVar MetatarsoPhalangeal3Abduction ??= 0.0;
        AnyVar MetatarsoPhalangeal4DorsiFlexion ??= 0.0;
        AnyVar MetatarsoPhalangeal4Abduction ??= 0.0;
        AnyVar MetatarsoPhalangeal5DorsiFlexion ??= 0.0;
        AnyVar MetatarsoPhalangeal5Abduction ??= 0.0;
        AnyVar ProximoDistalPhalange1DorsiFlexion ??= 0.0;
        AnyVar ProximoMedialPhalange2DorsiFlexion ??= 0.0;
        AnyVar ProximoMedialPhalange3DorsiFlexion ??= 0.0;
        AnyVar ProximoMedialPhalange4DorsiFlexion ??= 0.0;
        AnyVar ProximoMedialPhalange5DorsiFlexion ??= 0.0;
        AnyVar MedioDistalPhalange2DorsiFlexion ??= 0.0;
        AnyVar MedioDistalPhalange3DorsiFlexion ??= 0.0;
        AnyVar MedioDistalPhalange4DorsiFlexion ??= 0.0;
        AnyVar MedioDistalPhalange5DorsiFlexion ??= 0.0;
       };

       //Detail Hand
      AnyFolder Finger1 =  {
        AnyVar CMCDeviation ??= ..Right.Finger1.CMCDeviation;
        AnyVar CMCFlexion ??= ..Right.Finger1.CMCFlexion;
        AnyVar MCPFlexion ??= ..Right.Finger1.MCPFlexion;
        AnyVar MCPDeviation ??= ..Right.Finger1.MCPDeviation;
        AnyVar DIPFlexion ??= ..Right.Finger1.DIPFlexion;
      };

      AnyFolder Finger2 =  {
        AnyVar MCPFlexion ??= ..Right.Finger2.MCPFlexion;
        AnyVar PIPFlexion ??= ..Right.Finger2.PIPFlexion;
        AnyVar DIPFlexion ??= ..Right.Finger2.DIPFlexion;
      };

      AnyFolder Finger3 =  {
        AnyVar MCPFlexion ??= ..Right.Finger3.MCPFlexion;
        AnyVar PIPFlexion ??= ..Right.Finger3.PIPFlexion;
        AnyVar DIPFlexion ??= ..Right.Finger3.DIPFlexion;
      };

      AnyFolder Finger4 =  {
        AnyVar MCPFlexion ??= ..Right.Finger4.MCPFlexion;
        AnyVar PIPFlexion ??= ..Right.Finger4.PIPFlexion;
        AnyVar DIPFlexion ??= ..Right.Finger4.DIPFlexion;
      };

      AnyFolder Finger5 =  {
        AnyVar MCPFlexion ??= ..Right.Finger5.MCPFlexion;
        AnyVar PIPFlexion ??= ..Right.Finger5.PIPFlexion;
        AnyVar DIPFlexion ??= ..Right.Finger5.DIPFlexion;
      };
    };
    AnyFolder Spine =
    {
       AnyVar PelvisSacrumExtension ??= DesignVar(0.0);
       AnyVar PelvisSacrumLateralBending ??= DesignVar(0.0);
       AnyVar PelvisSacrumRotation ??= DesignVar(0.0);
       AnyVar SacrumL5Extension ??= DesignVar(-8.1);
       AnyVar SacrumL5LateralBending ??= DesignVar(0.0);
       AnyVar SacrumL5Rotation ??= DesignVar(0.0);
       AnyVar L5L4Extension ??= DesignVar(0.0);
       AnyVar L5L4LateralBending ??= DesignVar(0.0);
       AnyVar L5L4Rotation ??= DesignVar(0.0);
       AnyVar L4L3Extension ??= DesignVar(0.0);
       AnyVar L4L3LateralBending ??= DesignVar(0.0);
       AnyVar L4L3Rotation ??= DesignVar(0.0);
       AnyVar L3L2Extension ??= DesignVar(0.0);
       AnyVar L3L2LateralBending ??= DesignVar(0.0);
       AnyVar L3L2Rotation ??= DesignVar(0.0);
       AnyVar L2L1Extension ??= DesignVar(0.0);
       AnyVar L2L1LateralBending ??= DesignVar(0.0);
       AnyVar L2L1Rotation ??= DesignVar(0.0);
       AnyVar L1T12Extension ??= DesignVar(0.0);
       AnyVar L1T12LateralBending ??= DesignVar(0.0);
       AnyVar L1T12Rotation ??= DesignVar(0.0);
       AnyVar T12T11Extension ??= DesignVar(0.0);
       AnyVar T12T11LateralBending ??= DesignVar(0.0);
       AnyVar T12T11Rotation ??= DesignVar(0.0);
       AnyVar T11T10Extension ??= DesignVar(0.0);
       AnyVar T11T10LateralBending ??= DesignVar(0.0);
       AnyVar T11T10Rotation ??= DesignVar(0.0);
       AnyVar T10T9Extension ??= DesignVar(0.0);
       AnyVar T10T9LateralBending ??= DesignVar(0.0);
       AnyVar T10T9Rotation ??= DesignVar(0.0);
       AnyVar T9T8Extension ??= DesignVar(0.0);
       AnyVar T9T8LateralBending ??= DesignVar(0.0);
       AnyVar T9T8Rotation ??= DesignVar(0.0);
       AnyVar T8T7Extension ??= DesignVar(0.0);
       AnyVar T8T7LateralBending ??= DesignVar(0.0);
       AnyVar T8T7Rotation ??= DesignVar(0.0);
       AnyVar T7T6Extension ??= DesignVar(0.0);
       AnyVar T7T6LateralBending ??= DesignVar(0.0);
       AnyVar T7T6Rotation ??= DesignVar(0.0);
       AnyVar T6T5Extension ??= DesignVar(0.0);
       AnyVar T6T5LateralBending ??= DesignVar(0.0);
       AnyVar T6T5Rotation ??= DesignVar(0.0);
       AnyVar T5T4Extension ??= DesignVar(0.0);
       AnyVar T5T4LateralBending ??= DesignVar(0.0);
       AnyVar T5T4Rotation ??= DesignVar(0.0);
       AnyVar T4T3Extension ??= DesignVar(0.0);
       AnyVar T4T3LateralBending ??= DesignVar(0.0);
       AnyVar T4T3Rotation ??= DesignVar(0.0);
       AnyVar T3T2Extension ??= DesignVar(0.0);
       AnyVar T3T2LateralBending ??= DesignVar(0.0);
       AnyVar T3T2Rotation ??= DesignVar(0.0);
       AnyVar T2T1Extension ??= DesignVar(0.0);
       AnyVar T2T1LateralBending ??= DesignVar(0.0);
       AnyVar T2T1Rotation ??= DesignVar(0.0);
       AnyVar T1C7Extension ??= DesignVar(0.0);
       AnyVar T1C7LateralBending ??= DesignVar(0.0);
       AnyVar T1C7Rotation ??= DesignVar(0.0);
       AnyVar C7C6Extension ??= DesignVar(0.0);
       AnyVar C7C6LateralBending ??= DesignVar(0.0);
       AnyVar C7C6Rotation ??= DesignVar(0.0);
       AnyVar C6C5Extension ??= DesignVar(0.0);
       AnyVar C6C5LateralBending ??= DesignVar(0.0);
       AnyVar C6C5Rotation ??= DesignVar(0.0);
       AnyVar C5C4Extension ??= DesignVar(0.0);
       AnyVar C5C4LateralBending ??= DesignVar(0.0);
       AnyVar C5C4Rotation ??= DesignVar(0.0);
       AnyVar C4C3Extension ??= DesignVar(0.0);
       AnyVar C4C3LateralBending ??= DesignVar(0.0);
       AnyVar C4C3Rotation ??= DesignVar(0.0);
       AnyVar C3C2Extension ??= DesignVar(0.0);
       AnyVar C3C2LateralBending ??= DesignVar(0.0);
       AnyVar C3C2Rotation ??= DesignVar(0.0);
       AnyVar C2C1Extension ??= DesignVar(0.0);
       AnyVar C2C1LateralBending ??= DesignVar(0.0);
       AnyVar C2C1Rotation ??= DesignVar(0.0);
       AnyVar C1SkullExtension ??= DesignVar(0.0);
       AnyVar C1SkullLateralBending ??= DesignVar(0.0);
       AnyVar C1SkullRotation ??= DesignVar(0.0);
    };
  };

  /// Folder defining the Posture velocity of the HumanModel. The values
  /// are sometimes used for driving the model, but that is application dependent.
  AnyFolder PostureVel =  {
    //This controls the position of the pelvi wrt. to the global reference frame
    AnyVar PelvisPosX ??= DesignVar(0);
    AnyVar PelvisPosY ??= DesignVar(0);
    AnyVar PelvisPosZ ??= DesignVar(0);

    //This controls the rotation of the pelvis wrt. to the global reference frame
    AnyVar PelvisRotX ??= DesignVar(0);
    AnyVar PelvisRotY ??= DesignVar(0);
    AnyVar PelvisRotZ ??= DesignVar(0);

    // These variables control the rotation of the thorax wrt the
    // pelvis
    AnyVar PelvisThoraxExtension ??= DesignVar(PelvisT12Extension);
    AnyVar PelvisThoraxLateralBending ??= DesignVar(PelvisT12LateralBending);
    AnyVar PelvisThoraxRotation ??= DesignVar(PelvisT12Rotation);

    AnyVar PelvisT12Extension ??= DesignVar(0);
    AnyVar PelvisT12LateralBending ??= DesignVar(0);
    AnyVar PelvisT12Rotation ??= DesignVar(0);

    AnyVar T12T1Extension ??= DesignVar(0);
    AnyVar T12T1LateralBending ??= DesignVar(0);
    AnyVar T12T1Rotation ??= DesignVar(0);

    AnyVar T1SkullExtension ??= DesignVar(0);
    AnyVar T1SkullLateralBending ??= DesignVar(0);
    AnyVar T1SkullRotation ??= DesignVar(0);

    AnyVar NeckExtension ??= DesignVar(T1SkullExtension);
    AnyVar NeckLateralBending ??= DesignVar(T1SkullLateralBending); // not used when neck is switched off
    AnyVar NeckRotation ??= DesignVar(T1SkullRotation);             // not used when neck is switched off


    AnyFolder Right =  {
      //Arm
      AnyVar SternoClavicularProtraction ??= DesignVar(0);   //This value is not used for initial position
      AnyVar SternoClavicularElevation ??= DesignVar(0);    //This value is not used for initial position
      #if BM_ARM_CLAVICULA_ROTATION_RHYTHM
      /// NOTE: This value is unused. The SC ais value is not used as the SC axial rotation is controlled by a rythmn (BM_ARM_CLAVICULA_ROTATION_RHYTHM)
      AnyVar SternoClavicularAxialRotation ??= DesignVar(0); //This value is not used for initial position
      #else
      AnyVar SternoClavicularAxialRotation ??= DesignVar(0);  //This value is not used for initial position
      #endif
      AnyVar GlenohumeralFlexion ??= DesignVar(0);
      AnyVar GlenohumeralAbduction ??= DesignVar(0);
      AnyVar GlenohumeralExternalRotation ??= DesignVar(0);

      AnyVar ElbowFlexion ??= DesignVar(0.0);
      AnyVar ElbowPronation ??= DesignVar(0.0);

      AnyVar WristFlexion ??= DesignVar(0);
      AnyVar WristAbduction ??= DesignVar(0);

      //Leg
      AnyVar HipFlexion ??= DesignVar(0.0);
      AnyVar HipAbduction ??= DesignVar(0.0);
      AnyVar HipExternalRotation ??= DesignVar(0.0);

      AnyVar KneeFlexion ??= DesignVar(0.0);

      AnyVar AnklePlantarFlexion ??= DesignVar(0.0);
      AnyVar SubTalarEversion ??= DesignVar(0.0);

      //Detail Foot
      AnyFolder Foot = {
        AnyVar TaloNavicularDorsiFlexion ??= 0.0;
        AnyVar TaloNavicularAbduction ??= 0.0;
        AnyVar TaloNavicularEversion ??= 0.0;
        AnyVar CalcaneoCuboidDorsiFlexion ??= 0.0;
        AnyVar CalcaneoCuboidAbduction ??= 0.0;
        AnyVar CalcaneoCuboidEversion ??= 0.0;
        AnyVar NaviculoMedialCuneiformDorsiFlexion ??= 0.0;
        AnyVar NaviculoMedialCuneiformAbduction ??= 0.0;
        AnyVar NaviculoMedialCuneiformEversion ??= 0.0;
        AnyVar NaviculoIntermediateCuneiformDorsiFlexion ??= 0.0;
        AnyVar NaviculoIntermediateCuneiformAbduction ??= 0.0;
        AnyVar NaviculoLateralCuneiformDorsiFlexion ??= 0.0;
        AnyVar NaviculoLateralCuneiformAbduction ??= 0.0;
        AnyVar TarsoMetatarsal1DorsiFlexion ??= 0.0;
        AnyVar TarsoMetatarsal1Abduction ??= 0.0;
        AnyVar TarsoMetatarsal1Eversion ??= 0.0;
        AnyVar TarsoMetatarsal2DorsiFlexion ??= 0.0;
        AnyVar TarsoMetatarsal2Abduction ??= 0.0;
        AnyVar TarsoMetatarsal3DorsiFlexion ??= 0.0;
        AnyVar TarsoMetatarsal3Abduction ??= 0.0;
        AnyVar TarsoMetatarsal4DorsiFlexion ??= 0.0;
        AnyVar TarsoMetatarsal4Abduction ??= 0.0;
        AnyVar TarsoMetatarsal5SkewDorsiFlexion ??= 0.0;
        AnyVar TarsoMetatarsal5SkewEversion ??= 0.0;
        AnyVar TarsoMetatarsal5Abduction ??= 0.0;
        AnyVar MetatarsoPhalangeal1DorsiFlexion ??= 0.0;
        AnyVar MetatarsoPhalangeal1Abduction ??= 0.0;
        AnyVar MetatarsoPhalangeal2DorsiFlexion ??= 0.0;
        AnyVar MetatarsoPhalangeal2Abduction ??= 0.0;
        AnyVar MetatarsoPhalangeal3DorsiFlexion ??= 0.0;
        AnyVar MetatarsoPhalangeal3Abduction ??= 0.0;
        AnyVar MetatarsoPhalangeal4DorsiFlexion ??= 0.0;
        AnyVar MetatarsoPhalangeal4Abduction ??= 0.0;
        AnyVar MetatarsoPhalangeal5DorsiFlexion ??= 0.0;
        AnyVar MetatarsoPhalangeal5Abduction ??= 0.0;
        AnyVar ProximoDistalPhalange1DorsiFlexion ??= 0.0;
        AnyVar ProximoMedialPhalange2DorsiFlexion ??= 0.0;
        AnyVar ProximoMedialPhalange3DorsiFlexion ??= 0.0;
        AnyVar ProximoMedialPhalange4DorsiFlexion ??= 0.0;
        AnyVar ProximoMedialPhalange5DorsiFlexion ??= 0.0;
        AnyVar MedioDistalPhalange2DorsiFlexion ??= 0.0;
        AnyVar MedioDistalPhalange3DorsiFlexion ??= 0.0;
        AnyVar MedioDistalPhalange4DorsiFlexion ??= 0.0;
        AnyVar MedioDistalPhalange5DorsiFlexion ??= 0.0;
       };

      //Detail Hand
      AnyFolder Finger1 =  {
        AnyVar CMCDeviation ??= 0;
        AnyVar CMCFlexion ??= 0;
        AnyVar MCPFlexion ??= 0;
        AnyVar MCPDeviation ??= 0;
        AnyVar DIPFlexion ??= 0;
      };

      AnyFolder Finger2 =  {
        AnyVar MCPFlexion ??= 0;
        AnyVar PIPFlexion ??= 0;
        AnyVar DIPFlexion ??= 0;
      };

      AnyFolder Finger3 =  {
        AnyVar MCPFlexion ??= 0;
        AnyVar PIPFlexion ??= 0;
        AnyVar DIPFlexion ??= 0;
      };

      AnyFolder Finger4 =  {
        AnyVar MCPFlexion ??= 0;
        AnyVar PIPFlexion ??= 0;
        AnyVar DIPFlexion ??= 0;
      };

      AnyFolder Finger5 =  {
        AnyVar MCPFlexion ??= 0;
        AnyVar PIPFlexion ??= 0;
        AnyVar DIPFlexion ??= 0;
      };

    };

    AnyFolder Left =  {
      //all values are set to be equal to the right side values
      //feel free to change this!

      //Arm
      AnyVar SternoClavicularProtraction ??= .Right.SternoClavicularProtraction;
      AnyVar SternoClavicularElevation ??= .Right.SternoClavicularElevation;
      #if BM_ARM_CLAVICULA_ROTATION_RHYTHM
      /// NOTE: This value is unused. The SC ais value is not used as the SC axial rotation is controlled by a rythmn (BM_ARM_CLAVICULA_ROTATION_RHYTHM)
      AnyVar SternoClavicularAxialRotation ??= .Right.SternoClavicularAxialRotation; //This value is not used for initial position
      #else
      AnyVar SternoClavicularAxialRotation ??= .Right.SternoClavicularAxialRotation;  //This value is not used for initial position
      #endif
      AnyVar GlenohumeralFlexion ??= .Right.GlenohumeralFlexion ;
      AnyVar GlenohumeralAbduction ??= .Right.GlenohumeralAbduction ;
      AnyVar GlenohumeralExternalRotation ??= .Right.GlenohumeralExternalRotation ;

      AnyVar ElbowFlexion ??= .Right.ElbowFlexion;
      AnyVar ElbowPronation ??= .Right.ElbowPronation;

      AnyVar WristFlexion ??= .Right.WristFlexion;
      AnyVar WristAbduction ??= .Right.WristAbduction;

      //Leg
      AnyVar HipFlexion ??= .Right.HipFlexion;
      AnyVar HipAbduction ??= .Right.HipAbduction;
      AnyVar HipExternalRotation ??= .Right.HipExternalRotation;

      AnyVar KneeFlexion ??= .Right.KneeFlexion;

      AnyVar AnklePlantarFlexion ??= .Right.AnklePlantarFlexion ;
      AnyVar SubTalarEversion ??= .Right.SubTalarEversion;

      //Detail Foot
      AnyFolder Foot = {
        AnyVar TaloNavicularDorsiFlexion ??= 0.0;
        AnyVar TaloNavicularAbduction ??= 0.0;
        AnyVar TaloNavicularEversion ??= 0.0;
        AnyVar CalcaneoCuboidDorsiFlexion ??= 0.0;
        AnyVar CalcaneoCuboidAbduction ??= 0.0;
        AnyVar CalcaneoCuboidEversion ??= 0.0;
        AnyVar NaviculoMedialCuneiformDorsiFlexion ??= 0.0;
        AnyVar NaviculoMedialCuneiformAbduction ??= 0.0;
        AnyVar NaviculoMedialCuneiformEversion ??= 0.0;
        AnyVar NaviculoIntermediateCuneiformDorsiFlexion ??= 0.0;
        AnyVar NaviculoIntermediateCuneiformAbduction ??= 0.0;
        AnyVar NaviculoLateralCuneiformDorsiFlexion ??= 0.0;
        AnyVar NaviculoLateralCuneiformAbduction ??= 0.0;
        AnyVar TarsoMetatarsal1DorsiFlexion ??= 0.0;
        AnyVar TarsoMetatarsal1Abduction ??= 0.0;
        AnyVar TarsoMetatarsal1Eversion ??= 0.0;
        AnyVar TarsoMetatarsal2DorsiFlexion ??= 0.0;
        AnyVar TarsoMetatarsal2Abduction ??= 0.0;
        AnyVar TarsoMetatarsal3DorsiFlexion ??= 0.0;
        AnyVar TarsoMetatarsal3Abduction ??= 0.0;
        AnyVar TarsoMetatarsal4DorsiFlexion ??= 0.0;
        AnyVar TarsoMetatarsal4Abduction ??= 0.0;
        AnyVar TarsoMetatarsal5SkewDorsiFlexion ??= 0.0;
        AnyVar TarsoMetatarsal5SkewEversion ??= 0.0;
        AnyVar TarsoMetatarsal5Abduction ??= 0.0;
        AnyVar MetatarsoPhalangeal1DorsiFlexion ??= 0.0;
        AnyVar MetatarsoPhalangeal1Abduction ??= 0.0;
        AnyVar MetatarsoPhalangeal2DorsiFlexion ??= 0.0;
        AnyVar MetatarsoPhalangeal2Abduction ??= 0.0;
        AnyVar MetatarsoPhalangeal3DorsiFlexion ??= 0.0;
        AnyVar MetatarsoPhalangeal3Abduction ??= 0.0;
        AnyVar MetatarsoPhalangeal4DorsiFlexion ??= 0.0;
        AnyVar MetatarsoPhalangeal4Abduction ??= 0.0;
        AnyVar MetatarsoPhalangeal5DorsiFlexion ??= 0.0;
        AnyVar MetatarsoPhalangeal5Abduction ??= 0.0;
        AnyVar ProximoDistalPhalange1DorsiFlexion ??= 0.0;
        AnyVar ProximoMedialPhalange2DorsiFlexion ??= 0.0;
        AnyVar ProximoMedialPhalange3DorsiFlexion ??= 0.0;
        AnyVar ProximoMedialPhalange4DorsiFlexion ??= 0.0;
        AnyVar ProximoMedialPhalange5DorsiFlexion ??= 0.0;
        AnyVar MedioDistalPhalange2DorsiFlexion ??= 0.0;
        AnyVar MedioDistalPhalange3DorsiFlexion ??= 0.0;
        AnyVar MedioDistalPhalange4DorsiFlexion ??= 0.0;
        AnyVar MedioDistalPhalange5DorsiFlexion ??= 0.0;
       };

      //Detail Hand
      AnyFolder Finger1 =  {
        AnyVar CMCDeviation ??= 0;
        AnyVar CMCFlexion ??= 0;
        AnyVar MCPFlexion ??= 0;
        AnyVar MCPDeviation ??= 0;
        AnyVar DIPFlexion ??= 0;
      };

      AnyFolder Finger2 =  {
        AnyVar MCPFlexion ??= 0;
        AnyVar PIPFlexion ??= 0;
        AnyVar DIPFlexion ??= 0;
      };

      AnyFolder Finger3 =  {
        AnyVar MCPFlexion ??= 0;
        AnyVar PIPFlexion ??= 0;
        AnyVar DIPFlexion ??= 0;
      };

      AnyFolder Finger4 =  {
        AnyVar MCPFlexion ??= 0;
        AnyVar PIPFlexion ??= 0;
        AnyVar DIPFlexion ??= 0;
      };

      AnyFolder Finger5 =  {
        AnyVar MCPFlexion ??= 0;
        AnyVar PIPFlexion ??= 0;
        AnyVar DIPFlexion ??= 0;
      };

    };
    AnyFolder Spine =
    {
       AnyVar PelvisSacrumExtension ??= DesignVar(0.0);
       AnyVar PelvisSacrumLateralBending ??= DesignVar(0.0);
       AnyVar PelvisSacrumRotation ??= DesignVar(0.0);
       AnyVar SacrumL5Extension ??= DesignVar(0.0);
       AnyVar SacrumL5LateralBending ??= DesignVar(0.0);
       AnyVar SacrumL5Rotation ??= DesignVar(0.0);
       AnyVar L5L4Extension ??= DesignVar(0.0);
       AnyVar L5L4LateralBending ??= DesignVar(0.0);
       AnyVar L5L4Rotation ??= DesignVar(0.0);
       AnyVar L4L3Extension ??= DesignVar(0.0);
       AnyVar L4L3LateralBending ??= DesignVar(0.0);
       AnyVar L4L3Rotation ??= DesignVar(0.0);
       AnyVar L3L2Extension ??= DesignVar(0.0);
       AnyVar L3L2LateralBending ??= DesignVar(0.0);
       AnyVar L3L2Rotation ??= DesignVar(0.0);
       AnyVar L2L1Extension ??= DesignVar(0.0);
       AnyVar L2L1LateralBending ??= DesignVar(0.0);
       AnyVar L2L1Rotation ??= DesignVar(0.0);
       AnyVar L1T12Extension ??= DesignVar(0.0);
       AnyVar L1T12LateralBending ??= DesignVar(0.0);
       AnyVar L1T12Rotation ??= DesignVar(0.0);
       AnyVar T12T11Extension ??= DesignVar(0.0);
       AnyVar T12T11LateralBending ??= DesignVar(0.0);
       AnyVar T12T11Rotation ??= DesignVar(0.0);
       AnyVar T11T10Extension ??= DesignVar(0.0);
       AnyVar T11T10LateralBending ??= DesignVar(0.0);
       AnyVar T11T10Rotation ??= DesignVar(0.0);
       AnyVar T10T9Extension ??= DesignVar(0.0);
       AnyVar T10T9LateralBending ??= DesignVar(0.0);
       AnyVar T10T9Rotation ??= DesignVar(0.0);
       AnyVar T9T8Extension ??= DesignVar(0.0);
       AnyVar T9T8LateralBending ??= DesignVar(0.0);
       AnyVar T9T8Rotation ??= DesignVar(0.0);
       AnyVar T8T7Extension ??= DesignVar(0.0);
       AnyVar T8T7LateralBending ??= DesignVar(0.0);
       AnyVar T8T7Rotation ??= DesignVar(0.0);
       AnyVar T7T6Extension ??= DesignVar(0.0);
       AnyVar T7T6LateralBending ??= DesignVar(0.0);
       AnyVar T7T6Rotation ??= DesignVar(0.0);
       AnyVar T6T5Extension ??= DesignVar(0.0);
       AnyVar T6T5LateralBending ??= DesignVar(0.0);
       AnyVar T6T5Rotation ??= DesignVar(0.0);
       AnyVar T5T4Extension ??= DesignVar(0.0);
       AnyVar T5T4LateralBending ??= DesignVar(0.0);
       AnyVar T5T4Rotation ??= DesignVar(0.0);
       AnyVar T4T3Extension ??= DesignVar(0.0);
       AnyVar T4T3LateralBending ??= DesignVar(0.0);
       AnyVar T4T3Rotation ??= DesignVar(0.0);
       AnyVar T3T2Extension ??= DesignVar(0.0);
       AnyVar T3T2LateralBending ??= DesignVar(0.0);
       AnyVar T3T2Rotation ??= DesignVar(0.0);
       AnyVar T2T1Extension ??= DesignVar(0.0);
       AnyVar T2T1LateralBending ??= DesignVar(0.0);
       AnyVar T2T1Rotation ??= DesignVar(0.0);
       AnyVar T1C7Extension ??= DesignVar(0.0);
       AnyVar T1C7LateralBending ??= DesignVar(0.0);
       AnyVar T1C7Rotation ??= DesignVar(0.0);
       AnyVar C7C6Extension ??= DesignVar(0.0);
       AnyVar C7C6LateralBending ??= DesignVar(0.0);
       AnyVar C7C6Rotation ??= DesignVar(0.0);
       AnyVar C6C5Extension ??= DesignVar(0.0);
       AnyVar C6C5LateralBending ??= DesignVar(0.0);
       AnyVar C6C5Rotation ??= DesignVar(0.0);
       AnyVar C5C4Extension ??= DesignVar(0.0);
       AnyVar C5C4LateralBending ??= DesignVar(0.0);
       AnyVar C5C4Rotation ??= DesignVar(0.0);
       AnyVar C4C3Extension ??= DesignVar(0.0);
       AnyVar C4C3LateralBending ??= DesignVar(0.0);
       AnyVar C4C3Rotation ??= DesignVar(0.0);
       AnyVar C3C2Extension ??= DesignVar(0.0);
       AnyVar C3C2LateralBending ??= DesignVar(0.0);
       AnyVar C3C2Rotation ??= DesignVar(0.0);
       AnyVar C2C1Extension ??= DesignVar(0.0);
       AnyVar C2C1LateralBending ??= DesignVar(0.0);
       AnyVar C2C1Rotation ??= DesignVar(0.0);
       AnyVar C1SkullExtension ??= DesignVar(0.0);
       AnyVar C1SkullLateralBending ??= DesignVar(0.0);
       AnyVar C1SkullRotation ??= DesignVar(0.0);
    };
  };

  // #if LOAD_SECTION == 1
  // AnyFolder Load =  {
  //   AnyVec3 TopVertebra ??= {0.000, 0.000, 0.000};

  //   AnyFolder Right =  {
  //     AnyVec3 Shoulder ??= {0.000, 0.000, 0.000};
  //     AnyVec3 Elbow ??= {0.000, 0.000, 0.000};
  //     AnyVec3 Hand ??= {0.000, 0.000, 0.000};
  //     AnyVec3 Hip ??= {0.000, 0.000, 0.000};
  //     AnyVec3 Knee ??= {0.000, 0.000, 0.000};
  //     AnyVec3 Ankle ??= {0.000, 0.000, 0.000};
  //   };
  //   AnyFolder Left =  {
  //     AnyVec3 Shoulder ??= {0.000, 0.000, 0.000};
  //     AnyVec3 Elbow ??= {0.000, 0.000, 0.000};
  //     AnyVec3 Hand ??= {0.000, 0.000, 0.000};
  //     AnyVec3 Hip ??= {0.000, 0.000, 0.000};
  //     AnyVec3 Knee ??= {0.000, 0.000, 0.000};
  //     AnyVec3 Ankle ??= {0.000, 0.000, 0.000};
  //   };
  // };  // Loads
  // #endif

};
