// Class template for creating muscle parameter sections. The implementation as a template
// ensures that the the parameter can be overridden by the user.

#class_template SubjectMusclePar_template(
JT = 3.0,
JPE = 3.0,
PEFACTOR = 5.0,
SPECIFICSTRENGTH = 90
) {
  #var AnyVar Jt = DesignVar(JT); // Shape parameter for the tendon stiffness
  #var AnyVar Jpe = DesignVar(JPE); // Shape parameter for the parallel stiffness
  #var AnyVar PEFactor = DesignVar(PEFACTOR); // Parameter for influence of parallel stiffness
  #var AnyVar SpecificStrength = SPECIFICSTRENGTH; //
};


#class_template SubjectMuscleParameter_template(NAME) {
  /// Descriptive name for the muscle, e.g. for plotting
  #var AnyString Muscle = ...ModelParameters.Muscles.NAME.Muscle;

  /// Pennation angle of the muscle fibers (degres)
  #var AnyFloat Pennationangle = ...ModelParameters.Muscles.NAME.Pennationangle;

  /// Volume of the muscle  (ml)
  #var AnyFloat MuscleVolumeUnscaled = ...ModelParameters.Muscles.NAME.MuscleVolume;

  /// Number of fascicles the muscles is devided into.
  #var AnyIntVar MuscleElemAmount = ...ModelParameters.Muscles.NAME.MuscleElemAmount;

  /// Optimal working length of the muscle fiber (m)
  #var AnyFloat OptimalFiberlength = FiberScaleFactorScaleLaw * ...ModelParameters.Muscles.NAME.OptimalFiberlength;

  /// The total tendon length (m)
  #var AnyFloat TotalTendonLength = ...ModelParameters.Muscles.NAME.TotalTendonLength;

  /// K1 constant in the muscle model.  Factor for determining shortening speed at optimum length
  #var AnyFloat K1 = ...ModelParameters.Muscles.NAME.K1;

  /// K2 constant in the muscle model.  Factor for determining shortening speed at optimum length
  #var AnyFloat K2 = ...ModelParameters.Muscles.NAME.K2;

  /// Epsilon bar in the muscle model. Represents tendon strain at F0
  #var AnyFloat Epsilon0 = ...ModelParameters.Muscles.NAME.Epsilon0;

  /// Factor for determining shortening speed at optimum length
  #var AnyFloat Fcfast = ...ModelParameters.Muscles.NAME.Fcfast;

  /// Custom factor for user adjustment of individual muscle volumes.
  #var AnyVar VolumeScaleFactor = DesignVar(1);

  #var AnyVar MuscleVolume = VolumeScaleFactorScaleLaw*VolumeScaleFactor*MuscleVolumeUnscaled;


  #var AnyVar VolumeScaleFactorScaleLaw = 1;
  #var AnyVar FiberScaleFactorScaleLaw = 1;

};
