 AnyGUIPlugin TestPlugin = {
   //PluginFile = "C:\Users\ms\Desktop\Version 1\ammr_bm_configplugin\bm_config\test.py";

   PluginFile = "c:\users\ms\documents\bm-plugin\bm_config\__init__.py";
   DisplayName = "Hello World";

   #ifdef BM_PLUGIN_CONFIG
   ScriptFile = ";"+ANYBODY_PATH_MAINFILE+";"+BM_PLUGIN_CONFIG+";"; //+ ANYBODY_PATH_MAINFILE;
   #else
   ScriptFile =  ";"+ANYBODY_PATH_MAINFILE+";";
   #endif
 };
