Right = {

  AnyFolder ShoulderArm = {

      AnyFolder &Scaling = ...Scaling.GeometricalScaling.Right;
      AnyFolder &MassScaling = ...Scaling.MassScaling.Right;
      AnyFolder &StrengthScaling = ...Scaling.StrengthScaling.Right;

      #define _LEFT_RIGHT_ "Right"
      #define _SIDE_ Right

      #include "..\..\Arm\ShoulderArmModel.root.any"

      #undef _SIDE_
      #undef _LEFT_RIGHT_

      //Reference to folder which contains the interface of the right side
      AnyFolder &InterfaceFolder =..Interface.Right;

      //Reference to folder
      AnyFolder &MannequinValuesFolder = ..MannequinValuesFromModel.AnyFolder_Posture.AnyFolder_Right;

      #include "../Include/SettingsShoulderArm.any"

      //-------------------------------------------------------
      // Interface references that specifies what the arm "Arm/ShoulderArm.any" should connect to
      //-------------------------------------------------------
      //This point is used for attachement of the arm to the shoulder
      AnyRefNode &ShoulderRef=..Trunk.Segments.SternumSeg.ij;

      AnyRefFrame &PelvisRef=..Trunk.Segments.PelvisSeg.Right;
      AnyRefFrame &L1Ref=..Trunk.Segments.L1Seg.Right;
      AnyRefFrame &L2Ref=..Trunk.Segments.L2Seg.Right;
      AnyRefFrame &L3Ref=..Trunk.Segments.L3Seg.Right;
      AnyRefFrame &L4Ref=..Trunk.Segments.L4Seg.Right;
      AnyRefFrame &L5Ref=..Trunk.Segments.L5Seg.Right;
      AnyFolder &TrunkFolderRef=..Trunk;
      AnyRefFrame &ThoraxRef=..Trunk.Segments.T1Seg.Right;
      AnyRefFrame &SkullSegRef =..Trunk.Segments.SkullSeg.Right;
      AnyRefFrame &C1SegRef =..Trunk.Segments.C1Seg.Right;
      AnyRefFrame &C2SegRef =..Trunk.Segments.C2Seg.Right;
      AnyRefFrame &C3SegRef =..Trunk.Segments.C3Seg.Right;
      AnyRefFrame &C4SegRef =..Trunk.Segments.C4Seg.Right;
      AnyRefFrame &C5SegRef =..Trunk.Segments.C5Seg.Right;
      AnyRefFrame &C6SegRef =..Trunk.Segments.C6Seg.Right;
      AnyRefFrame &C7SegRef =..Trunk.Segments.C7Seg.Right;
      AnyRefFrame &R1Ref=..Trunk.Segments.Right.R1Seg;
      AnyRefFrame &R2Ref=..Trunk.Segments.Right.R2Seg;
      AnyRefFrame &R3Ref=..Trunk.Segments.Right.R3Seg;
      AnyRefFrame &R4Ref=..Trunk.Segments.Right.R4Seg;
      AnyRefFrame &R5Ref=..Trunk.Segments.Right.R5Seg;
      AnyRefFrame &R6Ref=..Trunk.Segments.Right.R6Seg;
      AnyRefFrame &R7Ref=..Trunk.Segments.Right.R7Seg;
      AnyRefFrame &R8Ref=..Trunk.Segments.Right.R8Seg;
      AnyRefFrame &R9Ref=..Trunk.Segments.Right.R9Seg;
      AnyRefFrame &R10Ref=..Trunk.Segments.Right.R10Seg;
      AnyRefFrame &T1Ref=..Trunk.Segments.T1Seg.Right;
      AnyRefFrame &T2Ref=..Trunk.Segments.T2Seg.Right;
      AnyRefFrame &T3Ref=..Trunk.Segments.T3Seg.Right;
      AnyRefFrame &T4Ref=..Trunk.Segments.T4Seg.Right;
      AnyRefFrame &T5Ref=..Trunk.Segments.T5Seg.Right;
      AnyRefFrame &T6Ref=..Trunk.Segments.T6Seg.Right;
      AnyRefFrame &T7Ref=..Trunk.Segments.T7Seg.Right;
      AnyRefFrame &T8Ref=..Trunk.Segments.T8Seg.Right;
      AnyRefFrame &T9Ref=..Trunk.Segments.T9Seg.Right;
      AnyRefFrame &T10Ref=..Trunk.Segments.T10Seg.Right;
      AnyRefFrame &T11Ref=..Trunk.Segments.T11Seg.Right;
      AnyRefFrame &T12Ref=..Trunk.Segments.T12Seg.Right;
      AnyRefFrame &ManubriumRef=..Trunk.Segments.SternumSeg.Right;
      AnyRefFrame &SternalBodyRef=..Trunk.Segments.SternalBodySeg.Right;

      //This is a sign variable which indicates that this is the right side
      AnyVar Sign =1;

      AnyFolder BonesOpacity = {
        AnyVar Clavicula = Main.DrawSettings.BonesOpacity.RightClavicula;
        AnyVar Scapula = Main.DrawSettings.BonesOpacity.RightScapula;
        AnyVar Humerus = Main.DrawSettings.BonesOpacity.RightHumerus;
        AnyVar Ulna = Main.DrawSettings.BonesOpacity.RightUlna;
        AnyVar Radius = Main.DrawSettings.BonesOpacity.RightRadius;
        AnyVar Hand = Main.DrawSettings.BonesOpacity.RightHand;
      };

      AnyFolder MomentMeasure=
      {
           #include "..\..\Arm\ArmMoments.any"
      };


    }; //End ShoulderArm

  };


  #include "../../Arm/RightArmMusclesSelectedOutput.any"
