Right =
{
  AnyFolder Leg =
  {

    #define LEG_SIMPLE_MUSCLES_LOCAL 1*((RIGHT_LEG)*(RIGHT_LEG_SIMPLE_MUSCLES))
    #define LEG_MUS_3E_LOCAL 1*((RIGHT_LEG)*(RIGHT_LEG_MUS_3E))

    #include "..\..\Leg\Leg.root.any"

    #undef LEG_SIMPLE_MUSCLES_LOCAL
    #undef LEG_MUS_3E_LOCAL

    //Reference to folder which contains the interface of the right side
    AnyFolder &InterfaceFolder =..Interface.Right;

    //Reference to mannequin value from model folder
    AnyFolder &MannequinValuesFolder = ..MannequinValuesFromModel.AnyFolder_Posture.AnyFolder_Right;


    #include "../Include/SettingsLeg.any"
    AnyFolder &Scaling = ...Scaling;
    AnyFolder &StandardParameters =...Scaling.StandardParameters.Right;
    AnyFolder &GeoScaling =...Scaling.GeometricalScaling.Right;
    AnyFolder &MassScaling =...Scaling.MassScaling.Right;
    AnyFolder &FiberLengthScaling =...Scaling.FiberLengthScaling.Right;
    AnyFolder &StrengthScaling =...Scaling.StrengthScaling.Right;

    //This is a sign variable which indicates that this is the right side
    AnyVar Sign =1;

    //-------------------------------------------------------
    // Interface references that specifies what the leg "Leg/Leg.any" should connect to
    //-------------------------------------------------------
    // INPUT

    AnyRefFrame &HipNodeRef= ..Trunk.SegmentsLumbar.PelvisSeg.HipJointRight;

    AnyFolder BonesOpacity =
    {
      AnyVar Foot = Main.DrawSettings.BonesOpacity.RightFoot;
      AnyVar Shank = Main.DrawSettings.BonesOpacity.RightShank;
      AnyVar Thigh = Main.DrawSettings.BonesOpacity.RightThigh;
    };

    #if RIGHT_LEG_SIMPLE_MUSCLES| RIGHT_LEG_MUS_3E | (BM_TRUNK_LUMBAR_MUSCLES != CONST_MUSCLES_NONE)
    AnyFolder &TrunkMuscles = ..Trunk.MusclesSpineRight;
    #endif

    AnyFolder MomentMeasure=
    {
      #if ((RIGHT_LEG_SIMPLE_MUSCLES) + (RIGHT_LEG_MUS_3E)) == 0
      AnyForceMomentMeasure KneeJointReactionMoments =
      {
        AnyForceBase &Force = ..Jnt.Knee.Constraints.Reaction;
        AnyRefFrame &Thighknee = ..Seg.Thigh.KneeJoint;
        AnyVec3 Mlocal = M*Thighknee.Axes;
      };
      #else
      AnyFolder &TrunkMuscles = ...Trunk.MusclesSpineRight;
      #include "..\..\Leg\LegMoments.any"
      #endif
    };


  };//End Leg

};


Trunk =
{
  AnyRefFrame &PsoasMajorRightReference=.Right.Leg.Seg.Thigh;
};

#if (RIGHT_LEG_SIMPLE_MUSCLES) + (RIGHT_LEG_MUS_3E) == 0
#include "../../Leg/RightLegNoMusclesSelectedOutput.any"
#else
#if RIGHT_LEG_SIMPLE_MUSCLES == 1
#include "../../Leg/RightLegSimpleMusclesSelectedOutput.any"
#endif

#if RIGHT_LEG_MUS_3E == 1
#include "../../Leg/RightLegMuscles3ESelectedOutput.any"
#endif
#endif

#if (RIGHT_LEG_SIMPLE_MUSCLES) + (RIGHT_LEG_MUS_3E) != 0

#ifdef TRUNK_NO_MUSCLES
#include "RightPsoas.any"
#else
#endif

#endif
