#if 1

#include "RightLegModel.any"

#else


/* THIS CODE IS REDUNDANT AND WILL BE REMOVED*/


Right = {

  AnyFolder Leg = {

    #include "..\..\Leg\LegNoMuscles.root.any"

      //Reference to folder which contains the interface of the right side
      AnyFolder &InterfaceFolder =..Interface.Right;

      //Reference to mannequin value from model folder
      AnyFolder &MannequinValuesFolder = ..MannequinValuesFromModel.AnyFolder_Posture.AnyFolder_Right;


      #include "../Include/SettingsLeg.any"

      //This is a sign variable which indicates that this is the right side
      AnyVar Sign =1;

      //-------------------------------------------------------
      // Interface references that specifies what the leg "Leg/Leg.any" should connect to
      //-------------------------------------------------------
      // INPUT

      AnyRefFrame &HipNodeRef= ..Trunk.SegmentsLumbar.PelvisSeg.HipJointRight;


      AnyFolder BonesOpacity = {
        AnyVar Foot = Main.DrawSettings.BonesOpacity.RightFoot;
        AnyVar Shank = Main.DrawSettings.BonesOpacity.RightShank;
        AnyVar Thigh = Main.DrawSettings.BonesOpacity.RightThigh;
      };


      AnyFolder MomentMeasure={
        AnyForceMomentMeasure KneeJointReactionMoments =
        {
          AnyForceBase &Force = ..Jnt.Knee.Constraints.Reaction;
          AnyRefFrame &Thighknee = ..Seg.Thigh.KneeJoint;
          AnyVec3 Mlocal = M*Thighknee.Axes;
        };
      };

    };//End Leg

  };


    Trunk = {
    AnyRefFrame &PsoasMajorRightReference=.Right.Leg.Seg.Thigh;
    };


    #include "../../Leg/RightLegNoMusclesSelectedOutput.any"
#endif
