#if 1

#include "RightLegTDModel.any"

#else


/* THIS CODE IS REDUNDANT AND WILL BE REMOVED*/


Right = {

  AnyFolder Leg = {
    AnyVar Sign = 1;
    #ifdef SignRef
    #undef SignRef
    #endif
    #define SignRef 1

    #include "<TLEM_PATH_VERSION>ModelParameters.any"

    #include "..\..\LegTLEM\LegMus3E.root.any"

    //Reference to folder which contains the interface of the right side
    AnyFolder &InterfaceFolder =..Interface.Right;

    //Reference to mannequin value from model folder
    AnyFolder &MannequinValuesFolder = ..MannequinValuesFromModel.AnyFolder_Posture.AnyFolder_Right;


    #include "../Include/SettingsLeg.any"

    AnyFolder &Scaling =...Scaling;
    AnyFolder &StandardParameters =...Scaling.StandardParameters.Right;
    AnyFolder &GeoScaling =...Scaling.GeometricalScaling.Right;
    AnyFolder &MassScaling =...Scaling.MassScaling.Right;
    AnyFolder &FiberLengthScaling =...Scaling.FiberLengthScaling.Right;
    AnyFolder &StrengthScaling =...Scaling.StrengthScaling.Right;
    #if SUBJECT_SPECIFIC == 1
    AnyFolder &SubjectSpecificScaling =...Scaling.SubjectSpecificScaling.Right;
    #endif

    // Reference to the coordinate system in pelvis where the hip LegTLEM data is
    // added. This is done, since the leg muscles on the pelvis are given in their
    // own coordinate system
    //AnyRefFrame &HipNodeRef = ..Trunk.SegmentsLumbar.PelvisSeg.Right;
      AnyRefNode &PsoasMajor1= ..Trunk.SegmentsLumbar.L1Seg.PML1T_TMNodeR;
      AnyRefNode &PsoasMajor2= ..Trunk.SegmentsLumbar.L2Seg.PML2T_TMNodeR;
      AnyRefNode &PsoasMajor3= ..Trunk.SegmentsLumbar.L3Seg.PML3T_TMNodeR;
      AnyRefNode &PsoasMajor4= ..Trunk.SegmentsLumbar.L4Seg.PML4T_TMNodeR;
      AnyRefNode &PsoasMajor5= ..Trunk.SegmentsLumbar.L5Seg.PML5T_TMNodeR;


    AnyFolder BonesOpacity = {
      AnyVar Foot = Main.DrawSettings.BonesOpacity.RightFoot;
      AnyVar Shank = Main.DrawSettings.BonesOpacity.RightShank;
      AnyVar Thigh = Main.DrawSettings.BonesOpacity.RightThigh;
      AnyVar Talus = Main.DrawSettings.BonesOpacity.RightTalus;
      AnyVar Patella = Main.DrawSettings.BonesOpacity.RightPatella;
    };


    AnyFolder MomentMeasure={
      //AnyFolder &TrunkMuscles = ...Trunk.MusclesSpineRight;
      #include "..\..\LegTLEM\LegMoments.any"
    };


  };//End Leg

};


Trunk = {
  AnyRefFrame &PsoasMajorRightReference=.Right.Leg.Seg.Thigh;
};


#include "../../LegTLEM/RightLegMuscles3ESelectedOutput.any"
#endif
