#if 1

#include "RightLegTDModel.any"

#else


/* THIS CODE IS REDUNDANT AND WILL BE REMOVED*/


Right = {

  AnyFolder Leg = {
    AnyVar Sign = 1;
    #ifdef SignRef
    #undef SignRef
    #endif
    #define SignRef 1

    #include "<TLEM_PATH_VERSION>/ModelParameters.any"
    #include "..\..\LegTLEM\LegNoMuscles.root.any"

      //Reference to folder which contains the interface of the right side
      AnyFolder &InterfaceFolder =..Interface.Right;

      //Reference to mannequin value from model folder
      AnyFolder &MannequinValuesFolder = ..MannequinValuesFromModel.AnyFolder_Posture.AnyFolder_Right;


      #include "../Include/SettingsLeg.any"

      AnyFolder &Scaling =...Scaling;
      AnyFolder &StandardParameters =...Scaling.StandardParameters.Right;
      AnyFolder &GeoScaling =...Scaling.GeometricalScaling.Right;
      AnyFolder &MassScaling =...Scaling.MassScaling.Right;
      AnyFolder &FiberLengthScaling =...Scaling.FiberLengthScaling.Right;
      AnyFolder &StrengthScaling =...Scaling.StrengthScaling.Right;

      // Reference to the coordinate system in pelvis where the hip LegTLEM data is
      // added. This is done, since the leg muscles on the pelvis are given in their
      // own coordinate system
      // AnyRefFrame &HipNodeRef = ..Trunk.SegmentsLumbar.PelvisSeg.Right;

      AnyFolder BonesOpacity = {
        AnyVar Foot = Main.DrawSettings.BonesOpacity.RightFoot;
        AnyVar Shank = Main.DrawSettings.BonesOpacity.RightShank;
        AnyVar Thigh = Main.DrawSettings.BonesOpacity.RightThigh;
        AnyVar Talus = Main.DrawSettings.BonesOpacity.RightTalus;
        AnyVar Patella = Main.DrawSettings.BonesOpacity.RightPatella;
      };


      AnyFolder MomentMeasure={
        #if TRUNK_SIMPLE_MUSCLES == 1
          #define LEG_WITH_PSOAS_MUSCLES
          AnyFolder &TrunkMuscles = ...Trunk.MusclesSpineRight;
        #endif

        #define LEG_WITH_JOINT_MUSCLES
        #include "..\..\LegTLEM\LegMoments.any"
        #undef LEG_WITH_JOINT_MUSCLES

        #ifdef LEG_WITH_PSOAS_MUSCLES
        #undef LEG_WITH_PSOAS_MUSCLES
        #endif
      };

    };//End Leg

  };


    Trunk = {
    AnyRefFrame &PsoasMajorRightReference=.Right.Leg.Seg.Thigh;
    };

    #include "../../LegTLEM/RightLegNoMusclesSelectedOutput.any"
#endif
