Trunk = {
  MuscleModels.Right.PsoasMajor = {
    #if BM_LEG_MODEL_IS_TLEM
      // Use the Psoas muscles models from the TLEM model
      AnyMuscleModel &PsoasMajorT12 = ....Right.Leg.MuscleModels.PsoasMajorT12;
      AnyMuscleModel &PsoasMajorL1_1  = ....Right.Leg.MuscleModels.PsoasMajorL1_1;
      AnyMuscleModel &PsoasMajorL1_2  = ....Right.Leg.MuscleModels.PsoasMajorL1_2;
      AnyMuscleModel &PsoasMajorL2_1  = ....Right.Leg.MuscleModels.PsoasMajorL2_1;
      AnyMuscleModel &PsoasMajorL2_2  = ....Right.Leg.MuscleModels.PsoasMajorL2_2;
      AnyMuscleModel &PsoasMajorL3_1  = ....Right.Leg.MuscleModels.PsoasMajorL3_1;
      AnyMuscleModel &PsoasMajorL3_2  = ....Right.Leg.MuscleModels.PsoasMajorL3_2;
      AnyMuscleModel &PsoasMajorL4_1  = ....Right.Leg.MuscleModels.PsoasMajorL4_1;
      AnyMuscleModel &PsoasMajorL4_2  = ....Right.Leg.MuscleModels.PsoasMajorL4_2;
      AnyMuscleModel &PsoasMajorL5_1   = ....Right.Leg.MuscleModels.PsoasMajorL5_1;
      AnyMuscleModel &PsoasMajorL5_2  = ....Right.Leg.MuscleModels.PsoasMajorL5_2;
    #endif
  };
};
