// Creates a Folder with and AnyFunConst member. This is useful for creating
// weight function with weight that can later be overridden by the user.
#class_template Template_AnyFunConst (NUMBER_OF_ELEMENTS=1, WEIGHT=0.01, _NAME=Fun) {
 AnyFunConst _NAME={
      #var Value=repmat(NUMBER_OF_ELEMENTS, WEIGHT);
  };
};
