Left = {

AnyFolder Leg = {
  #include "<ANYBODY_PATH_BODY>LegTD-FootGM/CadaverParameters.any"
  #include "<ANYBODY_PATH_BODY>LegTD-FootGM\LegNoMuscles.root.any"

      #include "../Include/SettingsLeg.any"
      AnyFolder &InterfaceFolder =..Interface.Left;
      //Reference to folder
      AnyFolder &MannequinValuesFolder = ..MannequinValuesFromModel.AnyFolder_Posture.AnyFolder_Left;

      //-------------------------------------------------------
      // Interface references that specifies what the leg "Leg/Leg.any" should connect to
      //-------------------------------------------------------
          AnyFolder &Scaling =...Scaling;
    AnyFolder &StandardParameters =...Scaling.StandardParameters.Left;
      AnyFolder &GeoScaling =...Scaling.GeometricalScaling.Left;
      AnyFolder &MassScaling =...Scaling.MassScaling.Left;
      AnyFolder &FiberLengthScaling =...Scaling.FiberLengthScaling.Left;
      AnyFolder &StrengthScaling =...Scaling.StrengthScaling.Left;

      AnyFolder &FootType = ...FootType.Left;

      /// Reference to the coordinate system in pelvis where the hip LegTD data is
      /// added. This is done, since the leg muscles on the pelvis are given in their
      /// own coordinate system
      AnyRefFrame &HipNodeRef = ..Trunk.SegmentsLumbar.PelvisSeg.Left;

      //This is a sign variable which indicates that this is the right side
      AnyVar Sign =-1;

      AnyFolder BonesOpacity = {
        AnyVar Foot = Main.DrawSettings.BonesOpacity.LeftFoot;
        AnyVar Shank = Main.DrawSettings.BonesOpacity.LeftShank;
        AnyVar Thigh = Main.DrawSettings.BonesOpacity.LeftThigh;
        AnyVar Talus = Main.DrawSettings.BonesOpacity.LeftTalus;
        AnyVar Patella = Main.DrawSettings.BonesOpacity.LeftPatella;
      };

//      Not usable now because foot sgments are not in the list
//      AnyFolder MomentMeasure={
//        #if TRUNK_SIMPLE_MUSCLES == 1
//          #define LEG_WITH_PSOAS_MUSCLES
//          AnyFolder &TrunkMuscles = ...Trunk.MusclesSpineLeft;
//        #endif
//
//        #define LEG_WITH_JOINT_MUSCLES
//        #include "..\..\LegTD\LegMoments.any"
//        #undef LEG_WITH_JOINT_MUSCLES
//
//        #ifdef LEG_WITH_PSOAS_MUSCLES
//        #undef LEG_WITH_PSOAS_MUSCLES
//        #endif
//      };

    }; //End Leg

  };


    Trunk = {
    AnyRefFrame &PsoasMajorLeftReference=.Left.Leg.Seg.Thigh;
    };


//    #include "<ANYBODY_PATH_BODY>LegTD-FootGM/LeftLegNoMusclesSelectedOutput.any"
