// Overall body parameters
AnyFolder BodyParameters = {
  AnyVar BodyMass = 100;
  AnyVar Density = 1000;
  AnyVar BMI = BodyMass/(1.75^2); //Body Mass Index
  AnyVar BodyHeight =1.75;
  //AnyVar FatPercent = 15;
  AnyVar FatPercent = (-0.09 + 0.0149*BMI - 0.00009*BMI^2)*100; //Estimation from Frankenfield et al. (2001) valid for men
}; //Bodyparameters
