//This is a reference to where the body parameters are located the leg needs
//  AnyVar BodyMass
//  AnyVar BodyHeigth
//  AnyVar Density


//This is a reference to where the colors for the model are located, the leg needs
//  AnyVec3 Nodes
//  AnyVec3 Segments
AnyFolder &ColorRef = Main.DrawSettings.Colors;

// **********************************************************
// This is a reference to the folder which contains the drawing settings for the muscles
// **********************************************************
AnyFolder &MusDrawRef = Main.DrawSettings.Muscle;

// **********************************************************
// This is a reference to the folder standard parameter before scaling
// **********************************************************
AnyFolder &StandardParameters = Data.unscaled.StandardParameters;

//This is a reference to the specific muscle stress for the muscles in the shoulderarm
AnyFolder &StrengthRef = ...StrengthParameters;
