RGB = Main.DrawSettings.Muscle.RGB;
Bulging = Main.DrawSettings.Muscle.Bulging;
ColorScale = Main.DrawSettings.Muscle.ColorScale;
RGBColorScale = Main.DrawSettings.Muscle.RGBColorScale;
MaxStress = Main.DrawSettings.Muscle.MaxStress;
Opacity = Main.DrawSettings.Muscle.Opacity;

DrawScaleOnOff=Main.DrawSettings.Muscle.DrawScaleOnOff;

DrawScale.EnableCreasing = Main.DrawSettings.Muscle.DrawScale.EnableCreasing;
DrawScale.CreasingAngle = Main.DrawSettings.Muscle.DrawScale.CreasingAngle;
DrawScale.EnableWireframe = Main.DrawSettings.Muscle.DrawScale.EnableWireframe;
DrawScale.EnableSmoothing = Main.DrawSettings.Muscle.DrawScale.EnableSmoothing;
DrawScale.Param = Main.DrawSettings.Muscle.DrawScale.Param;
DrawScale.ParamArray = Main.DrawSettings.Muscle.DrawScale.ParamArray;
DrawScale.RGBArray = Main.DrawSettings.Muscle.DrawScale.RGBArray;
DrawScale.OpacityArray = Main.DrawSettings.Muscle.DrawScale.OpacityArray;


//#include "DrawMuscleForce.any"
