//The data for muscles atachment points come from:
//Musculotendon Parameters and Musculoskeletal Pathways Within the Human Foot. Gary T. Yamaguchi et al. Journal of Applied Biomechanics, 2007; 23:20-41. 2007
//
//The subject 4 has been choosen for his relatively standard foot size.

AnyFolder &Segments = ..Seg.Foot;


//***********
//Mus digit 1
//***********

AnyMuscleViaPoint AbductorHallucis =
{
  AnyMuscleModel &MusMdl = ...MuscleModels.AbductorHallucis;
  AnyRefFrame &Org =. Segments.Midfoot.Calcaneus.ABDH_Org;
  AnyRefFrame &Via = .Segments.Midfoot.Navicular.ABDH_Via; //Navi
  AnyRefFrame &Via2 = .Segments.Midfoot.Metatarsal1.ABDH_Via; //MT1
  AnyRefFrame &Ins = .Segments.Toe1.ProximalPhalange1.ABDH_Ins; // proxi1
  AnyDrawMuscle DrwMus = {#include "<ANYBODY_PATH_BODY>/drawSettings/MusDrawSettings.any"};
 #include "MuscleForceDrawing.any"
};


AnyMuscleViaPoint FlexorHallucisBrevisLateralis_1 =
{
  AnyMuscleModel &MusMdl = ...MuscleModels.FlexorHallucisBrevisLateralis_1;
  AnyRefFrame &Org =. Segments.Midfoot.Cuboid.FHBL_Org;  //sarrafian et al "anatomy of the foot and ankle" pp.267

  AnyRefFrame &Via = .Segments.Midfoot.Metatarsal1.FHBL_Via; //MT1
  AnyRefFrame &Via2 = .Segments.Midfoot.Metatarsal1.FHBL_Via2; //MT1
  AnyRefFrame &Ins = .Segments.Toe1.ProximalPhalange1.FHBL_Ins; // proxi1
  AnyDrawMuscle DrwMus = {#include "<ANYBODY_PATH_BODY>/drawSettings/MusDrawSettings.any"};
 #include "MuscleForceDrawing.any"
};

AnyMuscleViaPoint FlexorHallucisBrevisLateralis_2 =
{
  AnyMuscleModel &MusMdl = ...MuscleModels.FlexorHallucisBrevisLateralis_2;
  AnyRefFrame &Org =. Segments.Midfoot.LateralCuneiform.FHBL_Org;  //sarrafian et al "anatomy of the foot and ankle" pp.267
  AnyRefFrame &Via = .Segments.Midfoot.Metatarsal1.FHBL_Via; //MT1
  AnyRefFrame &Via2 = .Segments.Midfoot.Metatarsal1.FHBL_Via2; //MT1
  AnyRefFrame &Ins = .Segments.Toe1.ProximalPhalange1.FHBL_Ins; // proxi1
  AnyDrawMuscle DrwMus = {#include "<ANYBODY_PATH_BODY>/drawSettings/MusDrawSettings.any"};
 #include "MuscleForceDrawing.any"
};


AnyMuscleViaPoint FlexorHallucisBrevisMedialis =
{
  AnyMuscleModel &MusMdl = ...MuscleModels.FlexorHallucisBrevisMedialis;
  //AnyRefFrame &Org =. Segments.Navicular.FHBM_Org;  // Navi (or cuboid?)
  AnyRefFrame &Org =. Segments.Midfoot.MedialCuneiform.FHBM_Org;  // Navi (or cuboid?)

  AnyRefFrame &Via = .Segments.Midfoot.Metatarsal1.FHBM_Via; //MT1
  AnyRefFrame &Via2 = .Segments.Midfoot.Metatarsal1.FHBM_Via2; //MT1
  AnyRefFrame &Ins = .Segments.Toe1.ProximalPhalange1.FHBM_Ins; // proxi1
  AnyDrawMuscle DrwMus = {#include "<ANYBODY_PATH_BODY>/drawSettings/MusDrawSettings.any"};
 #include "MuscleForceDrawing.any"
};


AnyMuscleViaPoint AdductorHallucisOblique1 =
{
  AnyMuscleModel &MusMdl = ...MuscleModels.AdductorHallucisOblique1;
  AnyRefFrame &Org = .Segments.Midfoot.Metatarsal2.ADHO_Org1;  // base of MT2, MT3, MT4 according to Takamitsu
  AnyRefFrame &Via = .Segments.Midfoot.Metatarsal1.ADHO_Via; //MT1
  AnyRefFrame &Ins = .Segments.Toe1.ProximalPhalange1.ADHO_Ins; // proxi1
  AnyDrawMuscle DrwMus = {#include "<ANYBODY_PATH_BODY>/drawSettings/MusDrawSettings.any"};
 #include "MuscleForceDrawing.any"
};

AnyMuscleViaPoint AdductorHallucisOblique2 =
{
  AnyMuscleModel &MusMdl = ...MuscleModels.AdductorHallucisOblique2;
  AnyRefFrame &Org = .Segments.Midfoot.Metatarsal3.ADHO_Org2;  // base of MT2, MT3, MT4 according to Takamitsu
  AnyRefFrame &Via = .Segments.Midfoot.Metatarsal1.ADHO_Via; //MT1
  AnyRefFrame &Ins = .Segments.Toe1.ProximalPhalange1.ADHO_Ins; // proxi1
  AnyDrawMuscle DrwMus = {#include "<ANYBODY_PATH_BODY>/drawSettings/MusDrawSettings.any"};
 #include "MuscleForceDrawing.any"
};

AnyMuscleViaPoint AdductorHallucisOblique3 =
{
  AnyMuscleModel &MusMdl = ...MuscleModels.AdductorHallucisOblique3;
  AnyRefFrame &Org = .Segments.Midfoot.Metatarsal4.ADHO_Org3;  // base of MT2, MT3, MT4 according to Takamitsu
  AnyRefFrame &Via = .Segments.Midfoot.Metatarsal1.ADHO_Via; //MT1
  AnyRefFrame &Ins = .Segments.Toe1.ProximalPhalange1.ADHO_Ins; // proxi1
  AnyDrawMuscle DrwMus = {#include "<ANYBODY_PATH_BODY>/drawSettings/MusDrawSettings.any"};
 #include "MuscleForceDrawing.any"
};

AnyMuscleViaPoint AdductorHallucisOblique4 =
{
  AnyMuscleModel &MusMdl = ...MuscleModels.AdductorHallucisOblique4;
  AnyRefFrame &Org = .Segments.Midfoot.Cuboid.ADHO_Org4;  // base of MT2, MT3, MT4 according to Takamitsu    sarrafian adds cuboid and cuneiforms
  AnyRefFrame &Via = .Segments.Midfoot.Metatarsal1.ADHO_Via; //MT1
  AnyRefFrame &Ins = .Segments.Toe1.ProximalPhalange1.ADHO_Ins; // proxi1
  AnyDrawMuscle DrwMus = {#include "<ANYBODY_PATH_BODY>/drawSettings/MusDrawSettings.any"};
 #include "MuscleForceDrawing.any"
};


AnyMuscleViaPoint AdductorHallucisOblique5 =
{
  AnyMuscleModel &MusMdl = ...MuscleModels.AdductorHallucisOblique5;
  AnyRefFrame &Org = .Segments.Midfoot.LateralCuneiform.ADHO_Org5; // base of MT2, MT3, MT4 according to Takamitsu    sarrafian adds cuboid and cuneiforms
  AnyRefFrame &Via = .Segments.Midfoot.Metatarsal1.ADHO_Via; //MT1
  AnyRefFrame &Ins = .Segments.Toe1.ProximalPhalange1.ADHO_Ins; // proxi1
  AnyDrawMuscle DrwMus = {#include "<ANYBODY_PATH_BODY>/drawSettings/MusDrawSettings.any"};
 #include "MuscleForceDrawing.any"
};


AnyMuscleViaPoint AdductorHallucisTransverse1 =
{
  AnyMuscleModel &MusMdl = ...MuscleModels.AdductorHallucisTransverse1;
  AnyRefFrame &Org1 =. Segments.Midfoot.Metatarsal3.ADHT_Org1;  // MT3
  AnyRefFrame &Via = .Segments.Midfoot.Metatarsal1.ADHT_Via; //MT1
  AnyRefFrame &Ins = .Segments.Toe1.ProximalPhalange1.ADHT_Ins; // proxi1
  AnyDrawMuscle DrwMus = {#include "<ANYBODY_PATH_BODY>/drawSettings/MusDrawSettings.any"};
 #include "MuscleForceDrawing.any"
};


AnyMuscleViaPoint AdductorHallucisTransverse2 =
{
  AnyMuscleModel &MusMdl = ...MuscleModels.AdductorHallucisTransverse2;
  AnyRefFrame &Org2 =. Segments.Midfoot.Metatarsal4.ADHT_Org2;  // MT4
  AnyRefFrame &Via = .Segments.Midfoot.Metatarsal1.ADHT_Via; //MT1
  AnyRefFrame &Ins = .Segments.Toe1.ProximalPhalange1.ADHT_Ins; // proxi1
  AnyDrawMuscle DrwMus = {#include "<ANYBODY_PATH_BODY>/drawSettings/MusDrawSettings.any"};
 #include "MuscleForceDrawing.any"
};


// Should be added according to :
//Anatomical study of human adductor hallucis muscle with respect to its origin and insertion. Takamitsu Arakawa, 2003

AnyMuscleViaPoint AdductorHallucisTransverse3 =
{
  AnyMuscleModel &MusMdl = ...MuscleModels.AdductorHallucisTransverse3;
  AnyRefFrame &Org2 =. Segments.Midfoot.Metatarsal5.ADHT_Org3;  // MT5
  AnyRefFrame &Via = .Segments.Midfoot.Metatarsal1.ADHT_Via; //MT1
  AnyRefFrame &Ins = .Segments.Toe1.ProximalPhalange1.ADHT_Ins; // proxi1
  AnyDrawMuscle DrwMus = {#include "<ANYBODY_PATH_BODY>/drawSettings/MusDrawSettings.any"};
 #include "MuscleForceDrawing.any"
};


// insertion in proximal phalanx
AnyMuscleViaPoint ExtensorHallucisBrevis =
{
  AnyMuscleModel &MusMdl = ...MuscleModels.ExtensorHallucisBrevis;
  AnyRefFrame &Org =. Segments.Midfoot.Calcaneus.EHB_Org;  // calcaneus
  AnyRefFrame &Via1 = .Segments.Midfoot.IntermediateCuneiform.EHB_Via1; //intermediate cunei
  AnyRefFrame &Via2 = .Segments.Midfoot.Metatarsal1.EHB_Via2; //MT1
  AnyRefFrame &Ins1 = .Segments.Midfoot.Metatarsal1.EHB_Ins1; // MT1
  AnyRefFrame &Ins2 = .Segments.Toe1.ProximalPhalange1.EHB_Ins2; // proxi 1
  AnyDrawMuscle DrwMus = {#include "<ANYBODY_PATH_BODY>/drawSettings/MusDrawSettings.any"};
 #include "MuscleForceDrawing.any"
};

//*********************************
//DI, origins are strange, reviewed
//*********************************

AnyMuscleViaPoint DorsalInterosseous1Part1 =
{
  AnyMuscleModel &MusMdl = ...MuscleModels.DorsalInterosseous1Part1 ;
  AnyRefFrame &Org = .Segments.Midfoot.Metatarsal2.DI1_Org1;
  AnyRefFrame &Ins = .Segments.Toe2.ProximalPhalange2.DI1_Ins;
  AnyDrawMuscle DrwMus = {#include "<ANYBODY_PATH_BODY>/drawSettings/MusDrawSettings.any"};
 #include "MuscleForceDrawing.any"
};


AnyMuscleViaPoint DorsalInterosseous1Part2 =
{
  AnyMuscleModel &MusMdl = ...MuscleModels.DorsalInterosseous1Part2 ;
  AnyRefFrame &Org = .Segments.Midfoot.Metatarsal1.DI1_Org2;
  AnyRefFrame &Ins = .Segments.Toe2.ProximalPhalange2.DI1_Ins;
  AnyDrawMuscle DrwMus = {#include "<ANYBODY_PATH_BODY>/drawSettings/MusDrawSettings.any"};
 #include "MuscleForceDrawing.any"
};


AnyMuscleViaPoint DorsalInterosseous2Part1 =
{
  AnyMuscleModel &MusMdl = ...MuscleModels.DorsalInterosseous2Part1 ;
  AnyRefFrame &Org = .Segments.Midfoot.Metatarsal2.DI2_Org1;
  AnyRefFrame &Ins = .Segments.Toe2.ProximalPhalange2.DI2_Ins;
  AnyDrawMuscle DrwMus = {#include "<ANYBODY_PATH_BODY>/drawSettings/MusDrawSettings.any"};
 #include "MuscleForceDrawing.any"
};


AnyMuscleViaPoint DorsalInterosseous2Part2 =
{
  AnyMuscleModel &MusMdl = ...MuscleModels.DorsalInterosseous2Part2 ;
  AnyRefFrame &Org = .Segments.Midfoot.Metatarsal3.DI2_Org2;
  AnyRefFrame &Ins = .Segments.Toe2.ProximalPhalange2.DI2_Ins;
  AnyDrawMuscle DrwMus = {#include "<ANYBODY_PATH_BODY>/drawSettings/MusDrawSettings.any"};
 #include "MuscleForceDrawing.any"
};


AnyMuscleViaPoint DorsalInterosseous3Part1 =
{
  AnyMuscleModel &MusMdl = ...MuscleModels.DorsalInterosseous3Part1 ;
  AnyRefFrame &Org = .Segments.Midfoot.Metatarsal3.DI3_Org1;
  AnyRefFrame &Ins = .Segments.Toe3.ProximalPhalange3.DI3_Ins;
  AnyDrawMuscle DrwMus = {#include "<ANYBODY_PATH_BODY>/drawSettings/MusDrawSettings.any"};
 #include "MuscleForceDrawing.any"
};


AnyMuscleViaPoint DorsalInterosseous3Part2 =
{
  AnyMuscleModel &MusMdl = ...MuscleModels.DorsalInterosseous3Part2 ;
  AnyRefFrame &Org = .Segments.Midfoot.Metatarsal4.DI3_Org2;
  AnyRefFrame &Ins = .Segments.Toe3.ProximalPhalange3.DI3_Ins;
  AnyDrawMuscle DrwMus = {#include "<ANYBODY_PATH_BODY>/drawSettings/MusDrawSettings.any"};
 #include "MuscleForceDrawing.any"
};

AnyMuscleViaPoint DorsalInterosseous4Part1 =
{
  AnyMuscleModel &MusMdl = ...MuscleModels.DorsalInterosseous4Part1 ;
  AnyRefFrame &Org = .Segments.Midfoot.Metatarsal4.DI4_Org1;
  AnyRefFrame &Ins = .Segments.Toe4.ProximalPhalange4.DI4_Ins;
  AnyDrawMuscle DrwMus = {#include "<ANYBODY_PATH_BODY>/drawSettings/MusDrawSettings.any"};
 #include "MuscleForceDrawing.any"
};

//Not present in yamaguchi data, but should be there
AnyMuscleViaPoint DorsalInterosseous4Part2 =
{
  AnyMuscleModel &MusMdl = ...MuscleModels.DorsalInterosseous4Part2 ;
  AnyRefFrame &Org = .Segments.Midfoot.Metatarsal5.DI4_Org2;
  AnyRefFrame &Ins = .Segments.Toe4.ProximalPhalange4.DI4_Ins;
  AnyDrawMuscle DrwMus = {#include "<ANYBODY_PATH_BODY>/drawSettings/MusDrawSettings.any"};
 #include "MuscleForceDrawing.any"
};


// insertion in tendon of longus, should be same path as longus until distal phalanx
//*************************
//ExtensorDigitoriumBrevis
//*************************

//AnyMuscleViaPoint ExtensorDigitoriumBrevis2 =
//{
//  AnyMuscleModel &MusMdl = ..MuscleModels.ExtensorDigitoriumBrevis2;
//  AnyRefFrame &Org = .Segments.Calcaneus.EDB_Org; // calca
//  AnyRefFrame &Via1 = .Segments.Metatarsal3.EDB2_Via1; //MT3
//  AnyRefFrame &Via2Bis = .Segments.Metatarsal2.EDB2_Via2Bis; //MT2
//  AnyRefFrame &Via2 = .Segments.Metatarsal2.EDB2_Via2; //MT2
////  AnyRefFrame &Via3 = .Segments.Toe2.ProximalPhalange2.EDB2_Via3; //proxi2
////  AnyRefFrame &Via4 = .Segments.MiddlePhalange2.EDB2_Via4; //midle 2 tendon
////  AnyRefFrame &Ins = .Segments.DistalPhalange2.EDB2_Ins; //distal phalanx2
//  AnyDrawMuscle DrwMus = {#include "<ANYBODY_PATH_BODY>/drawSettings/MusDrawSettings.any"};
//  #include "MuscleForceDrawing.any"
//};
AnyMuscleViaPoint ExtensorDigitoriumBrevis2 =
{
  AnyMuscleModel &MusMdl = ...MuscleModels.ExtensorDigitoriumBrevis2;
  AnyRefFrame &Org = .Segments.Midfoot.Calcaneus.EDB_Org; // calca
  AnyRefFrame &Via1 = .Segments.Midfoot.Metatarsal3.EDB2_Via1; //MT3
  AnyRefFrame &Via2Bis = .Segments.Midfoot.Metatarsal2.EDB2_Via2Bis; //MT2
  AnyRefFrame &Via2 = .Segments.Midfoot.Metatarsal2.EDB2_Via2; //MT2
  AnyRefFrame &ins =.Segments.Toe2.MiddlePhalange2.ExtensorDigitorumLongusNode;
  //AnyRefFrame &Via3 = .Segments.Toe2.ProximalPhalange2.EDB2_Via3; //proxi2
  //AnyRefFrame &Via4 = .Segments.MiddlePhalange2.EDB2_Via4; //midle 2 tendon
//  AnyRefFrame &Ins = .Segments.DistalPhalange2.EDB2_Ins; //distal phalanx2
  AnyDrawMuscle DrwMus = {#include "<ANYBODY_PATH_BODY>/drawSettings/MusDrawSettings.any"};
  #include "MuscleForceDrawing.any"
};


//AnyMuscleViaPoint ExtensorDigitoriumBrevis3 =
//{
//  AnyMuscleModel &MusMdl = ..MuscleModels.ExtensorDigitoriumBrevis3;
//  AnyRefFrame &Org = .Segments.Calcaneus.EDB_Org; // calca
//  AnyRefFrame &Via0 = .Segments.Metatarsal3.EDB3_Via0; //MT3
//  AnyRefFrame &Via1Bis = .Segments.Metatarsal3.EDB3_Via1Bis; //MT3
//  AnyRefFrame &Via1 = .Segments.Metatarsal3.EDB3_Via1; //MT3
////  AnyRefFrame &Via2 = .Segments.Toe3.ProximalPhalange3.EDB3_Via2; //proxi3
////  AnyRefFrame &Via3 = .Segments.MiddlePhalange3.EDB3_Via3; //middle 3 tendon
////  AnyRefFrame &Ins = .Segments.DistalPhalange3.EDB3_Ins; //distal phalanx3
//  AnyDrawMuscle DrwMus = {#include "<ANYBODY_PATH_BODY>/drawSettings/MusDrawSettings.any"};
//   #include "MuscleForceDrawing.any"
//
//};
AnyMuscleViaPoint ExtensorDigitoriumBrevis3 =
{
  AnyMuscleModel &MusMdl = ...MuscleModels.ExtensorDigitoriumBrevis3;
  AnyRefFrame &Org = .Segments.Midfoot.Calcaneus.EDB_Org; // calca
  AnyRefFrame &Via0 = .Segments.Midfoot.Metatarsal3.EDB3_Via0; //MT3
  AnyRefFrame &Via1Bis = .Segments.Midfoot.Metatarsal3.EDB3_Via1Bis; //MT3
  AnyRefFrame &Via1 = .Segments.Midfoot.Metatarsal3.EDB3_Via1; //MT3
  AnyRefFrame &ins =.Segments.Toe3.MiddlePhalange3.ExtensorDigitorumLongusNode;
  //  AnyRefFrame &Via2 = .Segments.Toe3.ProximalPhalange3.EDB3_Via2; //proxi3
 // AnyRefFrame &Via3 = .Segments.MiddlePhalange3.EDB3_Via3; //middle 3 tendon
//  AnyRefFrame &Ins = .Segments.DistalPhalange3.EDB3_Ins; //distal phalanx3
  AnyDrawMuscle DrwMus = {#include "<ANYBODY_PATH_BODY>/drawSettings/MusDrawSettings.any"};
   #include "MuscleForceDrawing.any"

};


//AnyMuscleViaPoint ExtensorDigitoriumBrevis4 =
//{
//  AnyMuscleModel &MusMdl = ..MuscleModels.ExtensorDigitoriumBrevis4;
//  AnyRefFrame &Org = .Segments.Calcaneus.EDB_Org; // calca
//  AnyRefFrame &Via1Bis = .Segments.Metatarsal4.EDB4_Via1Bis; //MT4
//  AnyRefFrame &Via1 = .Segments.Metatarsal4.EDB4_Via1; //MT4
////  AnyRefFrame &Via2 = .Segments.Toe4.ProximalPhalange4.EDB4_Via2; //proxi4
////  AnyRefFrame &Via3 = .Segments.MiddlePhalange4.EDB4_Via3; //middle 4 tendon
////  AnyRefFrame &Ins = .Segments.DistalPhalange4.EDB4_Ins; //distal phalanx4
//  AnyDrawMuscle DrwMus = {#include "<ANYBODY_PATH_BODY>/drawSettings/MusDrawSettings.any"};
// #include "MuscleForceDrawing.any"
//};
//

AnyMuscleViaPoint ExtensorDigitoriumBrevis4 =
{
  AnyMuscleModel &MusMdl = ...MuscleModels.ExtensorDigitoriumBrevis4;
  AnyRefFrame &Org = .Segments.Midfoot.Calcaneus.EDB_Org; // calca
  AnyRefFrame &Via1Bis = .Segments.Midfoot.Metatarsal4.EDB4_Via1Bis; //MT4
  AnyRefFrame &Via1 = .Segments.Midfoot.Metatarsal4.EDB4_Via1; //MT4
   AnyRefFrame &ins =.Segments.Toe4.MiddlePhalange4.ExtensorDigitorumLongusNode;
  // AnyRefFrame &Via2 = .Segments.Toe4.ProximalPhalange4.EDB4_Via2; //proxi4
 // AnyRefFrame &Via3 = .Segments.MiddlePhalange4.EDB4_Via3; //middle 4 tendon
//  AnyRefFrame &Ins = .Segments.DistalPhalange4.EDB4_Ins; //distal phalanx4
  AnyDrawMuscle DrwMus = {#include "<ANYBODY_PATH_BODY>/drawSettings/MusDrawSettings.any"};
 #include "MuscleForceDrawing.any"
};


//*****************
//PI
//*****************

AnyMuscleViaPoint PlantarInterosseous1 =
{
  AnyMuscleModel &MusMdl = ...MuscleModels.PlantarInterosseous1;
//  AnyRefFrame &Org = .Segments.Metatarsal3.PI1_Org;
  AnyRefFrame &Org = .Segments.Midfoot.LateralCuneiform.PI1_Org;
AnyRefFrame &Ins = .Segments.Toe3.ProximalPhalange3.PI1_Ins;
  AnyDrawMuscle DrwMus = {#include "<ANYBODY_PATH_BODY>/drawSettings/MusDrawSettings.any"};
 #include "MuscleForceDrawing.any"
};

AnyMuscleViaPoint PlantarInterosseous2Part1 =
{
  AnyMuscleModel &MusMdl = ...MuscleModels.PlantarInterosseous2Part1;
  AnyRefFrame &Org = .Segments.Midfoot.Metatarsal4.PI2_Org1;
  AnyRefFrame &Ins = .Segments.Toe4.ProximalPhalange4.PI2_Ins;
  AnyDrawMuscle DrwMus = {#include "<ANYBODY_PATH_BODY>/drawSettings/MusDrawSettings.any"};
 #include "MuscleForceDrawing.any"
};

AnyMuscleViaPoint PlantarInterosseous2Part2 =
{
  AnyMuscleModel &MusMdl = ...MuscleModels.PlantarInterosseous2Part2;
  AnyRefFrame &Org = .Segments.Midfoot.Metatarsal4.PI2_Org2;
  AnyRefFrame &Ins = .Segments.Toe4.ProximalPhalange4.PI2_Ins;
  AnyDrawMuscle DrwMus = {#include "<ANYBODY_PATH_BODY>/drawSettings/MusDrawSettings.any"};
 #include "MuscleForceDrawing.any"
};


AnyMuscleViaPoint PlantarInterosseous2Part3 =
{
  AnyMuscleModel &MusMdl = ...MuscleModels.PlantarInterosseous2Part3;
//  AnyRefFrame &Org = .Segments.Metatarsal4.PI2_Org3;
  AnyRefFrame &Org = .Segments.Midfoot.Cuboid.PI2_Org3;
AnyRefFrame &Ins = .Segments.Toe4.ProximalPhalange4.PI2_Ins;
  AnyDrawMuscle DrwMus = {#include "<ANYBODY_PATH_BODY>/drawSettings/MusDrawSettings.any"};
 #include "MuscleForceDrawing.any"
};


AnyMuscleViaPoint PlantarInterosseous3Part1 =
{
  AnyMuscleModel &MusMdl = ...MuscleModels.PlantarInterosseous3Part1;
  AnyRefFrame &Org = .Segments.Midfoot.Metatarsal5.PI3_Org1;
  AnyRefFrame &Ins = .Segments.Toe5.ProximalPhalange5.PI3_Ins;
  AnyDrawMuscle DrwMus = {#include "<ANYBODY_PATH_BODY>/drawSettings/MusDrawSettings.any"};
 #include "MuscleForceDrawing.any"
};


AnyMuscleViaPoint PlantarInterosseous3Part2 =
{
  AnyMuscleModel &MusMdl = ...MuscleModels.PlantarInterosseous3Part2;
  AnyRefFrame &Org = .Segments.Midfoot.Cuboid.PI3_Org2;
 AnyRefFrame &Ins = .Segments.Toe5.ProximalPhalange5.PI3_Ins;
  AnyDrawMuscle DrwMus = {#include "<ANYBODY_PATH_BODY>/drawSettings/MusDrawSettings.any"};
 #include "MuscleForceDrawing.any"
};


AnyMuscleViaPoint PlantarInterosseous3Part3 =
{
  AnyMuscleModel &MusMdl = ...MuscleModels.PlantarInterosseous3Part3;
  AnyRefFrame &Org = .Segments.Midfoot.Metatarsal5.PI3_Org3;
  AnyRefFrame &Ins = .Segments.Toe5.ProximalPhalange5.PI3_Ins;
  AnyDrawMuscle DrwMus = {#include "<ANYBODY_PATH_BODY>/drawSettings/MusDrawSettings.any"};
 #include "MuscleForceDrawing.any"
};


//stops at the middle phalanx.
//**********************
//FlexorDigitorumBrevis
//**********************

AnyMuscleViaPoint FlexorDigitorumBrevis2 =
{
  AnyMuscleModel &MusMdl = ...MuscleModels.FlexorDigitorumBrevis2;
  AnyRefFrame &Org = .Segments.Midfoot.Calcaneus.FDB_Org; //calca
//  AnyRefFrame &Via1 = .Segments.Cuboid.FDB2_Via1; //cuboid
  AnyRefFrame &Via2 = .Segments.Midfoot.Metatarsal2.FDB2_Via2; //MT2
  AnyRefFrame &Via3 = .Segments.Toe2.ProximalPhalange2.FDB2_Via3; //proxi 2
  AnyRefFrame &Ins = .Segments.Toe2.MiddlePhalange2.FDB2_Ins; //midle p2
  AnyDrawMuscle DrwMus = {#include "<ANYBODY_PATH_BODY>/drawSettings/MusDrawSettings.any"};
 #include "MuscleForceDrawing.any"
};

AnyMuscleViaPoint FlexorDigitorumBrevis3 =
{
  AnyMuscleModel &MusMdl = ...MuscleModels.FlexorDigitorumBrevis3;
  AnyRefFrame &Org = .Segments.Midfoot.Calcaneus.FDB_Org;//calca
 // AnyRefFrame &Via1 = .Segments.Cuboid.FDB3_Via1; //cuboid
  AnyRefFrame &Via2 = .Segments.Midfoot.Metatarsal3.FDB3_Via2; //MT3
  AnyRefFrame &Via3 = .Segments.Toe3.ProximalPhalange3.FDB3_Via3; //proxi 3
  AnyRefFrame &Ins = .Segments.Toe3.MiddlePhalange3.FDB3_Ins; //midle p3
  AnyDrawMuscle DrwMus = {#include "<ANYBODY_PATH_BODY>/drawSettings/MusDrawSettings.any"};
 #include "MuscleForceDrawing.any"
};


AnyMuscleViaPoint FlexorDigitorumBrevis4 =
{
  AnyMuscleModel &MusMdl = ...MuscleModels.FlexorDigitorumBrevis4;
  AnyRefFrame &Org = .Segments.Midfoot.Calcaneus.FDB_Org;//calca
//  AnyRefFrame &Via1 = .Segments.Cuboid.FDB4_Via1; //cuboid
  AnyRefFrame &Via2 = .Segments.Midfoot.Metatarsal4.FDB4_Via2; //MT4
  AnyRefFrame &Via3 = .Segments.Toe4.ProximalPhalange4.FDB4_Via3; //proxi 4
  AnyRefFrame &Ins = .Segments.Toe4.MiddlePhalange4.FDB4_Ins; //midle p4
  AnyDrawMuscle DrwMus = {#include "<ANYBODY_PATH_BODY>/drawSettings/MusDrawSettings.any"};
 #include "MuscleForceDrawing.any"
};

AnyMuscleViaPoint FlexorDigitorumBrevis5 =
{
  AnyMuscleModel &MusMdl = ...MuscleModels.FlexorDigitorumBrevis5;
  AnyRefFrame &Org = .Segments.Midfoot.Calcaneus.FDB_Org;//calca
//  AnyRefFrame &Via1 = .Segments.Cuboid.FDB5_Via1; //cuboid
  AnyRefFrame &Via2 = .Segments.Midfoot.Metatarsal5.FDB5_Via2; //MT5
  AnyRefFrame &Ins = .Segments.Toe5.MiddlePhalange5.FDB5_Ins; //Middle 5
  AnyDrawMuscle DrwMus = {#include "<ANYBODY_PATH_BODY>/drawSettings/MusDrawSettings.any"};
 #include "MuscleForceDrawing.any"
};


//*********************************************
//QuadratusPlantar (M/L), Tendon insertion!!!!
//*********************************************

AnyMuscleViaPoint QuadratusPlantarMedialis1 =
{
  AnyMuscleModel &MusMdl = ...MuscleModels.QuadratusPlantarMedialis1;
  AnyRefFrame &Org = .Segments.Midfoot.Calcaneus.QPM_Org1; //calca
  AnyRefFrame &Ins = .FDL.FDLDummySeg.QP_Ins1; //tendon
  AnyDrawMuscle DrwMus = {#include "<ANYBODY_PATH_BODY>/drawSettings/MusDrawSettings.any"};
 #include "MuscleForceDrawing.any"
};

AnyMuscleViaPoint QuadratusPlantarMedialis2 =
{
  AnyMuscleModel &MusMdl = ...MuscleModels.QuadratusPlantarMedialis2;
  AnyRefFrame &Org = .Segments.Midfoot.Calcaneus.QPM_Org2; //calca
  AnyRefFrame &Ins = .FDL.FDLDummySeg.QP_Ins2; //tendon
  AnyDrawMuscle DrwMus = {#include "<ANYBODY_PATH_BODY>/drawSettings/MusDrawSettings.any"};
 #include "MuscleForceDrawing.any"
};

AnyMuscleViaPoint QuadratusPlantarMedialis3 =
{
  AnyMuscleModel &MusMdl = ...MuscleModels.QuadratusPlantarMedialis3;
  AnyRefFrame &Org = .Segments.Midfoot.Calcaneus.QPM_Org3; //calca
  AnyRefFrame &Ins = .FDL.FDLDummySeg.QP_Ins3; //tendon
  AnyDrawMuscle DrwMus = {#include "<ANYBODY_PATH_BODY>/drawSettings/MusDrawSettings.any"};
 #include "MuscleForceDrawing.any"
};

AnyMuscleViaPoint QuadratusPlantarLateralis1 =
{
  AnyMuscleModel &MusMdl = ...MuscleModels.QuadratusPlantarLateralis1;
  AnyRefFrame &Org = .Segments.Midfoot.Calcaneus.QPL_Org1; //calca
  AnyRefFrame &Ins = .FDL.FDLDummySeg.QP_Ins1; //tendon
  AnyDrawMuscle DrwMus = {#include "<ANYBODY_PATH_BODY>/drawSettings/MusDrawSettings.any"};
 #include "MuscleForceDrawing.any"
};

AnyMuscleViaPoint QuadratusPlantarLateralis2 =
{
  AnyMuscleModel &MusMdl = ...MuscleModels.QuadratusPlantarLateralis2;
  AnyRefFrame &Org = .Segments.Midfoot.Calcaneus.QPL_Org2; //calca
  AnyRefFrame &Ins = .FDL.FDLDummySeg.QP_Ins2; //tendon
  AnyDrawMuscle DrwMus = {#include "<ANYBODY_PATH_BODY>/drawSettings/MusDrawSettings.any"};
 #include "MuscleForceDrawing.any"
};

AnyMuscleViaPoint QuadratusPlantarLateralis3 =
{
  AnyMuscleModel &MusMdl = ...MuscleModels.QuadratusPlantarLateralis3;
  AnyRefFrame &Org = .Segments.Midfoot.Calcaneus.QPL_Org3; //calca
  AnyRefFrame &Ins = .FDL.FDLDummySeg.QP_Ins3; //tendon
  AnyDrawMuscle DrwMus = {#include "<ANYBODY_PATH_BODY>/drawSettings/MusDrawSettings.any"};
 #include "MuscleForceDrawing.any"
};


//*********************************
//Lumbrical, tendon insertion!!!!! and via points are wrapping around ADHT / transverse lig ??
//*********************************

AnyMuscleViaPoint Lumbrical2 =
{
  AnyMuscleModel &MusMdl = ...MuscleModels.Lumbrical2;
  AnyRefFrame &Org = .FDL.FDLDummySeg.LB2_Org; //tendon
  AnyRefFrame &Via = .Segments.Midfoot.Metatarsal2.LB2_Via; //meta2
  AnyRefFrame &Ins = .Segments.Toe2.ProximalPhalange2.LB2_Ins; //proxi2
  AnyDrawMuscle DrwMus = {#include "<ANYBODY_PATH_BODY>/drawSettings/MusDrawSettings.any"};
 #include "MuscleForceDrawing.any"
};

AnyMuscleViaPoint Lumbrical3 =
{
  AnyMuscleModel &MusMdl = ...MuscleModels.Lumbrical3;
  AnyRefFrame &Org = .FDL.FDLDummySeg.LB3_Org; //tendon
  AnyRefFrame &Via = .Segments.Midfoot.Metatarsal3.LB3_Via; //meta3
  AnyRefFrame &Ins = .Segments.Toe3.ProximalPhalange3.LB3_Ins; //proxi3
  AnyDrawMuscle DrwMus = {#include "<ANYBODY_PATH_BODY>/drawSettings/MusDrawSettings.any"};
 #include "MuscleForceDrawing.any"
};

AnyMuscleViaPoint Lumbrical4 =
{
  AnyMuscleModel &MusMdl = ...MuscleModels.Lumbrical4;
  AnyRefFrame &Org = .FDL.FDLDummySeg.LB4_Org; //tendon
  AnyRefFrame &Via = .Segments.Midfoot.Metatarsal4.LB4_Via; //meta4
  AnyRefFrame &Ins = .Segments.Toe4.ProximalPhalange4.LB4_Ins; //proxi4
  AnyDrawMuscle DrwMus = {#include "<ANYBODY_PATH_BODY>/drawSettings/MusDrawSettings.any"};
 #include "MuscleForceDrawing.any"
};

AnyMuscleViaPoint Lumbrical5 =
{
  AnyMuscleModel &MusMdl = ...MuscleModels.Lumbrical5;
  AnyRefFrame &Org = .FDL.FDLDummySeg.LB5_Org; //tendon
  AnyRefFrame &Via = .Segments.Midfoot.Metatarsal5.LB5_Via; //meta5
  AnyRefFrame &Ins = .Segments.Toe5.ProximalPhalange5.LB5_Ins; //proxi5
  AnyDrawMuscle DrwMus = {#include "<ANYBODY_PATH_BODY>/drawSettings/MusDrawSettings.any"};
 #include "MuscleForceDrawing.any"
};


//*********************
//AbductorDigitiMinimi
//*********************

AnyMuscleViaPoint AbductorDigitiMinimi1 =
{
  AnyMuscleModel &MusMdl = ...MuscleModels.AbductorDigitiMinimi1;
  AnyRefFrame &Org = .Segments.Midfoot.Calcaneus.ABDM_Org1; //calca
  AnyRefFrame &Via1 = .Segments.Midfoot.Metatarsal5.ABDM_Via1; //MT5
  AnyRefFrame &Via2 = .Segments.Midfoot.Metatarsal5.ABDM_Via2; //MT5
  AnyRefFrame &Ins = .Segments.Toe5.ProximalPhalange5.ABDM_Ins; //proxi5
  AnyDrawMuscle DrwMus = {#include "<ANYBODY_PATH_BODY>/drawSettings/MusDrawSettings.any"};
 #include "MuscleForceDrawing.any"
};

AnyMuscleViaPoint AbductorDigitiMinimi2 =
{
  AnyMuscleModel &MusMdl = ...MuscleModels.AbductorDigitiMinimi2;
  AnyRefFrame &Org = .Segments.Midfoot.Calcaneus.ABDM_Org2; //calca
  AnyRefFrame &Via1 = .Segments.Midfoot.Metatarsal5.ABDM_Via1; //MT5
  AnyRefFrame &Via2 = .Segments.Midfoot.Metatarsal5.ABDM_Via2; //MT5
  AnyRefFrame &Ins = .Segments.Toe5.ProximalPhalange5.ABDM_Ins; //proxi5
  AnyDrawMuscle DrwMus = {#include "<ANYBODY_PATH_BODY>/drawSettings/MusDrawSettings.any"};
 #include "MuscleForceDrawing.any"
};

AnyMuscleViaPoint AbductorDigitiMinimi3 =
{
  AnyMuscleModel &MusMdl = ...MuscleModels.AbductorDigitiMinimi3;
  AnyRefFrame &Org = .Segments.Midfoot.Calcaneus.ABDM_Org3; //calca
  AnyRefFrame &Via1 = .Segments.Midfoot.Metatarsal5.ABDM_Via1; //MT5
  AnyRefFrame &Via2 = .Segments.Midfoot.Metatarsal5.ABDM_Via2; //MT5
  AnyRefFrame &Ins = .Segments.Toe5.ProximalPhalange5.ABDM_Ins; //proxi5
  AnyDrawMuscle DrwMus = {#include "<ANYBODY_PATH_BODY>/drawSettings/MusDrawSettings.any"};
 #include "MuscleForceDrawing.any"
};


//***************************
//FlexorDigitiMinimiBrevis, Should wrap around meta 5 ??
//****************************

AnyMuscleViaPoint FlexorDigitiMinimiBrevis =
{
  AnyMuscleModel &MusMdl = ...MuscleModels.FlexorDigitiMinimiBrevis;
  AnyRefFrame &Org = .Segments.Midfoot.Metatarsal5.FDMB_Org;
  AnyRefFrame &Via = .Segments.Midfoot.Metatarsal5.FDMB_Via;
  AnyRefFrame &Ins = .Segments.Toe5.ProximalPhalange5.FDMB_Ins;
  AnyDrawMuscle DrwMus = {#include "<ANYBODY_PATH_BODY>/drawSettings/MusDrawSettings.any"};
 #include "MuscleForceDrawing.any"
};


AnyMuscleViaPoint PeroneusTertius1 = {
  AnyMuscleModel &MusMdl = ...MuscleModels.PeroneusTertius1Par;
  AnyRefNode &Org = ...Seg.Shank.PeroneusTertius1Node;
  AnyRefNode &Via1 = ...Seg.Shank.PeroneusTertiusViaNode1;
//AnyRefNode &Via3 = .Segments.Cuboid.PeroneusTertiusViaNode3;
  AnyRefNode &Ins = .Segments.Midfoot.Metatarsal5.PeroneusTertius1Node;
AnyDrawMuscle DrwMus = {#include "<ANYBODY_PATH_BODY>/drawSettings/MusDrawSettings.any"};
  };


AnyMuscleViaPoint PeroneusTertius2 = {
  AnyMuscleModel &MusMdl = ...MuscleModels.PeroneusTertius2Par;
  AnyRefNode &Org = ...Seg.Shank.PeroneusTertius2Node;
  AnyRefNode &Via1 = ...Seg.Shank.PeroneusTertiusViaNode1;
//  AnyRefNode &Via3 = ..Seg.Cuboid.PeroneusTertiusViaNode3;
  AnyRefNode &Ins = .Segments.Midfoot.Metatarsal5.PeroneusTertius2Node;
AnyDrawMuscle DrwMus = {#include "<ANYBODY_PATH_BODY>/drawSettings/MusDrawSettings.any"};
  };


AnyMuscleViaPoint PeroneusTertius3 = {
  AnyMuscleModel &MusMdl = ...MuscleModels.PeroneusTertius3Par;
  AnyRefNode &Org = ...Seg.Shank.PeroneusTertius3Node;
  AnyRefNode &Via1 = ...Seg.Shank.PeroneusTertiusViaNode1;
//  AnyRefNode &Via3 = ..Seg.Cuboid.PeroneusTertiusViaNode3;
  AnyRefNode &Ins = .Segments.Midfoot.Metatarsal5.PeroneusTertius3Node;
AnyDrawMuscle DrwMus = {#include "<ANYBODY_PATH_BODY>/drawSettings/MusDrawSettings.any"};
  };
