AnyRevoluteJoint Ankle = {
  Axis = z; //flexion extension
  //Axis2  =  x; //abduction adduction
  AnyRefNode &ShankNode = ..Seg.Shank.AnkleJoint;
  AnyRefNode &FootNode  = ..Seg.Foot.Talus.AnkleJoint;
  //ShankNode ={AnyDrawRefFrame drw={RGB={0,1,0};};};
  Constraints.Reaction ={#include "DrawForceInJoint.any"};

};

AnyRevoluteJoint SubTalar = {
  //Axis1 = z; //flexion extension
  Axis =  z; //inversion eversion
  AnyRefNode &TalusNode = ..Seg.Foot.Talus.SubTalarJoint;
  AnyRefNode &FootNode  = ..Seg.Foot.Midfoot.Calcaneus.SubTalarJoint;
  //TalusNode ={AnyDrawRefFrame drw={RGB={1,0,0};};};
  Constraints.Reaction ={#include "DrawForceInJoint.any"};

};


AnyFolder Foot = {


  //************************************************
  //              JntIntertarsal
  //************************************************


//  AnySphericalJoint TaloNavi =
//  {
//    AnyRefFrame &Talus = ...Seg.Foot.Talus.TaloNavicularJoint;
//    AnyRefFrame &Navicularis = ...Seg.Foot.Midfoot.Navicular.TaloNavicularJoint;
//    Constraints.Reaction ={#include "DrawForceInJoint.any"};
//
//  };
//
//
//  AnyUniversalJoint CuneiNaviMed =
//  {
//    Axis1 = y;
//    Axis2 = z;
//    AnyRefFrame &Navicularis = ...Seg.Foot.Navicular.MedCuneiNaviJoint;
//    AnyRefFrame &MedCunei = ...Seg.Foot.MedialCuneiform.CuneiNaviJoint;
//    Constraints.Reaction ={#include "DrawForceInJoint.any"};
//  };
//
//
//  AnyUniversalJoint CuneiNaviInt =
//  {
//    Axis1 = y;
//    Axis2 = z;
//    AnyRefFrame &Navicularis = ...Seg.Foot.Navicular.IntCuneiNaviJoint;
//    AnyRefFrame &IntCunei = ...Seg.Foot.IntermediateCuneiform.CuneiNaviJoint;
//    Constraints.Reaction ={#include "DrawForceInJoint.any"};
//  };
//
//
//  AnyUniversalJoint CuneiNaviLat =
//  {
//    Axis1 = y;
//    Axis2 = z;
//    AnyRefFrame &Navicularis = ...Seg.Foot.Navicular.LatCuneiNaviJoint;
//    AnyRefFrame &LatCunei = ...Seg.Foot.LateralCuneiform.CuneiNaviJoint;
//    Constraints.Reaction ={#include "DrawForceInJoint.any"};
//  };
//
//
//  AnySphericalJoint CalCuboid =
//  {
//    AnyRefFrame &Calcaneus = ...Seg.Foot.Calcaneus.CalcaneoCuboidJoint;
//    AnyRefFrame &Cuboid = ...Seg.Foot.Cuboid.CalcaneoCuboidJoint;
//    Constraints.Reaction ={#include "DrawForceInJoint.any"};
//  };
//
//
//  #include "IntertarsalGlidingJoints.any"
//
//
//  //************************************************
//  //              JntTarsoMt
//  //************************************************
//
//
//
//
//  AnyUniversalJoint MedCuneiMt1 =
//  {
//    Axis1 = y;
//    Axis2 = z;
//    AnyRefFrame &MedCunei = ...Seg.Foot.MedialCuneiform.TarsoMtJoint;
//    AnyRefFrame &Mt1 = ...Seg.Foot.Metatarsal1.TarsoMtJoint;
//    Constraints.Reaction ={#include "DrawForceInJoint.any"};
//  };
//
//
//
//  AnyUniversalJoint IntCuneiMt2 =
//  {
//    Axis1 = y;
//    Axis2 = z;
//    AnyRefFrame &IntCunei = ...Seg.Foot.IntermediateCuneiform.TarsoMtJoint;
//    AnyRefFrame &Mt2 = ...Seg.Foot.Metatarsal2.TarsoMtJoint;
//    Constraints.Reaction ={#include "DrawForceInJoint.any"};
//  };
//
//
//  AnyUniversalJoint LatCuneiMt3 =
//  {
//    Axis1 = y;
//    Axis2 = z;
//    AnyRefFrame &LatCunei = ...Seg.Foot.LateralCuneiform.TarsoMtJoint;
//    AnyRefFrame &Mt3 = ...Seg.Foot.Metatarsal3.TarsoMtJoint;
//    Constraints.Reaction ={#include "DrawForceInJoint.any"};
//  };
//
//
//  AnyUniversalJoint CuboidMt4 =
//  {
//    Axis1 = y;
//    Axis2 = z;
//    AnyRefFrame &Cuboideum = ...Seg.Foot.Cuboid.TarsoMt4Joint;
//    AnyRefFrame &Mt4 = ...Seg.Foot.Metatarsal4.TarsoMtJoint;
//    Constraints.Reaction ={#include "DrawForceInJoint.any"};
//  };
//
//  AnyUniversalJoint CuboidMt5 =
//  {
//    Axis1 = y;
//    Axis2 = z;
//    AnyRefFrame &Cuboideum = ...Seg.Foot.Cuboid.TarsoMt5Joint;
//    AnyRefFrame &Mt5 = ...Seg.Foot.Metatarsal5.TarsoMtJoint;
//    Constraints.Reaction ={#include "DrawForceInJoint.any"};
//  };
//
//  #include "InterMetatarsalHeadContact.any"

  //************************************************
  //              JntMtPhal
  //************************************************

  // Flexion extension only

  AnyRevoluteJoint MtProxPh1 =
  {
    Axis = z;
    AnyRefFrame &MT1 = ...Seg.Foot.Midfoot.Metatarsal1.MtPhalJoint;
    AnyRefFrame &ProxPhal1 = ...Seg.Foot.Toe1.ProximalPhalange1.MtPhalJoint;
    Constraints.Reaction ={#include "DrawForceInJoint.any"};
  };


  AnyRevoluteJoint MtProxPh2 =
  {
    Axis = z;
    AnyRefFrame &MT2 = ...Seg.Foot.Midfoot.Metatarsal2.MtPhalJoint;
    AnyRefFrame &ProxPhal2 = ...Seg.Foot.Toe2.ProximalPhalange2.MtPhalJoint;
    Constraints.Reaction ={#include "DrawForceInJoint.any"};
  };


  AnyRevoluteJoint MtProxPh3 =
  {
    Axis = z;
    AnyRefFrame &MT3 = ...Seg.Foot.Midfoot.Metatarsal3.MtPhalJoint;
    AnyRefFrame &ProxPhal3 = ...Seg.Foot.Toe3.ProximalPhalange3.MtPhalJoint;
    Constraints.Reaction ={#include "DrawForceInJoint.any"};
  };


  AnyRevoluteJoint MtProxPh4 =
  {
    Axis = z;
    AnyRefFrame &MT4 = ...Seg.Foot.Midfoot.Metatarsal4.MtPhalJoint;
    AnyRefFrame &ProxPhal4 = ...Seg.Foot.Toe4.ProximalPhalange4.MtPhalJoint;
    Constraints.Reaction ={#include "DrawForceInJoint.any"};
  };


  AnyRevoluteJoint MtProxPh5 =
  {
    Axis = z;
    AnyRefFrame &MT5 = ...Seg.Foot.Midfoot.Metatarsal5.MtPhalJoint;
    AnyRefFrame &ProxPhal5 = ...Seg.Foot.Toe5.ProximalPhalange5.MtPhalJoint;
    Constraints.Reaction ={#include "DrawForceInJoint.any"};
  };


//  AnyUniversalJoint MtProxPh1 =
//  {
//    Axis1 = y;
//    Axis2 = z;
//    AnyRefFrame &MT1 = ...Seg.Foot.Metatarsal1.MtPhalJoint;
//    AnyRefFrame &ProxPhal1 = ...Seg.Foot.ProximalPhalange1.MtPhalJoint;
//    Constraints.Reaction ={#include "DrawForceInJoint.any"};
//  };
//
//
//  AnyUniversalJoint MtProxPh2 =
//  {
//    Axis1 = y;
//    Axis2 = z;
//    AnyRefFrame &MT2 = ...Seg.Foot.Metatarsal2.MtPhalJoint;
//    AnyRefFrame &ProxPhal2 = ...Seg.Foot.ProximalPhalange2.MtPhalJoint;
//    Constraints.Reaction ={#include "DrawForceInJoint.any"};
//  };
//
//
//  AnyUniversalJoint MtProxPh3 =
//  {
//    Axis1 = y;
//    Axis2 = z;
//    AnyRefFrame &MT3 = ...Seg.Foot.Metatarsal3.MtPhalJoint;
//    AnyRefFrame &ProxPhal3 = ...Seg.Foot.ProximalPhalange3.MtPhalJoint;
//    Constraints.Reaction ={#include "DrawForceInJoint.any"};
//  };
//
//
//  AnyUniversalJoint MtProxPh4 =
//  {
//    Axis1 = y;
//    Axis2 = z;
//    AnyRefFrame &MT4 = ...Seg.Foot.Metatarsal4.MtPhalJoint;
//    AnyRefFrame &ProxPhal4 = ...Seg.Foot.ProximalPhalange4.MtPhalJoint;
//    Constraints.Reaction ={#include "DrawForceInJoint.any"};
//  };
//
//
//  AnyUniversalJoint MtProxPh5 =
//  {
//    Axis1 = y;
//    Axis2 = z;
//    AnyRefFrame &MT5 = ...Seg.Foot.Metatarsal5.MtPhalJoint;
//    AnyRefFrame &ProxPhal5 = ...Seg.Foot.ProximalPhalange5.MtPhalJoint;
//    Constraints.Reaction ={#include "DrawForceInJoint.any"};
//  };


  //************************************************
  //              JntProxPhal
  //************************************************


//  AnyRevoluteJoint ProxPhDistPh1 =
//  {
//    Axis = z;
//    AnyRefFrame &ProxPhal1 = ...Seg.Foot.ProximalPhalange1.DistPhalJoint;
//    AnyRefFrame &DistPhal1 = ...Seg.Foot.DistalPhalange1.DistPhalJoint;
//    Constraints.Reaction ={#include "DrawForceInJoint.any"};
//  };
//
//  AnyRevoluteJoint ProxPhMidPh2 =
//  {
//    Axis = z;
//    AnyRefFrame &ProxPhal2 = ...Seg.Foot.ProximalPhalange2.ProxPhalJoint;
//    AnyRefFrame &MidPhal2 = ...Seg.Foot.MiddlePhalange2.ProxPhalJoint;
//    Constraints.Reaction ={#include "DrawForceInJoint.any"};
//  };
//
//  AnyRevoluteJoint ProxPhMidPh3 =
//  {
//    Axis = z;
//    AnyRefFrame &ProxPhal3 = ...Seg.Foot.ProximalPhalange3.ProxPhalJoint;
//    AnyRefFrame &MidPhal3 = ...Seg.Foot.MiddlePhalange3.ProxPhalJoint;
//    Constraints.Reaction ={#include "DrawForceInJoint.any"};
//  };
//
//  AnyRevoluteJoint ProxPhMidPh4 =
//  {
//    Axis = z;
//    AnyRefFrame &ProxPhal4 = ...Seg.Foot.ProximalPhalange4.ProxPhalJoint;
//    AnyRefFrame &MidPhal4 = ...Seg.Foot.MiddlePhalange4.ProxPhalJoint;
//    Constraints.Reaction ={#include "DrawForceInJoint.any"};
//  };
//
//  AnyRevoluteJoint ProxPhMidPh5 =
//  {
//    Axis = z;
//    AnyRefFrame &ProxPhal5 = ...Seg.Foot.ProximalPhalange5.ProxPhalJoint;
//    AnyRefFrame &MidPhal5 = ...Seg.Foot.MiddlePhalange5.ProxPhalJoint;
//    Constraints.Reaction ={#include "DrawForceInJoint.any"};
//  };


  //************************************************
  //              JntDistPhal
  //************************************************


//  AnyRevoluteJoint MidPhDistPh2 =
//  {
//    Axis = z;
//    AnyRefFrame &MidPhal2 = ...Seg.Foot.MiddlePhalange2.DistPhalJoint;
//    AnyRefFrame &DistPhal2 = ...Seg.Foot.DistalPhalange2.DistPhalJoint;
//    Constraints.Reaction ={#include "DrawForceInJoint.any"};
//  };
//
//  AnyRevoluteJoint MidPhDistPh3 =
//  {
//    Axis = z;
//    AnyRefFrame &MidPhal3 = ...Seg.Foot.MiddlePhalange3.DistPhalJoint;
//    AnyRefFrame &DistPhal3 = ...Seg.Foot.DistalPhalange3.DistPhalJoint;
//    Constraints.Reaction ={#include "DrawForceInJoint.any"};
//  };
//
//  AnyRevoluteJoint MidPhDistPh4 =
//  {
//    Axis = z;
//    AnyRefFrame &MidPhal4 = ...Seg.Foot.MiddlePhalange4.DistPhalJoint;
//    AnyRefFrame &DistPhal4 = ...Seg.Foot.DistalPhalange4.DistPhalJoint;
//    Constraints.Reaction ={#include "DrawForceInJoint.any"};
//  };
//
//  AnyRevoluteJoint MidPhDistPh5 =
//  {
//    Axis = z;
//    AnyRefFrame &MidPhal5 = ...Seg.Foot.MiddlePhalange5.DistPhalJoint;
//    AnyRefFrame &DistPhal5 = ...Seg.Foot.DistalPhalange5.DistPhalJoint;
//    Constraints.Reaction ={#include "DrawForceInJoint.any"};
//  };

}; //FootJnt
