//Additional nodes for the intrinsec muscles and ligaments of the foot.


//*******************************************************************************
//Intrinsec muscle nodes
//*******************************************************************************


Foot.Midfoot.Calcaneus = {
  AnyRefNode ABDH_Org = {
    sRel = .Scale({-0.00706062, 0.08169514, .....Sign*-0.01534086});
    AnyDrawNode drw = {
      ScaleXYZ = 0.0016*{1,1,1};
      RGB = {0,0,1};
      Visible = Off;
    };
  };

  AnyRefNode EHB_Org = {
    sRel = .Scale({0.04025068, 0.0724402, .....Sign*0.02144265});
    AnyDrawNode drw = {
      ScaleXYZ = 0.0016*{1,1,1};
      RGB = {0,0,1};
      Visible = Off;
    };
  };

  AnyRefNode EDB_Org = {
    sRel = .Scale({0.03569542, 0.06819643, .....Sign*0.02661733});
    AnyDrawNode drw = {
      ScaleXYZ = 0.0016*{1,1,1};
      RGB = {0,0,1};
      Visible = Off;
    };
  };

  AnyRefNode FDB_Org = {
    sRel = .Scale({-0.01611091, 0.07935384, .....Sign*-0.00647964});
    AnyDrawNode drw = {
      ScaleXYZ = 0.0016*{1,1,1};
      RGB = {0,0,1};
      Visible = Off;
    };
  };

  AnyRefNode QPL_Org1 = {
    sRel = .Scale({-0.005464157, 0.07652855, .....Sign*(-0.01023088+0.005)});
    AnyDrawNode drw = {
      ScaleXYZ = 0.0016*{1,1,1};
      RGB = {0,0,1};
      Visible = Off;
    };
  };

  AnyRefNode QPL_Org2 = {
    sRel = .Scale({-0.006979563-0.005, 0.07267789+0.008, .....Sign*(-0.003650782+0.008)});
    AnyDrawNode drw = {
      ScaleXYZ = 0.0016*{1,1,1};
      RGB = {0,0,1};
      Visible = Off;
    };
  };

  AnyRefNode QPL_Org3 = {
    sRel = .Scale({-0.008817857-0.005, 0.07198371+0.014, .....Sign*(.00235277+0.01)});
    AnyDrawNode drw = {
      ScaleXYZ = 0.0016*{1,1,1};
      RGB = {0,0,1};
      Visible = Off;
    };
  };

  AnyRefNode QPM_Org1 = {
    sRel = .Scale({0.0124552, 0.09400258, .....Sign*-0.01672864});
    AnyDrawNode drw = {
      ScaleXYZ = 0.0016*{1,1,1};
      RGB = {0,0,1};
      Visible = Off;
    };
  };

  AnyRefNode QPM_Org2 = {
    sRel = .Scale({0.001851459, 0.09318295, .....Sign*-0.01786916});
    AnyDrawNode drw = {
      ScaleXYZ = 0.0016*{1,1,1};
      RGB = {0,0,1};
      Visible = Off;
    };
  };

  AnyRefNode QPM_Org3 = {
    sRel = .Scale({-0.002186111, 0.08228763, .....Sign*-0.01346065});
    AnyDrawNode drw = {
      ScaleXYZ = 0.0016*{1,1,1};
      RGB = {0,0,1};
      Visible = Off;
    };
  };

  AnyRefNode ABDM_Org1 = {
    sRel = .Scale({-0.00827893, 0.06917358, .....Sign*0.00446443});
    AnyDrawNode drw = {
      ScaleXYZ = 0.0016*{1,1,1};
      RGB = {0,0,1};
      Visible = Off;
    };
  };

  AnyRefNode ABDM_Org2 = {
    sRel = .Scale({-0.007829278, 0.07682759, .....Sign*0.01135661});
    AnyDrawNode drw = {
      ScaleXYZ = 0.0016*{1,1,1};
      RGB = {0,0,1};
      Visible = Off;
    };
  };

  AnyRefNode ABDM_Org3 = {
    sRel = .Scale({-0.003703623, 0.08293903, .....Sign*0.01996739});
    AnyDrawNode drw = {
      ScaleXYZ = 0.0016*{1,1,1};
      RGB = {0,0,1};
      Visible = Off;
    };
  };
};//Calcaneus


Foot.Midfoot.Cuboid = {
  AnyRefNode FDB2_Via1 = {
    sRel = .Scale({0.009301629, 0.03038352, .....Sign*0.005306924});
    AnyDrawNode drw = {
      ScaleXYZ = 0.0016*{1,1,1};
      RGB = {0,0,1};
      Visible = Off;
    };
  };

  AnyRefNode FDB3_Via1 = {
    sRel = .Scale({0.005987783, 0.03180972, .....Sign*0.01004518});
    AnyDrawNode drw = {
      ScaleXYZ = 0.0016*{1,1,1};
      RGB = {0,0,1};
      Visible = Off;
    };
  };

  AnyRefNode FDB4_Via1 = {
    sRel = .Scale({0.002074299, 0.0332405, .....Sign*0.01424473});
    AnyDrawNode drw = {
      ScaleXYZ = 0.0016*{1,1,1};
      RGB = {0,0,1};
      Visible = Off;
    };
  };

  AnyRefNode FDB5_Via1 = {
    sRel = .Scale({-0.0005035785, 0.03527109, .....Sign*0.01999813});
    AnyDrawNode drw = {
      ScaleXYZ = 0.0016*{1,1,1};
      RGB = {0,0,1};
      Visible = Off;
    };
  };
};//Cuboid


Foot.Midfoot.Navicular = {
  AnyRefNode ABDH_Via = {
    sRel = .Scale({0.015643056-0.01, 0.02600191, .....Sign*-0.02141193});
    AnyDrawNode drw = {
      ScaleXYZ = 0.0016*{1,1,1};
      RGB = {0,0,1};
      Visible = Off;
    };
  };

  //  AnyRefNode FHBL_Org = {
  //    sRel = .Scale({0.01874826, 0.02087615, ....Sign*0.001116394});
  //    AnyDrawNode drw = {
  //      ScaleXYZ = 0.0016*{1,1,1};
  //      RGB = {0,0,1};
  //      Visible = Off;
  //    };
  //  };

  //  AnyRefNode FHBM_Org = {
  //    sRel = .Scale({0.01781844, 0.01556046, ....Sign*-0.008366071});
  //    AnyDrawNode drw = {
  //      ScaleXYZ = 0.0016*{1,1,1};
  //      RGB = {0,0,1};
  //      Visible = Off;
  //    };
  //  };


  AnyRefNode LigCuneoNavicularMedialNode1 = {
    sRel = .Scale({0.0355536,0.0116551,.....Sign*(-0.015584)});
    //AnyDrawRefFrame drw={ScaleXYZ={0.01,0.01,0.01};RGB={0,0,0};};
  };

  //  AnyRefNode LigCuneoNavicularMedialNode2 = {
  //    sRel = .Scale({0.0344803,0.0142046,....Sign*(-0.0181711)});
  //    AnyDrawRefFrame drw={ScaleXYZ={0.01,0.01,0.01};RGB={0,0,0};};
  //  };
  AnyRefNode LigCuneoNavicularMedialNode2 = {
    sRel = .Scale({0.0331324,0.0165003,.....Sign*(-0.0205214)});
    //AnyDrawRefFrame drw={ScaleXYZ={0.01,0.01,0.01};RGB={0,0,0};};
  };
  //  AnyRefNode LigCuneoNavicularMedialNode4 = {
  //    sRel = .Scale({0.0316708,0.0184879,....Sign*(-0.0224915)});
  //    AnyDrawRefFrame drw={ScaleXYZ={0.01,0.01,0.01};RGB={0,0,0};};
  //  };
  AnyRefNode LigCuneoNavicularMedialNode3 = {
    sRel = .Scale({0.0292042,0.0197295,.....Sign*(-0.0240602)});
    //AnyDrawRefFrame drw={ScaleXYZ={0.01,0.01,0.01};RGB={0,0,0};};
  };
  AnyRefNode LigCuneoNavicularMedialNode4 = {
    sRel = .Scale({0.0260662-0.002,0.0206637+0.001,.....Sign*(-0.0249156-0.001)});
    //AnyDrawRefFrame drw={ScaleXYZ={0.01,0.01,0.01};RGB={0,0,0};};
  };


}; //Navicular


Foot.Midfoot.IntermediateCuneiform = {
  AnyRefNode EHB_Via1 = {
    sRel = .Scale({0.04524377, -0.001279828, .....Sign*0.01362381});
    AnyDrawNode drw = {
      ScaleXYZ = 0.0016*{1,1,1};
      RGB = {0,0,1};
      Visible = Off;
    };
  };
}; // IntermediateCuneiform


Foot.Midfoot.Metatarsal1 = {
  AnyRefNode ABDH_Via = {
    sRel = .Scale({0.001, -0.0597695, .....Sign*-0.030})*.FootType.MetaScale;
    AnyDrawNode drw = {
      ScaleXYZ = 0.0016*{1,1,1};
      RGB = {0,0,1};
      Visible = Off;
    };
  };

  AnyRefNode FHBL_Via = {
    sRel = .Scale({-0.009922527, -0.0547695, .....Sign*-0.0009610528})*.FootType.MetaScale;
    AnyDrawNode drw = {
      ScaleXYZ = 0.0016*{1,1,1};
      RGB = {0,0,1};
      Visible = Off;
    };
  };

  AnyRefNode FHBL_Via2 = {
    sRel = .Scale({-0.009922527, -0.0627695, .....Sign*-0.0029610528})*.FootType.MetaScale;
    AnyDrawNode drw = {
      ScaleXYZ = 0.0016*{1,1,1};
      RGB = {0,0,1};
      Visible = Off;
    };
  };

  AnyRefNode FHBM_Via = {
    sRel = .Scale({-0.01205302, -0.05841037, .....Sign*(-0.02248551+0.003)})*.FootType.MetaScale;
    AnyDrawNode drw = {
      ScaleXYZ = 0.0016*{1,1,1};
      RGB = {0,0,1};
      Visible = Off;
    };
  };

  AnyRefNode FHBM_Via2 = {
    sRel = .Scale({-0.01205302, -0.06641037, .....Sign*(-0.02248551+0.003)})*.FootType.MetaScale;
    AnyDrawNode drw = {
      ScaleXYZ = 0.0016*{1,1,1};
      RGB = {0,0,1};
      Visible = Off;
    };
  };

  AnyRefNode ADHO_Via = {
    sRel = .Scale({-0.005962657, -0.0534675, .....Sign*0.0005545307})*.FootType.MetaScale;
    AnyDrawNode drw = {
      ScaleXYZ = 0.0016*{1,1,1};
      RGB = {0,0,1};
      Visible = Off;
    };
  };

  AnyRefNode ADHT_Via = {
    sRel = .Scale({-0.00451855, -0.05379022, .....Sign*0.0005656669})*.FootType.MetaScale;
    AnyDrawNode drw = {
      ScaleXYZ = 0.0016*{1,1,1};
      RGB = {0,0,1};
      Visible = Off;
    };
  };

  AnyRefNode EHB_Via2 = {
    sRel = .Scale({0.02893475, -0.03277672, .....Sign*-0.01083649})*.FootType.MetaScale;
    AnyDrawNode drw = {
      ScaleXYZ = 0.0016*{1,1,1};
      RGB = {0,0,1};
      Visible = Off;
    };
  };

  AnyRefNode EHB_Ins1 = {
    sRel = .Scale({0.01727411, -0.06520371, .....Sign*-0.0183044})*.FootType.MetaScale;
    AnyDrawNode drw = {
      ScaleXYZ = 0.0016*{1,1,1};
      RGB = {0,0,1};
      Visible = Off;
    };
  };

  AnyRefNode DI1_Org2 = {
    sRel = .Scale({0.02063821, -0.03119196, .....Sign*-0.002083521})*.FootType.MetaScale;
    AnyDrawNode drw = {
      ScaleXYZ = 0.0016*{1,1,1};
      RGB = {0,0,1};
      Visible = Off;
    };
  };
};//Metatarsal1


Foot.Midfoot.Metatarsal2 = {
  AnyRefNode ADHO_Org1 = {
    //AnyDrawRefFrame drw={ScaleXYZ={0.01,0.01,0.01};RGB={0,0,0};};
    sRel = .Scale({0.0149548, -0.01326096, .....Sign*0.006823592});
  };

  AnyRefNode DI1_Org1 = {
    sRel = .Scale({0.02428196, -0.0196185, .....Sign*0.002258412});
    AnyDrawNode drw = {
      ScaleXYZ = 0.0016*{1,1,1};
      RGB = {0,0,1};
      Visible = Off;
    };
  };

  AnyRefNode DI2_Org1 = {
    sRel = .Scale({0.01964016, -0.01772679, .....Sign*0.0151345});
    AnyDrawNode drw = {
      ScaleXYZ = 0.0016*{1,1,1};
      RGB = {0,0,1};
      Visible = Off;
    };
  };

  AnyRefNode EDB2_Via2 = {
    sRel = .ExtensorDigitorumLongusViaNode6.sRel;
  };

  AnyRefNode EDB2_Via2Bis = {
    sRel = .ExtensorDigitorumLongusViaNode6Bis.sRel;
  };

  AnyRefNode FDB2_Via2 = {
    sRel = .Scale({-0.010988863, -0.0623129, .....Sign*0.00919419});
    AnyDrawNode drw = {
      ScaleXYZ = 0.0016*{1,1,1};
      RGB = {0,0,1};
      Visible = Off;
    };
  };

  AnyRefNode LB2_Via = {
    sRel = .Scale({-0.010380543, -0.06344381, .....Sign*0.006080789});
    AnyDrawNode drw = {
      ScaleXYZ = 0.0016*{1,1,1};
      RGB = {0,0,1};
      Visible = Off;
    };
  };
};//Metatarsal2


Foot.Midfoot.Metatarsal3 = {
  AnyRefNode ADHO_Org2 = {
    //AnyDrawRefFrame drw={ScaleXYZ={0.01,0.01,0.01};RGB={0,0,0};};
    sRel = .Scale({0.01022841, -0.01149634, .....Sign*0.01555933});
  };

  AnyRefNode ADHT_Org1 = {
    //AnyDrawRefFrame drw={ScaleXYZ={0.01,0.01,0.01};RGB={0,0,0};};
    sRel = .Scale({-0.004914046, -0.06023242, .....Sign*0.01813512});
  };

  AnyRefNode DI2_Org2 = {
    sRel = .Scale({0.01999588, -0.01782812, .....Sign*0.01775433});
    AnyDrawNode drw = {
      ScaleXYZ = 0.0016*{1,1,1};
      RGB = {0,0,1};
      Visible = Off;
    };
  };

  AnyRefNode DI3_Org1 = {
    sRel = .Scale({0.01344152, -0.01290649, .....Sign*0.02624927});
    AnyDrawNode drw = {
      ScaleXYZ = 0.0016*{1,1,1};
      RGB = {0,0,1};
      Visible = Off;
    };
  };

  AnyRefNode EDB2_Via1 = {
    sRel = .Scale({0.02761501, -0.02000502, .....Sign*0.02672093});
    AnyDrawNode drw = {
      ScaleXYZ = 0.0016*{1,1,1};
      RGB = {0,0,1};
      Visible = Off;
    };
  };

  AnyRefNode EDB3_Via0 = {
    sRel = .Scale({0.02261501, -0.01600502, .....Sign*0.03172093});
    AnyDrawNode drw = {
      ScaleXYZ = 0.0016*{1,1,1};
      RGB = {0,0,1};
      Visible = Off;
    };
  };

  AnyRefNode EDB3_Via1 = {
    sRel = .ExtensorDigitorumLongusViaNode9.sRel;
  };

  AnyRefNode EDB3_Via1Bis = {
    sRel = .ExtensorDigitorumLongusViaNode9Bis.sRel;
  };

  //  AnyRefNode PI1_Org = {
  //    sRel = .Scale({0.01513845, -0.009156924, ....Sign*0.01175805});
  //    AnyDrawNode drw = {
  //      ScaleXYZ = 0.0016*{1,1,1};
  //      RGB = {0,0,1};
  //      Visible = Off;
  //    };
  //  };

  AnyRefNode FDB3_Via2 = {
    sRel = .Scale({-0.01205038, -0.0572402, .....Sign*0.02281839});
    AnyDrawNode drw = {
      ScaleXYZ = 0.0016*{1,1,1};
      RGB = {0,0,1};
      Visible = Off;
    };
  };

  AnyRefNode LB3_Via = {
    sRel = .Scale({-0.011523288, -0.05915126, .....Sign*0.01961851});
    AnyDrawNode drw = {
      ScaleXYZ = 0.0016*{1,1,1};
      RGB = {0,0,1};
      Visible = Off;
    };
  };
};//Metatarsal3


Foot.Midfoot.Metatarsal4 = {
  AnyRefNode ADHO_Org3 = {
    //AnyDrawRefFrame drw={ScaleXYZ={0.01,0.01,0.01};RGB={0,0,0};};
    sRel = .Scale({0.003150463, -0.00646466, .....Sign*0.02519586});
  };

  AnyRefNode ADHT_Org2 = {
    //AnyDrawRefFrame drw={ScaleXYZ={0.01,0.01,0.01};RGB={0,0,0};};
    sRel = .Scale({-0.007251294, -0.04930299, .....Sign*0.03256894});
  };

  AnyRefNode DI3_Org2 = {
    sRel = .Scale({0.01101053, -0.01165311, .....Sign*0.02660561});
    AnyDrawNode drw = {
      ScaleXYZ = 0.0016*{1,1,1};
      RGB = {0,0,1};
      Visible = Off;
    };
  };

  AnyRefNode DI4_Org1 = {
    sRel = .Scale({0.005796027, -0.004083448, .....Sign*0.03503625});
    AnyDrawNode drw = {
      ScaleXYZ = 0.0016*{1,1,1};
      RGB = {0,0,1};
      Visible = Off;
    };
  };

  AnyRefNode EDB4_Via1 = {
    sRel = .ExtensorDigitorumLongusViaNode12.sRel;
  };

  AnyRefNode EDB4_Via1Bis = {
    sRel = .ExtensorDigitorumLongusViaNode12Bis.sRel;
  };

  AnyRefNode PI2_Org1 = {
    sRel = .Scale({0.006355476, -0.008364589, .....Sign*0.02253186});
    AnyDrawNode drw = {
      ScaleXYZ = 0.0016*{1,1,1};
      RGB = {0,0,1};
      Visible = Off;
    };
  };

  AnyRefNode PI2_Org2 = {
    sRel = .Scale({0.004646854, -0.002814631, .....Sign*0.0213202});
    AnyDrawNode drw = {
      ScaleXYZ = 0.0016*{1,1,1};
      RGB = {0,0,1};
      Visible = Off;
    };
  };

  //  AnyRefNode PI2_Org3 = {
  //    sRel = .Scale({0.002471484, 0.002813284, ....Sign*0.02066011});
  //    AnyDrawNode drw = {
  //      ScaleXYZ = 0.0016*{1,1,1};
  //      RGB = {0,0,1};
  //      Visible = Off;
  //    };
  //  };

  AnyRefNode FDB4_Via2 = {
    sRel = .Scale({-0.01398635, -0.04733423, .....Sign*0.0359415});
    AnyDrawNode drw = {
      ScaleXYZ = 0.0016*{1,1,1};
      RGB = {0,0,1};
      Visible = Off;
    };
  };

  AnyRefNode LB4_Via = {
    sRel = .Scale({-0.013235, -0.0483559, .....Sign*0.03290226});
    AnyDrawNode drw = {
      ScaleXYZ = 0.0016*{1,1,1};
      RGB = {0,0,1};
      Visible = Off;
    };
  };
};//Metatarsal4


Foot.Midfoot.Metatarsal5 = {
  AnyRefNode ADHT_Org3 = {
    //AnyDrawRefFrame drw={ScaleXYZ={0.01,0.01,0.01};RGB={0,0,0};};
    sRel = .Scale({-0.009946054, -0.03643046, .....Sign*0.04560788});
  };

  AnyRefNode DI4_Org2 = {
    sRel = .Scale({0.003230363, -0.0007734826, .....Sign*0.03485556});
    AnyDrawNode drw = {
      ScaleXYZ = 0.0016*{1,1,1};
      RGB = {0,0,1};
      Visible = Off;
    };
  };

  AnyRefNode PI3_Org1 = {
    sRel = .Scale({-0.000504627, 0.006198168, .....Sign*0.02913662});
    AnyDrawNode drw = {
      ScaleXYZ = 0.0016*{1,1,1};
      RGB = {0,0,1};
      Visible = Off;
    };
  };

  //  AnyRefNode PI3_Org2 = {
  //    sRel = .Scale({-0.00170127, 0.01217688, ....Sign*0.02955879});
  //    AnyDrawNode drw = {
  //      ScaleXYZ = 0.0016*{1,1,1};
  //      RGB = {0,0,1};
  //      Visible = Off;
  //    };
  //  };

  AnyRefNode PI3_Org3 = {
    sRel = .Scale({-0.004221388, 0.01644546, .....Sign*0.03136797});
    AnyDrawNode drw = {
      ScaleXYZ = 0.0016*{1,1,1};
      RGB = {0,0,1};
      Visible = Off;
    };
  };

  AnyRefNode FDB5_Via2 = {
    sRel = .Scale({-0.01521917, -0.03378419, .....Sign*0.04742073});
    AnyDrawNode drw = {
      ScaleXYZ = 0.0016*{1,1,1};
      RGB = {0,0,1};
      Visible = Off;
    };
  };

  AnyRefNode LB5_Via = {
    sRel = .Scale({-0.01416231, -0.03823612, .....Sign*0.04499382});
    AnyDrawNode drw = {
      ScaleXYZ = 0.0016*{1,1,1};
      RGB = {0,0,1};
      Visible = Off;
    };
  };

  AnyRefNode ABDM_Via1 = {
    sRel = .Scale({-0.004659761, 0.03255123, .....Sign*0.03269308});
    AnyDrawNode drw = {
      ScaleXYZ = 0.0016*{1,1,1};
      RGB = {0,0,1};
      Visible = Off;
    };
  };

  AnyRefNode ABDM_Via2 = {
    sRel = .Scale({-0.0075557314, 0.02106021, .....Sign*0.0465625});
    AnyDrawNode drw = {
      ScaleXYZ = 0.0016*{1,1,1};
      RGB = {0,0,1};
      Visible = Off;
    };
  };

  AnyRefNode FDMB_Org = {
    sRel = .Scale({-0.003493209-0.008, 0.01694965, .....Sign*(0.0281614+0.008)});
    AnyDrawNode drw = {
      ScaleXYZ = 0.0016*{1,1,1};
      RGB = {0,0,1};
      Visible = Off;
    };
  };

  AnyRefNode FDMB_Via = {
    sRel = .Scale({-0.01330025-0.004, -0.0276867, .....Sign*0.04711487});
    AnyDrawNode drw = {
      ScaleXYZ = 0.0016*{1,1,1};
      RGB = {0,0,1};
      Visible = Off;
    };
  };
};//Metatarsal5


Foot.Toe1.ProximalPhalange1 = {
  AnyRefNode ABDH_Ins = {
    sRel = .Scale({-0.003888134, -0.07946751, .....Sign*-0.02646192})*.FootType.ProxPhalScale;
    AnyDrawNode drw = {
      ScaleXYZ = 0.0016*{1,1,1};
      RGB = {0,0,1};
      Visible = Off;
    };
  };

  AnyRefNode FHBL_Ins = {
    sRel = .Scale({-0.006054069, -0.07301827, .....Sign*-0.00830846})*.FootType.ProxPhalScale;
    AnyDrawNode drw = {
      ScaleXYZ = 0.0016*{1,1,1};
      RGB = {0,0,1};
      Visible = Off;
    };
  };

  AnyRefNode FHBM_Ins = {
    sRel = .Scale({-0.008010488, -0.07367442, .....Sign*-0.02191654})*.FootType.ProxPhalScale;
    AnyDrawNode drw = {
      ScaleXYZ = 0.0016*{1,1,1};
      RGB = {0,0,1};
      Visible = Off;
    };
  };

  AnyRefNode ADHO_Ins = {
    sRel = .Scale({-0.0002392427, -0.07617467, .....Sign*-0.002542479})*.FootType.ProxPhalScale;
    AnyDrawNode drw = {
      ScaleXYZ = 0.0016*{1,1,1};
      RGB = {0,0,1};
      Visible = Off;
    };
  };

  AnyRefNode ADHT_Ins = {
    sRel = .Scale({0.0002863772, -0.07640824, .....Sign*-0.002374288})*.FootType.ProxPhalScale;
    AnyDrawNode drw = {
      ScaleXYZ = 0.0016*{1,1,1};
      RGB = {0,0,1};
      Visible = Off;
    };
  };

  AnyRefNode EHB_Ins2 = {
    sRel = .Scale({0.01043685, -0.08014125, .....Sign*-0.0159063})*.FootType.ProxPhalScale;
    AnyDrawNode drw = {
      ScaleXYZ = 0.0016*{1,1,1};
      RGB = {0,0,1};
      Visible = Off;
    };
  };
};//ProximalPhalange1


Foot.Toe2.ProximalPhalange2 = {
  AnyRefNode DI1_Ins = {
    sRel = .Scale({-0.001399059, -0.08286173, .....Sign*0.00752607});
    AnyDrawNode drw = {
      ScaleXYZ = 0.0016*{1,1,1};
      RGB = {0,0,1};
      Visible = Off;
    };
  };

  AnyRefNode DI2_Ins = {
    sRel = .Scale({-0.001393359, -0.08175381, .....Sign*0.01970161});
    AnyDrawNode drw = {
      ScaleXYZ = 0.0016*{1,1,1};
      RGB = {0,0,1};
      Visible = Off;
    };
  };

  AnyRefNode FDB2_Via3 = {
    sRel = .Scale({-0.009834752, -0.07456145, .....Sign*0.01177738});
    AnyDrawNode drw = {
      ScaleXYZ = 0.0016*{1,1,1};
      RGB = {0,0,1};
      Visible = Off;
    };
  };

  AnyRefNode LB2_Ins = {
    sRel = .Scale({-0.007, -0.079418, .....Sign*0.00951691});
    AnyDrawNode drw = {
      ScaleXYZ = 0.0016*{1,1,1};
      RGB = {0,0,1};
      Visible = Off;
    };
  };
};//ProximalPhalange2


Foot.Toe3.ProximalPhalange3 = {
  AnyRefNode DI3_Ins = {
    sRel = .Scale({-0.00261719, -0.07449995, .....Sign*0.03400164});
    AnyDrawNode drw = {
      ScaleXYZ = 0.0016*{1,1,1};
      RGB = {0,0,1};
      Visible = Off;
    };
  };

  AnyRefNode PI1_Ins = {
    sRel = .Scale({-0.003232744, -0.07675326, .....Sign*0.02266571});
    AnyDrawNode drw = {
      ScaleXYZ = 0.0016*{1,1,1};
      RGB = {0,0,1};
      Visible = Off;
    };
  };

  AnyRefNode FDB3_Via3 = {
    sRel = .Scale({-0.009724239, -0.07346072, .....Sign*0.02698993});
    AnyDrawNode drw = {
      ScaleXYZ = 0.0016*{1,1,1};
      RGB = {0,0,1};
      Visible = Off;
    };
  };

  AnyRefNode LB3_Ins = {
    sRel = .Scale({-0.0082895146, -0.07436257, .....Sign*0.02450449});
    AnyDrawNode drw = {
      ScaleXYZ = 0.0016*{1,1,1};
      RGB = {0,0,1};
      Visible = Off;
    };
  };
};//ProximalPhalange3


Foot.Toe4.ProximalPhalange4 = {
  AnyRefNode DI4_Ins = {
    sRel = .Scale({-0.0044333981, -0.06288279, .....Sign*0.04852085});
    AnyDrawNode drw = {
      ScaleXYZ = 0.0016*{1,1,1};
      RGB = {0,0,1};
      Visible = Off;
    };
  };

  AnyRefNode PI2_Ins = {
    sRel = .Scale({-0.00328429, -0.06601621, .....Sign*0.03679381});
    AnyDrawNode drw = {
      ScaleXYZ = 0.0016*{1,1,1};
      RGB = {0,0,1};
      Visible = Off;
    };
  };

  AnyRefNode FDB4_Via3 = {
    sRel = .Scale({-0.01112856, -0.06217487, .....Sign*0.04139828});
    AnyDrawNode drw = {
      ScaleXYZ = 0.0016*{1,1,1};
      RGB = {0,0,1};
      Visible = Off;
    };
  };

  AnyRefNode LB4_Ins = {
    sRel = .Scale({-0.009753804, -0.06291295, .....Sign*0.03875254});
    AnyDrawNode drw = {
      ScaleXYZ = 0.0016*{1,1,1};
      RGB = {0,0,1};
      Visible = Off;
    };
  };
};//ProximalPhalange4


Foot.Toe5.ProximalPhalange5 = {
  AnyRefNode PI3_Ins = {
    sRel = .Scale({-0.00565188, -0.04903063, .....Sign*0.04898596});
    AnyDrawNode drw = {
      ScaleXYZ = 0.0016*{1,1,1};
      RGB = {0,0,1};
      Visible = Off;
    };
  };

  AnyRefNode LB5_Ins = {
    sRel = .Scale({-0.011423797, -0.0468594, .....Sign*0.04904489});
    AnyDrawNode drw = {
      ScaleXYZ = 0.0016*{1,1,1};
      RGB = {0,0,1};
      Visible = Off;
    };
  };

  AnyRefNode ABDM_Ins = {
    sRel = .Scale({-0.01451125, -0.04512901, .....Sign*0.06057417});
    AnyDrawNode drw = {
      ScaleXYZ = 0.0016*{1,1,1};
      RGB = {0,0,1};
      Visible = Off;
    };
  };

  AnyRefNode FDMB_Ins = {
    sRel = .Scale({-0.01631353, -0.04563326, .....Sign*0.05371447});
    AnyDrawNode drw = {
      ScaleXYZ = 0.0016*{1,1,1};
      RGB = {0,0,1};
      Visible = Off;
    };
  };
};//ProximalPhalange5


Foot.Toe2.MiddlePhalange2 = {
  AnyRefNode FDB2_Ins = {
    sRel = .Scale({-0.007313968, -0.1005565, .....Sign*0.01705284});
    AnyDrawNode drw = {
      ScaleXYZ = 0.0016*{1,1,1};
      RGB = {0,0,1};
      Visible = Off;
    };
  };
};


Foot.Toe3.MiddlePhalange3 = {
  AnyRefNode FDB3_Ins = {
    sRel = .Scale({-0.006497014, -0.09585599, .....Sign*0.03215466});
    AnyDrawNode drw = {
      ScaleXYZ = 0.0016*{1,1,1};
      RGB = {0,0,1};
      Visible = Off;
    };
  };
};


Foot.Toe4.MiddlePhalange4 = {
  AnyRefNode FDB4_Ins = {
    sRel = .Scale({-0.008452799, -0.0795011, .....Sign*0.04613647});
    AnyDrawNode drw = {
      ScaleXYZ = 0.0016*{1,1,1};
      RGB = {0,0,1};
      Visible = Off;
    };
  };
};


Foot.Toe5.MiddlePhalange5 = {
  AnyRefNode FDB5_Ins = {
    sRel = .Scale({-0.011038548, -0.06531157, .....Sign*0.05593129});
    AnyDrawNode drw = {
      ScaleXYZ = 0.0016*{1,1,1};
      RGB = {0,0,1};
      Visible = Off;
    };
  };
};


//*******************************************************************************
//Ligament nodes
//*******************************************************************************


Foot.Talus = {

  AnyRefNode LigTaloNavicularDorsalNode1 = {
    sRel = .Scale({0.05512954, 0.03340148, ....Sign*0.003669696});
    //AnyDrawRefFrame drw={ScaleXYZ={0.01,0.01,0.01};RGB={0,0,0};};
  };

  AnyRefNode LigTaloNavicularDorsalNode2 = {
    sRel = .Scale({0.05512954, 0.03340148, ....Sign*-0.005727986});
    //AnyDrawRefFrame drw={ScaleXYZ={0.01,0.01,0.01};RGB={0,0,0};};
  };

  //    AnyDrawWidgetLin DrwWidget =
  //    {
  //      Operation = &Main.Study.InitialConditions;
  //      UpdateEvent = OnMouseRelease;
  //      RefFrame = &..Talus;
  //      Target = &.LigTaloNavicularDorsalNode2.sRel;
  //    };

};//Talus


Foot.Midfoot.Calcaneus = {

  AnyRefNode LigBifurcateNode = {
    sRel = .Scale({0.0336735, 0.04625036, .....Sign*0.01967993});
    //AnyDrawRefFrame drw={ScaleXYZ={0.01,0.01,0.01};RGB={0,0,0};};
  };

  AnyRefNode LigCalcaneoCuboidDorsalNode1 = { sRel=.Scale({0.0119785 ,0.0455466 ,.....Sign*0.0282461});};
  AnyRefNode LigCalcaneoCuboidDorsalNode2 = { sRel=.Scale({0.0182008 ,0.0460656 ,.....Sign*0.0289096});};
  AnyRefNode LigCalcaneoCuboidDorsalNode3 = { sRel=.Scale({0.0241542 ,0.0461284 ,.....Sign*0.0285139});};
  AnyRefNode LigCalcaneoCuboidDorsalNode4 = { sRel=.Scale({0.027937 ,0.0452284 ,.....Sign*0.0247755});};
  //    AnyDrawWidgetLin DrwWidget =
  //    {
  //      Operation = &Main.Study.InitialConditions;
  //      UpdateEvent = OnMouseRelease;
  //      RefFrame = &..Calcaneus;
  //      Target = &.LigCalcaneoCuboidDorsalNode.sRel;
  //    };

};//Calcaneus


Foot.Midfoot.MedialCuneiform = {

  AnyRefNode LigCuneoNavicularDorsalNode = {
    sRel = .Scale({0.03633048, -0.0003063353, .....Sign*-0.01062832});
    //AnyDrawRefFrame drw={ScaleXYZ={0.01,0.01,0.01};RGB={0,0,0};};
  };


  AnyRefNode LigCuneoNavicularPlantarNode1a = {
    sRel = .Scale({0.01121636+0.002, 0.01258282+0.001, .....Sign*(-0.01398553-0.006)});
    //AnyDrawRefFrame drw={ScaleXYZ={0.01,0.01,0.01};RGB={0,0,0};};
  };

  AnyRefNode LigCuneoNavicularPlantarNode1b = {
    sRel = .Scale({0.01121636, 0.01258282, .....Sign*(-0.01398553-0.002)});
    //AnyDrawRefFrame drw={ScaleXYZ={0.01,0.01,0.01};RGB={0,0,0};};
  };

  AnyRefNode LigCuneoNavicularPlantarNode1c = {
    sRel = .Scale({0.01121636, 0.01258282, .....Sign*(-0.01398553+0.005)});
    //AnyDrawRefFrame drw={ScaleXYZ={0.01,0.01,0.01};RGB={0,0,0};};
  };


  AnyRefNode LigCuneoNavicularMedialNode1 = {
    sRel = .Scale({0.0339133,0.00184774,.....Sign*(-0.0132999)});
    //AnyDrawRefFrame drw={ScaleXYZ={0.01,0.01,0.01};RGB={0,0,0};};
  };
  //AnyRefNode LigCuneoNavicularMedialNode2 = {
  //  sRel = .Scale({0.0310431,0.00289079,....Sign*(-0.0156087)});
  //  AnyDrawRefFrame drw={ScaleXYZ={0.01,0.01,0.01};RGB={0,0,0};};
  //};
  AnyRefNode LigCuneoNavicularMedialNode2 = {
    sRel = .Scale({0.0290295,0.00454314,.....Sign*(-0.0177454)});
    //AnyDrawRefFrame drw={ScaleXYZ={0.01,0.01,0.01};RGB={0,0,0};};
  };
  //AnyRefNode LigCuneoNavicularMedialNode4 = {
  //  sRel = .Scale({0.0262474,0.00659215,....Sign*(-0.0206002)});
  //  AnyDrawRefFrame drw={ScaleXYZ={0.01,0.01,0.01};RGB={0,0,0};};
  //};
  AnyRefNode LigCuneoNavicularMedialNode3 = {
    sRel = .Scale({0.0231593,0.00869339,.....Sign*(-0.0220139)});
    //AnyDrawRefFrame drw={ScaleXYZ={0.01,0.01,0.01};RGB={0,0,0};};
  };
  AnyRefNode LigCuneoNavicularMedialNode4 = {
    sRel = .Scale({0.0183022,0.0121179,.....Sign*(-0.0215592)});
    //AnyDrawRefFrame drw={ScaleXYZ={0.01,0.01,0.01};RGB={0,0,0};};
  };


  //  AnyRefNode LigInterCuneiformDorsalNode = {
  //    sRel = .Scale({0.0391862, -0.004422931, ....Sign*-0.006992058});
  //    //AnyDrawRefFrame drw={ScaleXYZ={0.01,0.01,0.01};RGB={0,0,0};};
  //  };


  AnyRefNode LigInterMedialCuneiformIntermediateCuneiformDorsalNode1 = { sRel=.Scale({0.0386678 ,-0.0117096 ,.....Sign*-0.000279012});};
  AnyRefNode LigInterMedialCuneiformIntermediateCuneiformDorsalNode2 = { sRel=.Scale({0.0395051 ,-0.00780496 ,.....Sign*-0.00175255});};
  AnyRefNode LigInterMedialCuneiformIntermediateCuneiformDorsalNode3 = { sRel=.Scale({0.0384223 ,-0.00278144 ,.....Sign*-0.00647932});};
  AnyRefNode LigInterMedialCuneiformIntermediateCuneiformDorsalNode4 = { sRel=.Scale({0.0362559 ,0.00292628 ,.....Sign*-0.0102268});};

  AnyRefNode LigInterCuneiformPlantarNode = {
    sRel = .Scale({0.01390946, 0.007066191, .....Sign*-0.002083156});
    //AnyDrawRefFrame drw={ScaleXYZ={0.01,0.01,0.01};RGB={0,0,0};};
  };

  AnyRefNode LigTarsoMetatarsalDorsalNode1 = {
    sRel = .Scale({0.03691143, -0.01597189, .....Sign*-0.002938443});
    //AnyDrawRefFrame drw={ScaleXYZ={0.01,0.01,0.01};RGB={0,0,0};};
  };

  AnyRefNode LigTarsoMetatarsalDorsalNode3 = {
    sRel = .Scale({0.03691143, -0.01597189, .....Sign*-0.009938443});
    //AnyDrawRefFrame drw={ScaleXYZ={0.01,0.01,0.01};RGB={0,0,0};};
  };

  AnyRefNode LigTarsoMetatarsalDorsalNode2 = {
    sRel = .Scale({0.03837327, -0.01395894, .....Sign*-0.0004880731});
    //AnyDrawRefFrame drw={ScaleXYZ={0.01,0.01,0.01};RGB={0,0,0};};
  };

  AnyRefNode LigTarsoMetatarsalPlantarNode = {
    sRel = .Scale({0.004773117, -0.004273163, .....Sign*-0.006511236});
    //AnyDrawRefFrame drw={ScaleXYZ={0.01,0.01,0.01};RGB={0,0,0};};
  };

  AnyRefNode LigTarsoMetatarsalPlantarNode3 = {
    sRel = .Scale({0.004773117, -0.004273163, .....Sign*-0.012511236});
    //AnyDrawRefFrame drw={ScaleXYZ={0.01,0.01,0.01};RGB={0,0,0};};
  };

  AnyRefNode LigTarsoMetatarsalPlantarNode2 = {
    sRel = .Scale({0.008343955, -0.001461097, .....Sign*-0.001139465});
    //AnyDrawRefFrame drw={ScaleXYZ={0.01,0.01,0.01};RGB={0,0,0};};
  };


  AnyRefNode LigTarsoMetatarsalMedial1 = {
    sRel = .Scale({0.0330284,-0.0131688 , .....Sign*-0.0120174});
    AnyDrawRefFrame drw={ScaleXYZ={0.01,0.01,0.01};RGB={0,0,0};};
  };
  AnyRefNode LigTarsoMetatarsalMedial2 = {
    sRel = .Scale({0.029561, -0.0117479, .....Sign*-0.0143487});
    AnyDrawRefFrame drw={ScaleXYZ={0.01,0.01,0.01};RGB={0,0,0};};
  };
  AnyRefNode LigTarsoMetatarsalMedial3 = {
    sRel = .Scale({0.0260964, -0.00992058, .....Sign*-0.016031});
    //      AnyDrawRefFrame drw={ScaleXYZ={0.01,0.01,0.01};RGB={0,0,0};};
  };
  AnyRefNode LigTarsoMetatarsalMedial4 = {
    sRel = .Scale({0.0196337, -0.00752777, .....Sign*-0.0178272});
    //      AnyDrawRefFrame drw={ScaleXYZ={0.01,0.01,0.01};RGB={0,0,0};};
  };
  AnyRefNode LigTarsoMetatarsalMedial5 = {
    sRel = .Scale({0.0144949,-0.00564706, .....Sign*-0.0189329});
    //      AnyDrawRefFrame drw={ScaleXYZ={0.01,0.01,0.01};RGB={0,0,0};};
  };
  AnyRefNode LigTarsoMetatarsalMedial6 = {
    sRel =.Scale({0.0104949,-0.00364706, .....Sign*-0.0179329});
    //    AnyDrawRefFrame drw={ScaleXYZ={0.01,0.01,0.01};RGB={0,0,0};};
  };


  AnyRefNode LigTarsoMetatarsalLateral1 = {
    sRel = .Scale({0.0301249, -0.0156021, .....Sign*0.003611});
    //    AnyDrawRefFrame drw={ScaleXYZ={0.01,0.01,0.01};RGB={0,0,0};};
  };
  AnyRefNode LigTarsoMetatarsalLateral2 = {
    sRel = .Scale({0.025696, -0.0132853, .....Sign*0.00246665});
    //    AnyDrawRefFrame drw={ScaleXYZ={0.01,0.01,0.01};RGB={0,0,0};};
  };
  AnyRefNode LigTarsoMetatarsalLateral3 = {
    sRel = .Scale({0.0203711,-0.0107955 , .....Sign*0.0012248});
    //      AnyDrawRefFrame drw={ScaleXYZ={0.01,0.01,0.01};RGB={0,0,0};};
  };
  AnyRefNode LigTarsoMetatarsalLateral4 = {
    sRel = .Scale({0.0133243, -0.00736778, .....Sign*0.00114059});
    //      AnyDrawRefFrame drw={ScaleXYZ={0.01,0.01,0.01};RGB={0,0,0};};
  };


  AnyRefNode LigInterMet2MedCuneiNode1 = { sRel=.Scale({0.0381232 ,-0.0127553 ,.....Sign*0.00106176});};
  AnyRefNode LigInterMet2MedCuneiNode2 = { sRel=.Scale({0.0374615 ,-0.0151993 ,.....Sign*0.0011512});};
  AnyRefNode LigInterMet2MedCuneiNode3 = { sRel=.Scale({0.0362922 ,-0.0175371 ,.....Sign*0.00125109});};
  AnyRefNode LigInterMet2MedCuneiNode4 = { sRel=.Scale({0.0341516 ,-0.0205466 ,.....Sign*0.000457646});};


  AnyRefNode FHBM_Org = {
    sRel = .Scale({0.01781844-0.007, 0.01556046, .....Sign*(-0.008366071-0.004)});
    AnyDrawNode drw = {
      ScaleXYZ = 0.0016*{1,1,1};
      RGB = {0,0,1};
      Visible = Off;
    };
  };


  //    AnyDrawWidgetLin DrwWidget =
  //    {
  //      Operation = &Main.Study.InitialConditions;
  //      UpdateEvent = OnMouseRelease;
  //      RefFrame = &..MedialCuneiform;
  //      Target = &.LigTarsoMetatarsalPlantarNode2.sRel;
  //    };


};//MedialCuneiform


Foot.Midfoot.IntermediateCuneiform = {

  AnyRefNode LigCuneoNavicularDorsalNode = {
    sRel = .Scale({0.04306655, 0.00441377, .....Sign*0.004106634});
    //AnyDrawRefFrame drw={ScaleXYZ={0.01,0.01,0.01};RGB={0,0,0};};
  };

  AnyRefNode LigCuneoNavicularPlantarNode = {
    sRel = .Scale({0.01928374, 0.01034121, .....Sign*0.002022272});
    //AnyDrawRefFrame drw={ScaleXYZ={0.01,0.01,0.01};RGB={0,0,0};};
  };
  //
  //    AnyRefNode LigInterCuneiformDorsalNode1 = {
  //      sRel = .Scale({0.04160833, -0.001488154, ....Sign*0.0009503781});
  //      //AnyDrawRefFrame drw={ScaleXYZ={0.01,0.01,0.01};RGB={0,0,0};};
  //    };


  AnyRefNode LigInterMedialCuneiformIntermediateCuneiformDorsalNode1 = { sRel=.Scale({0.0394932 ,-0.00788994 ,.....Sign*0.00458367});};
  AnyRefNode LigInterMedialCuneiformIntermediateCuneiformDorsalNode2 = { sRel=.Scale({0.0407761 ,-0.00462524 ,.....Sign*0.00234292});};
  AnyRefNode LigInterMedialCuneiformIntermediateCuneiformDorsalNode3 = { sRel=.Scale({0.0413291 ,-6.39695e-05 ,.....Sign*-0.000735405});};
  AnyRefNode LigInterMedialCuneiformIntermediateCuneiformDorsalNode4 = { sRel=.Scale({0.0408475 ,0.00459119 ,.....Sign*-0.00399154});};

  //
  //    AnyRefNode LigInterCuneiformDorsalNode2 = {
  //      sRel = .Scale({0.04051233, 0.002378782, ....Sign*0.01072323});
  //      //AnyDrawRefFrame drw={ScaleXYZ={0.01,0.01,0.01};RGB={0,0,0};};
  //    };

  AnyRefNode InterIntermediateCuneiformLateralCuneiformDorsalNode1 = {sRel=.Scale({ 0.0365413 ,-0.00354445 ,.....Sign*0.014965});};
  AnyRefNode InterIntermediateCuneiformLateralCuneiformDorsalNode2 = {sRel=.Scale({  0.0369116,-0.000717652 ,.....Sign*0.014631});};
  AnyRefNode InterIntermediateCuneiformLateralCuneiformDorsalNode3 = { sRel=.Scale({ 0.0369967,0.0024291 ,.....Sign*0.014265});};
  AnyRefNode InterIntermediateCuneiformLateralCuneiformDorsalNode4 = { sRel=.Scale({ 0.0377985,0.00505063 ,.....Sign*0.0135541});};
  AnyRefNode InterIntermediateCuneiformLateralCuneiformDorsalNode5 = { sRel=.Scale({ 0.0387976,0.00815645 ,.....Sign*0.0120911});};

  AnyRefNode LigInterCuneiformPlantarNode1 = {
    sRel = .Scale({0.01800831, 0.006693925, .....Sign*0.000828813});
    //AnyDrawRefFrame drw={ScaleXYZ={0.01,0.01,0.01};RGB={0,0,0};};
  };

  AnyRefNode LigInterCuneiformPlantarNode2 = {
    sRel = .Scale({0.01800831, 0.007505115, .....Sign*0.003474001});
    //AnyDrawRefFrame drw={ScaleXYZ={0.01,0.01,0.01};RGB={0,0,0};};
  };

  AnyRefNode LigTarsoMetatarsalDorsalNode = {
    sRel = .Scale({0.04007277, -0.003621695, .....Sign*0.008810833});
    //AnyDrawRefFrame drw={ScaleXYZ={0.01,0.01,0.01};RGB={0,0,0};};
  };

  AnyRefNode LigTarsoMetatarsalPlantarNode = {
    sRel = .Scale({0.0157639, 0.003113357, .....Sign*0.003863466});
    //AnyDrawRefFrame drw={ScaleXYZ={0.01,0.01,0.01};RGB={0,0,0};};
  };

  //    AnyDrawWidgetLin DrwWidget =
  //    {
  //      Operation = &Main.Study.InitialConditions;
  //      UpdateEvent = OnMouseRelease;
  //      RefFrame = &..IntermediateCuneiform;
  //      Target = &.LigTarsoMetatarsalPlantarNode.sRel;
  //    };
};//IntermediateCuneiform


Foot.Midfoot.LateralCuneiform = {

  AnyRefNode LigCuneoNavicularDorsalNode = {
    sRel = .Scale({0.03608555, 0.01282962, .....Sign*0.01943371});
    //AnyDrawRefFrame drw={ScaleXYZ={0.01,0.01,0.01};RGB={0,0,0};};
  };

  AnyRefNode LigCuneoNavicularPlantarNode = {
    sRel = .Scale({0.01404895, 0.01460241, .....Sign*0.004517104});
    //AnyDrawRefFrame drw={ScaleXYZ={0.01,0.01,0.01};RGB={0,0,0};};
  };

  //    AnyRefNode LigInterCuneiformDorsalNode = {
  //      sRel = .Scale({0.03498267, 0.006981979, ....Sign*0.0186412});
  //      //AnyDrawRefFrame drw={ScaleXYZ={0.01,0.01,0.01};RGB={0,0,0};};
  //    };

  AnyRefNode InterIntermediateCuneiformLateralCuneiformDorsalNode1 = {sRel=.Scale({  0.0321321,-0.00252129 ,.....Sign*0.0200083});};
  AnyRefNode InterIntermediateCuneiformLateralCuneiformDorsalNode2 = { sRel=.Scale({ 0.033166,0.001146 ,.....Sign*0.0192364});};
  AnyRefNode InterIntermediateCuneiformLateralCuneiformDorsalNode3 = {sRel=.Scale({  0.0340832,0.00440284 ,.....Sign*0.0185262});};
  AnyRefNode InterIntermediateCuneiformLateralCuneiformDorsalNode4 = {sRel=.Scale({  0.0357613,0.00797619 ,.....Sign*0.0174999});};
  AnyRefNode InterIntermediateCuneiformLateralCuneiformDorsalNode5 = { sRel=.Scale({ 0.0369674,0.0113428 ,.....Sign*0.0157752});};


  //    AnyRefNode LigCuneoCuboidDorsalNode1 = {
  //      sRel = .Scale({0.02898803+0.005, 0.01326823+0.005, ....Sign*0.02532933});
  //      AnyDrawRefFrame drw={ScaleXYZ={0.01,0.01,0.01};RGB={0,0,0};};
  //    };


  AnyRefNode LigInterLateralCuneoCuboidDorsalNode1 = { sRel=.Scale({0.0216871 ,0.00566048 ,.....Sign*0.027813});};
  AnyRefNode LigInterLateralCuneoCuboidDorsalNode2 = { sRel=.Scale({0.0229426 ,0.00948736 ,.....Sign*0.0273453});};
  AnyRefNode LigInterLateralCuneoCuboidDorsalNode3 = { sRel=.Scale({0.0241354 ,0.0124933 ,.....Sign*0.0271006});};
  AnyRefNode LigInterLateralCuneoCuboidDorsalNode4 = { sRel=.Scale({0.0261765 ,0.0151668 ,.....Sign*0.0263282});};
  AnyRefNode LigInterLateralCuneoCuboidDorsalNode5 = { sRel=.Scale({0.027975 ,0.0175366 ,.....Sign*0.0247921});};
  AnyRefNode LigInterLateralCuneoCuboidDorsalNode6 = { sRel=.Scale({0.0304982 ,0.020978 ,.....Sign*0.0219309});};


  AnyRefNode LigInterCuneiformPlantarNode = {
    sRel = .Scale({0.01403804, 0.008974441, .....Sign*0.005368611});
    //AnyDrawRefFrame drw={ScaleXYZ={0.01,0.01,0.01};RGB={0,0,0};};
  };

  AnyRefNode LigCuneoCuboidPlantarNode = {
    sRel = .Scale({0.01095585, 0.01167599, .....Sign*0.009072888});
    //AnyDrawRefFrame drw={ScaleXYZ={0.01,0.01,0.01};RGB={0,0,0};};
  };

  AnyRefNode LigTarsoMetatarsalDorsalNode1 = {
    sRel = .Scale({0.03272081, -0.001148816, .....Sign*0.02060764});
    //AnyDrawRefFrame drw={ScaleXYZ={0.01,0.01,0.01};RGB={0,0,0};};
  };

  AnyRefNode LigTarsoMetatarsalDorsalNode2 = {
    sRel = .Scale({0.02873021, -0.0001951692, .....Sign*0.02531528});
    //AnyDrawRefFrame drw={ScaleXYZ={0.01,0.01,0.01};RGB={0,0,0};};
  };

  AnyRefNode LigTarsoMetatarsalDorsalNode3 = {
    sRel = .Scale({0.02464282, 0.005315962, .....Sign*0.02732466});
    //AnyDrawRefFrame drw={ScaleXYZ={0.01,0.01,0.01};RGB={0,0,0};};
  };

  AnyRefNode LigTarsoMetatarsalPlantarNode = {
    sRel = .Scale({0.008624715, 0.004141009, .....Sign*0.009261773});
    //AnyDrawRefFrame drw={ScaleXYZ={0.01,0.01,0.01};RGB={0,0,0};};
  };

  AnyRefNode LigTarsoMetatarsalPlantarNode2 = {
    sRel = .Scale({0.008624715, 0.006152453, .....Sign*0.01040525});
    //AnyDrawRefFrame drw={ScaleXYZ={0.01,0.01,0.01};RGB={0,0,0};};
  };

  //    AnyDrawWidgetLin DrwWidget =
  //    {
  //      Operation = &Main.Study.InitialConditions;
  //      UpdateEvent = OnMouseRelease;
  //      RefFrame = &..LateralCuneiform;
  //      Target = &.LigTarsoMetatarsalPlantarNode2.sRel;
  //    };

  AnyRefNode PI1_Org = {
    sRel = .Scale({0.01513845-0.008, -0.009156924+0.01, .....Sign*0.01175805});
    AnyDrawNode drw = {
      ScaleXYZ = 0.0016*{1,1,1};
      RGB = {0,0,1};
      Visible = Off;
    };
  };


  AnyRefNode FHBL_Org = {
    sRel = .Scale({0.01874826-0.005, 0.02087615-0.004, .....Sign*(0.001116394+0.005)});
    AnyDrawNode drw = {
      ScaleXYZ = 0.0016*{1,1,1};
      RGB = {0,0,1};
      Visible = Off;
    };
  };


  AnyRefNode ADHO_Org5 ={
    sRel = .Scale({0.01874826-0.011, 0.02087615-0.015, .....Sign*(0.001116394+0.009)});

    //AnyDrawRefFrame drwe={};
    AnyDrawNode drw = {
      ScaleXYZ = 0.0016*{1,1,1};
      RGB = {0,0,1};
      Visible = Off;
    };
  };

};//LateralCuneiform


Foot.Midfoot.Cuboid = {

  //    AnyRefNode LigCuneoCuboidDorsalNode1 = {
  //      sRel = .Scale({0.02361744+0.005, 0.01985103+0.005, ....Sign*0.02942976});
  //      AnyDrawRefFrame drw={ScaleXYZ={0.01,0.01,0.01};RGB={0,0,0};};
  //    };


  AnyRefNode LigInterLateralCuneoCuboidDorsalNode1 = { sRel=.Scale({0.0173269 ,0.0107463 ,.....Sign*0.0331501});};
  AnyRefNode LigInterLateralCuneoCuboidDorsalNode2 = { sRel=.Scale({0.0190772 ,0.0133985 ,.....Sign*0.0319048});};
  AnyRefNode LigInterLateralCuneoCuboidDorsalNode3 = { sRel=.Scale({0.0212314 ,0.0159055 ,.....Sign*0.0303427});};
  AnyRefNode LigInterLateralCuneoCuboidDorsalNode4 = { sRel=.Scale({0.0242538 ,0.0188505 ,.....Sign*0.028111});};
  AnyRefNode LigInterLateralCuneoCuboidDorsalNode5 = { sRel=.Scale({0.0263213 ,0.0214074 ,.....Sign*0.0267138});};
  AnyRefNode LigInterLateralCuneoCuboidDorsalNode6 = { sRel=.Scale({0.028818 ,0.025059 ,.....Sign*0.0238686});};
  AnyRefNode LigCuneoCuboidPlantarNode = {
    sRel = .Scale({0.004469605, 0.0162842, .....Sign*0.01369835});
    //AnyDrawRefFrame drw={ScaleXYZ={0.01,0.01,0.01};RGB={0,0,0};};
  };

  AnyRefNode LigCuboideoNavicularDorsalNode = {
    sRel = .Scale({0.03012582, 0.02795046, .....Sign*0.02221901});
    //AnyDrawRefFrame drw={ScaleXYZ={0.01,0.01,0.01};RGB={0,0,0};};
  };

  AnyRefNode LigCalcaneoCuboidBifurcateNode = {
    sRel = .Scale({0.02812582, 0.03195046, .....Sign*0.02521901});
    //AnyDrawRefFrame drw={ScaleXYZ={0.01,0.01,0.01};RGB={0,0,0};};
  };

  //    AnyRefNode LigCalcaneoCuboidDorsalNode1 = {
  //      sRel = .Scale({0.01786104+0.007, 0.03554614, ....Sign*0.03043097});
  //      AnyDrawRefFrame drw={ScaleXYZ={0.01,0.01,0.01};RGB={0,0,0};};
  //    };
  //
  //      AnyRefNode LigCalcaneoCuboidDorsalNode2 = {
  //      sRel = .Scale({0.01786104, 0.03554614, ....Sign*0.03043097});
  //      AnyDrawRefFrame drw={ScaleXYZ={0.01,0.01,0.01};RGB={0,0,0};};
  //    };
  //
  //      AnyRefNode LigCalcaneoCuboidDorsalNode3 = {
  //      sRel = .Scale({0.01786104-0.007, 0.03554614, ....Sign*0.03043097});
  //      AnyDrawRefFrame drw={ScaleXYZ={0.01,0.01,0.01};RGB={0,0,0};};
  //    };


  AnyRefNode LigCalcaneoCuboidDorsalNode1 = { sRel=.Scale({0.0131 ,0.0381 ,.....Sign*0.030});};
  AnyRefNode LigCalcaneoCuboidDorsalNode2 = { sRel=.Scale({0.0177 ,0.0387,.....Sign*0.0291});};
  AnyRefNode LigCalcaneoCuboidDorsalNode3 = { sRel=.Scale({0.0216 ,0.0387 ,.....Sign*0.0278});};
  AnyRefNode LigCalcaneoCuboidDorsalNode4 = { sRel=.Scale({0.0261 ,0.03913 ,.....Sign*0.0249});};
  AnyRefNode LigCuboideoNavicularPlantarNode = {
    sRel = .Scale({0.006036563, 0.02187255, .....Sign*0.01132662});
    //AnyDrawRefFrame drw={ScaleXYZ={0.01,0.01,0.01};RGB={0,0,0};};
  };

  AnyRefNode LigTarsoMetatarsalDorsalNode1 = {
    sRel = .Scale({0.01795895, 0.01380685, .....Sign*0.03355509});
    //AnyDrawRefFrame drw={ScaleXYZ={0.01,0.01,0.01};RGB={0,0,0};};
  };

  AnyRefNode LigTarsoMetatarsalDorsalNode2 = {
    sRel = .Scale({0.0103937, 0.02199664, .....Sign*0.03817728});
    //AnyDrawRefFrame drw={ScaleXYZ={0.01,0.01,0.01};RGB={0,0,0};};
  };

  AnyRefNode LigCuboidMetatarsal5DorsalNode1 = { sRel=.Scale({-0.00341382, 0.0264035, .....Sign*0.0409029});};
  AnyRefNode LigCuboidMetatarsal5DorsalNode2 = { sRel=.Scale({-0.000207859, 0.0236828, .....Sign*0.0417328});};
  AnyRefNode LigCuboidMetatarsal5DorsalNode3 = { sRel=.Scale({0.00289417, 0.0200828, .....Sign*0.0415456});};
  AnyRefNode LigCuboidMetatarsal5DorsalNode4 = { sRel=.Scale({0.00722258, 0.0152665, .....Sign*0.0405245});};

  AnyRefNode LigTarsoMetatarsalPlantarNode1 = {
    sRel = .Scale({0.002763601, 0.01095054, .....Sign*0.01906557});
    //AnyDrawRefFrame drw={ScaleXYZ={0.01,0.01,0.01};RGB={0,0,0};};
  };

  AnyRefNode LigTarsoMetatarsalPlantarNode2 = {
    sRel = .Scale({-0.001191369, 0.02261391, .....Sign*0.02717894});
    //AnyDrawRefFrame drw={ScaleXYZ={0.01,0.01,0.01};RGB={0,0,0};};
  };

  //    AnyDrawWidgetLin DrwWidget =
  //    {
  //      Operation = &Main.Study.InitialConditions;
  //      UpdateEvent = OnMouseRelease;
  //      RefFrame = &..Cuboid;
  //      Target = &.LigTarsoMetatarsalPlantarNode2.sRel;
  //    };

  AnyRefNode PI3_Org2 = {
    sRel = .Scale({-0.00170127-0.005, 0.01217688+0.008, .....Sign*0.02955879});
    AnyDrawNode drw = {
      ScaleXYZ = 0.0016*{1,1,1};
      RGB = {0,0,1};
      Visible = Off;
    };
  };

  AnyRefNode PI2_Org3 = {
    sRel = .Scale({0.002471484-0.005, 0.002813284+0.008, .....Sign*0.02066011});
    AnyDrawNode drw = {
      ScaleXYZ = 0.0016*{1,1,1};
      RGB = {0,0,1};
      Visible = Off;
    };
  };


  AnyRefNode FHBL_Org = {
    sRel = .Scale({0.01874826-0.005, 0.02087615+0.004, .....Sign*(0.001116394+0.007)});
    AnyDrawNode drw = {
      ScaleXYZ = 0.0016*{1,1,1};
      RGB = {0,0,1};
      Visible = Off;
    };
  };


  AnyRefNode ADHO_Org4 = {
    sRel = .Scale({0.01874826-0.014, 0.02087615-0.006, .....Sign*(0.001116394+0.009)});

    AnyDrawNode drw = {
      ScaleXYZ = 0.0016*{1,1,1};
      RGB = {0,0,1};
      Visible = Off;
    };
  };

};//Cuboid


Foot.Midfoot.Navicular = {

  AnyRefNode LigTaloNavicularDorsalNode1 = {
    sRel = .Scale({0.050783, 0.02086525, .....Sign*0.003669696});
    //AnyDrawRefFrame drw={ScaleXYZ={0.01,0.01,0.01};RGB={0,0,0};};
  };


  AnyRefNode LigTaloNavicularDorsalNode2 = {
    sRel = .Scale({0.050783, 0.02086525, .....Sign*-0.00573479});
    //AnyDrawRefFrame drw={ScaleXYZ={0.01,0.01,0.01};RGB={0,0,0};};
  };

  AnyRefNode LigCuboideoNavicularDorsalNode = {
    sRel = .Scale({0.04083733, 0.02482431, .....Sign*0.0148465});
    //AnyDrawRefFrame drw={ScaleXYZ={0.01,0.01,0.01};RGB={0,0,0};};
  };

  AnyRefNode LigCalcaneoNavicularBifurcateNode = {
    sRel = .Scale({0.03883733, 0.02882431, .....Sign*0.0144465});
    //AnyDrawRefFrame drw={ScaleXYZ={0.01,0.01,0.01};RGB={0,0,0};};
  };

  AnyRefNode LigCuboideoNavicularPlantarNode = {
    sRel = .Scale({0.02023073, 0.02555651, .....Sign*-0.008292243});
    //AnyDrawRefFrame drw={ScaleXYZ={0.01,0.01,0.01};RGB={0,0,0};};
  };

  AnyRefNode LigCuneoNavicularDorsalNode1 = {
    sRel = .Scale({0.03930724, 0.009788013, .....Sign*-0.01184292});
    //AnyDrawRefFrame drw={ScaleXYZ={0.01,0.01,0.01};RGB={0,0,0};};
  };

  AnyRefNode LigCuneoNavicularDorsalNode2 = {
    sRel = .Scale({0.04566825, 0.01256604, .....Sign*0.001301929});
    //AnyDrawRefFrame drw={ScaleXYZ={0.01,0.01,0.01};RGB={0,0,0};};
  };

  AnyRefNode LigCuneoNavicularDorsalNode3 = {
    sRel = .Scale({0.04054923, 0.01797549, .....Sign*0.01319012});
    //AnyDrawRefFrame drw={ScaleXYZ={0.01,0.01,0.01};RGB={0,0,0};};
  };
  AnyRefNode LigCuneoNavicularPlantarNode1a = {
    sRel = .Scale({0.02023073, 0.02378755, .....Sign*(-0.01700423-0.005)});
    //      AnyDrawRefFrame drw={ScaleXYZ={0.01,0.01,0.01};RGB={0,0,0};};
  };
  AnyRefNode LigCuneoNavicularPlantarNode1b = {
    sRel = .Scale({0.02023073, 0.02378755, .....Sign*-0.01700423});
    //      AnyDrawRefFrame drw={ScaleXYZ={0.01,0.01,0.01};RGB={0,0,0};};
  };
  AnyRefNode LigCuneoNavicularPlantarNode1c = {
    sRel = .Scale({0.02023073, 0.02378755, .....Sign*(-0.01700423+0.005)});
    //      AnyDrawRefFrame drw={ScaleXYZ={0.01,0.01,0.01};RGB={0,0,0};};
  };
  AnyRefNode LigCuneoNavicularPlantarNode2 = {
    sRel = .Scale({0.01928374, 0.0210117, .....Sign*-0.006099565});
    //AnyDrawRefFrame drw={ScaleXYZ={0.01,0.01,0.01};RGB={0,0,0};};
  };

  AnyRefNode LigCuneoNavicularPlantarNode3 = {
    sRel = .Scale({0.0198696, 0.02274215, .....Sign*-0.001929704});
    //AnyDrawRefFrame drw={ScaleXYZ={0.01,0.01,0.01};RGB={0,0,0};};
  };

  //    AnyDrawWidgetLin DrwWidget =
  //    {
  //      Operation = &Main.Study.InitialConditions;
  //      UpdateEvent = OnMouseRelease;
  //      RefFrame = &..Navicular;
  //      Target = &.LigCuneoNavicularPlantarNode3.sRel;
  //    };
};//Navicular


Foot.Midfoot.Metatarsal1 = {

  //
  //     AnyRefNode LigTarsoMetatarsalMedial = {
  //      sRel = .Scale({0.03120411-0.015, -0.02900914+0.005, ....Sign*-0.011679919-0.01}*.FootType.MetaScale);
  ////      AnyDrawRefFrame drw={ScaleXYZ={0.01,0.01,0.01};RGB={0,0,0};};
  ////st
  //    };
  //


  AnyRefNode LigTarsoMetatarsalMedial1 = {
    sRel = .Scale({0.0288552, -0.024868, .....Sign*-0.0145502});
    //    AnyDrawRefFrame drw={ScaleXYZ={0.01,0.01,0.01};RGB={0,0,0};};
  };
  AnyRefNode LigTarsoMetatarsalMedial2 = {
    sRel = .Scale({0.0260592,-0.02324 , .....Sign*-0.0175681});
    //    AnyDrawRefFrame drw={ScaleXYZ={0.01,0.01,0.01};RGB={0,0,0};};
  };
  AnyRefNode LigTarsoMetatarsalMedial3 = {
    sRel = .Scale({0.0224993,-0.0221188 , .....Sign*-0.0194587});
    //    AnyDrawRefFrame drw={ScaleXYZ={0.01,0.01,0.01};RGB={0,0,0};};
  };
  AnyRefNode LigTarsoMetatarsalMedial4 = {
    sRel = .Scale({0.0183657,-0.0201843 , .....Sign*-0.0203084});
    //    AnyDrawRefFrame drw={ScaleXYZ={0.01,0.01,0.01};RGB={0,0,0};};
  };
  AnyRefNode LigTarsoMetatarsalMedial5 = {
    sRel = .Scale({0.013786,-0.0179531, .....Sign*-0.019799});
    //    AnyDrawRefFrame drw={ScaleXYZ={0.01,0.01,0.01};RGB={0,0,0};};
  };

  AnyRefNode LigTarsoMetatarsalMedial6 = {
    sRel = .Scale({0.0083783, -0.0147464, .....Sign*-0.0132361});
    //    AnyDrawRefFrame drw={ScaleXYZ={0.01,0.01,0.01};RGB={0,0,0};};
  };


  AnyRefNode LigTarsoMetatarsalLateral1 = {
    sRel = .Scale({0.0253754, -0.0250627, .....Sign*0.00232391});
    //    AnyDrawRefFrame drw={ScaleXYZ={0.01,0.01,0.01};RGB={0,0,0};};
  };
  AnyRefNode LigTarsoMetatarsalLateral2 = {
    sRel = .Scale({0.0208214,-0.0233952 , .....Sign*0.00214677});
    //    AnyDrawRefFrame drw={ScaleXYZ={0.01,0.01,0.01};RGB={0,0,0};};
  };
  AnyRefNode LigTarsoMetatarsalLateral3 = {
    sRel = .Scale({0.0154444,-0.0214067 , .....Sign*0.00249268});
    //    AnyDrawRefFrame drw={ScaleXYZ={0.01,0.01,0.01};RGB={0,0,0};};
  };
  AnyRefNode LigTarsoMetatarsalLateral4 = {
    sRel = .Scale({0.0102986, -0.018577, .....Sign*0.00198091});
    //    AnyDrawRefFrame drw={ScaleXYZ={0.01,0.01,0.01};RGB={0,0,0};};
  };


  AnyRefNode LigTarsoMetatarsalDorsalNode = {
    sRel = .Scale({0.03120411, -0.02900914, .....Sign*-0.004679919}*.FootType.MetaScale);
    //      //AnyDrawRefFrame drw={ScaleXYZ={0.01,0.01,0.01};RGB={0,0,0};};
  };

  AnyRefNode LigTarsoMetatarsalDorsalNode2 = {
    sRel = .Scale({0.03120411, -0.02900914, .....Sign*-0.011679919}*.FootType.MetaScale);
    //AnyDrawRefFrame drw={ScaleXYZ={0.01,0.01,0.01};RGB={0,0,0};};
  };

  AnyRefNode LigTarsoMetatarsalPlantarNode = {
    sRel = .Scale({0.003358291, -0.01441719, .....Sign*-0.00542729}*.FootType.MetaScale);
    //AnyDrawRefFrame drw={ScaleXYZ={0.01,0.01,0.01};RGB={0,0,0};};
  };

  AnyRefNode LigTarsoMetatarsalPlantarNode2 = {
    sRel = .Scale({0.003358291, -0.01441719, .....Sign*-0.01142729}*.FootType.MetaScale);
    //AnyDrawRefFrame drw={ScaleXYZ={0.01,0.01,0.01};RGB={0,0,0};};
  };

  AnyRefNode LigPlantarPlateMed = {
    sRel = .Scale({-0.006865575, -0.06344456, .....Sign*-0.02088542});
    //AnyDrawRefFrame drw={ScaleXYZ={0.01,0.01,0.01};RGB={0,0,0};};
  };

  AnyRefNode LigPlantarPlateLat = {
    sRel = .Scale({-0.00428477, -0.06244126, .....Sign*-0.008357528});
    //AnyDrawRefFrame drw={ScaleXYZ={0.01,0.01,0.01};RGB={0,0,0};};
  };

  AnyRefNode DeepTransverseMTDorsal = {
    sRel = .Scale({0.01527411, -0.06520371, .....Sign*-0.0183044})*.FootType.MetaScale;
    //AnyDrawRefFrame drw={ScaleXYZ={0.01,0.01,0.01};RGB={0,0,0};};
  };

  AnyRefNode LigPlantarPlateMedDorsal = {
    sRel = .Scale({-0.006865575+0.02, -0.06344456-0.003, .....Sign*-0.02088542});
    //AnyDrawRefFrame drw={ScaleXYZ={0.01,0.01,0.01};RGB={0,0,0};};
  };

  AnyRefNode LigPlantarPlateLatDorsal = {
    sRel = .Scale({-0.00428477+0.02, -0.06244126-0.004, .....Sign*-0.008357528});
    // AnyDrawRefFrame drw={ScaleXYZ={0.01,0.01,0.01};RGB={0,0,0};};
  };


  //    AnyRefNode DeepTransverseMT = {
  //      sRel = .Scale({2.028746e-005, -0.06145172, -0.001531141});
  //      AnyDrawRefFrame drw={ScaleXYZ={0.01,0.01,0.01};RGB={0,0,0};};
  //    };
  //
  //    AnyRefNode DeepTransverseMTDorsal2 = {
  //      sRel = .Scale({0.004, -0.06145172, -0.002531141});
  //      AnyDrawRefFrame drw={ScaleXYZ={0.01,0.01,0.01};RGB={0,0,0};};
  //    };
  //
  //    AnyRefNode DeepTransverseMTPlantar = {
  //      sRel = .Scale({-0.004, -0.06145172, -0.001531141});
  //      AnyDrawRefFrame drw={ScaleXYZ={0.01,0.01,0.01};RGB={0,0,0};};
  //    };

  //    AnyDrawWidgetLin DrwWidget =
  //    {
  //      Operation = &Main.Study.InitialConditions;
  //      UpdateEvent = OnMouseRelease;
  //      RefFrame = &..Metatarsal1;
  //      Target = &.DeepTransverseMT.sRel;
  //    };
};


Foot.Midfoot.Metatarsal2 = {

  AnyRefNode LigTarsoMetatarsalDorsalNode1 = {
    sRel = .Scale({0.03686033, -0.01405186, .....Sign*0.007670587});
    //AnyDrawRefFrame drw={ScaleXYZ={0.01,0.01,0.01};RGB={0,0,0};};
  };

  AnyRefNode LigTarsoMetatarsalDorsalNode2 = {
    sRel = .Scale({0.03540542, -0.01283268, .....Sign*0.01260889});
    //AnyDrawRefFrame drw={ScaleXYZ={0.01,0.01,0.01};RGB={0,0,0};};
  };

  AnyRefNode LigTarsoMetatarsalDorsalNode3 = {
    sRel = .Scale({0.03463384, -0.00969736, .....Sign*0.01658211});
    //AnyDrawRefFrame drw={ScaleXYZ={0.01,0.01,0.01};RGB={0,0,0};};
  };

  AnyRefNode LigTarsoMetatarsalPlantarNode = {
    sRel = .Scale({0.01321758, -0.004708454, .....Sign*0.005929715});
    //AnyDrawRefFrame drw={ScaleXYZ={0.01,0.01,0.01};RGB={0,0,0};};
  };

  AnyRefNode LigInterMetatarsalDorsalNode = {
    sRel = .Scale({0.03257123, -0.01086723, .....Sign*0.0201505});
    //AnyDrawRefFrame drw={ScaleXYZ={0.01,0.01,0.01};RGB={0,0,0};};
  };

  AnyRefNode LigInterMetatarsalPlantarNode = {
    sRel = .Scale({0.01321758, -0.005729762, .....Sign*0.008303189});
    //AnyDrawRefFrame drw={ScaleXYZ={0.01,0.01,0.01};RGB={0,0,0};};
  };

  AnyRefNode LigPlantarPlateMed = {
    sRel = .Scale({-0.007252124, -0.06786828, .....Sign*0.005867076});
    //AnyDrawRefFrame drw={ScaleXYZ={0.01,0.01,0.01};RGB={0,0,0};};
  };

  AnyRefNode LigPlantarPlateLat = {
    sRel = .Scale({-0.007952124, -0.06678927, .....Sign*0.01484457});
    //AnyDrawRefFrame drw={ScaleXYZ={0.01,0.01,0.01};RGB={0,0,0};};
  };

  AnyRefNode DeepTransverseMTDorsal = {
    sRel = .Scale({0.007556107, -0.06897692, .....Sign*0.01293468});
    //AnyDrawRefFrame drw={ScaleXYZ={0.01,0.01,0.01};RGB={0,0,0};};
  };

  AnyRefNode LigPlantarPlateMedDorsal = {
    sRel = .Scale({-0.007252124+0.015, -0.06786828, .....Sign*(0.005+0.005867076)});
    //      AnyDrawRefFrame drw={ScaleXYZ={0.01,0.01,0.01};RGB={0,0,0};};
  };

  AnyRefNode LigPlantarPlateLatDorsal = {
    sRel = .Scale({-0.007952124+0.015, -0.06678927, .....Sign*(0.005+0.01484457)});
    //    AnyDrawRefFrame drw={ScaleXYZ={0.01,0.01,0.01};RGB={0,0,0};};
  };


  AnyRefNode LigInterMet3Met2DorsalNode1 = { sRel=.Scale({0.031194 ,-0.00714776 ,.....Sign*0.0196049});};
  AnyRefNode LigInterMet3Met2DorsalNode2 = { sRel=.Scale({0.0312083 ,-0.00954951 ,.....Sign*0.0206436});};
  AnyRefNode LigInterMet3Met2DorsalNode3 = { sRel=.Scale({0.0302629 ,-0.0120803 ,.....Sign*0.0208799});};
  AnyRefNode LigInterMet3Met2DorsalNode4 = { sRel=.Scale({0.0296094 ,-0.0148582 ,.....Sign*0.0201931});};

  AnyRefNode LigInterMet2MedCuneiNode1 = { sRel=.Scale({0.0362303 ,-0.0124851 ,.....Sign*0.00602564});};
  AnyRefNode LigInterMet2MedCuneiNode2 = { sRel=.Scale({0.0358508 ,-0.01513 ,.....Sign*0.00617846});};
  AnyRefNode LigInterMet2MedCuneiNode3 = { sRel=.Scale({0.0349588 ,-0.0171274 ,.....Sign*0.00624779});};
  AnyRefNode LigInterMet2MedCuneiNode4 = { sRel=.Scale({0.0329406 ,-0.0191006 ,.....Sign*0.00588826});};


  //    AnyRefNode DeepTransverseMTMed = {
  //      sRel = .Scale({-0.00180955, -0.06478063, 0.005115504});
  //      AnyDrawRefFrame drw={ScaleXYZ={0.01,0.01,0.01};RGB={0,0,0};};
  //    };
  //
  //    AnyRefNode DeepTransverseMTMedDorsal = {
  //      sRel = .Scale({0.00380955, -0.06478063, 0.005115504});
  //      AnyDrawRefFrame drw={ScaleXYZ={0.01,0.01,0.01};RGB={0,0,0};};
  //    };
  //
  //    AnyRefNode DeepTransverseMTMedPlantar = {
  //      sRel = .Scale({-0.00480955, -0.06478063, 0.005115504});
  //      AnyDrawRefFrame drw={ScaleXYZ={0.01,0.01,0.01};RGB={0,0,0};};
  //    };
  //
  //    AnyRefNode DeepTransverseMTLat = {
  //      sRel = .Scale({-0.002313329, -0.06384349, 0.0168312});
  //      AnyDrawRefFrame drw={ScaleXYZ={0.01,0.01,0.01};RGB={0,0,0};};
  //    };
  //
  //    AnyRefNode DeepTransverseMTLatDorsal = {
  //      sRel = .Scale({0.002313329, -0.06384349, 0.0178312});
  //      AnyDrawRefFrame drw={ScaleXYZ={0.01,0.01,0.01};RGB={0,0,0};};
  //    };
  //
  //    AnyRefNode DeepTransverseMTLatPlantar = {
  //      sRel = .Scale({-0.005313329, -0.06384349, 0.0158312});
  //      AnyDrawRefFrame drw={ScaleXYZ={0.01,0.01,0.01};RGB={0,0,0};};
  //    };

  //    AnyDrawWidgetLin DrwWidget =
  //    {
  //      Operation = &Main.Study.InitialConditions;
  //      UpdateEvent = OnMouseRelease;
  //      RefFrame = &..Metatarsal2;
  //      Target = &.DeepTransverseMTLat.sRel;
  //    };
};


Foot.Midfoot.Metatarsal3 = {

  AnyRefNode LigTarsoMetatarsalDorsalNode = {
    sRel = .Scale({0.02535414, -0.006911292, .....Sign*0.02741907});
    //AnyDrawRefFrame drw={ScaleXYZ={0.01,0.01,0.01};RGB={0,0,0};};
  };

  AnyRefNode LigTarsoMetatarsalPlantarNode = {
    sRel = .Scale({0.007405258, -0.003046674, .....Sign*0.01243655});
    //AnyDrawRefFrame drw={ScaleXYZ={0.01,0.01,0.01};RGB={0,0,0};};
  };

  AnyRefNode LigTarsoMetatarsalPlantarNode2 = {
    sRel = .Scale({0.009501069, -0.002791453, .....Sign*0.01061128});
    //AnyDrawRefFrame drw={ScaleXYZ={0.01,0.01,0.01};RGB={0,0,0};};
  };

  AnyRefNode LigInterMetatarsalDorsalNode1 = {
    sRel = .Scale({0.02744413, -0.009742792, .....Sign*0.02436658});
    //AnyDrawRefFrame drw={ScaleXYZ={0.01,0.01,0.01};RGB={0,0,0};};
  };

  AnyRefNode LigInterMetatarsalDorsalNode2 = {
    sRel = .Scale({0.02173733, -0.005366179, .....Sign*0.03090354});
    //AnyDrawRefFrame drw={ScaleXYZ={0.01,0.01,0.01};RGB={0,0,0};};
  };

  AnyRefNode LigInterMetatarsalPlantarNode1 = {
    sRel = .Scale({0.01011349, -0.004969644, .....Sign*0.01075603});
    //AnyDrawRefFrame drw={ScaleXYZ={0.01,0.01,0.01};RGB={0,0,0};};
  };

  AnyRefNode LigInterMetatarsalPlantarNode2 = {
    sRel = .Scale({0.006307853, -0.002995355, .....Sign*0.01535107});
    //AnyDrawRefFrame drw={ScaleXYZ={0.01,0.01,0.01};RGB={0,0,0};};
  };

  AnyRefNode LigPlantarPlateMed = {
    sRel = .Scale({-0.008439549, -0.06355159, .....Sign*0.01973332});
    //AnyDrawRefFrame drw={ScaleXYZ={0.01,0.01,0.01};RGB={0,0,0};};
  };

  AnyRefNode LigPlantarPlateLat = {
    sRel = .Scale({-0.009270349, -0.06119091, .....Sign*0.02793268});
    //AnyDrawRefFrame drw={ScaleXYZ={0.01,0.01,0.01};RGB={0,0,0};};
  };

  AnyRefNode DeepTransverseMTDorsal = {
    sRel = .Scale({0.005101825, -0.06353456, .....Sign*0.02756303});
    //AnyDrawRefFrame drw={ScaleXYZ={0.01,0.01,0.01};RGB={0,0,0};};
  };

  AnyRefNode LigPlantarPlateMedDorsal = {
    sRel = .Scale({-0.008439549+0.015, -0.06355159, .....Sign*(0.005+0.01973332)});
    //AnyDrawRefFrame drw={ScaleXYZ={0.01,0.01,0.01};RGB={0,0,0};};
  };

  AnyRefNode LigPlantarPlateLatDorsal = {
    sRel = .Scale({-0.009270349+0.015, -0.06119091, .....Sign*(0.005+0.02793268)});
    //AnyDrawRefFrame drw={ScaleXYZ={0.01,0.01,0.01};RGB={0,0,0};};
  };


  AnyRefNode LigInterMet4Met3DorsalNode1 = { sRel=.Scale({0.0213378 ,-0.000569337 ,.....Sign*0.0288225});};
  AnyRefNode LigInterMet4Met3DorsalNode2 = { sRel=.Scale({0.0217749 ,-0.00324964 ,.....Sign*0.0306209});};
  AnyRefNode LigInterMet4Met3DorsalNode3 = { sRel=.Scale({0.021792 ,-0.00559676 ,.....Sign*0.0309689});};
  AnyRefNode LigInterMet4Met3DorsalNode4 = { sRel=.Scale({0.020873 ,-0.00880499 ,.....Sign*0.0310713});};

  AnyRefNode LigInterMet3Met2DorsalNode1 = { sRel=.Scale({0.0279094 ,-0.00692712 ,.....Sign*0.0236385});};
  AnyRefNode LigInterMet3Met2DorsalNode2 = { sRel=.Scale({0.0274741 ,-0.00952492 ,.....Sign*0.0244158});};
  AnyRefNode LigInterMet3Met2DorsalNode3 = { sRel=.Scale({0.0270607 ,-0.0115719 ,.....Sign*0.0247299});};
  AnyRefNode LigInterMet3Met2DorsalNode4 = { sRel=.Scale({0.0265567 ,-0.0136596 ,.....Sign*0.0243276});};

  //    AnyRefNode DeepTransverseMTMed = {
  //      sRel = .Scale({-0.00281389, -0.06242019, 0.02040674});
  //      AnyDrawRefFrame drw={ScaleXYZ={0.01,0.01,0.01};RGB={0,0,0};};
  //    };
  //
  //    AnyRefNode DeepTransverseMTMedDorsal = {
  //      sRel = .Scale({0.00281389, -0.06242019, 0.02140674});
  //      AnyDrawRefFrame drw={ScaleXYZ={0.01,0.01,0.01};RGB={0,0,0};};
  //    };
  //
  //    AnyRefNode DeepTransverseMTMedPlantar = {
  //      sRel = .Scale({-0.00581389, -0.06242019, 0.02040674});
  //      AnyDrawRefFrame drw={ScaleXYZ={0.01,0.01,0.01};RGB={0,0,0};};
  //    };
  //
  //    AnyRefNode DeepTransverseMTLat = {
  //      sRel = .Scale({-0.004192699, -0.05773886, 0.03033609});
  //      AnyDrawRefFrame drw={ScaleXYZ={0.01,0.01,0.01};RGB={0,0,0};};
  //    };
  //
  //    AnyRefNode DeepTransverseMTLatDorsal = {
  //      sRel = .Scale({-0.000392699, -0.05773886, 0.03133609});
  //      AnyDrawRefFrame drw={ScaleXYZ={0.01,0.01,0.01};RGB={0,0,0};};
  //    };
  //
  //    AnyRefNode DeepTransverseMTLatPlantar = {
  //      sRel = .Scale({-0.007592699, -0.05773886, 0.02933609});
  //      AnyDrawRefFrame drw={ScaleXYZ={0.01,0.01,0.01};RGB={0,0,0};};
  //    };

  //    AnyDrawWidgetLin DrwWidget =
  //    {
  //      Operation = &Main.Study.InitialConditions;
  //      UpdateEvent = OnMouseRelease;
  //      RefFrame = &..Metatarsal3;
  //      Target = &.DeepTransverseMTLat.sRel;
  //    };
};


Foot.Midfoot.Metatarsal4 = {

  AnyRefNode LigTarsoMetatarsalDorsalNode1 = {
    sRel = .Scale({0.01729261, 0.002857451, .....Sign*0.03261124});
    //AnyDrawRefFrame drw={ScaleXYZ={0.01,0.01,0.01};RGB={0,0,0};};
  };

  AnyRefNode LigTarsoMetatarsalDorsalNode2 = {
    sRel = .Scale({0.01501601, 0.004611784, .....Sign*0.0349966});
    //AnyDrawRefFrame drw={ScaleXYZ={0.01,0.01,0.01};RGB={0,0,0};};
  };

  AnyRefNode LigTarsoMetatarsalPlantarNode = {
    sRel = .Scale({0.002612153, 0.002389183, .....Sign*0.02116314});
    //AnyDrawRefFrame drw={ScaleXYZ={0.01,0.01,0.01};RGB={0,0,0};};
  };

  AnyRefNode LigTarsoMetatarsalPlantarNode2 = {
    sRel = .Scale({0.004765002, 0.002318958, .....Sign*0.01809437});
    //AnyDrawRefFrame drw={ScaleXYZ={0.01,0.01,0.01};RGB={0,0,0};};
  };

  AnyRefNode LigInterMetatarsalDorsalNode1 = {
    sRel = .Scale({0.0164597, -0.001690631, .....Sign*0.03469276});
    //AnyDrawRefFrame drw={ScaleXYZ={0.01,0.01,0.01};RGB={0,0,0};};
  };

  AnyRefNode LigInterMetatarsalDorsalNode2 = {
    sRel = .Scale({0.01245941, 0.002819354, .....Sign*0.03825754});
    //AnyDrawRefFrame drw={ScaleXYZ={0.01,0.01,0.01};RGB={0,0,0};};
  };

  AnyRefNode LigInterMetatarsalPlantarNode1 = {
    sRel = .Scale({0.004199981, -0.001423353, .....Sign*0.0187912});
    //AnyDrawRefFrame drw={ScaleXYZ={0.01,0.01,0.01};RGB={0,0,0};};
  };

  AnyRefNode LigInterMetatarsalPlantarNode2 = {
    sRel = .Scale({0.0002586262, 0.0007463119, .....Sign*0.02337268});
    //AnyDrawRefFrame drw={ScaleXYZ={0.01,0.01,0.01};RGB={0,0,0};};
  };

  AnyRefNode LigPlantarPlateMed = {
    sRel = .Scale({-0.009254897, -0.05411702, .....Sign*0.03390286});
    //AnyDrawRefFrame drw={ScaleXYZ={0.01,0.01,0.01};RGB={0,0,0};};
  };

  AnyRefNode LigPlantarPlateLat = {
    sRel = .Scale({-0.01118255, -0.05077963, .....Sign*0.04201701});
    //AnyDrawRefFrame drw={ScaleXYZ={0.01,0.01,0.01};RGB={0,0,0};};
  };

  AnyRefNode DeepTransverseMTDorsal = {
    sRel = .Scale({0.003002459, -0.05358112, .....Sign*0.04083552});
    //AnyDrawRefFrame drw={ScaleXYZ={0.01,0.01,0.01};RGB={0,0,0};};
  };

  AnyRefNode LigPlantarPlateMedDorsal = {
    sRel = .Scale({-0.009254897+0.013, -0.05411702, .....Sign*(0.004+0.03390286)});
    //AnyDrawRefFrame drw={ScaleXYZ={0.01,0.01,0.01};RGB={0,0,0};};
  };

  AnyRefNode LigPlantarPlateLatDorsal = {
    sRel = .Scale({-0.01118255+0.013, -0.05077963, .....Sign*(0.004+0.04201701)});
    //AnyDrawRefFrame drw={ScaleXYZ={0.01,0.01,0.01};RGB={0,0,0};};
  };


  AnyRefNode LigInterMet5Met4DorsalNode1 = { sRel=.Scale({0.013066 ,0.00855437 ,.....Sign*0.0359273});};
  AnyRefNode LigInterMet5Met4DorsalNode2 = { sRel=.Scale({0.0124438 ,0.00594371 ,.....Sign*0.0377492});};
  AnyRefNode LigInterMet5Met4DorsalNode3 = { sRel=.Scale({0.0120539 ,0.00332869 ,.....Sign*0.0386794});};
  AnyRefNode LigInterMet5Met4DorsalNode4 = { sRel=.Scale({0.0107294 ,-0.000426263 ,.....Sign*0.0387313});};

  AnyRefNode LigInterMet4Met3DorsalNode1 = { sRel=.Scale({0.0178112 ,0.00118561 ,.....Sign*0.0315658});};
  AnyRefNode LigInterMet4Met3DorsalNode2 = { sRel=.Scale({0.0178191 ,-0.00211968 ,.....Sign*0.033123});};
  AnyRefNode LigInterMet4Met3DorsalNode3 = { sRel=.Scale({0.017564 ,-0.00418085 ,.....Sign*0.0337716});};
  AnyRefNode LigInterMet4Met3DorsalNode4 = { sRel=.Scale({0.0170107 ,-0.00658302 ,.....Sign*0.034176});};

  //    AnyRefNode DeepTransverseMTMed = {
  //      sRel = .Scale({-0.005715177, -0.05261998, 0.03424541});
  //      AnyDrawRefFrame drw={ScaleXYZ={0.01,0.01,0.01};RGB={0,0,0};};
  //    };
  //
  //    AnyRefNode DeepTransverseMTMedDorsal = {
  //      sRel = .Scale({-0.000715177, -0.05261998, 0.03424541});
  //      AnyDrawRefFrame drw={ScaleXYZ={0.01,0.01,0.01};RGB={0,0,0};};
  //    };
  //
  //    AnyRefNode DeepTransverseMTMedPlantar = {
  //      sRel = .Scale({-0.007715177, -0.05201998, 0.03424541});
  //      AnyDrawRefFrame drw={ScaleXYZ={0.01,0.01,0.01};RGB={0,0,0};};
  //    };
  //
  //    AnyRefNode DeepTransverseMTLat = {
  //      sRel = .Scale({-0.00572308, -0.04683329, 0.04418173});
  //      AnyDrawRefFrame drw={ScaleXYZ={0.01,0.01,0.01};RGB={0,0,0};};
  //    };
  //
  //    AnyRefNode DeepTransverseMTLatDorsal = {
  //      sRel = .Scale({-0.00212308, -0.04683329, 0.04418173});
  //      AnyDrawRefFrame drw={ScaleXYZ={0.01,0.01,0.01};RGB={0,0,0};};
  //    };
  //
  //    AnyRefNode DeepTransverseMTLatPlantar = {
  //      sRel = .Scale({-0.00922308, -0.04683329, 0.04318173});
  //      AnyDrawRefFrame drw={ScaleXYZ={0.01,0.01,0.01};RGB={0,0,0};};
  //    };


  //    AnyDrawWidgetLin DrwWidget =
  //    {
  //      Operation = &Main.Study.InitialConditions;
  //      UpdateEvent = OnMouseRelease;
  //      RefFrame = &..Metatarsal4;
  //      Target = &.DeepTransverseMTLat.sRel;
  //    };
};


Foot.Midfoot.Metatarsal5 = {

  //    AnyRefNode LigTarsoMetatarsalDorsalNode = {
  //      sRel = .Scale({0.005348266, 0.0163491, ....Sign*0.04174739});
  //      //AnyDrawRefFrame drw={ScaleXYZ={0.01,0.01,0.01};RGB={0,0,0};};
  //    };
  //
  AnyRefNode LigCuboidMetatarsal5DorsalNode1 = { sRel=.Scale({0.0031975, 0.0294495,.....Sign* 0.0360463});};
  AnyRefNode LigCuboidMetatarsal5DorsalNode2 = { sRel=.Scale({0.00583497, 0.0272828,.....Sign* 0.0384383});};
  AnyRefNode LigCuboidMetatarsal5DorsalNode3 = { sRel=.Scale({0.00910045, 0.0226865,.....Sign* 0.0386191});};
  AnyRefNode LigCuboidMetatarsal5DorsalNode4 = { sRel=.Scale({0.0132181, 0.0171241,.....Sign* 0.0373217});};

  AnyRefNode LigTarsoMetatarsalPlantarNode = {
    sRel = .Scale({-0.005728038, 0.01434116, .....Sign*0.03133876});
    //AnyDrawRefFrame drw={ScaleXYZ={0.01,0.01,0.01};RGB={0,0,0};};
  };

  AnyRefNode LigInterMetatarsalDorsalNode = {
    sRel = .Scale({0.008087335, 0.008338065, .....Sign*0.0422348});
    //AnyDrawRefFrame drw={ScaleXYZ={0.01,0.01,0.01};RGB={0,0,0};};
  };

  AnyRefNode LigInterMetatarsalPlantarNode = {
    sRel = .Scale({-0.003036879, 0.007852525, .....Sign*0.02840195});
    //AnyDrawRefFrame drw={ScaleXYZ={0.01,0.01,0.01};RGB={0,0,0};};
  };

  AnyRefNode LigPlantarPlateMed = {
    sRel = .Scale({-0.01054464, -0.03876222, .....Sign*0.04643081});
    //AnyDrawRefFrame drw={ScaleXYZ={0.01,0.01,0.01};RGB={0,0,0};};
  };

  AnyRefNode LigPlantarPlateLat = {
    sRel = .Scale({-0.0149126, -0.03556643, .....Sign*0.0521486});
    //AnyDrawRefFrame drw={ScaleXYZ={0.01,0.01,0.01};RGB={0,0,0};};
  };

  AnyRefNode DeepTransverseMTDorsal = {
    sRel = .Scale({-0.001330596, -0.03888475, .....Sign*0.05644042});
    //AnyDrawRefFrame drw={ScaleXYZ={0.01,0.01,0.01};RGB={0,0,0};};
  };

  AnyRefNode LigPlantarPlateMedDorsal = {
    sRel = .Scale({-0.01054464+0.01, -0.03876222, .....Sign*(0.008+0.04643081)});
    //AnyDrawRefFrame drw={ScaleXYZ={0.01,0.01,0.01};RGB={0,0,0};};
  };

  AnyRefNode LigPlantarPlateLatDorsal = {
    sRel = .Scale({-0.0149126+0.01, -0.03556643, .....Sign*(0.008+0.0521486)});
    //AnyDrawRefFrame drw={ScaleXYZ={0.01,0.01,0.01};RGB={0,0,0};};
  };


  AnyRefNode LigInterMet5Met4DorsalNode1 = { sRel=.Scale({0.0093894 ,0.0112619 ,.....Sign*0.039302});};
  AnyRefNode LigInterMet5Met4DorsalNode2 = { sRel=.Scale({0.00888827 ,0.00830112 ,.....Sign*0.0405713});};
  AnyRefNode LigInterMet5Met4DorsalNode3 = { sRel=.Scale({0.00813799 ,0.00620315 ,.....Sign*0.0422597});};
  AnyRefNode LigInterMet5Met4DorsalNode4 = { sRel=.Scale({0.00727928 ,0.00286997 ,.....Sign*0.0425524});};

  //    AnyRefNode DeepTransverseMT = {
  //      sRel = .Scale({-0.007202374, -0.03745083, 0.04694384});
  //      AnyDrawRefFrame drw={ScaleXYZ={0.01,0.01,0.01};RGB={0,0,0};};
  //    };
  //
  //    AnyRefNode DeepTransverseMTDorsal = {
  //      sRel = .Scale({-0.003202374, -0.03745083, 0.04794384});
  //      AnyDrawRefFrame drw={ScaleXYZ={0.01,0.01,0.01};RGB={0,0,0};};
  //    };
  //
  //    AnyRefNode DeepTransverseMTPlantar = {
  //      sRel = .Scale({-0.009502374, -0.03745083, 0.04694384});
  //      AnyDrawRefFrame drw={ScaleXYZ={0.01,0.01,0.01};RGB={0,0,0};};
  //    };


  //    AnyDrawWidgetLin DrwWidget =
  //    {
  //      Operation = &Main.Study.InitialConditions;
  //      UpdateEvent = OnMouseRelease;
  //      RefFrame = &..Metatarsal5;
  //      Target = &.DeepTransverseMT.sRel;
  //    };
};


Foot.Toe1.ProximalPhalange1 = {
  AnyRefNode PhalangealLigNode = {
    sRel = .Scale({-0.0089, -0.0948, .....Sign*-0.0081}*.FootType.ProxPhalScale);
  };

  AnyRefNode PhalangealLigNodeDorsal = {
    sRel = .Scale({-0.0089+0.015, -0.0948, .....Sign*-0.0081}*.FootType.ProxPhalScale);
    //AnyDrawRefFrame drw={ScaleXYZ={0.01,0.01,0.01};RGB={0,0,0};};
  }  ;


  AnyRefNode LigPlantarPlateMed = {
    sRel = .Scale({-0.009041832, -0.07371601, .....Sign*-0.01955807});
    //AnyDrawRefFrame drw={ScaleXYZ={0.01,0.01,0.01};RGB={0,0,0};};
  };

  AnyRefNode LigPlantarPlateLat = {
    sRel = .Scale({-0.007161166, -0.07388398, .....Sign*-0.007772364});
    //AnyDrawRefFrame drw={ScaleXYZ={0.01,0.01,0.01};RGB={0,0,0};};
  };


  AnyRefNode LigPlantarPlateMedDorsal = {
    sRel = .Scale({-0.009041832+0.017, -0.07371601-0.005, .....Sign*-0.01955807});
    //AnyDrawRefFrame drw={ScaleXYZ={0.01,0.01,0.01};RGB={0,0,0};};
  };

  AnyRefNode LigPlantarPlateLatDorsal = {
    sRel = .Scale({-0.007161166+0.017, -0.07388398-0.005, .....Sign*-0.007772364});
    //AnyDrawRefFrame drw={ScaleXYZ={0.01,0.01,0.01};RGB={0,0,0};};
  };


  //  AnyDrawWidgetLin DrwWidget =
  //  {
  //    Operation = &Main.Study.InitialConditions;
  //    UpdateEvent = OnMouseRelease;
  //    RefFrame = &..ProximalPhalange1;
  //    Target = &.PlantarPlateLat.sRel;
  //  };
};


Foot.Toe2.ProximalPhalange2 = {
  AnyRefNode PhalangealLigNode = {
    sRel = .Scale({-0.0071, -0.0962, .....Sign*0.0159});
  };

  AnyRefNode PhalangealLigNodeDorsal = {
    sRel = .Scale({-0.0071+0.01, -0.0962, .....Sign*0.0159});
    //AnyDrawRefFrame drw={ScaleXYZ={0.01,0.01,0.01};RGB={0,0,0};};

  };


  AnyRefNode LigPlantarPlateMed = {
    sRel = .Scale({-0.007252124, -0.07627603, .....Sign*0.006907831});
    //AnyDrawRefFrame drw={ScaleXYZ={0.01,0.01,0.01};RGB={0,0,0};};
  };

  AnyRefNode LigPlantarPlateLat = {
    sRel = .Scale({-0.009131757, -0.07460951, .....Sign*0.01586701});
    //AnyDrawRefFrame drw={ScaleXYZ={0.01,0.01,0.01};RGB={0,0,0};};
  };

  AnyRefNode LigPlantarPlateMedDorsal = {
    sRel = .Scale({-0.007252124+0.012, -0.002-0.07627603, .....Sign*(0.003+0.006907831)});
    //AnyDrawRefFrame drw={ScaleXYZ={0.01,0.01,0.01};RGB={0,0,0};};
  };

  AnyRefNode LigPlantarPlateLatDorsal = {
    sRel = .Scale({-0.009131757+0.012, -0.002-0.07460951, .....Sign*(0.003+0.01586701)});
    //AnyDrawRefFrame drw={ScaleXYZ={0.01,0.01,0.01};RGB={0,0,0};};
  };


  //  AnyDrawWidgetLin DrwWidget =
  //  {
  //    Operation = &Main.Study.InitialConditions;
  //    UpdateEvent = OnMouseRelease;
  //    RefFrame = &..ProximalPhalange2;
  //    Target = &.PlantarPlateMed.sRel;
  //  };
};


Foot.Toe3.ProximalPhalange3 = {
  AnyRefNode PhalangealLigNode = {
    sRel = .Scale({-0.0074, -0.0902, .....Sign*0.0313});
  };

  AnyRefNode PhalangealLigNodeDorsal = {
    sRel = .Scale({-0.0074+0.009, -0.0902+0.0015, .....Sign*(0.0313+0.001)});
    //AnyDrawRefFrame drw={ScaleXYZ={0.01,0.01,0.01};RGB={0,0,0};};
  };


  AnyRefNode LigPlantarPlateMed = {
    sRel = .Scale({-0.009217904, -0.07183775, .....Sign*0.02156897});
    //AnyDrawRefFrame drw={ScaleXYZ={0.01,0.01,0.01};RGB={0,0,0};};
  };

  AnyRefNode LigPlantarPlateLat = {
    sRel = .Scale({-0.01032721, -0.07007276, .....Sign*0.02991396});
    //AnyDrawRefFrame drw={ScaleXYZ={0.01,0.01,0.01};RGB={0,0,0};};
  };

  AnyRefNode LigPlantarPlateMedDorsal = {
    sRel = .Scale({-0.009217904+0.01, -0.07183775, .....Sign*(0.002+0.02156897)});
    //AnyDrawRefFrame drw={ScaleXYZ={0.01,0.01,0.01};RGB={0,0,0};};
  };

  AnyRefNode LigPlantarPlateLatDorsal = {
    sRel = .Scale({-0.01032721+0.011, -0.07007276, .....Sign*(0.002+0.02991396)});
    //AnyDrawRefFrame drw={ScaleXYZ={0.01,0.01,0.01};RGB={0,0,0};};
  };

  //  AnyDrawWidgetLin DrwWidget =
  //  {
  //    Operation = &Main.Study.InitialConditions;
  //    UpdateEvent = OnMouseRelease;
  //    RefFrame = &..ProximalPhalange3;
  //    Target = &.PlantarPlateLat.sRel;
  //  };
};


Foot.Toe4.ProximalPhalange4 = {
  AnyRefNode PhalangealLigNode = {
    sRel = .Scale({-0.0084, -0.0745, .....Sign*0.0450});
  };

  AnyRefNode PhalangealLigNodeDorsal = {
    sRel = .Scale({-0.0084+0.009, -0.0745, .....Sign*(0.0450+0.002)});
    //AnyDrawRefFrame drw={ScaleXYZ={0.01,0.01,0.01};RGB={0,0,0};};

  };

  AnyRefNode LigPlantarPlateMed = {
    sRel = .Scale({-0.009458956, -0.06159934, .....Sign*0.03624847});
    //AnyDrawRefFrame drw={ScaleXYZ={0.01,0.01,0.01};RGB={0,0,0};};
  };

  AnyRefNode LigPlantarPlateLat = {
    sRel = .Scale({-0.01103501, -0.05846369, .....Sign*0.0441383});
    //AnyDrawRefFrame drw={ScaleXYZ={0.01,0.01,0.01};RGB={0,0,0};};
  };


  AnyRefNode LigPlantarPlateMedDorsal = {
    sRel = .Scale({-0.009458956+0.01, -0.06159934, .....Sign*(0.003+0.03624847)});
    //AnyDrawRefFrame drw={ScaleXYZ={0.01,0.01,0.01};RGB={0,0,0};};
  };

  AnyRefNode LigPlantarPlateLatDorsal = {
    sRel = .Scale({-0.01103501+0.01, -0.05846369, .....Sign*(0.003+0.0441383)});
    //AnyDrawRefFrame drw={ScaleXYZ={0.01,0.01,0.01};RGB={0,0,0};};
  };
  //  AnyDrawWidgetLin DrwWidget =
  //  {
  //    Operation = &Main.Study.InitialConditions;
  //    UpdateEvent = OnMouseRelease;
  //    RefFrame = &..ProximalPhalange4;
  //    Target = &.PlantarPlateLat.sRel;
  //  };
};


Foot.Toe5.ProximalPhalange5 = {
  AnyRefNode PhalangealLigNode = {
    sRel = .Scale({-0.0115, -0.0612, .....Sign*0.0549});
  };


  AnyRefNode PhalangealLigNodeDorsal = {
    sRel = .Scale({-0.0115+0.008, -0.0612-0.001, .....Sign*(0.0549+0.005)});
    //AnyDrawRefFrame drw={ScaleXYZ={0.01,0.01,0.01};RGB={0,0,0};};
  };

  AnyRefNode LigPlantarPlateMed = {
    sRel = .Scale({-0.0107153, -0.0471899, .....Sign*0.04783847});
    //AnyDrawRefFrame drw={ScaleXYZ={0.01,0.01,0.01};RGB={0,0,0};};
  };

  AnyRefNode LigPlantarPlateLat = {
    sRel = .Scale({-0.01627676, -0.04519794, .....Sign*0.05370676});
    //AnyDrawRefFrame drw={ScaleXYZ={0.01,0.01,0.01};RGB={0,0,0};};
  };
  AnyRefNode LigPlantarPlateMedDorsal = {
    sRel = .Scale({-0.0107153+0.009, -0.0471899-0.001, .....Sign*(0.007+0.04783847)});
    //AnyDrawRefFrame drw={ScaleXYZ={0.01,0.01,0.01};RGB={0,0,0};};
  };

  AnyRefNode LigPlantarPlateLatDorsal = {
    sRel = .Scale({-0.01627676+0.01, -0.04519794-0.001, .....Sign*(0.007+0.05370676)});
    //AnyDrawRefFrame drw={ScaleXYZ={0.01,0.01,0.01};RGB={0,0,0};};
  };
  //  AnyDrawWidgetLin DrwWidget =
  //  {
  //    Operation = &Main.Study.InitialConditions;
  //    UpdateEvent = OnMouseRelease;
  //    RefFrame = &..ProximalPhalange5;
  //    Target = &.PlantarPlateLat.sRel;
  //  };
};


Foot.Toe2.MiddlePhalange2 = {
  AnyRefNode PhalangealLigNodeProx = {
    sRel = .Scale({-0.0073, -0.1005, .....Sign*0.0170});
  };

  AnyRefNode PhalangealLigNodeProxDorsal = {
    sRel = .Scale({-0.0073+0.01, -0.1005-0.004, .....Sign*(0.0170+0.002)});
    //AnyDrawRefFrame drw={ScaleXYZ={0.01,0.01,0.01};RGB={0,0,0};};
  };


  AnyRefNode PhalangealLigNodeDist = {
    sRel = .Scale({-0.0089, -0.1082, .....Sign*0.0200});
  };

  AnyRefNode PhalangealLigNodeDistDorsal = {
    sRel = .Scale({-0.0089+0.01, -0.1082-0.004, .....Sign*(0.0200+0.0005)});
    //AnyDrawRefFrame drw={ScaleXYZ={0.01,0.01,0.01};RGB={0,0,0};};
  };

};


Foot.Toe3.MiddlePhalange3 = {
  AnyRefNode PhalangealLigNodeProx = {
    sRel = .Scale({-0.0064, -0.0958, .....Sign*0.0322});
  };
  AnyRefNode PhalangealLigNodeProxDorsal = {
    sRel = .Scale({-0.0064+0.007, -0.0958-0.001, .....Sign*(0.0322+0.001)});
    //AnyDrawRefFrame drw={ScaleXYZ={0.01,0.01,0.01};RGB={0,0,0};};
  };
  AnyRefNode PhalangealLigNodeDist = {
    sRel = .Scale({-0.0118, -0.1033, .....Sign*0.0338});
  };

  AnyRefNode PhalangealLigNodeDistDorsal = {
    sRel = .Scale({-0.0118+0.01, -0.1033+0.001, .....Sign*(0.0338+0.001)});
    //AnyDrawRefFrame drw={ScaleXYZ={0.01,0.01,0.01};RGB={0,0,0};};
  };

};


Foot.Toe4.MiddlePhalange4 = {
  AnyRefNode PhalangealLigNodeProx = {
    sRel = .Scale({-0.0084, -0.0795, .....Sign*0.0461});
  };
  AnyRefNode PhalangealLigNodeProxDorsal = {
    sRel = .Scale({-0.0084+0.007, -0.0795-0.002, .....Sign*(0.0461+0.002)});
    //AnyDrawRefFrame drw={ScaleXYZ={0.01,0.01,0.01};RGB={0,0,0};};
  };


  AnyRefNode PhalangealLigNodeDist = {
    sRel = .Scale({-0.0134, -0.0852, .....Sign*0.0464});
  };

  AnyRefNode PhalangealLigNodeDistDorsal = {
    sRel = .Scale({-0.0134+0.01, -0.0852-0.0005, .....Sign*(0.0464+0.002)});
    //AnyDrawRefFrame drw={ScaleXYZ={0.01,0.01,0.01};RGB={0,0,0};};
  };

};


Foot.Toe5.MiddlePhalange5 = {
  AnyRefNode PhalangealLigNodeProx = {
    sRel = .Scale({-0.0110, -0.0653, .....Sign*0.0559});
  };

  AnyRefNode PhalangealLigNodeProxDorsal = {
    sRel = .Scale({-0.0110+0.006, -0.0653-0.002, .....Sign*(0.0559+0.005)});
    //AnyDrawRefFrame drw={ScaleXYZ={0.01,0.01,0.01};RGB={0,0,0};};
  };

  AnyRefNode PhalangealLigNodeDist = {
    sRel = .Scale({-0.0124, -0.0659, .....Sign*0.0557});
  };


  AnyRefNode PhalangealLigNodeDistDorsal = {
    sRel = .Scale({-0.0124+0.006, -0.0659-0.003, .....Sign*(0.0557+0.005)});
    //AnyDrawRefFrame drw={ScaleXYZ={0.01,0.01,0.01};RGB={0,0,0};};

  };
};


Foot.Toe1.DistalPhalange1 = {
  AnyRefNode PhalangealLigNode = {
    sRel = .Scale({-0.0091, -0.1076, .....Sign*-0.0048}*.FootType.DistPhalScale);
  };


};


Foot.Toe2.DistalPhalange2 = {
  AnyRefNode PhalangealLigNode = {
    sRel = .Scale({-0.0101, -0.1122, .....Sign*0.0217});
  };


};


Foot.Toe3.DistalPhalange3 = {
  AnyRefNode PhalangealLigNode = {
    sRel = .Scale({-0.0121, -0.1070, .....Sign*0.0349});
  };


};


Foot.Toe4.DistalPhalange4 = {
  AnyRefNode PhalangealLigNode = {
    sRel = .Scale({-0.0156, -0.0898, .....Sign*0.0465});
  };


};


Foot.Toe5.DistalPhalange5 = {
  AnyRefNode PhalangealLigNode = {
    sRel = .Scale({-0.0148, -0.0699, .....Sign*0.0548});
  };


};
