// This include file contains all the muscle parameter
// data of the intrinsic foot.
//
//Please note that it is necessary to calibrate the model. This data is not calibrated!


//The data for the PCSA, Lfbar and LM (used to calculate Lt0) comes from:
//Quantitative Analysis of the Intrinsic Muscles of the Foot. Kura et al. THE ANATOMICAL RECORD 249:143-151 (1997)
//
//This data set is prefered to the one from Yamaguchi (2007) because Yamaguchi data set is not complete.
//In addition kura data set has more statistical value (11 subjects against 4 for Yamaguchi).
//However the two data set present a good corelation.

//The data for the pennation angle comes from:
//Musculotendon Parameters and Musculoskeletal Pathways Within the Human Foot. Yamaguchi et al. Journal of Applied Biomechanics, 2007; 23:20-41. (2007)


//AnyVar StrengthScaleFoot = ...Scaling.StrengthScaling.Foot.StrengthScale;
//AnyVar FiberLengthScaleFoot = ...Scaling.FiberLengthScaling.Foot.FiberLengthScale;


AnyVar StrengthMusFoot = 27; // N/cm2    Same value as in legTD (Klein Horsman)


AnyMuscleModel3E ExtensorHallucisBrevis = {
  AnyVar PCSA = 1.34; //cm2
  F0 = PCSA*.StrengthMusFoot;
  Lfbar = 27.9/1000; // Optimum fiber length
  AnyVar LM = 65.7/1000; // Muscle length
  Lt0 = LM - (Lfbar*cos(Gammabar)); // Tendon slack length
  Gammabar = 13.09*(pi/180); // Pennation angle in radian

  Epsilonbar = 0.053; // Tendon strain at F0
  K1 = 10; // Factor for determining shortening speed at optimum length
  K2 = 0; // Factor for determining shortening speed at optimum length
  Fcfast = 0.4; // Factor for determining shortening speed at optimum length
  Jt = 3.0; // Shape parameter for the tendon stiffness
  Jpe = 3.0; // Shape parameter for the parallel stiffness
  PEFactor = 5; // Parameter for influence of parallel stiffness
};


AnyMuscleModel3E ExtensorDigitoriumBrevis2 = {
  AnyVar PCSA = 0.79; //cm2
  F0 = PCSA*.StrengthMusFoot;
  Lfbar = 28.0/1000; // Optimum fiber length
  AnyVar LM =69.8/1000 ; // Muscle length.
  Lt0 = LM - (Lfbar*cos(Gammabar)); // Tendon slack length
  Gammabar = 9.28*(pi/180); // Pennation angle in radian

  Epsilonbar = 0.053; // Tendon strain at F0
  K1 = 10; // Factor for determining shortening speed at optimum length
  K2 = 0; // Factor for determining shortening speed at optimum length
  Fcfast = 0.4; // Factor for determining shortening speed at optimum length
  Jt = 3.0; // Shape parameter for the tendon stiffness
  Jpe = 3.0; // Shape parameter for the parallel stiffness
  PEFactor = 5; // Parameter for influence of parallel stiffness
};


AnyMuscleModel3E ExtensorDigitoriumBrevis3 = {
  AnyVar PCSA = 0.51; //cm2
  F0 = PCSA*.StrengthMusFoot;
  Lfbar = 26.4/1000; // Optimum fiber length       .
  AnyVar LM = 82.2/1000; // Muscle length.
  Lt0 = LM - (Lfbar*cos(Gammabar)); // Tendon slack length
  Gammabar = 10.18*(pi/180); // Pennation angle in radian

  Epsilonbar = 0.053; // Tendon strain at F0
  K1 = 10; // Factor for determining shortening speed at optimum length
  K2 = 0; // Factor for determining shortening speed at optimum length
  Fcfast = 0.4; // Factor for determining shortening speed at optimum length
  Jt = 3.0; // Shape parameter for the tendon stiffness
  Jpe = 3.0; // Shape parameter for the parallel stiffness
  PEFactor = 5; // Parameter for influence of parallel stiffness
};


AnyMuscleModel3E ExtensorDigitoriumBrevis4 = {
  AnyVar PCSA = 0.44; //cm2
  F0 = PCSA*.StrengthMusFoot;
  Lfbar = 23.1/1000; // Optimum fiber length       .
  AnyVar LM = 70.4/1000; // Muscle length.
  Lt0 = LM - (Lfbar*cos(Gammabar)); // Tendon slack length
  Gammabar = 9.56*(pi/180); // Pennation angle in radian

  Epsilonbar = 0.053; // Tendon strain at F0
  K1 = 10; // Factor for determining shortening speed at optimum length
  K2 = 0; // Factor for determining shortening speed at optimum length
  Fcfast = 0.4; // Factor for determining shortening speed at optimum length
  Jt = 3.0; // Shape parameter for the tendon stiffness
  Jpe = 3.0; // Shape parameter for the parallel stiffness
  PEFactor = 5; // Parameter for influence of parallel stiffness
};


AnyMuscleModel3E DorsalInterosseous1Part1 = {
  AnyVar PCSA = 1.70/2; //cm2
  F0 = PCSA*.StrengthMusFoot;
  Lfbar = 16.1/1000; // Optimum fiber length       .
  AnyVar LM = 51.0/1000; // Muscle length.
  Lt0 = LM - (Lfbar*cos(Gammabar)); // Tendon slack length
  Gammabar = 20.95*(pi/180); // Pennation angle in radian

  Epsilonbar = 0.053; // Tendon strain at F0
  K1 = 10; // Factor for determining shortening speed at optimum length
  K2 = 0; // Factor for determining shortening speed at optimum length
  Fcfast = 0.4; // Factor for determining shortening speed at optimum length
  Jt = 3.0; // Shape parameter for the tendon stiffness
  Jpe = 3.0; // Shape parameter for the parallel stiffness
  PEFactor = 5; // Parameter for influence of parallel stiffness
};


AnyMuscleModel3E DorsalInterosseous1Part2 = {
  AnyVar PCSA = 1.70/2; //cm2
  F0 = PCSA*.StrengthMusFoot;
  Lfbar = 16.1/1000; // Optimum fiber length       .
  AnyVar LM = 51.0/1000; // Muscle length.
  Lt0 = LM - (Lfbar*cos(Gammabar)); // Tendon slack length
  Gammabar = 20.95*(pi/180); // Pennation angle in radian

  Epsilonbar = 0.053; // Tendon strain at F0
  K1 = 10; // Factor for determining shortening speed at optimum length
  K2 = 0; // Factor for determining shortening speed at optimum length
  Fcfast = 0.4; // Factor for determining shortening speed at optimum length
  Jt = 3.0; // Shape parameter for the tendon stiffness
  Jpe = 3.0; // Shape parameter for the parallel stiffness
  PEFactor = 5; // Parameter for influence of parallel stiffness
};


AnyMuscleModel3E DorsalInterosseous2Part1 = {
  AnyVar PCSA = 1.68/2; //cm2
  F0 = PCSA*.StrengthMusFoot;
  Lfbar = 15.3/1000; // Optimum fiber length       .
  AnyVar LM = 49.9/1000; // Muscle length.
  Lt0 = LM - (Lfbar*cos(Gammabar)); // Tendon slack length
  Gammabar = 17.13*(pi/180); // Pennation angle in radian

  Epsilonbar = 0.053; // Tendon strain at F0
  K1 = 10; // Factor for determining shortening speed at optimum length
  K2 = 0; // Factor for determining shortening speed at optimum length
  Fcfast = 0.4; // Factor for determining shortening speed at optimum length
  Jt = 3.0; // Shape parameter for the tendon stiffness
  Jpe = 3.0; // Shape parameter for the parallel stiffness
  PEFactor = 5; // Parameter for influence of parallel stiffness
};


AnyMuscleModel3E DorsalInterosseous2Part2 = {
  AnyVar PCSA = 1.68/2; //cm2
  F0 = PCSA*.StrengthMusFoot;
  Lfbar = 15.3/1000; // Optimum fiber length       .
  AnyVar LM = 49.9/1000; // Muscle length.
  Lt0 = LM - (Lfbar*cos(Gammabar)); // Tendon slack length
  Gammabar = 17.13*(pi/180); // Pennation angle in radian

  Epsilonbar = 0.053; // Tendon strain at F0
  K1 = 10; // Factor for determining shortening speed at optimum length
  K2 = 0; // Factor for determining shortening speed at optimum length
  Fcfast = 0.4; // Factor for determining shortening speed at optimum length
  Jt = 3.0; // Shape parameter for the tendon stiffness
  Jpe = 3.0; // Shape parameter for the parallel stiffness
  PEFactor = 5; // Parameter for influence of parallel stiffness
};


AnyMuscleModel3E DorsalInterosseous3Part1 = {
  AnyVar PCSA = 1.64/2; //cm2
  F0 = PCSA*.StrengthMusFoot;
  Lfbar = 15.6/1000; // Optimum fiber length       .
  AnyVar LM = 44.3/1000; // Muscle length.
  Lt0 = LM - (Lfbar*cos(Gammabar)); // Tendon slack length
  Gammabar = 14.73*(pi/180); // Pennation angle in radian

  Epsilonbar = 0.053; // Tendon strain at F0
  K1 = 10; // Factor for determining shortening speed at optimum length
  K2 = 0; // Factor for determining shortening speed at optimum length
  Fcfast = 0.4; // Factor for determining shortening speed at optimum length
  Jt = 3.0; // Shape parameter for the tendon stiffness
  Jpe = 3.0; // Shape parameter for the parallel stiffness
  PEFactor = 5; // Parameter for influence of parallel stiffness
};


AnyMuscleModel3E DorsalInterosseous3Part2 = {
  AnyVar PCSA = 1.64/2; //cm2
  F0 = PCSA*.StrengthMusFoot;
  Lfbar = 15.6/1000; // Optimum fiber length       .
  AnyVar LM = 44.3/1000; // Muscle length.
  Lt0 = LM - (Lfbar*cos(Gammabar)); // Tendon slack length
  Gammabar = 14.73*(pi/180); // Pennation angle in radian

  Epsilonbar = 0.053; // Tendon strain at F0
  K1 = 10; // Factor for determining shortening speed at optimum length
  K2 = 0; // Factor for determining shortening speed at optimum length
  Fcfast = 0.4; // Factor for determining shortening speed at optimum length
  Jt = 3.0; // Shape parameter for the tendon stiffness
  Jpe = 3.0; // Shape parameter for the parallel stiffness
  PEFactor = 5; // Parameter for influence of parallel stiffness
};


AnyMuscleModel3E DorsalInterosseous4Part1 = {
  AnyVar PCSA = 2.72/2; //cm2
  F0 = PCSA*.StrengthMusFoot;
  Lfbar = 16.0/1000; // Optimum fiber length       .
  AnyVar LM = 61.4/1000; // Muscle length.
  Lt0 = LM - (Lfbar*cos(Gammabar)); // Tendon slack length
  Gammabar = 18.42*(pi/180); // Pennation angle in radian

  Epsilonbar = 0.053; // Tendon strain at F0
  K1 = 10; // Factor for determining shortening speed at optimum length
  K2 = 0; // Factor for determining shortening speed at optimum length
  Fcfast = 0.4; // Factor for determining shortening speed at optimum length
  Jt = 3.0; // Shape parameter for the tendon stiffness
  Jpe = 3.0; // Shape parameter for the parallel stiffness
  PEFactor = 5; // Parameter for influence of parallel stiffness
};


AnyMuscleModel3E DorsalInterosseous4Part2 = {
  AnyVar PCSA = 2.72/2; //cm2
  F0 = PCSA*.StrengthMusFoot;
  Lfbar = 16.0/1000; // Optimum fiber length       .
  AnyVar LM = 61.4/1000; // Muscle length.
  Lt0 = LM - (Lfbar*cos(Gammabar)); // Tendon slack length
  Gammabar = 18.42*(pi/180); // Pennation angle in radian

  Epsilonbar = 0.053; // Tendon strain at F0
  K1 = 10; // Factor for determining shortening speed at optimum length
  K2 = 0; // Factor for determining shortening speed at optimum length
  Fcfast = 0.4; // Factor for determining shortening speed at optimum length
  Jt = 3.0; // Shape parameter for the tendon stiffness
  Jpe = 3.0; // Shape parameter for the parallel stiffness
  PEFactor = 5; // Parameter for influence of parallel stiffness
};


AnyMuscleModel3E AbductorHallucis = {
  AnyVar PCSA = 6.68; //cm2
  F0 = PCSA*.StrengthMusFoot;
  Lfbar = 23.0/1000; // Optimum fiber length       .
  AnyVar LM = 115.8/1000; // Muscle length.
  Lt0 = LM - (Lfbar*cos(Gammabar)); // Tendon slack length
  Gammabar = 13.77*(pi/180); // Pennation angle in radian

  Epsilonbar = 0.053; // Tendon strain at F0
  K1 = 10; // Factor for determining shortening speed at optimum length
  K2 = 0; // Factor for determining shortening speed at optimum length
  Fcfast = 0.4; // Factor for determining shortening speed at optimum length
  Jt = 3.0; // Shape parameter for the tendon stiffness
  Jpe = 3.0; // Shape parameter for the parallel stiffness
  PEFactor = 5; // Parameter for influence of parallel stiffness
};


AnyMuscleModel3E FlexorDigitorumBrevis2 = {
  AnyVar PCSA = 1.78; //cm2
  F0 = PCSA*.StrengthMusFoot;
  Lfbar = 25.4/1000; // Optimum fiber length       .
  AnyVar LM = 92.9/1000; // Muscle length.
  Lt0 = LM - (Lfbar*cos(Gammabar)); // Tendon slack length
  Gammabar = 14.15*(pi/180); // Pennation angle in radian

  Epsilonbar = 0.053; // Tendon strain at F0
  K1 = 10; // Factor for determining shortening speed at optimum length
  K2 = 0; // Factor for determining shortening speed at optimum length
  Fcfast = 0.4; // Factor for determining shortening speed at optimum length
  Jt = 3.0; // Shape parameter for the tendon stiffness
  Jpe = 3.0; // Shape parameter for the parallel stiffness
  PEFactor = 5; // Parameter for influence of parallel stiffness
};


AnyMuscleModel3E FlexorDigitorumBrevis3 = {
  AnyVar PCSA = 1.49; //cm2
  F0 = PCSA*.StrengthMusFoot;
  Lfbar = 22.8/1000; // Optimum fiber length       .
  AnyVar LM = 98.8/1000; // Muscle length.
  Lt0 = LM - (Lfbar*cos(Gammabar)); // Tendon slack length
  Gammabar = 29.74*(pi/180); // Pennation angle in radian

  Epsilonbar = 0.053; // Tendon strain at F0
  K1 = 10; // Factor for determining shortening speed at optimum length
  K2 = 0; // Factor for determining shortening speed at optimum length
  Fcfast = 0.4; // Factor for determining shortening speed at optimum length
  Jt = 3.0; // Shape parameter for the tendon stiffness
  Jpe = 3.0; // Shape parameter for the parallel stiffness
  PEFactor = 5; // Parameter for influence of parallel stiffness
};


AnyMuscleModel3E FlexorDigitorumBrevis4 = {
  AnyVar PCSA = 1.26; //cm2
  F0 = PCSA*.StrengthMusFoot;
  Lfbar = 20.8/1000; // Optimum fiber length       .
  AnyVar LM = 103.0/1000; // Muscle length.
  Lt0 = LM - (Lfbar*cos(Gammabar)); // Tendon slack length
  Gammabar = 23.77*(pi/180); // Pennation angle in radian

  Epsilonbar = 0.053; // Tendon strain at F0
  K1 = 10; // Factor for determining shortening speed at optimum length
  K2 = 0; // Factor for determining shortening speed at optimum length
  Fcfast = 0.4; // Factor for determining shortening speed at optimum length
  Jt = 3.0; // Shape parameter for the tendon stiffness
  Jpe = 3.0; // Shape parameter for the parallel stiffness
  PEFactor = 5; // Parameter for influence of parallel stiffness
};


AnyMuscleModel3E FlexorDigitorumBrevis5 = {
  AnyVar PCSA = 0.35; //cm2
  F0 = PCSA*.StrengthMusFoot;
  Lfbar = 18.2/1000; // Optimum fiber length       .
  AnyVar LM = 83.2/1000; // Muscle length.
  Lt0 = LM - (Lfbar*cos(Gammabar)); // Tendon slack length
  Gammabar = 20*(pi/180); // Pennation angle in radian. Estimated.

  Epsilonbar = 0.053; // Tendon strain at F0
  K1 = 10; // Factor for determining shortening speed at optimum length
  K2 = 0; // Factor for determining shortening speed at optimum length
  Fcfast = 0.4; // Factor for determining shortening speed at optimum length
  Jt = 3.0; // Shape parameter for the tendon stiffness
  Jpe = 3.0; // Shape parameter for the parallel stiffness
  PEFactor = 5; // Parameter for influence of parallel stiffness
};


AnyMuscleModel3E AbductorDigitiMinimi1 = {
  AnyVar PCSA = 3.79/3; //cm2
  F0 = PCSA*.StrengthMusFoot;
  Lfbar = 23.9/1000; // Optimum fiber length       .
  AnyVar LM = 112.8/1000; // Muscle length.
  Lt0 = LM - (Lfbar*cos(Gammabar)); // Tendon slack length
  Gammabar = 3.85*(pi/180); // Pennation angle in radian

  Epsilonbar = 0.053; // Tendon strain at F0
  K1 = 10; // Factor for determining shortening speed at optimum length
  K2 = 0; // Factor for determining shortening speed at optimum length
  Fcfast = 0.4; // Factor for determining shortening speed at optimum length
  Jt = 3.0; // Shape parameter for the tendon stiffness
  Jpe = 3.0; // Shape parameter for the parallel stiffness
  PEFactor = 5; // Parameter for influence of parallel stiffness
};


AnyMuscleModel3E AbductorDigitiMinimi2 = {
  AnyVar PCSA = 3.79/3; //cm2
  F0 = PCSA*.StrengthMusFoot;
  Lfbar = 23.9/1000; // Optimum fiber length       .
  AnyVar LM = 112.8/1000; // Muscle length.
  Lt0 = LM - (Lfbar*cos(Gammabar)); // Tendon slack length
  Gammabar = 3.85*(pi/180); // Pennation angle in radian

  Epsilonbar = 0.053; // Tendon strain at F0
  K1 = 10; // Factor for determining shortening speed at optimum length
  K2 = 0; // Factor for determining shortening speed at optimum length
  Fcfast = 0.4; // Factor for determining shortening speed at optimum length
  Jt = 3.0; // Shape parameter for the tendon stiffness
  Jpe = 3.0; // Shape parameter for the parallel stiffness
  PEFactor = 5; // Parameter for influence of parallel stiffness
};


AnyMuscleModel3E AbductorDigitiMinimi3 = {
  AnyVar PCSA = 3.79/3; //cm2
  F0 = PCSA*.StrengthMusFoot;
  Lfbar = 23.9/1000; // Optimum fiber length       .
  AnyVar LM = 112.8/1000; // Muscle length.
  Lt0 = LM - (Lfbar*cos(Gammabar)); // Tendon slack length
  Gammabar = 3.85*(pi/180); // Pennation angle in radian

  Epsilonbar = 0.053; // Tendon strain at F0
  K1 = 10; // Factor for determining shortening speed at optimum length
  K2 = 0; // Factor for determining shortening speed at optimum length
  Fcfast = 0.4; // Factor for determining shortening speed at optimum length
  Jt = 3.0; // Shape parameter for the tendon stiffness
  Jpe = 3.0; // Shape parameter for the parallel stiffness
  PEFactor = 5; // Parameter for influence of parallel stiffness
};


AnyMuscleModel3E Lumbrical2 = {
  AnyVar PCSA = 0.28; //cm2
  F0 = PCSA*.StrengthMusFoot;
  Lfbar = 22.4/1000; // Optimum fiber length       .
  AnyVar LM = 53.9/1000; // Muscle length.
  Lt0 = LM - (Lfbar*cos(Gammabar)); // Tendon slack length
  Gammabar = 5.62*(pi/180); // Pennation angle in radian

  Epsilonbar = 0.053; // Tendon strain at F0
  K1 = 10; // Factor for determining shortening speed at optimum length
  K2 = 0; // Factor for determining shortening speed at optimum length
  Fcfast = 0.4; // Factor for determining shortening speed at optimum length
  Jt = 3.0; // Shape parameter for the tendon stiffness
  Jpe = 3.0; // Shape parameter for the parallel stiffness
  PEFactor = 5; // Parameter for influence of parallel stiffness
};


AnyMuscleModel3E Lumbrical3 = {
  AnyVar PCSA = 0.28; //cm2
  F0 = PCSA*.StrengthMusFoot;
  Lfbar = 22.3/1000; // Optimum fiber length       .
  AnyVar LM = 45.2/1000; // Muscle length.
  Lt0 = LM - (Lfbar*cos(Gammabar)); // Tendon slack length
  Gammabar = 0.00*(pi/180); // Pennation angle in radian

  Epsilonbar = 0.053; // Tendon strain at F0
  K1 = 10; // Factor for determining shortening speed at optimum length
  K2 = 0; // Factor for determining shortening speed at optimum length
  Fcfast = 0.4; // Factor for determining shortening speed at optimum length
  Jt = 3.0; // Shape parameter for the tendon stiffness
  Jpe = 3.0; // Shape parameter for the parallel stiffness
  PEFactor = 5; // Parameter for influence of parallel stiffness
};


AnyMuscleModel3E Lumbrical4 = {
  AnyVar PCSA = 0.30; //cm2
  F0 = PCSA*.StrengthMusFoot;
  Lfbar = 21.1/1000; // Optimum fiber length       .
  AnyVar LM = 37.3/1000; // Muscle length.
  Lt0 = LM - (Lfbar*cos(Gammabar)); // Tendon slack length
  Gammabar = 5.16*(pi/180); // Pennation angle in radian

  Epsilonbar = 0.053; // Tendon strain at F0
  K1 = 10; // Factor for determining shortening speed at optimum length
  K2 = 0; // Factor for determining shortening speed at optimum length
  Fcfast = 0.4; // Factor for determining shortening speed at optimum length
  Jt = 3.0; // Shape parameter for the tendon stiffness
  Jpe = 3.0; // Shape parameter for the parallel stiffness
  PEFactor = 5; // Parameter for influence of parallel stiffness
};


AnyMuscleModel3E Lumbrical5 = {
  AnyVar PCSA = 0.18; //cm2
  F0 = PCSA*.StrengthMusFoot;
  Lfbar = 16.2/1000; // Optimum fiber length       .
  AnyVar LM = 41.0/1000; // Muscle length.
  Lt0 = LM - (Lfbar*cos(Gammabar)); // Tendon slack length
  Gammabar = 10.04*(pi/180); // Pennation angle in radian

  Epsilonbar = 0.053; // Tendon strain at F0
  K1 = 10; // Factor for determining shortening speed at optimum length
  K2 = 0; // Factor for determining shortening speed at optimum length
  Fcfast = 0.4; // Factor for determining shortening speed at optimum length
  Jt = 3.0; // Shape parameter for the tendon stiffness
  Jpe = 3.0; // Shape parameter for the parallel stiffness
  PEFactor = 5; // Parameter for influence of parallel stiffness
};


AnyMuscleModel3E QuadratusPlantarMedialis1 = {
  AnyVar PCSA = 1.96/3; //cm2
  F0 = PCSA*.StrengthMusFoot;
  Lfbar = 27.5/1000; // Optimum fiber length       .
  AnyVar LM = 81.3/1000; // Muscle length.
  Lt0 = LM - (Lfbar*cos(Gammabar)); // Tendon slack length
  Gammabar = 15.58*(pi/180); // Pennation angle in radian

  Epsilonbar = 0.053; // Tendon strain at F0
  K1 = 10; // Factor for determining shortening speed at optimum length
  K2 = 0; // Factor for determining shortening speed at optimum length
  Fcfast = 0.4; // Factor for determining shortening speed at optimum length
  Jt = 3.0; // Shape parameter for the tendon stiffness
  Jpe = 3.0; // Shape parameter for the parallel stiffness
  PEFactor = 5; // Parameter for influence of parallel stiffness
};


AnyMuscleModel3E QuadratusPlantarMedialis2 = {
  AnyVar PCSA = 1.96/3; //cm2
  F0 = PCSA*.StrengthMusFoot;
  Lfbar = 27.5/1000; // Optimum fiber length       .
  AnyVar LM = 81.3/1000; // Muscle length.
  Lt0 = LM - (Lfbar*cos(Gammabar)); // Tendon slack length
  Gammabar = 15.58*(pi/180); // Pennation angle in radian

  Epsilonbar = 0.053; // Tendon strain at F0
  K1 = 10; // Factor for determining shortening speed at optimum length
  K2 = 0; // Factor for determining shortening speed at optimum length
  Fcfast = 0.4; // Factor for determining shortening speed at optimum length
  Jt = 3.0; // Shape parameter for the tendon stiffness
  Jpe = 3.0; // Shape parameter for the parallel stiffness
  PEFactor = 5; // Parameter for influence of parallel stiffness
};


AnyMuscleModel3E QuadratusPlantarMedialis3 = {
  AnyVar PCSA = 1.96/3; //cm2
  F0 = PCSA*.StrengthMusFoot;
  Lfbar = 27.5/1000; // Optimum fiber length       .
  AnyVar LM = 81.3/1000; // Muscle length.
  Lt0 = LM - (Lfbar*cos(Gammabar)); // Tendon slack length
  Gammabar = 15.58*(pi/180); // Pennation angle in radian

  Epsilonbar = 0.053; // Tendon strain at F0
  K1 = 10; // Factor for determining shortening speed at optimum length
  K2 = 0; // Factor for determining shortening speed at optimum length
  Fcfast = 0.4; // Factor for determining shortening speed at optimum length
  Jt = 3.0; // Shape parameter for the tendon stiffness
  Jpe = 3.0; // Shape parameter for the parallel stiffness
  PEFactor = 5; // Parameter for influence of parallel stiffness
};


AnyMuscleModel3E QuadratusPlantarLateralis1 = {
  AnyVar PCSA = 1.00/3; //cm2
  F0 = PCSA*.StrengthMusFoot;
  Lfbar = 23.4/1000; // Optimum fiber length       .
  AnyVar LM = 55.3/1000; // Muscle length.
  Lt0 = LM - (Lfbar*cos(Gammabar)); // Tendon slack length
  Gammabar = 6.92*(pi/180); // Pennation angle in radian

  Epsilonbar = 0.053; // Tendon strain at F0
  K1 = 10; // Factor for determining shortening speed at optimum length
  K2 = 0; // Factor for determining shortening speed at optimum length
  Fcfast = 0.4; // Factor for determining shortening speed at optimum length
  Jt = 3.0; // Shape parameter for the tendon stiffness
  Jpe = 3.0; // Shape parameter for the parallel stiffness
  PEFactor = 5; // Parameter for influence of parallel stiffness
};


AnyMuscleModel3E QuadratusPlantarLateralis2 = {
  AnyVar PCSA = 1.00/3; //cm2
  F0 = PCSA*.StrengthMusFoot;
  Lfbar = 23.4/1000; // Optimum fiber length       .
  AnyVar LM = 55.3/1000; // Muscle length.
  Lt0 = LM - (Lfbar*cos(Gammabar)); // Tendon slack length
  Gammabar = 6.92*(pi/180); // Pennation angle in radian

  Epsilonbar = 0.053; // Tendon strain at F0
  K1 = 10; // Factor for determining shortening speed at optimum length
  K2 = 0; // Factor for determining shortening speed at optimum length
  Fcfast = 0.4; // Factor for determining shortening speed at optimum length
  Jt = 3.0; // Shape parameter for the tendon stiffness
  Jpe = 3.0; // Shape parameter for the parallel stiffness
  PEFactor = 5; // Parameter for influence of parallel stiffness
};


AnyMuscleModel3E QuadratusPlantarLateralis3 = {
  AnyVar PCSA = 1.00/3; //cm2
  F0 = PCSA*.StrengthMusFoot;
  Lfbar = 23.4/1000; // Optimum fiber length       .
  AnyVar LM = 55.3/1000; // Muscle length.
  Lt0 = LM - (Lfbar*cos(Gammabar)); // Tendon slack length
  Gammabar = 6.92*(pi/180); // Pennation angle in radian

  Epsilonbar = 0.053; // Tendon strain at F0
  K1 = 10; // Factor for determining shortening speed at optimum length
  K2 = 0; // Factor for determining shortening speed at optimum length
  Fcfast = 0.4; // Factor for determining shortening speed at optimum length
  Jt = 3.0; // Shape parameter for the tendon stiffness
  Jpe = 3.0; // Shape parameter for the parallel stiffness
  PEFactor = 5; // Parameter for influence of parallel stiffness
};


AnyMuscleModel3E FlexorHallucisBrevisMedialis = {
  AnyVar PCSA = 1.80; //cm2
  F0 = PCSA*.StrengthMusFoot;
  Lfbar = 17.5/1000; // Optimum fiber length       .
  AnyVar LM = 76.0/1000; // Muscle length.
  Lt0 = LM - (Lfbar*cos(Gammabar)); // Tendon slack length
  Gammabar = 8.92*(pi/180); // Pennation angle in radian

  Epsilonbar = 0.053; // Tendon strain at F0
  K1 = 10; // Factor for determining shortening speed at optimum length
  K2 = 0; // Factor for determining shortening speed at optimum length
  Fcfast = 0.4; // Factor for determining shortening speed at optimum length
  Jt = 3.0; // Shape parameter for the tendon stiffness
  Jpe = 3.0; // Shape parameter for the parallel stiffness
  PEFactor = 5; // Parameter for influence of parallel stiffness
};


AnyMuscleModel3E FlexorHallucisBrevisLateralis = {
  AnyVar PCSA = 2.12; //cm2
  F0 = PCSA*.StrengthMusFoot;
  Lfbar = 16.5/1000; // Optimum fiber length       .
  AnyVar LM = 65.3/1000; // Muscle length.
  Lt0 = LM - (Lfbar*cos(Gammabar)); // Tendon slack length
  Gammabar = 20.15*(pi/180); // Pennation angle in radian

  Epsilonbar = 0.053; // Tendon strain at F0
  K1 = 10; // Factor for determining shortening speed at optimum length
  K2 = 0; // Factor for determining shortening speed at optimum length
  Fcfast = 0.4; // Factor for determining shortening speed at optimum length
  Jt = 3.0; // Shape parameter for the tendon stiffness
  Jpe = 3.0; // Shape parameter for the parallel stiffness
  PEFactor = 5; // Parameter for influence of parallel stiffness
};


AnyMuscleModel3E AdductorHallucisOblique1 = {
  AnyVar PCSA = 4.94/3; //cm2
  F0 = PCSA*.StrengthMusFoot;
  Lfbar = 18.6/1000; // Optimum fiber length       .
  AnyVar LM = 67.4/1000; // Muscle length.
  Lt0 = LM - (Lfbar*cos(Gammabar)); // Tendon slack length
  Gammabar = 19.22*(pi/180); // Pennation angle in radian

  Epsilonbar = 0.053; // Tendon strain at F0
  K1 = 10; // Factor for determining shortening speed at optimum length
  K2 = 0; // Factor for determining shortening speed at optimum length
  Fcfast = 0.4; // Factor for determining shortening speed at optimum length
  Jt = 3.0; // Shape parameter for the tendon stiffness
  Jpe = 3.0; // Shape parameter for the parallel stiffness
  PEFactor = 5; // Parameter for influence of parallel stiffness
};

AnyMuscleModel3E AdductorHallucisOblique2 = {
  AnyVar PCSA = 4.94/3; //cm2
  F0 = PCSA*.StrengthMusFoot;
  Lfbar = 18.6/1000; // Optimum fiber length       .
  AnyVar LM = 67.4/1000; // Muscle length.
  Lt0 = LM - (Lfbar*cos(Gammabar)); // Tendon slack length
  Gammabar = 19.22*(pi/180); // Pennation angle in radian

  Epsilonbar = 0.053; // Tendon strain at F0
  K1 = 10; // Factor for determining shortening speed at optimum length
  K2 = 0; // Factor for determining shortening speed at optimum length
  Fcfast = 0.4; // Factor for determining shortening speed at optimum length
  Jt = 3.0; // Shape parameter for the tendon stiffness
  Jpe = 3.0; // Shape parameter for the parallel stiffness
  PEFactor = 5; // Parameter for influence of parallel stiffness
};

AnyMuscleModel3E AdductorHallucisOblique3 = {
  AnyVar PCSA = 4.94/3; //cm2
  F0 = PCSA*.StrengthMusFoot;
  Lfbar = 18.6/1000; // Optimum fiber length       .
  AnyVar LM = 67.4/1000; // Muscle length.
  Lt0 = LM - (Lfbar*cos(Gammabar)); // Tendon slack length
  Gammabar = 19.22*(pi/180); // Pennation angle in radian

  Epsilonbar = 0.053; // Tendon strain at F0
  K1 = 10; // Factor for determining shortening speed at optimum length
  K2 = 0; // Factor for determining shortening speed at optimum length
  Fcfast = 0.4; // Factor for determining shortening speed at optimum length
  Jt = 3.0; // Shape parameter for the tendon stiffness
  Jpe = 3.0; // Shape parameter for the parallel stiffness
  PEFactor = 5; // Parameter for influence of parallel stiffness
};


AnyMuscleModel3E AdductorHallucisTransverse1 = {
  AnyVar PCSA = 0.62/3; //cm2
  F0 = PCSA*.StrengthMusFoot;
  Lfbar = 18.7/1000; // Optimum fiber length       .
  AnyVar LM = 24.8/1000; // Muscle length.
  Lt0 = LM - (Lfbar*cos(Gammabar)); // Tendon slack length
  Gammabar = 9.94*(pi/180); // Pennation angle in radian

  Epsilonbar = 0.053; // Tendon strain at F0
  K1 = 10; // Factor for determining shortening speed at optimum length
  K2 = 0; // Factor for determining shortening speed at optimum length
  Fcfast = 0.4; // Factor for determining shortening speed at optimum length
  Jt = 3.0; // Shape parameter for the tendon stiffness
  Jpe = 3.0; // Shape parameter for the parallel stiffness
  PEFactor = 5; // Parameter for influence of parallel stiffness
};


AnyMuscleModel3E AdductorHallucisTransverse2 = {
  AnyVar PCSA = 0.62/3; //cm2
  F0 = PCSA*.StrengthMusFoot;
  Lfbar = 18.7/1000; // Optimum fiber length       .
  AnyVar LM = 24.8/1000; // Muscle length.
  Lt0 = LM - (Lfbar*cos(Gammabar)); // Tendon slack length
  Gammabar = 9.94*(pi/180); // Pennation angle in radian

  Epsilonbar = 0.053; // Tendon strain at F0
  K1 = 10; // Factor for determining shortening speed at optimum length
  K2 = 0; // Factor for determining shortening speed at optimum length
  Fcfast = 0.4; // Factor for determining shortening speed at optimum length
  Jt = 3.0; // Shape parameter for the tendon stiffness
  Jpe = 3.0; // Shape parameter for the parallel stiffness
  PEFactor = 5; // Parameter for influence of parallel stiffness
};

AnyMuscleModel3E AdductorHallucisTransverse3 = {
  AnyVar PCSA = 0.62/3; //cm2
  F0 = PCSA*.StrengthMusFoot;
  Lfbar = 18.7/1000; // Optimum fiber length       .
  AnyVar LM = 24.8/1000; // Muscle length.
  Lt0 = LM - (Lfbar*cos(Gammabar)); // Tendon slack length
  Gammabar = 9.94*(pi/180); // Pennation angle in radian

  Epsilonbar = 0.053; // Tendon strain at F0
  K1 = 10; // Factor for determining shortening speed at optimum length
  K2 = 0; // Factor for determining shortening speed at optimum length
  Fcfast = 0.4; // Factor for determining shortening speed at optimum length
  Jt = 3.0; // Shape parameter for the tendon stiffness
  Jpe = 3.0; // Shape parameter for the parallel stiffness
  PEFactor = 5; // Parameter for influence of parallel stiffness
};


AnyMuscleModel3E FlexorDigitiMinimiBrevis = {
  AnyVar PCSA = 2.00; //cm2
  F0 = PCSA*.StrengthMusFoot;
  Lfbar = 17.7/1000; // Optimum fiber length       .
  AnyVar LM = 51.0/1000; // Muscle length.
  Lt0 = LM - (Lfbar*cos(Gammabar)); // Tendon slack length
  Gammabar = 14.51*(pi/180); // Pennation angle in radian

  Epsilonbar = 0.053; // Tendon strain at F0
  K1 = 10; // Factor for determining shortening speed at optimum length
  K2 = 0; // Factor for determining shortening speed at optimum length
  Fcfast = 0.4; // Factor for determining shortening speed at optimum length
  Jt = 3.0; // Shape parameter for the tendon stiffness
  Jpe = 3.0; // Shape parameter for the parallel stiffness
  PEFactor = 5; // Parameter for influence of parallel stiffness
};


AnyMuscleModel3E PlantarInterosseous1 = {
  AnyVar PCSA = 1.23; //cm2
  F0 = PCSA*.StrengthMusFoot;
  Lfbar = 13.6/1000; // Optimum fiber length       .
  AnyVar LM = 46.2/1000; // Muscle length.
  Lt0 = LM - (Lfbar*cos(Gammabar)); // Tendon slack length
  Gammabar =14.03*(pi/180) ; // Pennation angle in radian

  Epsilonbar = 0.053; // Tendon strain at F0
  K1 = 10; // Factor for determining shortening speed at optimum length
  K2 = 0; // Factor for determining shortening speed at optimum length
  Fcfast = 0.4; // Factor for determining shortening speed at optimum length
  Jt = 3.0; // Shape parameter for the tendon stiffness
  Jpe = 3.0; // Shape parameter for the parallel stiffness
  PEFactor = 5; // Parameter for influence of parallel stiffness
};


AnyMuscleModel3E PlantarInterosseous2Part1 = {
  AnyVar PCSA = 1.41/3; //cm2
  F0 = PCSA*.StrengthMusFoot;
  Lfbar = 13.9/1000; // Optimum fiber length       .
  AnyVar LM = 56.6/1000; // Muscle length.
  Lt0 = LM - (Lfbar*cos(Gammabar)); // Tendon slack length
  Gammabar = 10.02*(pi/180); // Pennation angle in radian

  Epsilonbar = 0.053; // Tendon strain at F0
  K1 = 10; // Factor for determining shortening speed at optimum length
  K2 = 0; // Factor for determining shortening speed at optimum length
  Fcfast = 0.4; // Factor for determining shortening speed at optimum length
  Jt = 3.0; // Shape parameter for the tendon stiffness
  Jpe = 3.0; // Shape parameter for the parallel stiffness
  PEFactor = 5; // Parameter for influence of parallel stiffness
};


AnyMuscleModel3E PlantarInterosseous2Part2 = {
  AnyVar PCSA = 1.41/3; //cm2
  F0 = PCSA*.StrengthMusFoot;
  Lfbar = 13.9/1000; // Optimum fiber length       .
  AnyVar LM = 56.6/1000; // Muscle length.
  Lt0 = LM - (Lfbar*cos(Gammabar)); // Tendon slack length
  Gammabar = 10.02*(pi/180); // Pennation angle in radian

  Epsilonbar = 0.053; // Tendon strain at F0
  K1 = 10; // Factor for determining shortening speed at optimum length
  K2 = 0; // Factor for determining shortening speed at optimum length
  Fcfast = 0.4; // Factor for determining shortening speed at optimum length
  Jt = 3.0; // Shape parameter for the tendon stiffness
  Jpe = 3.0; // Shape parameter for the parallel stiffness
  PEFactor = 5; // Parameter for influence of parallel stiffness
};


AnyMuscleModel3E PlantarInterosseous2Part3 = {
  AnyVar PCSA = 1.41/3; //cm2
  F0 = PCSA*.StrengthMusFoot;
  Lfbar = 13.9/1000; // Optimum fiber length       .
  AnyVar LM = 56.6/1000; // Muscle length.
  Lt0 = LM - (Lfbar*cos(Gammabar)); // Tendon slack length
  Gammabar = 10.02*(pi/180); // Pennation angle in radian

  Epsilonbar = 0.053; // Tendon strain at F0
  K1 = 10; // Factor for determining shortening speed at optimum length
  K2 = 0; // Factor for determining shortening speed at optimum length
  Fcfast = 0.4; // Factor for determining shortening speed at optimum length
  Jt = 3.0; // Shape parameter for the tendon stiffness
  Jpe = 3.0; // Shape parameter for the parallel stiffness
  PEFactor = 5; // Parameter for influence of parallel stiffness
};


AnyMuscleModel3E PlantarInterosseous3Part1 = {
  AnyVar PCSA = 1.38/3; //cm2
  F0 = PCSA*.StrengthMusFoot;
  Lfbar = 14.2/1000; // Optimum fiber length       .
  AnyVar LM = 48.8/1000; // Muscle length.
  Lt0 = LM - (Lfbar*cos(Gammabar)); // Tendon slack length
  Gammabar = 8.52*(pi/180); // Pennation angle in radian

  Epsilonbar = 0.053; // Tendon strain at F0
  K1 = 10; // Factor for determining shortening speed at optimum length
  K2 = 0; // Factor for determining shortening speed at optimum length
  Fcfast = 0.4; // Factor for determining shortening speed at optimum length
  Jt = 3.0; // Shape parameter for the tendon stiffness
  Jpe = 3.0; // Shape parameter for the parallel stiffness
  PEFactor = 5; // Parameter for influence of parallel stiffness
};


AnyMuscleModel3E PlantarInterosseous3Part2 = {
  AnyVar PCSA = 1.38/3; //cm2
  F0 = PCSA*.StrengthMusFoot;
  Lfbar = 14.2/1000; // Optimum fiber length       .
  AnyVar LM = 48.8/1000; // Muscle length.
  Lt0 = LM - (Lfbar*cos(Gammabar)); // Tendon slack length
  Gammabar = 8.52*(pi/180); // Pennation angle in radian

  Epsilonbar = 0.053; // Tendon strain at F0
  K1 = 10; // Factor for determining shortening speed at optimum length
  K2 = 0; // Factor for determining shortening speed at optimum length
  Fcfast = 0.4; // Factor for determining shortening speed at optimum length
  Jt = 3.0; // Shape parameter for the tendon stiffness
  Jpe = 3.0; // Shape parameter for the parallel stiffness
  PEFactor = 5; // Parameter for influence of parallel stiffness
};


AnyMuscleModel3E PlantarInterosseous3Part3 = {
  AnyVar PCSA = 1.38/3; //cm2
  F0 = PCSA*.StrengthMusFoot;
  Lfbar = 14.2/1000; // Optimum fiber length       .
  AnyVar LM = 48.8/1000; // Muscle length.
  Lt0 = LM - (Lfbar*cos(Gammabar)); // Tendon slack length
  Gammabar = 8.52*(pi/180); // Pennation angle in radian

  Epsilonbar = 0.053; // Tendon strain at F0
  K1 = 10; // Factor for determining shortening speed at optimum length
  K2 = 0; // Factor for determining shortening speed at optimum length
  Fcfast = 0.4; // Factor for determining shortening speed at optimum length
  Jt = 3.0; // Shape parameter for the tendon stiffness
  Jpe = 3.0; // Shape parameter for the parallel stiffness
  PEFactor = 5; // Parameter for influence of parallel stiffness
};
