  AnyFolder LeftFootCalibration1={
    AnyFolder &SideHumanFolderRef=..HumanFolderRef.Left;
    AnyFolder &SideInterfaceRef=..HumanFolderRef.Interface.Left;
    #include "FootCal1.any"
  };


 CalibrationSequence ={
    AnyOperation &Cal1FootLeft = .LeftFootCalibration1.FootCalibrationStudy1.LigamentLengthAdjustment;
 };
