#ifdef DynamicCalibration

  AnyFolder RightFootCalibration1={
    AnyFolder &SideHumanFolderRef=..HumanFolderRef.Right;
    AnyFolder &SideInterfaceRef=..HumanFolderRef.Interface.Right;
    #include "FootCal1Dyn.any"
  };


  AnyFolder RightFootCalibration2={
    AnyFolder &SideHumanFolderRef=..HumanFolderRef.Right;
    AnyFolder &SideInterfaceRef=..HumanFolderRef.Interface.Right;
    #include "FootCal2Dyn.any"
  };

  AnyFolder RightFootCalibration3={
    AnyFolder &SideHumanFolderRef=..HumanFolderRef.Right;
    AnyFolder &SideInterfaceRef=..HumanFolderRef.Interface.Right;
    #include "FootCal3.any"
  };


 CalibrationSequence ={
    AnyOperation &Cal1FootRight = .RightFootCalibration1.FootCalibrationStudy1.LigamentLengthAdjustment;
    AnyOperation &Cal2FootRight = .RightFootCalibration2.FootCalibrationStudy2.LigamentLengthAdjustment;
    AnyOperation &Cal3FootRight = .RightFootCalibration3.FootCalibrationStudy3.LigamentLengthAdjustment;
 };


 #else


  AnyFolder RightFootCalibration1={
    AnyFolder &SideHumanFolderRef=..HumanFolderRef.Right;
    AnyFolder &SideInterfaceRef=..HumanFolderRef.Interface.Right;
    #include "FootCal1.any"
//    #include "FootCal1Arch.any"
  };


 CalibrationSequence ={
    AnyOperation &Cal1FootRight = .RightFootCalibration1.FootCalibrationStudy1.LigamentLengthAdjustment;
 };


 #endif
