AnyFolder FootCal1 ={

  AnyFolder &Pelvis = ...HumanFolderRef.Trunk.SegmentsLumbar.PelvisSeg; //This is a reference to the folder which holds the human part of the model
  AnyFolder &LegSegSide = .SideHumanFolderRef.Leg.Seg; //This is a reference to the folder which holds the human part of the model

  AnyFolder &JointsCal2 =  .SideHumanFolderRef.Leg.Jnt;


  AnyFixedRefFrame ground = {
    AnyRefNode node = {
       ARel=..Pelvis.Axes0;
      sRel=..Pelvis.r0;
    };
  };

  AnyRevoluteJoint PelvisGround={
    AnyRefFrame &Ground = .ground.node;
    AnyRefFrame &Sacrum= ....HumanFolderRef.Trunk.SegmentsLumbar.PelvisSeg;
    Axis=z;
  };

  AnyKinEqSimpleDriver PelvisGroundRot = {
    AnyRevoluteJoint &Jnt = .PelvisGround;
    DriverPos = {0};
    DriverVel = {0};
    Reaction.Type = {Off};
  };


  AnyKinEqSimpleDriver LegDriverRight = {
    AnyKinMeasure &Joint = ..SideHumanFolderRef.Leg.JntDOF;
    DriverPos = {0,0.0,0,0,0,0}; //-15 degrees dorsal flexion
    DriverVel = {0.0,0.0,0,0,0,0};
    Reaction.Type = {Off,Off,Off,Off,Off,Off};
  };


  //*****************************************************************************
  //Transverse Arch at MP joints (corresponds to tarsometa flexion and abduction)
  //*****************************************************************************


  AnySeg MPJointsArchDummySegRight =
  {
    r0 = .LegSegSide.Metatarsal1.r0 + .LegSegSide.Metatarsal1.MTHeadPlantarNode.sRel *.LegSegSide.Metatarsal1.Axes0';
    Axes0 = RotMat(r0, .LegSegSide.Metatarsal5.r0 + .LegSegSide.Metatarsal5.MTHeadPlantarNode.sRel *.LegSegSide.Metatarsal5.Axes0', r0+{1,0,0}*.LegSegSide.Metatarsal1.Axes0')*RotMat(..SideHumanFolderRef.Leg.Sign*pi/2,y)*RotMat(pi/2,z);
    Mass = 0;
    Jii = {0, 0, 0};
//    AnyDrawRefFrame drw = {ScaleXYZ = 0.03*{1,1,1};};
  };

  AnyUniversalJoint MPJointsArchDummySegJointRight =
  {
    Axis1 = x;
    Axis2 = y;
    AnyRefFrame &Metatarsal1 = .LegSegSide.Metatarsal1.MTHeadPlantarNode;
    AnyRefFrame &DummySeg = .MPJointsArchDummySegRight;
  };

  AnyKinEq MPJointsArchDummySegDriverRight = {
    AnyKinMeasureOrg MeasureOrg = {
      MeasureOrganizer = {0,1};
      AnyKinLinear Lin =
      {
        Ref = 0;
        AnyRefFrame &DummySeg = ...MPJointsArchDummySegRight;
        AnyRefFrame &MT5 = ...LegSegSide.Metatarsal5.MTHeadPlantarNode;
      };
    };
    Reaction.Type = {On, On};
  };


  AnyKinEq MPJointsArchRhythmRight = {
    AnyKinMeasureLinComb MPJointsArchLinComb =
    {
      AnyKinMeasureOrg MeasureOrgMT2 = {
        MeasureOrganizer = {0};
        AnyKinLinear Lin =
        {
          Ref = 0;
          AnyRefFrame &DummySeg = ....MPJointsArchDummySegRight;
          AnyRefFrame &MT2 = ....LegSegSide.Metatarsal2.MTHeadPlantarNode;
        };
      };

      AnyKinMeasureOrg MeasureOrgMT3 = {
        MeasureOrganizer = {0};
        AnyKinLinear Lin =
        {
          Ref = 0;
          AnyRefFrame &DummySeg = ....MPJointsArchDummySegRight;
          AnyRefFrame &MT2 = ....LegSegSide.Metatarsal3.MTHeadPlantarNode;
        };
      };

      AnyKinMeasureOrg MeasureOrgMT4 = {
        MeasureOrganizer = {0};
        AnyKinLinear Lin =
        {
          Ref = 0;
          AnyRefFrame &DummySeg = ....MPJointsArchDummySegRight;
          AnyRefFrame &MT2 = ....LegSegSide.Metatarsal4.MTHeadPlantarNode;
        };
      };

      Coef = {{2/3, -1, 0},{1.5/3, 0, -1}}; //estimated
//      Coef = {{-1, 0.5, 0},{0, 0.5, -1}}; //estimated
    };
    Reaction.Type = {Off, Off};
  };


  AnyKinEqSimpleDriver MPJointsArchDriverRight =
  {
    DriverPos = {0.0037};
    DriverVel = {0};
    AnyKinMeasure &Ref1 = .MPJointsArchRhythmRight.MPJointsArchLinComb.MeasureOrgMT2;
    Reaction.Type = {Off};
  };


  //***************************************************************************************
  //Transverse Arch at tarso metatarsal joints (replaces cunei flexion and cuboid eversion)
  //***************************************************************************************


  AnySeg TMTJointsArchDummySegRight =
  {
    r0 = .LegSegSide.Metatarsal1.r0 + .LegSegSide.Metatarsal1.MTBasePlantarNode.sRel *.LegSegSide.Metatarsal1.Axes0';
    Axes0 = RotMat(r0, .LegSegSide.Metatarsal5.r0 + .LegSegSide.Metatarsal5.MTBasePlantarNode.sRel *.LegSegSide.Metatarsal5.Axes0', r0+{1,0,0}*.LegSegSide.Metatarsal1.Axes0')*RotMat(..SideHumanFolderRef.Leg.Sign*pi/2,y)*RotMat(pi/2,z);
    Mass = 0;
    Jii = {0, 0, 0};
//    AnyDrawRefFrame drw = {ScaleXYZ = 0.03*{1,1,1};};
  };

  AnyUniversalJoint TMTJointsArchDummySegJointRight =
  {
    Axis1 = x;
    Axis2 = y;
    AnyRefFrame &Metatarsal1 = .LegSegSide.Metatarsal1.MTBasePlantarNode;
    AnyRefFrame &DummySeg = .TMTJointsArchDummySegRight;
  };

  AnyKinEq TMTJointsArchDummySegDriverRight = {
    AnyKinMeasureOrg MeasureOrg = {
      MeasureOrganizer = {0,1};
      AnyKinLinear Lin =
      {
        Ref = 0;
        AnyRefFrame &DummySeg = ...TMTJointsArchDummySegRight;
        AnyRefFrame &MT5 = ...LegSegSide.Metatarsal5.MTBasePlantarNode;
      };
    };
    Reaction.Type = {On, On};
  };


  AnyKinEq TMTJointsArchRhythmRight = {
    AnyKinMeasureLinComb TMTJointsArchLinComb =
    {
      AnyKinMeasureOrg MeasureOrgMT2 = {
        MeasureOrganizer = {0};
        AnyKinLinear Lin =
        {
          Ref = 0;
          AnyRefFrame &DummySeg = ....TMTJointsArchDummySegRight;
          AnyRefFrame &MT2 = ....LegSegSide.Metatarsal2.MTBasePlantarNode;
        };
      };

      AnyKinMeasureOrg MeasureOrgMT3 = {
        MeasureOrganizer = {0};
        AnyKinLinear Lin =
        {
          Ref = 0;
          AnyRefFrame &DummySeg = ....TMTJointsArchDummySegRight;
          AnyRefFrame &MT2 = ....LegSegSide.Metatarsal3.MTBasePlantarNode;
        };
      };

      AnyKinMeasureOrg MeasureOrgMT4 = {
        MeasureOrganizer = {0};
        AnyKinLinear Lin =
        {
          Ref = 0;
          AnyRefFrame &DummySeg = ....TMTJointsArchDummySegRight;
          AnyRefFrame &MT2 = ....LegSegSide.Metatarsal4.MTBasePlantarNode;
        };
      };

      Coef = {{0.64, -1, 0},{0.34, 0, -1}};
    };
    Reaction.Type = {Off, Off};
  };


  AnyKinEqSimpleDriver TMTJointsArchDriverRight =
  {
    DriverPos = {0.0132};
    DriverVel = {0};
    AnyKinMeasure &Ref1 = .TMTJointsArchRhythmRight.TMTJointsArchLinComb.MeasureOrgMT2;
    Reaction.Type = {Off};
  };


  //***************************************************************************************
  //Longitudinal Medial Arch ()
  //***************************************************************************************


  AnySeg LongitudinalMedialArchDummySegRight =
  {
    r0 = .LegSegSide.Calcaneus.r0 + .LegSegSide.Calcaneus.LongitudinalMedialArchNode.sRel *.LegSegSide.Calcaneus.Axes0';
    Axes0 = RotMat(r0, .LegSegSide.Metatarsal1.r0 + .LegSegSide.Metatarsal1.MTHeadPlantarNode.sRel *.LegSegSide.Metatarsal1.Axes0', r0+{1,0,0}*.LegSegSide.Calcaneus.Axes0')*RotMat(pi/2,z);
    Mass = 0;
    Jii = {0, 0, 0};
//    AnyDrawRefFrame drw = {ScaleXYZ = 0.03*{1,1,1};};
  };

  AnyUniversalJoint LongitudinalMedialArchDummySegJointRight =
  {
    Axis1 = x;
    Axis2 = z;
    AnyRefFrame &Calcaneus = .LegSegSide.Calcaneus.LongitudinalMedialArchNode;
    AnyRefFrame &DummySeg = .LongitudinalMedialArchDummySegRight;
  };

  AnyKinEq LongitudinalMedialArchDummySegDriverRight = {
    AnyKinMeasureOrg MeasureOrg = {
      MeasureOrganizer = {0,2};
      AnyKinLinear Lin =
      {
        Ref = 0;
        AnyRefFrame &DummySeg = ...LongitudinalMedialArchDummySegRight;
        AnyRefFrame &MT1 = ...LegSegSide.Metatarsal1.MTHeadPlantarNode;
      };
    };
    Reaction.Type = {On, On};
  };


  AnyKinEq LongitudinalMedialArchRhythmRight = {
    AnyKinMeasureLinComb LongitudinalMedialArchLinComb =
    {
      AnyKinMeasureOrg &MeasureOrgNavi = ...SideInterfaceRef.TaloNavicularDorsiFlexion;

      AnyKinMeasureOrg &MeasureOrgMedCunei = ...SideInterfaceRef.NaviculoMedialCuneiformDorsiFlexion;

      AnyKinMeasureOrg &MeasureOrgMeta1 = ...SideInterfaceRef.TarsoMetatarsal1DorsiFlexion;

      Coef = {{0.5, -1, 0},{0.5, 0, -1}};
    };
    Reaction.Type = {Off, Off};
  };


  AnyKinEqSimpleDriver LongitudinalMedialArchDriverRight =
  {
    DriverPos = {0.0350}*1.05;
    DriverVel = {0};
    AnyKinMeasureOrg MeasureOrgNavi = {
      MeasureOrganizer = {0};
      AnyKinLinear Lin =
      {
        Ref = 0;
        AnyRefFrame &DummySeg = ...LongitudinalMedialArchDummySegRight;
        AnyRefFrame &Navi = ...LegSegSide.Navicular.LongitudinalMedialArchNode;
      };
    };
    Reaction.Type = {Off};
  };


  //***************************************************************************************
  //Longitudinal Lateral Arch ()
  //***************************************************************************************


  AnySeg LongitudinalLateralArchDummySegRight =
  {
    r0 = .LegSegSide.Calcaneus.r0 + .LegSegSide.Calcaneus.LongitudinalLateralArchNode.sRel *.LegSegSide.Calcaneus.Axes0';
    Axes0 = RotMat(r0, .LegSegSide.Metatarsal5.r0 + .LegSegSide.Metatarsal5.MTHeadPlantarNode.sRel *.LegSegSide.Metatarsal5.Axes0', r0+{1,0,0}*.LegSegSide.Calcaneus.Axes0')*RotMat(pi/2,z);
    Mass = 0;
    Jii = {0, 0, 0};
//    AnyDrawRefFrame drw = {ScaleXYZ = 0.03*{1,1,1};};
  };

  AnyUniversalJoint LongitudinalLateralArchDummySegJointRight =
  {
    Axis1 = x;
    Axis2 = z;
    AnyRefFrame &Calcaneus = .LegSegSide.Calcaneus.LongitudinalLateralArchNode;
    AnyRefFrame &DummySeg = .LongitudinalLateralArchDummySegRight;
  };

  AnyKinEq LongitudinalLateralArchDummySegDriverRight = {
    AnyKinMeasureOrg MeasureOrg = {
      MeasureOrganizer = {0,2};
      AnyKinLinear Lin =
      {
        Ref = 0;
        AnyRefFrame &DummySeg = ...LongitudinalLateralArchDummySegRight;
        AnyRefFrame &MT5 = ...LegSegSide.Metatarsal5.MTHeadPlantarNode;
      };
    };
    Reaction.Type = {On, On};
  };


  AnyKinEq LongitudinalLateralArchRhythmRight = {
    AnyKinMeasureLinComb LongitudinalLateralArchLinComb =
    {
      AnyKinMeasureOrg &MeasureOrgCuboid = ...SideInterfaceRef.CalcaneoCuboidDorsiFlexion;

      AnyKinMeasureOrg &MeasureOrgMeta5 = ...SideInterfaceRef.TarsoMetatarsal5SkewDorsiFlexion;

      Coef = {{0.5, -1}};
    };
    Reaction.Type = {Off};
  };


  AnyKinEqSimpleDriver LongitudinalLateralArchDriverRight =
  {
    DriverPos = {0.0140}*1.2; //1.2
    DriverVel = {0};
    AnyKinMeasureOrg MeasureOrgCuboid = {
      MeasureOrganizer = {0};
      AnyKinLinear Lin =
      {
        Ref = 0;
        AnyRefFrame &DummySeg = ...LongitudinalLateralArchDummySegRight;
        AnyRefFrame &Navi = ...LegSegSide.Cuboid.LongitudinalLateralArchNode;
      };
    };
    Reaction.Type = {Off};
  };


  //************************************************
  //              DriverIntertarsal
  //************************************************


    AnyKinEqSimpleDriver JntTaloNaviRight =
    { // 0: Rot, 1: Ad/Ab 2: Df/Pf
      AnyKinMeasure &ref1 = ..SideInterfaceRef.TaloNavicularEversion;
      AnyKinMeasure &ref2 = ..SideInterfaceRef.TaloNavicularAbduction;
      //AnyKinMeasure &ref3 = ..SideInterfaceRef.TaloNavicularDorsiFlexion;
      //MeasureOrganizer = {0,2};
      DriverPos = {0,0}*pi/180;
      DriverVel = {0,0};
      Reaction.Type = {Off,Off};
    };

     AnyKinEqSimpleDriver JntNaviCuneiMedRight =
    {  // 0: Rot, 1: Ad/Ab 2: Df/Pf
      AnyKinMeasure &ref1 = ..SideInterfaceRef.NaviculoMedialCuneiformEversion;
      AnyKinMeasure &ref2 = ..SideInterfaceRef.NaviculoMedialCuneiformAbduction;
      //AnyKinMeasure &ref3 = ..SideInterfaceRef.NaviculoMedialCuneiformDorsiFlexion;
      //MeasureOrganizer = {0};
      DriverPos = {0,0}*pi/180;
      DriverVel = {0,0};
      Reaction.Type = {Off,Off};
    };


  //************************************************
  //              DriverTarsoMt
  //************************************************


    AnyKinEqSimpleDriver JntTarsoMt1Right =
    { // 0: Rot, 1: Ad/Ab 2: Df/Pf
      AnyKinMeasure &ref1 = ..SideInterfaceRef.TarsoMetatarsal1Eversion;
      AnyKinMeasure &ref2 = ..SideInterfaceRef.TarsoMetatarsal1Abduction;
      //AnyKinMeasure &ref3 = ..SideInterfaceRef.TarsoMetatarsal1DorsiFlexion;
      //MeasureOrganizer = {0};
      DriverPos = {0,0}*pi/180;
      DriverVel = {0,0};
      Reaction.Type = {Off,Off};
    };


    AnyKinEqSimpleDriver JntTarsoMt5Right =
    {
      AnyKinMeasure &ref1 = ..SideInterfaceRef.TarsoMetatarsal5SkewEversion;
      //AnyKinMeasure &ref2 = Main.HumanModel.BodyModel.Interface.Right.TarsoMetatarsal5Abduction; //Replaced by metatarsal head contact
      //AnyKinMeasure &ref3 = ..SideInterfaceRef.TarsoMetatarsal5SkewDorsiFlexion;
      DriverPos = {0}*pi/180;
      DriverVel = {0};
      Reaction.Type = {Off};
    };


  //************************************************
  //              DriverJntMtPhal
  //************************************************


    AnyKinEqSimpleDriver JntMtPhal1Right =
    {
      AnyKinMeasure &ref1 = ..SideInterfaceRef.MetatarsoPhalangeal1Abduction;
      AnyKinMeasure &ref2 = ..SideInterfaceRef.MetatarsoPhalangeal1DorsiFlexion;
      DriverPos = {0,0}*pi/180;
      DriverVel = {0,0};
      Reaction.Type = {Off, Off};
    };


    AnyKinEqSimpleDriver JntMtPhal2Right =
    {
      AnyKinMeasure &ref1 = ..SideInterfaceRef.MetatarsoPhalangeal2Abduction;
      AnyKinMeasure &ref2 = ..SideInterfaceRef.MetatarsoPhalangeal2DorsiFlexion;
      DriverPos = {0,0}*pi/180;
      DriverVel = {0,0};
      Reaction.Type = {Off, Off};
    };

    AnyKinEqSimpleDriver JntMtPhal3Right =
    {
      AnyKinMeasure &ref1 = ..SideInterfaceRef.MetatarsoPhalangeal3Abduction;
      AnyKinMeasure &ref2 = ..SideInterfaceRef.MetatarsoPhalangeal3DorsiFlexion;
      DriverPos = {0,0}*pi/180;
      DriverVel = {0,0};
      Reaction.Type = {Off, Off};
    };


    AnyKinEqSimpleDriver JntMtPhal4Right =
    {
      AnyKinMeasure &ref1 = ..SideInterfaceRef.MetatarsoPhalangeal4Abduction;
      AnyKinMeasure &ref2 = ..SideInterfaceRef.MetatarsoPhalangeal4DorsiFlexion;
      DriverPos = {0,0}*pi/180;
      DriverVel = {0,0};
      Reaction.Type = {Off, Off};
    };


    AnyKinEqSimpleDriver JntMtPhal5Right =
    {
      AnyKinMeasure &ref1 = ..SideInterfaceRef.MetatarsoPhalangeal5Abduction;
      AnyKinMeasure &ref2 = ..SideInterfaceRef.MetatarsoPhalangeal5DorsiFlexion;
      DriverPos = {0,0}*pi/180;
      DriverVel = {0,0};
      Reaction.Type = {Off, Off};
    };


  //************************************************
  //              DriverJntProxPhal
  //************************************************


    AnyKinEqSimpleDriver JntProxPhal1Right =
    {
      AnyKinMeasure &ref1 = ..SideInterfaceRef.ProximoDistalPhalange1DorsiFlexion;
      DriverPos = {0}*pi/180;
      DriverVel = {0};
      Reaction.Type = {Off};
    };


    AnyKinEqSimpleDriver JntProxPhal2Right =
    {
      AnyKinMeasure &ref1 = ..SideInterfaceRef.ProximoMedialPhalange2DorsiFlexion;
      DriverPos = {0}*pi/180;
      DriverVel = {0};
      Reaction.Type = {Off};
    };


    AnyKinEqSimpleDriver JntProxPhal3Right =
    {
      AnyKinMeasure &ref1 = ..SideInterfaceRef.ProximoMedialPhalange3DorsiFlexion;
      DriverPos = {0}*pi/180;
      DriverVel = {0};
      Reaction.Type = {Off};
    };


    AnyKinEqSimpleDriver JntProxPhal4Right =
    {
      AnyKinMeasure &ref1 = ..SideInterfaceRef.ProximoMedialPhalange4DorsiFlexion;
      DriverPos = {0}*pi/180;
      DriverVel = {0};
      Reaction.Type = {Off};
    };


    AnyKinEqSimpleDriver JntProxPhal5Right =
    {
      AnyKinMeasure &ref1 = ..SideInterfaceRef.ProximoMedialPhalange5DorsiFlexion;
      DriverPos = {0}*pi/180;
      DriverVel = {0};
      Reaction.Type = {Off};
    };


  //************************************************
  //              DriverJntDistPhal
  //************************************************


    AnyKinEqSimpleDriver JntDistPhal2Right =
    {
      AnyKinMeasure &ref1 = ..SideInterfaceRef.MedioDistalPhalange2DorsiFlexion;
      DriverPos = {0}*pi/180;
      DriverVel = {0};
      Reaction.Type = {Off};
    };


    AnyKinEqSimpleDriver JntDistPhal3Right =
    {
      AnyKinMeasure &ref1 = ..SideInterfaceRef.MedioDistalPhalange3DorsiFlexion;
      DriverPos = {0}*pi/180;
      DriverVel = {0};
      Reaction.Type = {Off};
    };


    AnyKinEqSimpleDriver JntDistPhal4Right =
    {
      AnyKinMeasure &ref1 = ..SideInterfaceRef.MedioDistalPhalange4DorsiFlexion;
      DriverPos = {0}*pi/180;
      DriverVel = {0};
      Reaction.Type = {Off};
    };


    AnyKinEqSimpleDriver JntDistPhal5Right =
    {
      AnyKinMeasure &ref1 = ..SideInterfaceRef.MedioDistalPhalange5DorsiFlexion;
      DriverPos = {0}*pi/180;
      DriverVel = {0};
      Reaction.Type = {Off};
    };


  // Calibration1 calibrates all the ligaments of the foot:
  AnyFolder &Ligaments = .SideHumanFolderRef.Leg.Ligaments;


};


// The study: Operations to be performed on the model
AnyBodyCalibrationStudy FootCalibrationStudy1 = {
  AnyFolder &ref=.FootCal1;
  nStep = 1;
};
