AnyFolder FootCal1 ={

  AnyFolder &Trunk = ...HumanFolderRef.Trunk; //This is a reference to the folder which holds the human part of the model
  AnyFolder &LegSegSide = .SideHumanFolderRef.Leg.Seg; //This is a reference to the folder which holds the human part of the model

  AnyFolder &JointsCal =  .SideHumanFolderRef.Leg.Jnt;


  AnyFolder &Mannequin = Main.Studies.InverseDynamicStudy.Mannequin;
  AnyFolder &Environment = Main.Studies.InverseDynamicStudy.EnvironmentModel.FootLocation;
  AnyFolder &ModelEnvironmentConnection = Main.Studies.InverseDynamicStudy.ModelEnvironmentConnection;


  // Calibration1 calibrates all the ligaments of the foot:
  AnyFolder &Ligaments = .SideHumanFolderRef.Leg.Ligaments;

};


// The study: Operations to be performed on the model
AnyBodyCalibrationStudy FootCalibrationStudy1 = {
  AnyFolder &ref=.FootCal1;
  nStep = 1; //floor(Main.Studies.InverseDynamicStudy.nStep*0.05);
  tStart = Main.Studies.InverseDynamicStudy.tStart;
  tEnd = Main.Studies.InverseDynamicStudy.tStart + 0.05*(Main.Studies.InverseDynamicStudy.tEnd-Main.Studies.InverseDynamicStudy.tStart);

//  InitialConditions.SolverType = KinSolOverDeterminate;
//  Kinematics.SolverType = KinSolOverDeterminate;
//  Kinematics.PosAnalysisOnlyOnOff = On;
};
