AnyRevoluteJoint Ankle = {
  Axis = z; //flexion extension
  //Axis2  =  x; //abduction adduction
  AnyRefNode &ShankNode = ..Seg.Shank.AnkleJoint;
  AnyRefNode &FootNode  = ..Seg.Talus.AnkleJoint;
  //ShankNode ={AnyDrawRefFrame drw={RGB={0,1,0};};};
  Constraints.Reaction ={#include "DrawForceInJoint.any"};

};

AnyRevoluteJoint SubTalar = {
  //Axis1 = z; //flexion extension
  Axis =  z; //inversion eversion
  AnyRefNode &TalusNode = ..Seg.Talus.SubTalarJoint;
  AnyRefNode &FootNode  = ..Seg.Calcaneus.SubTalarJoint;
  //TalusNode ={AnyDrawRefFrame drw={RGB={1,0,0};};};
  Constraints.Reaction ={#include "DrawForceInJoint.any"};

};


AnyFolder FootJnt = {


  //************************************************
  //              JntIntertarsal
  //************************************************


  AnySphericalJoint TaloNavi =
  {
    AnyRefFrame &Talus = ...Seg.Talus.TaloNavicularJoint;
    AnyRefFrame &Navicularis = ...Seg.Navicular.TaloNavicularJoint;
    Constraints.Reaction ={#include "DrawForceInJoint.any"};

  };


  AnyUniversalJoint CuneiNaviMed =
  {
    Axis1 = y;
    Axis2 = z;
    AnyRefFrame &Navicularis = ...Seg.Navicular.MedCuneiNaviJoint;
    AnyRefFrame &MedCunei = ...Seg.MedialCuneiform.CuneiNaviJoint;
    Constraints.Reaction ={#include "DrawForceInJoint.any"};
  };


  AnyUniversalJoint CuneiNaviInt =
  {
    Axis1 = y;
    Axis2 = z;
    AnyRefFrame &Navicularis = ...Seg.Navicular.IntCuneiNaviJoint;
    AnyRefFrame &IntCunei = ...Seg.IntermediateCuneiform.CuneiNaviJoint;
    Constraints.Reaction ={#include "DrawForceInJoint.any"};
  };


  AnyUniversalJoint CuneiNaviLat =
  {
    Axis1 = y;
    Axis2 = z;
    AnyRefFrame &Navicularis = ...Seg.Navicular.LatCuneiNaviJoint;
    AnyRefFrame &LatCunei = ...Seg.LateralCuneiform.CuneiNaviJoint;
    Constraints.Reaction ={#include "DrawForceInJoint.any"};
  };


  AnySphericalJoint CalCuboid =
  {
    AnyRefFrame &Calcaneus = ...Seg.Calcaneus.CalcaneoCuboidJoint;
    AnyRefFrame &Cuboid = ...Seg.Cuboid.CalcaneoCuboidJoint;
    Constraints.Reaction ={#include "DrawForceInJoint.any"};
  };


  #include "IntertarsalGlidingJoints.any"


  //************************************************
  //              JntTarsoMt
  //************************************************


  AnyUniversalJoint MedCuneiMt1 =
  {
    Axis1 = y;
    Axis2 = z;
    AnyRefFrame &MedCunei = ...Seg.MedialCuneiform.TarsoMtJoint;
    AnyRefFrame &Mt1 = ...Seg.Metatarsal1.TarsoMtJoint;
    Constraints.Reaction ={#include "DrawForceInJoint.any"};
  };


  AnyUniversalJoint IntCuneiMt2 =
  {
    Axis1 = y;
    Axis2 = z;
    AnyRefFrame &IntCunei = ...Seg.IntermediateCuneiform.TarsoMtJoint;
    AnyRefFrame &Mt2 = ...Seg.Metatarsal2.TarsoMtJoint;
    Constraints.Reaction ={#include "DrawForceInJoint.any"};
  };


  AnyUniversalJoint LatCuneiMt3 =
  {
    Axis1 = y;
    Axis2 = z;
    AnyRefFrame &LatCunei = ...Seg.LateralCuneiform.TarsoMtJoint;
    AnyRefFrame &Mt3 = ...Seg.Metatarsal3.TarsoMtJoint;
    Constraints.Reaction ={#include "DrawForceInJoint.any"};
  };


  AnyUniversalJoint CuboidMt4 =
  {
    Axis1 = y;
    Axis2 = z;
    AnyRefFrame &Cuboideum = ...Seg.Cuboid.TarsoMt4Joint;
    AnyRefFrame &Mt4 = ...Seg.Metatarsal4.TarsoMtJoint;
    Constraints.Reaction ={#include "DrawForceInJoint.any"};
  };

  AnyUniversalJoint CuboidMt5 =
  {
    Axis1 = y;
    Axis2 = z;
    AnyRefFrame &Cuboideum = ...Seg.Cuboid.TarsoMt5Joint;
    AnyRefFrame &Mt5 = ...Seg.Metatarsal5.TarsoMtJoint;
    Constraints.Reaction ={#include "DrawForceInJoint.any"};
  };

  #define StandardContactMH
  #include "InterMetatarsalHeadContact.any"
  #undef StandardContactMH

  //************************************************
  //              JntMtPhal
  //************************************************


  AnyUniversalJoint MtProxPh1 =
  {
    Axis1 = y;
    Axis2 = z;
    AnyRefFrame &MT1 = ...Seg.Metatarsal1.MtPhalJoint;
    AnyRefFrame &ProxPhal1 = ...Seg.ProximalPhalange1.MtPhalJoint;
    Constraints.Reaction ={#include "DrawForceInJoint.any"};
  };


  AnyUniversalJoint MtProxPh2 =
  {
    Axis1 = y;
    Axis2 = z;
    AnyRefFrame &MT2 = ...Seg.Metatarsal2.MtPhalJoint;
    AnyRefFrame &ProxPhal2 = ...Seg.ProximalPhalange2.MtPhalJoint;
    Constraints.Reaction ={#include "DrawForceInJoint.any"};
  };


  AnyUniversalJoint MtProxPh3 =
  {
    Axis1 = y;
    Axis2 = z;
    AnyRefFrame &MT3 = ...Seg.Metatarsal3.MtPhalJoint;
    AnyRefFrame &ProxPhal3 = ...Seg.ProximalPhalange3.MtPhalJoint;
    Constraints.Reaction ={#include "DrawForceInJoint.any"};
  };


  AnyUniversalJoint MtProxPh4 =
  {
    Axis1 = y;
    Axis2 = z;
    AnyRefFrame &MT4 = ...Seg.Metatarsal4.MtPhalJoint;
    AnyRefFrame &ProxPhal4 = ...Seg.ProximalPhalange4.MtPhalJoint;
    Constraints.Reaction ={#include "DrawForceInJoint.any"};
  };


  AnyUniversalJoint MtProxPh5 =
  {
    Axis1 = y;
    Axis2 = z;
    AnyRefFrame &MT5 = ...Seg.Metatarsal5.MtPhalJoint;
    AnyRefFrame &ProxPhal5 = ...Seg.ProximalPhalange5.MtPhalJoint;
    Constraints.Reaction ={#include "DrawForceInJoint.any"};
  };


  //************************************************
  //              JntProxPhal
  //************************************************


  AnyRevoluteJoint ProxPhDistPh1 =
  {
    Axis = z;
    AnyRefFrame &ProxPhal1 = ...Seg.ProximalPhalange1.DistPhalJoint;
    AnyRefFrame &DistPhal1 = ...Seg.DistalPhalange1.DistPhalJoint;
    Constraints.Reaction ={#include "DrawForceInJoint.any"};
  };

  AnyRevoluteJoint ProxPhMidPh2 =
  {
    Axis = z;
    AnyRefFrame &ProxPhal2 = ...Seg.ProximalPhalange2.ProxPhalJoint;
    AnyRefFrame &MidPhal2 = ...Seg.MiddlePhalange2.ProxPhalJoint;
    Constraints.Reaction ={#include "DrawForceInJoint.any"};
  };

  AnyRevoluteJoint ProxPhMidPh3 =
  {
    Axis = z;
    AnyRefFrame &ProxPhal3 = ...Seg.ProximalPhalange3.ProxPhalJoint;
    AnyRefFrame &MidPhal3 = ...Seg.MiddlePhalange3.ProxPhalJoint;
    Constraints.Reaction ={#include "DrawForceInJoint.any"};
  };

  AnyRevoluteJoint ProxPhMidPh4 =
  {
    Axis = z;
    AnyRefFrame &ProxPhal4 = ...Seg.ProximalPhalange4.ProxPhalJoint;
    AnyRefFrame &MidPhal4 = ...Seg.MiddlePhalange4.ProxPhalJoint;
    Constraints.Reaction ={#include "DrawForceInJoint.any"};
  };

  AnyRevoluteJoint ProxPhMidPh5 =
  {
    Axis = z;
    AnyRefFrame &ProxPhal5 = ...Seg.ProximalPhalange5.ProxPhalJoint;
    AnyRefFrame &MidPhal5 = ...Seg.MiddlePhalange5.ProxPhalJoint;
    Constraints.Reaction ={#include "DrawForceInJoint.any"};
  };


  //************************************************
  //              JntDistPhal
  //************************************************


  AnyRevoluteJoint MidPhDistPh2 =
  {
    Axis = z;
    AnyRefFrame &MidPhal2 = ...Seg.MiddlePhalange2.DistPhalJoint;
    AnyRefFrame &DistPhal2 = ...Seg.DistalPhalange2.DistPhalJoint;
    Constraints.Reaction ={#include "DrawForceInJoint.any"};
  };

  AnyRevoluteJoint MidPhDistPh3 =
  {
    Axis = z;
    AnyRefFrame &MidPhal3 = ...Seg.MiddlePhalange3.DistPhalJoint;
    AnyRefFrame &DistPhal3 = ...Seg.DistalPhalange3.DistPhalJoint;
    Constraints.Reaction ={#include "DrawForceInJoint.any"};
  };

  AnyRevoluteJoint MidPhDistPh4 =
  {
    Axis = z;
    AnyRefFrame &MidPhal4 = ...Seg.MiddlePhalange4.DistPhalJoint;
    AnyRefFrame &DistPhal4 = ...Seg.DistalPhalange4.DistPhalJoint;
    Constraints.Reaction ={#include "DrawForceInJoint.any"};
  };

  AnyRevoluteJoint MidPhDistPh5 =
  {
    Axis = z;
    AnyRefFrame &MidPhal5 = ...Seg.MiddlePhalange5.DistPhalJoint;
    AnyRefFrame &DistPhal5 = ...Seg.DistalPhalange5.DistPhalJoint;
    Constraints.Reaction ={#include "DrawForceInJoint.any"};
  };

}; //FootJnt
