AnyFolder FootjointStiffness = {


AnyVar StiffnessCoef = 20;  //30;


  AnyFolder TaloNavicularJnt={

    AnyFunInterpol Stiffness={
      T={-20, -15, -10, -5, 0, 5, 10, 15, 20}*pi/180; //Angle deg
      Data={{20, 15, 10, 5, 0, -5, -10, -15, -20}*..StiffnessCoef}; //moment Nm
      Type=Bspline;
    };

    AnyForce TaloNavicularDorsiFlexion ={
      AnyKinMeasure &DOF = ...InterfaceFolder.TaloNavicularDorsiFlexion;
      F = {.Stiffness(DOF.Pos[0])[0]};
    };

    AnyForce TaloNavicularAbduction ={
      AnyKinMeasure &DOF = ...InterfaceFolder.TaloNavicularAbduction;
      F = {.Stiffness(DOF.Pos[0])[0]};
    };


    AnyForce TaloNavicularEversion ={
      AnyKinMeasure &DOF = ...InterfaceFolder.TaloNavicularEversion;
      F = {.Stiffness(DOF.Pos[0])[0]};
    };

  };


  AnyFolder CalcaneoCuboidJnt={

    AnyFunInterpol Stiffness={
      T={-20, -15, -10, -5, 0, 5, 10, 15, 20}*pi/180; //Angle deg
      Data={{20, 15, 10, 5, 0, -5, -10, -15, -20}*..StiffnessCoef}; //moment Nm
      Type=Bspline;
    };

    AnyForce CalcaneoCuboidDorsiFlexion ={
      AnyKinMeasure &DOF = ...InterfaceFolder.CalcaneoCuboidDorsiFlexion;
      F = {.Stiffness(DOF.Pos[0])[0]};
    };

    AnyForce CalcaneoCuboidAbduction ={
      AnyKinMeasure &DOF = ...InterfaceFolder.CalcaneoCuboidAbduction;
      F = {.Stiffness(DOF.Pos[0])[0]};
    };

    AnyForce CalcaneoCuboidEversion ={
      AnyKinMeasure &DOF = ...InterfaceFolder.CalcaneoCuboidEversion;
      F = {.Stiffness(DOF.Pos[0])[0]};
    };

  };


  AnyFolder NaviculoMedialCuneiformJnt={

    AnyFunInterpol Stiffness={
      T={-20, -15, -10, -5, 0, 5, 10, 15, 20}*pi/180; //Angle deg
      Data={{20, 15, 10, 5, 0, -5, -10, -15, -20}*..StiffnessCoef}; //moment Nm
      Type=Bspline;
    };

    AnyForce NaviculoMedialCuneiformDorsiFlexion ={
      AnyKinMeasure &DOF = ...InterfaceFolder.NaviculoMedialCuneiformDorsiFlexion;
      F = {.Stiffness(DOF.Pos[0])[0]};
    };

    AnyForce NaviculoMedialCuneiformAbduction ={
      AnyKinMeasure &DOF = ...InterfaceFolder.NaviculoMedialCuneiformAbduction;
      F = {.Stiffness(DOF.Pos[0])[0]};
    };

    AnyForce NaviculoMedialCuneiformEversion ={
      AnyKinMeasure &DOF = ...InterfaceFolder.NaviculoMedialCuneiformEversion;
      F = {.Stiffness(DOF.Pos[0])[0]};
    };

  };


  AnyFolder NaviculoIntermediateCuneiformJnt={

    AnyFunInterpol Stiffness={
      T={-20, -15, -10, -5, 0, 5, 10, 15, 20}*pi/180; //Angle deg
      Data={{20, 15, 10, 5, 0, -5, -10, -15, -20}*..StiffnessCoef}; //moment Nm
      Type=Bspline;
    };

    AnyForce NaviculoIntermediateCuneiformDorsiFlexion ={
      AnyKinMeasure &DOF = ...InterfaceFolder.NaviculoIntermediateCuneiformDorsiFlexion;
      F = {.Stiffness(DOF.Pos[0])[0]};
    };

    AnyForce NaviculoIntermediateCuneiformAbduction ={
      AnyKinMeasure &DOF = ...InterfaceFolder.NaviculoIntermediateCuneiformAbduction;
      F = {.Stiffness(DOF.Pos[0])[0]};
    };

  };


  AnyFolder NaviculoLateralCuneiformJnt={

    AnyFunInterpol Stiffness={
      T={-20, -15, -10, -5, 0, 5, 10, 15, 20}*pi/180; //Angle deg
      Data={{20, 15, 10, 5, 0, -5, -10, -15, -20}*..StiffnessCoef}; //moment Nm
      Type=Bspline;
    };

    AnyForce NaviculoLateralCuneiformDorsiFlexion ={
      AnyKinMeasure &DOF = ...InterfaceFolder.NaviculoLateralCuneiformDorsiFlexion;
      F = {.Stiffness(DOF.Pos[0])[0]};
    };

    AnyForce NaviculoLateralCuneiformAbduction ={
      AnyKinMeasure &DOF = ...InterfaceFolder.NaviculoLateralCuneiformAbduction;
      F = {.Stiffness(DOF.Pos[0])[0]};
    };

  };


  AnyFolder TarsoMetatarsal1Jnt={

    AnyFunInterpol Stiffness={
      T={-20, -15, -10, -5, 0, 5, 10, 15, 20}*pi/180; //Angle deg
      Data={{20, 15, 10, 5, 0, -5, -10, -15, -20}*..StiffnessCoef}; //moment Nm
      Type=Bspline;
    };

    AnyForce TarsoMetatarsal1DorsiFlexion ={
      AnyKinMeasure &DOF = ...InterfaceFolder.TarsoMetatarsal1DorsiFlexion;
      F = {.Stiffness(DOF.Pos[0])[0]};
    };

    AnyForce TarsoMetatarsal1Abduction ={
      AnyKinMeasure &DOF = ...InterfaceFolder.TarsoMetatarsal1Abduction;
      F = {.Stiffness(DOF.Pos[0])[0]};
    };

    AnyForce TarsoMetatarsal1Eversion ={
      AnyKinMeasure &DOF = ...InterfaceFolder.TarsoMetatarsal1Eversion;
      F = {.Stiffness(DOF.Pos[0])[0]};
    };

  };


  AnyFolder TarsoMetatarsal2Jnt={

    AnyFunInterpol Stiffness={
      T={-20, -15, -10, -5, 0, 5, 10, 15, 20}*pi/180; //Angle deg
      Data={{20, 15, 10, 5, 0, -5, -10, -15, -20}*..StiffnessCoef}; //moment Nm
      Type=Bspline;
    };

    AnyForce TarsoMetatarsal2DorsiFlexion ={
      AnyKinMeasure &DOF = ...InterfaceFolder.TarsoMetatarsal2DorsiFlexion;
      F = {.Stiffness(DOF.Pos[0])[0]};
    };

    AnyForce TarsoMetatarsal2Abduction ={
      AnyKinMeasure &DOF = ...InterfaceFolder.TarsoMetatarsal2Abduction;
      F = {.Stiffness(DOF.Pos[0])[0]};
    };

  };


  AnyFolder TarsoMetatarsal3Jnt={

    AnyFunInterpol Stiffness={
      T={-20, -15, -10, -5, 0, 5, 10, 15, 20}*pi/180; //Angle deg
      Data={{20, 15, 10, 5, 0, -5, -10, -15, -20}*..StiffnessCoef}; //moment Nm
      Type=Bspline;
    };

    AnyForce TarsoMetatarsal3DorsiFlexion ={
      AnyKinMeasure &DOF = ...InterfaceFolder.TarsoMetatarsal3DorsiFlexion;
      F = {.Stiffness(DOF.Pos[0])[0]};
    };

    AnyForce TarsoMetatarsal3Abduction ={
      AnyKinMeasure &DOF = ...InterfaceFolder.TarsoMetatarsal3Abduction;
      F = {.Stiffness(DOF.Pos[0])[0]};
    };

  };


  AnyFolder TarsoMetatarsal4Jnt={

    AnyFunInterpol Stiffness={
      T={-20, -15, -10, -5, 0, 5, 10, 15, 20}*pi/180; //Angle deg
      Data={{20, 15, 10, 5, 0, -5, -10, -15, -20}*..StiffnessCoef}; //moment Nm
      Type=Bspline;
    };

    AnyForce TarsoMetatarsal4DorsiFlexion ={
      AnyKinMeasure &DOF = ...InterfaceFolder.TarsoMetatarsal4DorsiFlexion;
      F = {.Stiffness(DOF.Pos[0])[0]};
    };

    AnyForce TarsoMetatarsal4Abduction ={
      AnyKinMeasure &DOF = ...InterfaceFolder.TarsoMetatarsal4Abduction;
      F = {.Stiffness(DOF.Pos[0])[0]};
    };

  };


  AnyFolder TarsoMetatarsal5Jnt={

    AnyFunInterpol Stiffness={
      T={-20, -15, -10, -5, 0, 5, 10, 15, 20}*pi/180; //Angle deg
      Data={{20, 15, 10, 5, 0, -5, -10, -15, -20}*..StiffnessCoef}; //moment Nm
      Type=Bspline;
    };

    AnyForce TarsoMetatarsal5SkewDorsiFlexion ={
      AnyKinMeasure &DOF = ...InterfaceFolder.TarsoMetatarsal5SkewDorsiFlexion;
      F = {.Stiffness(DOF.Pos[0])[0]};
    };

    AnyForce TarsoMetatarsal5Abduction ={
      AnyKinMeasure &DOF = ...InterfaceFolder.TarsoMetatarsal5Abduction;
      F = {.Stiffness(DOF.Pos[0])[0]};
    };

    AnyForce TarsoMetatarsal5SkewEversion ={
      AnyKinMeasure &DOF = ...InterfaceFolder.TarsoMetatarsal5SkewEversion;
      F = {.Stiffness(DOF.Pos[0])[0]};
    };

  };


  /*
  AnyFolder MetatarsoPhalangeal1Jnt={

    AnyFolder MetatarsoPhalangeal1DorsiFlexion ={
      AnyKinMeasure &DOF = ...InterfaceFolder.MetatarsoPhalangeal1DorsiFlexion;
      AnyFolder dof0={
        AnyVector Strength={...JointStrength.Phalangeal,...JointStrength.Phalangeal};
        AnyVector ROM=(pi/180)*{...JointRangeOfMotion.Phalangeal,...JointRangeOfMotion.Phalangeal};

        AnyInt dof= 0;
        #include "..\..\Body\AAUHuman/ToolBox/Diagnostics/DiagnosticMuscle3.any"

        AnyMuscleActivityConstraint PosMusBound =
        {
          AnyMuscle &muscle1 = .Muscle.PosMuscle;
          AnyMuscle &muscle2 = .Muscle.NegMuscle;
          nCon = 2;
          CType = NonPositive;
          Coef = {{muscle1.MusMdl.S, 0}, {0, muscle2.MusMdl.S}};
          Const = {-0.015, -0.015}*....JointStrength.MaxMomentCoef;
        };
      };
    };

    AnyFolder MetatarsoPhalangeal1Abduction ={
      AnyKinMeasure &DOF = ...InterfaceFolder.MetatarsoPhalangeal1Abduction;
      AnyFolder dof0={
        AnyVector Strength={...JointStrength.Phalangeal,...JointStrength.Phalangeal};
        AnyVector ROM=(pi/180)*{...JointRangeOfMotion.Phalangeal,...JointRangeOfMotion.Phalangeal};
        AnyInt dof= 0;
        #include "..\..\Body\AAUHuman/ToolBox/Diagnostics/DiagnosticMuscle3.any"

        AnyMuscleActivityConstraint PosMusBound =
        {
          AnyMuscle &muscle1 = .Muscle.PosMuscle;
          AnyMuscle &muscle2 = .Muscle.NegMuscle;
          nCon = 2;
          CType = NonPositive;
          Coef = {{muscle1.MusMdl.S, 0}, {0, muscle2.MusMdl.S}};
          Const = {-0.015, -0.015}*....JointStrength.MaxMomentCoef;
        };
      };
    };

  };


  AnyFolder MetatarsoPhalangeal2Jnt={

    AnyFolder MetatarsoPhalangeal2DorsiFlexion ={
      AnyKinMeasure &DOF = ...InterfaceFolder.MetatarsoPhalangeal2DorsiFlexion;
      AnyFolder dof0={
        AnyVector Strength={...JointStrength.Phalangeal,...JointStrength.Phalangeal};
        AnyVector ROM=(pi/180)*{...JointRangeOfMotion.Phalangeal,...JointRangeOfMotion.Phalangeal};

        AnyInt dof= 0;
        #include "..\..\Body\AAUHuman/ToolBox/Diagnostics/DiagnosticMuscle3.any"

        AnyMuscleActivityConstraint PosMusBound =
        {
          AnyMuscle &muscle1 = .Muscle.PosMuscle;
          AnyMuscle &muscle2 = .Muscle.NegMuscle;
          nCon = 2;
          CType = NonPositive;
          Coef = {{muscle1.MusMdl.S, 0}, {0, muscle2.MusMdl.S}};
          Const = {-0.01, -0.01}*....JointStrength.MaxMomentCoef;
        };
      };
    };

    AnyFolder MetatarsoPhalangeal2Abduction ={
      AnyKinMeasure &DOF = ...InterfaceFolder.MetatarsoPhalangeal2Abduction;
      AnyFolder dof0={
        AnyVector Strength={...JointStrength.Phalangeal,...JointStrength.Phalangeal};
        AnyVector ROM=(pi/180)*{...JointRangeOfMotion.Phalangeal,...JointRangeOfMotion.Phalangeal};
        AnyInt dof= 0;
        #include "..\..\Body\AAUHuman/ToolBox/Diagnostics/DiagnosticMuscle3.any"

        AnyMuscleActivityConstraint PosMusBound =
        {
          AnyMuscle &muscle1 = .Muscle.PosMuscle;
          AnyMuscle &muscle2 = .Muscle.NegMuscle;
          nCon = 2;
          CType = NonPositive;
          Coef = {{muscle1.MusMdl.S, 0}, {0, muscle2.MusMdl.S}};
          Const = {-0.01, -0.01}*....JointStrength.MaxMomentCoef;
        };
      };
    };

  };


  AnyFolder MetatarsoPhalangeal3Jnt={

    AnyFolder MetatarsoPhalangeal3DorsiFlexion ={
      AnyKinMeasure &DOF = ...InterfaceFolder.MetatarsoPhalangeal3DorsiFlexion;
      AnyFolder dof0={
        AnyVector Strength={...JointStrength.Phalangeal,...JointStrength.Phalangeal};
        AnyVector ROM=(pi/180)*{...JointRangeOfMotion.Phalangeal,...JointRangeOfMotion.Phalangeal};

        AnyInt dof= 0;
        #include "..\..\Body\AAUHuman/ToolBox/Diagnostics/DiagnosticMuscle3.any"

        AnyMuscleActivityConstraint PosMusBound =
        {
          AnyMuscle &muscle1 = .Muscle.PosMuscle;
          AnyMuscle &muscle2 = .Muscle.NegMuscle;
          nCon = 2;
          CType = NonPositive;
          Coef = {{muscle1.MusMdl.S, 0}, {0, muscle2.MusMdl.S}};
          Const = {-0.01, -0.01}*....JointStrength.MaxMomentCoef;
        };
      };
    };

    AnyFolder MetatarsoPhalangeal3Abduction ={
      AnyKinMeasure &DOF = ...InterfaceFolder.MetatarsoPhalangeal3Abduction;
      AnyFolder dof0={
        AnyVector Strength={...JointStrength.Phalangeal,...JointStrength.Phalangeal};
        AnyVector ROM=(pi/180)*{...JointRangeOfMotion.Phalangeal,...JointRangeOfMotion.Phalangeal};
        AnyInt dof= 0;
        #include "..\..\Body\AAUHuman/ToolBox/Diagnostics/DiagnosticMuscle3.any"

        AnyMuscleActivityConstraint PosMusBound =
        {
          AnyMuscle &muscle1 = .Muscle.PosMuscle;
          AnyMuscle &muscle2 = .Muscle.NegMuscle;
          nCon = 2;
          CType = NonPositive;
          Coef = {{muscle1.MusMdl.S, 0}, {0, muscle2.MusMdl.S}};
          Const = {-0.01, -0.01}*....JointStrength.MaxMomentCoef;
        };
      };
    };

  };


  AnyFolder MetatarsoPhalangeal4Jnt={

    AnyFolder MetatarsoPhalangeal4DorsiFlexion ={
      AnyKinMeasure &DOF = ...InterfaceFolder.MetatarsoPhalangeal4DorsiFlexion;
      AnyFolder dof0={
        AnyVector Strength={...JointStrength.Phalangeal,...JointStrength.Phalangeal};
        AnyVector ROM=(pi/180)*{...JointRangeOfMotion.Phalangeal,...JointRangeOfMotion.Phalangeal};

        AnyInt dof= 0;
        #include "..\..\Body\AAUHuman/ToolBox/Diagnostics/DiagnosticMuscle3.any"

        AnyMuscleActivityConstraint PosMusBound =
        {
          AnyMuscle &muscle1 = .Muscle.PosMuscle;
          AnyMuscle &muscle2 = .Muscle.NegMuscle;
          nCon = 2;
          CType = NonPositive;
          Coef = {{muscle1.MusMdl.S, 0}, {0, muscle2.MusMdl.S}};
          Const = {-0.01, -0.01}*....JointStrength.MaxMomentCoef;
        };
      };
    };

    AnyFolder MetatarsoPhalangeal4Abduction ={
      AnyKinMeasure &DOF = ...InterfaceFolder.MetatarsoPhalangeal4Abduction;
      AnyFolder dof0={
        AnyVector Strength={...JointStrength.Phalangeal,...JointStrength.Phalangeal};
        AnyVector ROM=(pi/180)*{...JointRangeOfMotion.Phalangeal,...JointRangeOfMotion.Phalangeal};
        AnyInt dof= 0;
        #include "..\..\Body\AAUHuman/ToolBox/Diagnostics/DiagnosticMuscle3.any"

        AnyMuscleActivityConstraint PosMusBound =
        {
          AnyMuscle &muscle1 = .Muscle.PosMuscle;
          AnyMuscle &muscle2 = .Muscle.NegMuscle;
          nCon = 2;
          CType = NonPositive;
          Coef = {{muscle1.MusMdl.S, 0}, {0, muscle2.MusMdl.S}};
          Const = {-0.01, -0.01}*....JointStrength.MaxMomentCoef;
        };
      };
    };

  };


  AnyFolder MetatarsoPhalangeal5Jnt={

    AnyFolder MetatarsoPhalangeal5DorsiFlexion ={
      AnyKinMeasure &DOF = ...InterfaceFolder.MetatarsoPhalangeal5DorsiFlexion;
      AnyFolder dof0={
        AnyVector Strength={...JointStrength.Phalangeal,...JointStrength.Phalangeal};
        AnyVector ROM=(pi/180)*{...JointRangeOfMotion.Phalangeal,...JointRangeOfMotion.Phalangeal};

        AnyInt dof= 0;
        #include "..\..\Body\AAUHuman/ToolBox/Diagnostics/DiagnosticMuscle3.any"

        AnyMuscleActivityConstraint PosMusBound =
        {
          AnyMuscle &muscle1 = .Muscle.PosMuscle;
          AnyMuscle &muscle2 = .Muscle.NegMuscle;
          nCon = 2;
          CType = NonPositive;
          Coef = {{muscle1.MusMdl.S, 0}, {0, muscle2.MusMdl.S}};
          Const = {-0.01, -0.01}*....JointStrength.MaxMomentCoef;
        };
      };
    };

    AnyFolder MetatarsoPhalangeal5Abduction ={
      AnyKinMeasure &DOF = ...InterfaceFolder.MetatarsoPhalangeal5Abduction;
      AnyFolder dof0={
        AnyVector Strength={...JointStrength.Phalangeal,...JointStrength.Phalangeal};
        AnyVector ROM=(pi/180)*{...JointRangeOfMotion.Phalangeal,...JointRangeOfMotion.Phalangeal};
        AnyInt dof= 0;
        #include "..\..\Body\AAUHuman/ToolBox/Diagnostics/DiagnosticMuscle3.any"

        AnyMuscleActivityConstraint PosMusBound =
        {
          AnyMuscle &muscle1 = .Muscle.PosMuscle;
          AnyMuscle &muscle2 = .Muscle.NegMuscle;
          nCon = 2;
          CType = NonPositive;
          Coef = {{muscle1.MusMdl.S, 0}, {0, muscle2.MusMdl.S}};
          Const = {-0.01, -0.01}*....JointStrength.MaxMomentCoef;
        };
      };
    };

  };


  AnyFolder PhalangealJnt={

    AnyFolder ProximoDistalPhalange1DorsiFlexion ={
      AnyKinMeasure &DOF = ...InterfaceFolder.ProximoDistalPhalange1DorsiFlexion;
      AnyFolder dof0={
        AnyVector Strength={...JointStrength.Phalangeal,...JointStrength.Phalangeal};
        AnyVector ROM=(pi/180)*{...JointRangeOfMotion.Phalangeal,...JointRangeOfMotion.Phalangeal};

        AnyInt dof= 0;
        #include "..\..\Body\AAUHuman/ToolBox/Diagnostics/DiagnosticMuscle3.any"

        AnyMuscleActivityConstraint PosMusBound =
        {
          AnyMuscle &muscle1 = .Muscle.PosMuscle;
          AnyMuscle &muscle2 = .Muscle.NegMuscle;
          nCon = 2;
          CType = NonPositive;
          Coef = {{muscle1.MusMdl.S, 0}, {0, muscle2.MusMdl.S}};
          Const = {-0.005, -0.005}*....JointStrength.MaxMomentCoef;
        };
      };
    };

    AnyFolder ProximoMedialPhalange2DorsiFlexion ={
      AnyKinMeasure &DOF = ...InterfaceFolder.ProximoMedialPhalange2DorsiFlexion;
      AnyFolder dof0={
        AnyVector Strength={...JointStrength.Phalangeal,...JointStrength.Phalangeal};
        AnyVector ROM=(pi/180)*{...JointRangeOfMotion.Phalangeal,...JointRangeOfMotion.Phalangeal};

        AnyInt dof= 0;
        #include "..\..\Body\AAUHuman/ToolBox/Diagnostics/DiagnosticMuscle3.any"

        AnyMuscleActivityConstraint PosMusBound =
        {
          AnyMuscle &muscle1 = .Muscle.PosMuscle;
          AnyMuscle &muscle2 = .Muscle.NegMuscle;
          nCon = 2;
          CType = NonPositive;
          Coef = {{muscle1.MusMdl.S, 0}, {0, muscle2.MusMdl.S}};
          Const = {-0.005, -0.005}*....JointStrength.MaxMomentCoef;
        };
      };
    };

    AnyFolder ProximoMedialPhalange3DorsiFlexion ={
      AnyKinMeasure &DOF = ...InterfaceFolder.ProximoMedialPhalange3DorsiFlexion;
      AnyFolder dof0={
        AnyVector Strength={...JointStrength.Phalangeal,...JointStrength.Phalangeal};
        AnyVector ROM=(pi/180)*{...JointRangeOfMotion.Phalangeal,...JointRangeOfMotion.Phalangeal};

        AnyInt dof= 0;
        #include "..\..\Body\AAUHuman/ToolBox/Diagnostics/DiagnosticMuscle3.any"

        AnyMuscleActivityConstraint PosMusBound =
        {
          AnyMuscle &muscle1 = .Muscle.PosMuscle;
          AnyMuscle &muscle2 = .Muscle.NegMuscle;
          nCon = 2;
          CType = NonPositive;
          Coef = {{muscle1.MusMdl.S, 0}, {0, muscle2.MusMdl.S}};
          Const = {-0.005, -0.005}*....JointStrength.MaxMomentCoef;
        };
      };
    };

    AnyFolder ProximoMedialPhalange4DorsiFlexion ={
      AnyKinMeasure &DOF = ...InterfaceFolder.ProximoMedialPhalange4DorsiFlexion;
      AnyFolder dof0={
        AnyVector Strength={...JointStrength.Phalangeal,...JointStrength.Phalangeal};
        AnyVector ROM=(pi/180)*{...JointRangeOfMotion.Phalangeal,...JointRangeOfMotion.Phalangeal};

        AnyInt dof= 0;
        #include "..\..\Body\AAUHuman/ToolBox/Diagnostics/DiagnosticMuscle3.any"

        AnyMuscleActivityConstraint PosMusBound =
        {
          AnyMuscle &muscle1 = .Muscle.PosMuscle;
          AnyMuscle &muscle2 = .Muscle.NegMuscle;
          nCon = 2;
          CType = NonPositive;
          Coef = {{muscle1.MusMdl.S, 0}, {0, muscle2.MusMdl.S}};
          Const = {-0.005, -0.005}*....JointStrength.MaxMomentCoef;
        };
      };
    };

    AnyFolder ProximoMedialPhalange5DorsiFlexion ={
      AnyKinMeasure &DOF = ...InterfaceFolder.ProximoMedialPhalange5DorsiFlexion;
      AnyFolder dof0={
        AnyVector Strength={...JointStrength.Phalangeal,...JointStrength.Phalangeal};
        AnyVector ROM=(pi/180)*{...JointRangeOfMotion.Phalangeal,...JointRangeOfMotion.Phalangeal};

        AnyInt dof= 0;
        #include "..\..\Body\AAUHuman/ToolBox/Diagnostics/DiagnosticMuscle3.any"

        AnyMuscleActivityConstraint PosMusBound =
        {
          AnyMuscle &muscle1 = .Muscle.PosMuscle;
          AnyMuscle &muscle2 = .Muscle.NegMuscle;
          nCon = 2;
          CType = NonPositive;
          Coef = {{muscle1.MusMdl.S, 0}, {0, muscle2.MusMdl.S}};
          Const = {-0.005, -0.005}*....JointStrength.MaxMomentCoef;
        };
      };
    };

    AnyFolder MedioDistalPhalange2DorsiFlexion ={
      AnyKinMeasure &DOF = ...InterfaceFolder.MedioDistalPhalange2DorsiFlexion;
      AnyFolder dof0={
        AnyVector Strength={...JointStrength.Phalangeal,...JointStrength.Phalangeal};
        AnyVector ROM=(pi/180)*{...JointRangeOfMotion.Phalangeal,...JointRangeOfMotion.Phalangeal};

        AnyInt dof= 0;
        #include "..\..\Body\AAUHuman/ToolBox/Diagnostics/DiagnosticMuscle3.any"

        AnyMuscleActivityConstraint PosMusBound =
        {
          AnyMuscle &muscle1 = .Muscle.PosMuscle;
          AnyMuscle &muscle2 = .Muscle.NegMuscle;
          nCon = 2;
          CType = NonPositive;
          Coef = {{muscle1.MusMdl.S, 0}, {0, muscle2.MusMdl.S}};
          Const = {-0.005, -0.005}*....JointStrength.MaxMomentCoef;
        };
      };
    };

    AnyFolder MedioDistalPhalange3DorsiFlexion ={
      AnyKinMeasure &DOF = ...InterfaceFolder.MedioDistalPhalange3DorsiFlexion;
      AnyFolder dof0={
        AnyVector Strength={...JointStrength.Phalangeal,...JointStrength.Phalangeal};
        AnyVector ROM=(pi/180)*{...JointRangeOfMotion.Phalangeal,...JointRangeOfMotion.Phalangeal};

        AnyInt dof= 0;
        #include "..\..\Body\AAUHuman/ToolBox/Diagnostics/DiagnosticMuscle3.any"

        AnyMuscleActivityConstraint PosMusBound =
        {
          AnyMuscle &muscle1 = .Muscle.PosMuscle;
          AnyMuscle &muscle2 = .Muscle.NegMuscle;
          nCon = 2;
          CType = NonPositive;
          Coef = {{muscle1.MusMdl.S, 0}, {0, muscle2.MusMdl.S}};
          Const = {-0.005, -0.005}*....JointStrength.MaxMomentCoef;
        };
      };
    };

    AnyFolder MedioDistalPhalange4DorsiFlexion ={
      AnyKinMeasure &DOF = ...InterfaceFolder.MedioDistalPhalange4DorsiFlexion;
      AnyFolder dof0={
        AnyVector Strength={...JointStrength.Phalangeal,...JointStrength.Phalangeal};
        AnyVector ROM=(pi/180)*{...JointRangeOfMotion.Phalangeal,...JointRangeOfMotion.Phalangeal};

        AnyInt dof= 0;
        #include "..\..\Body\AAUHuman/ToolBox/Diagnostics/DiagnosticMuscle3.any"

        AnyMuscleActivityConstraint PosMusBound =
        {
          AnyMuscle &muscle1 = .Muscle.PosMuscle;
          AnyMuscle &muscle2 = .Muscle.NegMuscle;
          nCon = 2;
          CType = NonPositive;
          Coef = {{muscle1.MusMdl.S, 0}, {0, muscle2.MusMdl.S}};
          Const = {-0.005, -0.005}*....JointStrength.MaxMomentCoef;
        };
      };
    };

    AnyFolder MedioDistalPhalange5DorsiFlexion ={
      AnyKinMeasure &DOF = ...InterfaceFolder.MedioDistalPhalange5DorsiFlexion;
      AnyFolder dof0={
        AnyVector Strength={...JointStrength.Phalangeal,...JointStrength.Phalangeal};
        AnyVector ROM=(pi/180)*{...JointRangeOfMotion.Phalangeal,...JointRangeOfMotion.Phalangeal};

        AnyInt dof= 0;
        #include "..\..\Body\AAUHuman/ToolBox/Diagnostics/DiagnosticMuscle3.any"

        AnyMuscleActivityConstraint PosMusBound =
        {
          AnyMuscle &muscle1 = .Muscle.PosMuscle;
          AnyMuscle &muscle2 = .Muscle.NegMuscle;
          nCon = 2;
          CType = NonPositive;
          Coef = {{muscle1.MusMdl.S, 0}, {0, muscle2.MusMdl.S}};
          Const = {-0.005, -0.005}*....JointStrength.MaxMomentCoef;
        };
      };
    };

  };
  */

};// End of FootJointStiffness
