//Ligaments stiffness is scaled together with the muscle strength so the same variable is reused.
AnyVar FootLigStiffnessScale = .StrengthScaling.Foot.StrengthScale;


//// L0 is 99% of the distance in the neutral position to give some pretention
//AnyViaPointLigament MtTransversumProfundumStraight =
//{
//  AnyLigamentModelPol LigMdl =
//  {
//    L0 = 0.07141969*0.99; //Slack length (0 force). Estimated value modified by calibration.
//    eps1 = 1; //Nominal strain (relative elongation from L0)
//    F1 = ..FootStiffnessScale*1.500; //Nominal force (at L1 = L0 + eps1*L0)
//  };
//  AnyRefFrame &ref1 = ..Seg.Metatarsal1.LigMtTransversumProfundum;
//  AnyRefFrame &ref2 = ..Seg.Metatarsal5.LigMtTransversumProfundum;
//  AnyDrawPLine DrawLig =
//  {
//    Thickness = 0.0015;
//    RGB = Main.DrawSettings.Colors.Ligaments;
//  };
//  AnyVar Eps = (Line.Pos[0] - LigMdl.L0)/LigMdl.L0;
//};


  AnyViaPointLigament MtTransversumProfundum =
  {
    AnyLigamentModelPol LigMdl =
    {
      L0 = 0.07141969; //Slack length (0 force). Estimated value modified by calibration.
      eps1 = 1; //Nominal strain (relative elongation from L0)
      F1 = ..FootLigStiffnessScale*1500*5; //1500; //Nominal force (at L1 = L0 + eps1*L0)
    };
    AnyRefFrame &ref1 = ..Seg.Metatarsal1.LigMtTransversumProfundum;
    AnyRefFrame &ref2 = ..Seg.Metatarsal2.LigMtTransversumProfundum;
    AnyRefFrame &ref3 = ..Seg.Metatarsal3.LigMtTransversumProfundum;
    AnyRefFrame &ref4 = ..Seg.Metatarsal4.LigMtTransversumProfundum;
    AnyRefFrame &ref5 = ..Seg.Metatarsal5.LigMtTransversumProfundum;
    AnyDrawPLine DrawLig =
    {
      Thickness = 0.0015;
      RGB = Main.DrawSettings.Colors.Ligaments;
    };
    AnyVar Eps = (Line.Pos[0] - LigMdl.L0)/LigMdl.L0;
  };


//  AnyViaPointLigament MtTransversumProfundumDorsal =
//  {
//    AnyLigamentModelPol LigMdl =
//    {
//      L0 = 0.07141969; //Slack length (0 force). Estimated value modified by calibration.
//      eps1 = 1; //Nominal strain (relative elongation from L0)
//      F1 = ..FootLigStiffnessScale*1500*5; //1500; //Nominal force (at L1 = L0 + eps1*L0)
//    };
//    AnyRefFrame &ref1 = ..Seg.Metatarsal1.DeepTransverseMTDorsal;
//    AnyRefFrame &ref2 = ..Seg.Metatarsal2.DeepTransverseMTDorsal;
//    AnyRefFrame &ref3 = ..Seg.Metatarsal3.DeepTransverseMTDorsal;
//    AnyRefFrame &ref4 = ..Seg.Metatarsal4.DeepTransverseMTDorsal;
//    AnyRefFrame &ref5 = ..Seg.Metatarsal5.DeepTransverseMTDorsal;
//    AnyDrawPLine DrawLig =
//    {
//      Thickness = 0.0015;
//      RGB = Main.DrawSettings.Colors.Ligaments;
//    };
//    AnyVar Eps = (Line.Pos[0] - LigMdl.L0)/LigMdl.L0;
//  };


//AnyFolder MtTransversumProfundumPlantarLine = {
//  // L0 is 99% of the distance in the neutral position to give some pretention
//  AnyViaPointLigament MtTransversumProfundumPart1 =
//  {
//    AnyLigamentModelPol LigMdl =
//    {
//      L0 = 0.02504384*0.99; //Slack length (0 force). Estimated value modified by calibration.
//      eps1 = 1; //Nominal strain (relative elongation from L0)
//      F1 = ...FootLigStiffnessScale*1500; //1500; //Nominal force (at L1 = L0 + eps1*L0)
//    };
//    AnyRefFrame &ref1 = ...Seg.Metatarsal1.LigMtTransversumProfundum;
//    AnyRefFrame &ref2 = ...Seg.Metatarsal2.LigMtTransversumProfundum;
//    AnyDrawPLine DrawLig =
//    {
//      Thickness = 0.0015;
//      RGB = Main.DrawSettings.Colors.Ligaments;
//    };
//    AnyVar Eps = (Line.Pos[0] - LigMdl.L0)/LigMdl.L0;
//  };
//
//
//  AnyViaPointLigament MtTransversumProfundumPart2 =
//  {
//    AnyLigamentModelPol LigMdl =
//    {
//      L0 = 0.01459483*0.99; //Slack length (0 force). Estimated value modified by calibration.
//      eps1 = 1; //Nominal strain (relative elongation from L0)
//      F1 = ...FootLigStiffnessScale*1500; //1500; //Nominal force (at L1 = L0 + eps1*L0)
//    };
//    AnyRefFrame &ref1 = ...Seg.Metatarsal2.LigMtTransversumProfundum;
//    AnyRefFrame &ref2 = ...Seg.Metatarsal3.LigMtTransversumProfundum;
//    AnyDrawPLine DrawLig =
//    {
//      Thickness = 0.0015;
//      RGB = Main.DrawSettings.Colors.Ligaments;
//    };
//    AnyVar Eps = (Line.Pos[0] - LigMdl.L0)/LigMdl.L0;
//  };
//
//
//  AnyViaPointLigament MtTransversumProfundumPart3 =
//  {
//    AnyLigamentModelPol LigMdl =
//    {
//      L0 = 0.01793721*0.99; //Slack length (0 force). Estimated value modified by calibration.
//      eps1 = 1; //Nominal strain (relative elongation from L0)
//      F1 = ...FootLigStiffnessScale*1500; //1500; //Nominal force (at L1 = L0 + eps1*L0)
//    };
//    AnyRefFrame &ref1 = ...Seg.Metatarsal3.LigMtTransversumProfundum;
//    AnyRefFrame &ref2 = ...Seg.Metatarsal4.LigMtTransversumProfundum;
//    AnyDrawPLine DrawLig =
//    {
//      Thickness = 0.0015;
//      RGB = Main.DrawSettings.Colors.Ligaments;
//    };
//    AnyVar Eps = (Line.Pos[0] - LigMdl.L0)/LigMdl.L0;
//  };
//
//
//  AnyViaPointLigament MtTransversumProfundumPart4 =
//  {
//    AnyLigamentModelPol LigMdl =
//    {
//      L0 = 0.01809975*0.99; //Slack length (0 force). Estimated value modified by calibration.
//      eps1 = 1; //Nominal strain (relative elongation from L0)
//      F1 = ...FootLigStiffnessScale*1500; //1500; //Nominal force (at L1 = L0 + eps1*L0)
//    };
//    AnyRefFrame &ref1 = ...Seg.Metatarsal4.LigMtTransversumProfundum;
//    AnyRefFrame &ref2 = ...Seg.Metatarsal5.LigMtTransversumProfundum;
//    AnyDrawPLine DrawLig =
//    {
//      Thickness = 0.0015;
//      RGB = Main.DrawSettings.Colors.Ligaments;
//    };
//    AnyVar Eps = (Line.Pos[0] - LigMdl.L0)/LigMdl.L0;
//  };
//}; //MtTransversumProfundumPlantarLine


//AnyFolder MtTransversumProfundumMidLine = {
//  // L0 is 99% of the distance in the neutral position to give some pretention
//  AnyViaPointLigament MtTransversumProfundumPart1 =
//  {
//    AnyLigamentModelPol LigMdl =
//    {
//      L0 = 0.02504384*0.99; //Slack length (0 force). Estimated value modified by calibration.
//      eps1 = 1; //Nominal strain (relative elongation from L0)
//      F1 = ...FootLigStiffnessScale*1500; //1500; //Nominal force (at L1 = L0 + eps1*L0)
//    };
//    AnyRefFrame &ref1 = ...Seg.Metatarsal1.DeepTransverseMT;
//    AnyRefFrame &ref2 = ...Seg.Metatarsal2.DeepTransverseMTMed;
//    AnyDrawPLine DrawLig =
//    {
//      Thickness = 0.0015;
//      RGB = Main.DrawSettings.Colors.Ligaments;
//    };
//    AnyVar Eps = (Line.Pos[0] - LigMdl.L0)/LigMdl.L0;
//  };
//
//
//  AnyViaPointLigament MtTransversumProfundumPart2 =
//  {
//    AnyLigamentModelPol LigMdl =
//    {
//      L0 = 0.01459483*0.99; //Slack length (0 force). Estimated value modified by calibration.
//      eps1 = 1; //Nominal strain (relative elongation from L0)
//      F1 = ...FootLigStiffnessScale*1500; //1500; //Nominal force (at L1 = L0 + eps1*L0)
//    };
//    AnyRefFrame &ref1 = ...Seg.Metatarsal2.DeepTransverseMTLat;
//    AnyRefFrame &ref2 = ...Seg.Metatarsal3.DeepTransverseMTMed;
//    AnyDrawPLine DrawLig =
//    {
//      Thickness = 0.0015;
//      RGB = Main.DrawSettings.Colors.Ligaments;
//    };
//    AnyVar Eps = (Line.Pos[0] - LigMdl.L0)/LigMdl.L0;
//  };
//
//
//  AnyViaPointLigament MtTransversumProfundumPart3 =
//  {
//    AnyLigamentModelPol LigMdl =
//    {
//      L0 = 0.01793721*0.99; //Slack length (0 force). Estimated value modified by calibration.
//      eps1 = 1; //Nominal strain (relative elongation from L0)
//      F1 = ...FootLigStiffnessScale*1500; //1500; //Nominal force (at L1 = L0 + eps1*L0)
//    };
//    AnyRefFrame &ref1 = ...Seg.Metatarsal3.DeepTransverseMTLat;
//    AnyRefFrame &ref2 = ...Seg.Metatarsal4.DeepTransverseMTMed;
//    AnyDrawPLine DrawLig =
//    {
//      Thickness = 0.0015;
//      RGB = Main.DrawSettings.Colors.Ligaments;
//    };
//    AnyVar Eps = (Line.Pos[0] - LigMdl.L0)/LigMdl.L0;
//  };
//
//
//  AnyViaPointLigament MtTransversumProfundumPart4 =
//  {
//    AnyLigamentModelPol LigMdl =
//    {
//      L0 = 0.01809975*0.99; //Slack length (0 force). Estimated value modified by calibration.
//      eps1 = 1; //Nominal strain (relative elongation from L0)
//      F1 = ...FootLigStiffnessScale*1500; //1500; //Nominal force (at L1 = L0 + eps1*L0)
//    };
//    AnyRefFrame &ref1 = ...Seg.Metatarsal4.DeepTransverseMTLat;
//    AnyRefFrame &ref2 = ...Seg.Metatarsal5.DeepTransverseMT;
//    AnyDrawPLine DrawLig =
//    {
//      Thickness = 0.0015;
//      RGB = Main.DrawSettings.Colors.Ligaments;
//    };
//    AnyVar Eps = (Line.Pos[0] - LigMdl.L0)/LigMdl.L0;
//  };
//}; //MtTransversumProfundumMidLine


//AnyFolder MtTransversumProfundumCrossed = {
//  // L0 is 99% of the distance in the neutral position to give some pretention
//  AnyViaPointLigament MtTransversumProfundumPart1_1 =
//  {
//    AnyLigamentModelPol LigMdl =
//    {
//      L0 = 0.02504384*0.99; //Slack length (0 force). Estimated value modified by calibration.
//      eps1 = 1; //Nominal strain (relative elongation from L0)
//      F1 = ...FootLigStiffnessScale*150; //1500; //Nominal force (at L1 = L0 + eps1*L0)
//    };
//    AnyRefFrame &ref1 = ...Seg.Metatarsal1.DeepTransverseMTPlantar;
//    AnyRefFrame &ref2 = ...Seg.Metatarsal2.DeepTransverseMTMedDorsal;
//    AnyDrawPLine DrawLig =
//    {
//      Thickness = 0.0015;
//      RGB = Main.DrawSettings.Colors.Ligaments;
//    };
//    AnyVar Eps = (Line.Pos[0] - LigMdl.L0)/LigMdl.L0;
//  };
//  AnyViaPointLigament MtTransversumProfundumPart1_2 =
//  {
//    AnyLigamentModelPol LigMdl =
//    {
//      L0 = 0.02504384*0.99; //Slack length (0 force). Estimated value modified by calibration.
//      eps1 = 1; //Nominal strain (relative elongation from L0)
//      F1 = ...FootLigStiffnessScale*150; //1500; //Nominal force (at L1 = L0 + eps1*L0)
//    };
//    AnyRefFrame &ref1 = ...Seg.Metatarsal1.DeepTransverseMTDorsal;
//    AnyRefFrame &ref2 = ...Seg.Metatarsal2.DeepTransverseMTMedPlantar;
//    AnyDrawPLine DrawLig =
//    {
//      Thickness = 0.0015;
//      RGB = Main.DrawSettings.Colors.Ligaments;
//    };
//    AnyVar Eps = (Line.Pos[0] - LigMdl.L0)/LigMdl.L0;
//  };
//
//  AnyViaPointLigament MtTransversumProfundumPart2_1 =
//  {
//    AnyLigamentModelPol LigMdl =
//    {
//      L0 = 0.01459483*0.99; //Slack length (0 force). Estimated value modified by calibration.
//      eps1 = 1; //Nominal strain (relative elongation from L0)
//      F1 = ...FootLigStiffnessScale*150; //1500; //Nominal force (at L1 = L0 + eps1*L0)
//    };
//    AnyRefFrame &ref1 = ...Seg.Metatarsal2.DeepTransverseMTLatPlantar;
//    AnyRefFrame &ref2 = ...Seg.Metatarsal3.DeepTransverseMTMedDorsal;
//    AnyDrawPLine DrawLig =
//    {
//      Thickness = 0.0015;
//      RGB = Main.DrawSettings.Colors.Ligaments;
//    };
//    AnyVar Eps = (Line.Pos[0] - LigMdl.L0)/LigMdl.L0;
//  };
//  AnyViaPointLigament MtTransversumProfundumPart2_2 =
//  {
//    AnyLigamentModelPol LigMdl =
//    {
//      L0 = 0.01459483*0.99; //Slack length (0 force). Estimated value modified by calibration.
//      eps1 = 1; //Nominal strain (relative elongation from L0)
//      F1 = ...FootLigStiffnessScale*150; //1500; //Nominal force (at L1 = L0 + eps1*L0)
//    };
//    AnyRefFrame &ref1 = ...Seg.Metatarsal2.DeepTransverseMTLatDorsal;
//    AnyRefFrame &ref2 = ...Seg.Metatarsal3.DeepTransverseMTMedPlantar;
//    AnyDrawPLine DrawLig =
//    {
//      Thickness = 0.0015;
//      RGB = Main.DrawSettings.Colors.Ligaments;
//    };
//    AnyVar Eps = (Line.Pos[0] - LigMdl.L0)/LigMdl.L0;
//  };
//
//
//  AnyViaPointLigament MtTransversumProfundumPart3_1 =
//  {
//    AnyLigamentModelPol LigMdl =
//    {
//      L0 = 0.01793721*0.99; //Slack length (0 force). Estimated value modified by calibration.
//      eps1 = 1; //Nominal strain (relative elongation from L0)
//      F1 = ...FootLigStiffnessScale*150; //1500; //Nominal force (at L1 = L0 + eps1*L0)
//    };
//    AnyRefFrame &ref1 = ...Seg.Metatarsal3.DeepTransverseMTLatPlantar;
//    AnyRefFrame &ref2 = ...Seg.Metatarsal4.DeepTransverseMTMedDorsal;
//    AnyDrawPLine DrawLig =
//    {
//      Thickness = 0.0015;
//      RGB = Main.DrawSettings.Colors.Ligaments;
//    };
//    AnyVar Eps = (Line.Pos[0] - LigMdl.L0)/LigMdl.L0;
//  };
//  AnyViaPointLigament MtTransversumProfundumPart3_2 =
//  {
//    AnyLigamentModelPol LigMdl =
//    {
//      L0 = 0.01793721*0.99; //Slack length (0 force). Estimated value modified by calibration.
//      eps1 = 1; //Nominal strain (relative elongation from L0)
//      F1 = ...FootLigStiffnessScale*150; //1500; //Nominal force (at L1 = L0 + eps1*L0)
//    };
//    AnyRefFrame &ref1 = ...Seg.Metatarsal3.DeepTransverseMTLatDorsal;
//    AnyRefFrame &ref2 = ...Seg.Metatarsal4.DeepTransverseMTMedPlantar;
//    AnyDrawPLine DrawLig =
//    {
//      Thickness = 0.0015;
//      RGB = Main.DrawSettings.Colors.Ligaments;
//    };
//    AnyVar Eps = (Line.Pos[0] - LigMdl.L0)/LigMdl.L0;
//  };
//
//
//  AnyViaPointLigament MtTransversumProfundumPart4_1 =
//  {
//    AnyLigamentModelPol LigMdl =
//    {
//      L0 = 0.01809975*0.99; //Slack length (0 force). Estimated value modified by calibration.
//      eps1 = 1; //Nominal strain (relative elongation from L0)
//      F1 = ...FootLigStiffnessScale*150; //1500; //Nominal force (at L1 = L0 + eps1*L0)
//    };
//    AnyRefFrame &ref1 = ...Seg.Metatarsal4.DeepTransverseMTLatPlantar;
//    AnyRefFrame &ref2 = ...Seg.Metatarsal5.DeepTransverseMTDorsal;
//    AnyDrawPLine DrawLig =
//    {
//      Thickness = 0.0015;
//      RGB = Main.DrawSettings.Colors.Ligaments;
//    };
//    AnyVar Eps = (Line.Pos[0] - LigMdl.L0)/LigMdl.L0;
//  };
//  AnyViaPointLigament MtTransversumProfundumPart4_2 =
//  {
//    AnyLigamentModelPol LigMdl =
//    {
//      L0 = 0.01809975*0.99; //Slack length (0 force). Estimated value modified by calibration.
//      eps1 = 1; //Nominal strain (relative elongation from L0)
//      F1 = ...FootLigStiffnessScale*150; //1500; //Nominal force (at L1 = L0 + eps1*L0)
//    };
//    AnyRefFrame &ref1 = ...Seg.Metatarsal4.DeepTransverseMTLatDorsal;
//    AnyRefFrame &ref2 = ...Seg.Metatarsal5.DeepTransverseMTPlantar;
//    AnyDrawPLine DrawLig =
//    {
//      Thickness = 0.0015;
//      RGB = Main.DrawSettings.Colors.Ligaments;
//    };
//    AnyVar Eps = (Line.Pos[0] - LigMdl.L0)/LigMdl.L0;
//  };
//
//}; //MtTransversumProfundumCrossed


AnyFolder CollateralMedial = {
  //L0 is length at 0deg flexion and 0deg eversion.
  AnyViaPointLigament TibioTalarPosterior =
  {
    //Model ok
    AnyLigamentModelPol LigMdl =
    {
      L0 = 0.02260083; //Slack length (0 force). Estimated value modified by calibration.
      eps1 = 0.125; //Nominal strain (relative elongation from L0)
      F1 = ...FootLigStiffnessScale*46.79067049; //Nominal force (at L1 = L0 + eps1*L0)
      a0 = 0.25; //0.13;
      a1 = 3.8; //4.00;
    };
    AnyRefFrame &ref1 = ...Seg.Shank.LigTibioTalarPosterior;
    AnyRefFrame &ref2 = ...Seg.Talus.LigTibioTalarPosterior;
    AnyDrawPLine DrawLig =
    {
      Thickness = 0.0015;
      RGB = Main.DrawSettings.Colors.Ligaments;
    };
    AnyVar Eps = (Line.Pos[0] - LigMdl.L0)/LigMdl.L0;
  };

  AnyViaPointLigament TibioTalarAnterior =
  {
    //Model ok
    AnyLigamentModelPol LigMdl =
    {
      L0 =  0.02889658; //Slack length (0 force). Estimated value modified by calibration.
      eps1 = 0.125; //Nominal strain (relative elongation from L0)
      F1 = ...FootLigStiffnessScale*23.38338996; //Nominal force (at L1 = L0 + eps1*L0)
      a0 = 0.26;
      a1 = 2.85;
    };
    AnyRefFrame &ref1 = ...Seg.Shank.LigTibioTalarAnterior;
    AnyRefFrame &ref2 = ...Seg.Talus.LigTibioTalarAnterior;
    AnyDrawPLine DrawLig =
    {
      Thickness = 0.0015;
      RGB = Main.DrawSettings.Colors.Ligaments;
    };
    AnyVar Eps = (Line.Pos[0] - LigMdl.L0)/LigMdl.L0;
  };


  AnyViaPointLigament TibioCalcaneal =
  {
    //Model ok
    AnyLigamentModelPol LigMdl =
    {
      L0 = 0.03438535; //Slack length (0 force). Estimated value modified by calibration.
      eps1 = 0.083; //Nominal strain (relative elongation from L0)
      F1 = ...FootLigStiffnessScale*22.68241874; //Nominal force (at L1 = L0 + eps1*L0)
      a0 = 0.2; //0.12;
      a1 = 4.1; //4.31;
    };
    AnyRefFrame &ref1 = ...Seg.Shank.LigTibioCalcaneal;
    AnyRefFrame &ref2 = ...Seg.Calcaneus.LigTibioCalcaneal;
    AnyDrawPLine DrawLig =
    {
      Thickness = 0.0015;
      RGB = Main.DrawSettings.Colors.Ligaments;
    };
    AnyVar Eps = (Line.Pos[0] - LigMdl.L0)/LigMdl.L0;
  };

  AnyViaPointLigament TibioNavicular =
  {
    AnyLigamentModelPol LigMdl =
    {
      L0 = 0.0465268; //Slack length (0 force). Estimated value modified by calibration.
      eps1 = 1; //Nominal strain (relative elongation from L0)
      F1 = ...FootLigStiffnessScale*40000*L0; //Nominal force (at L1 = L0 + eps1*L0)
    };
    AnyRefFrame &ref1 = ...Seg.Shank.LigTibioNavicular;
    AnyRefFrame &ref2 = ...Seg.Navicular.LigTibioNavicular;
    AnyDrawPLine DrawLig =
    {
      Thickness = 0.0015;
      RGB = Main.DrawSettings.Colors.Ligaments;
    };
    AnyVar Eps = (Line.Pos[0] - LigMdl.L0)/LigMdl.L0;
  };

}; //CollateralMedial


AnyFolder CollateralLateral = {
  //L0 is length at 0deg flexion and 0deg eversion.
  AnyViaPointLigament TaloFibularPosterior =
  {
    //Model ok
    AnyLigamentModelPol LigMdl =
    {
      L0 = 0.03431717; //Slack length (0 force). Estimated value modified by calibration.
      eps1 = 0.083; //Nominal strain (relative elongation from L0)
      F1 = ...FootLigStiffnessScale*5.416326251; //Nominal force (at L1 = L0 + eps1*L0)
      a0 = 0.14;
      a1 = 4.15;
    };
    AnyRefFrame &ref1 = ...Seg.Shank.LigTaloFibularPosterior;
    AnyRefFrame &ref2 = ...Seg.Talus.LigTaloFibularPosterior;
    AnyDrawPLine DrawLig =
    {
      Thickness = 0.0015;
      RGB = Main.DrawSettings.Colors.Ligaments;
    };
    AnyVar Eps = (Line.Pos[0] - LigMdl.L0)/LigMdl.L0;
  };

  AnyViaPointLigament TaloFibularAnterior =
  {
    //Model ok
    AnyLigamentModelPol LigMdl =
    {
      L0 = 0.03439757; //Slack length (0 force). Estimated value modified by calibration.
      eps1 = 0.175; //Nominal strain (relative elongation from L0)
      F1 = ...FootLigStiffnessScale*56.81464341; //Nominal force (at L1 = L0 + eps1*L0)
      a0 = 0.30;
      a1 = 2.51;
    };
    AnyRefFrame &ref1 = ...Seg.Shank.LigTaloFibularAnterior;
    AnyRefFrame &ref2 = ...Seg.Talus.LigTaloFibularAnterior;
    AnyDrawPLine DrawLig =
    {
      Thickness = 0.0015;
      RGB = Main.DrawSettings.Colors.Ligaments;
    };
    AnyVar Eps = (Line.Pos[0] - LigMdl.L0)/LigMdl.L0;
  };

  AnyViaPointLigament CalcaneoFibular =
  {
    //Model ok
    AnyLigamentModelPol LigMdl =
    {
      L0 = 0.04072667; //Slack length (0 force). Estimated value modified by calibration.
      eps1 = 0.083; //Nominal strain (relative elongation from L0)
      F1 = ...FootLigStiffnessScale*12.10311014; //Nominal force (at L1 = L0 + eps1*L0)
      a0 = 0.10;
      a1 = 3.80;
    };
    AnyRefFrame &ref1 = ...Seg.Shank.LigCalcaneoFibular;
    AnyRefFrame &ref2 = ...Seg.Calcaneus.LigCalcaneoFibular;
    AnyDrawPLine DrawLig =
    {
      Thickness = 0.0015;
      RGB = Main.DrawSettings.Colors.Ligaments;
    };
    AnyVar Eps = (Line.Pos[0] - LigMdl.L0)/LigMdl.L0;
  };

}; //CollateralLateral


AnyFolder PlantarFascia = {
  // L0 is length in neutral position

  AnyVar StiffnessCoeffPh = .....StrengthParameters.PlantarFasciaStiffnessCoeffPh;
  AnyVar StiffnessCoeffMt = .....StrengthParameters.PlantarFasciaStiffnessCoeffMt;
  AnyViaPointLigament PlantarFascia1Ph =
  {
    AnyLigamentModelPol LigMdl =
    {
      L0 = 0.1629552; //Slack length (0 force). Estimated value modified by calibration.
      eps1 = 0.036; //Nominal strain (relative elongation from L0)
      F1 = ...FootLigStiffnessScale*600 *(1.25/10) * ..StiffnessCoeffPh; //Nominal force (at L1 = L0 + eps1*L0)
      a0 = 0.60;
      a1 = 1.50;
    };
    AnyRefFrame &ref1 = ...Seg.Calcaneus.LigAponeurosisPlantaris;
    AnyRefFrame &ref2 = ...Seg.Metatarsal1.LigAponeurosisPlantaris;
    AnyRefFrame &ref3 = ...Seg.ProximalPhalange1.LigAponeurosisPlantaris;
    AnyDrawPLine DrawLig =
    {
      Thickness = 0.0015;
      RGB = Main.DrawSettings.Colors.Ligaments;
    };
    AnyVar Eps = (Line.Pos[0] - LigMdl.L0)/LigMdl.L0;
  };

  AnyViaPointLigament PlantarFascia1Mt =
  {
    AnyLigamentModelPol LigMdl =
    {
      L0 = 0.1629552; //Slack length (0 force). Estimated value modified by calibration.
      eps1 = 0.036; //Nominal strain (relative elongation from L0)
      F1 = ...FootLigStiffnessScale*600 *(1.25/10) * ..StiffnessCoeffMt; //Nominal force (at L1 = L0 + eps1*L0)
      a0 = 0.60;
      a1 = 1.50;
    };
    AnyRefFrame &ref1 = ...Seg.Calcaneus.LigAponeurosisPlantaris;
    AnyRefFrame &ref2 = ...Seg.Metatarsal1.LigAponeurosisPlantaris;
    AnyDrawPLine DrawLig =
    {
      Thickness = 0.0015;
      RGB = Main.DrawSettings.Colors.Ligaments;
    };
    AnyVar Eps = (Line.Pos[0] - LigMdl.L0)/LigMdl.L0;
  };


  AnyViaPointLigament PlantarFascia2Ph =
  {
    AnyLigamentModelPol LigMdl =
    {
      L0 = 0.1642641; //Slack length (0 force). Estimated value modified by calibration.
      eps1 = 0.036; //Nominal strain (relative elongation from L0)
      F1 = ...FootLigStiffnessScale*600 *(1.25/10) * ..StiffnessCoeffPh; //Nominal force (at L1 = L0 + eps1*L0)
      a0 = 0.60;
      a1 = 1.50;
    };
    AnyRefFrame &ref1 = ...Seg.Calcaneus.LigAponeurosisPlantaris;
    AnyRefFrame &ref2 = ...Seg.Metatarsal2.LigAponeurosisPlantaris;
    AnyRefFrame &ref3 = ...Seg.ProximalPhalange2.LigAponeurosisPlantaris;
    AnyDrawPLine DrawLig =
    {
      Thickness = 0.0015;
      RGB = Main.DrawSettings.Colors.Ligaments;
    };
    AnyVar Eps = (Line.Pos[0] - LigMdl.L0)/LigMdl.L0;
  };

  AnyViaPointLigament PlantarFascia2Mt =
  {
    AnyLigamentModelPol LigMdl =
    {
      L0 = 0.1642641; //Slack length (0 force). Estimated value modified by calibration.
      eps1 = 0.036; //Nominal strain (relative elongation from L0)
      F1 = ...FootLigStiffnessScale*600 *(1.25/10) * ..StiffnessCoeffMt; //Nominal force (at L1 = L0 + eps1*L0)
      a0 = 0.60;
      a1 = 1.50;
    };
    AnyRefFrame &ref1 = ...Seg.Calcaneus.LigAponeurosisPlantaris;
    AnyRefFrame &ref2 = ...Seg.Metatarsal2.LigAponeurosisPlantaris;
    AnyDrawPLine DrawLig =
    {
      Thickness = 0.0015;
      RGB = Main.DrawSettings.Colors.Ligaments;
    };
    AnyVar Eps = (Line.Pos[0] - LigMdl.L0)/LigMdl.L0;
  };


  AnyViaPointLigament PlantarFascia3Ph =
  {
    AnyLigamentModelPol LigMdl =
    {
      L0 = 0.1634724; //Slack length (0 force). Estimated value modified by calibration.
      eps1 = 0.036; //Nominal strain (relative elongation from L0)
      F1 = ...FootLigStiffnessScale*600 *(1/10) * ..StiffnessCoeffPh; //Nominal force (at L1 = L0 + eps1*L0)
      a0 = 0.60;
      a1 = 1.50;
    };
    AnyRefFrame &ref1 = ...Seg.Calcaneus.LigAponeurosisPlantaris;
    AnyRefFrame &ref2 = ...Seg.Metatarsal3.LigAponeurosisPlantaris;
    AnyRefFrame &ref3 = ...Seg.ProximalPhalange3.LigAponeurosisPlantaris;
    AnyDrawPLine DrawLig =
    {
      Thickness = 0.0015;
      RGB = Main.DrawSettings.Colors.Ligaments;
    };
    AnyVar Eps = (Line.Pos[0] - LigMdl.L0)/LigMdl.L0;
  };

  AnyViaPointLigament PlantarFascia3Mt =
  {
    AnyLigamentModelPol LigMdl =
    {
      L0 = 0.1634724; //Slack length (0 force). Estimated value modified by calibration.
      eps1 = 0.036; //Nominal strain (relative elongation from L0)
      F1 = ...FootLigStiffnessScale*600 *(1/10) * ..StiffnessCoeffMt; //Nominal force (at L1 = L0 + eps1*L0)
      a0 = 0.60;
      a1 = 1.50;
    };
    AnyRefFrame &ref1 = ...Seg.Calcaneus.LigAponeurosisPlantaris;
    AnyRefFrame &ref2 = ...Seg.Metatarsal3.LigAponeurosisPlantaris;
    AnyDrawPLine DrawLig =
    {
      Thickness = 0.0015;
      RGB = Main.DrawSettings.Colors.Ligaments;
    };
    AnyVar Eps = (Line.Pos[0] - LigMdl.L0)/LigMdl.L0;
  };


  AnyViaPointLigament PlantarFascia4Ph =
  {
    AnyLigamentModelPol LigMdl =
    {
      L0 = 0.1552323; //Slack length (0 force). Estimated value modified by calibration.
      eps1 = 0.036; //Nominal strain (relative elongation from L0)
      F1 = ...FootLigStiffnessScale*600 *(0.75/10) * ..StiffnessCoeffPh; //Nominal force (at L1 = L0 + eps1*L0)
      a0 = 0.60;
      a1 = 1.50;
    };
    AnyRefFrame &ref1 = ...Seg.Calcaneus.LigAponeurosisPlantaris;
    AnyRefFrame &ref2 = ...Seg.Metatarsal4.LigAponeurosisPlantaris;
    AnyRefFrame &ref3 = ...Seg.ProximalPhalange4.LigAponeurosisPlantaris;
    AnyDrawPLine DrawLig =
    {
      Thickness = 0.0015;
      RGB = Main.DrawSettings.Colors.Ligaments;
    };
    AnyVar Eps = (Line.Pos[0] - LigMdl.L0)/LigMdl.L0;
  };

  AnyViaPointLigament PlantarFascia4Mt =
  {
    AnyLigamentModelPol LigMdl =
    {
      L0 = 0.1552323; //Slack length (0 force). Estimated value modified by calibration.
      eps1 = 0.036; //Nominal strain (relative elongation from L0)
      F1 = ...FootLigStiffnessScale*600 *(0.75/10) * ..StiffnessCoeffMt; //Nominal force (at L1 = L0 + eps1*L0)
      a0 = 0.60;
      a1 = 1.50;
    };
    AnyRefFrame &ref1 = ...Seg.Calcaneus.LigAponeurosisPlantaris;
    AnyRefFrame &ref2 = ...Seg.Metatarsal4.LigAponeurosisPlantaris;
    AnyDrawPLine DrawLig =
    {
      Thickness = 0.0015;
      RGB = Main.DrawSettings.Colors.Ligaments;
    };
    AnyVar Eps = (Line.Pos[0] - LigMdl.L0)/LigMdl.L0;
  };


  AnyViaPointLigament PlantarFascia5Ph =
  {
    AnyLigamentModelPol LigMdl =
    {
      L0 = 0.1461366; //Slack length (0 force). Estimated value modified by calibration.
      eps1 = 0.036; //Nominal strain (relative elongation from L0)
      F1 = ...FootLigStiffnessScale*600 *(0.75/10) * ..StiffnessCoeffPh; //Nominal force (at L1 = L0 + eps1*L0)
      a0 = 0.60;
      a1 = 1.50;
    };
    AnyRefFrame &ref1 = ...Seg.Calcaneus.LigAponeurosisPlantaris;
    AnyRefFrame &ref2 = ...Seg.Metatarsal5.LigAponeurosisPlantaris;
    AnyRefFrame &ref3 = ...Seg.ProximalPhalange5.LigAponeurosisPlantaris;
    AnyDrawPLine DrawLig =
    {
      Thickness = 0.0015;
      RGB = Main.DrawSettings.Colors.Ligaments;
    };
    AnyVar Eps = (Line.Pos[0] - LigMdl.L0)/LigMdl.L0;
  };

  AnyViaPointLigament PlantarFascia5Mt =
  {
    AnyLigamentModelPol LigMdl =
    {
      L0 = 0.1461366; //Slack length (0 force). Estimated value modified by calibration.
      eps1 = 0.036; //Nominal strain (relative elongation from L0)
      F1 = ...FootLigStiffnessScale*600 *(0.75/10) * ..StiffnessCoeffMt; //Nominal force (at L1 = L0 + eps1*L0)
      a0 = 0.60;
      a1 = 1.50;
    };
    AnyRefFrame &ref1 = ...Seg.Calcaneus.LigAponeurosisPlantaris;
    AnyRefFrame &ref2 = ...Seg.Metatarsal5.LigAponeurosisPlantaris;
    AnyDrawPLine DrawLig =
    {
      Thickness = 0.0015;
      RGB = Main.DrawSettings.Colors.Ligaments;
    };
    AnyVar Eps = (Line.Pos[0] - LigMdl.L0)/LigMdl.L0;
  };


//  AnyViaPointLigament LateralPlantarFascia =
//  {
//    AnyLigamentModelPol LigMdl =
//    {
//      L0 = 0.1061366; //Slack length (0 force). Estimated value modified by calibration.
//      eps1 = 0.036; //Nominal strain (relative elongation from L0)
//      F1 = ..FootLigStiffnessScale*600 *(0.5/10) * ..StiffnessCoeffMt; //Nominal force (at L1 = L0 + eps1*L0)
//      a0 = 0.60;
//      a1 = 1.50;
//    };
//    AnyRefFrame &ref1 = ...Seg.Calcaneus.LigLateralAponeurosisPlantaris;
//    AnyRefFrame &ref2 = ...Seg.Metatarsal5.LigLateralAponeurosisPlantaris;
//    AnyDrawPLine DrawLig =
//    {
//      Thickness = 0.0015;
//      RGB = Main.DrawSettings.Colors.Ligaments;
//    };
//    AnyVar Eps = (Line.Pos[0] - LigMdl.L0)/LigMdl.L0;
//  };

}; //PlantarFascia


AnyFolder CalcaneoNavicularPlantar = {
  AnyViaPointLigament CalcaneoNavicularPlantar1 =
  {
    AnyLigamentModelPol LigMdl =
    {
      L0 = 0.02244344; //Slack length (0 force). Estimated value modified by calibration.
      eps1 = 1; //Nominal strain (relative elongation from L0)
      F1 = ...FootLigStiffnessScale*3704/3; //Nominal force (at L1 = L0 + eps1*L0)
    };
    AnyRefFrame &ref1 = ...Seg.Calcaneus.LigCalcaneoNavicularPlantar1;
    AnyRefFrame &ref2 = ...Seg.Navicular.LigCalcaneoNavicularPlantar1;
    AnyDrawPLine DrawLig =
    {
      Thickness = 0.0015;
      RGB = Main.DrawSettings.Colors.Ligaments;
    };
    AnyVar Eps = (Line.Pos[0] - LigMdl.L0)/LigMdl.L0;
  };


  AnyViaPointLigament CalcaneoNavicularPlantar2 =
  {
    AnyLigamentModelPol LigMdl =
    {
      L0 = 0.01384201; //Slack length (0 force). Estimated value modified by calibration.
      eps1 = 1; //Nominal strain (relative elongation from L0)
      F1 = ...FootLigStiffnessScale*3704/3*5; //Nominal force (at L1 = L0 + eps1*L0)
    };
    AnyRefFrame &ref1 = ...Seg.Calcaneus.LigCalcaneoNavicularPlantar2;
    AnyRefFrame &ref2 = ...Seg.Navicular.LigCalcaneoNavicularPlantar2;
    AnyDrawPLine DrawLig =
    {
      Thickness = 0.0015;
      RGB = Main.DrawSettings.Colors.Ligaments;
    };
    AnyVar Eps = (Line.Pos[0] - LigMdl.L0)/LigMdl.L0;
  };


  AnyViaPointLigament CalcaneoNavicularPlantar3 =
  {
    AnyLigamentModelPol LigMdl =
    {
      L0 = 0.01186992; //Slack length (0 force). Estimated value modified by calibration.
      eps1 = 1; //Nominal strain (relative elongation from L0)
      F1 = ...FootLigStiffnessScale*3704/3*5; //Nominal force (at L1 = L0 + eps1*L0)
    };
    AnyRefFrame &ref1 = ...Seg.Calcaneus.LigCalcaneoNavicularPlantar3;
    AnyRefFrame &ref2 = ...Seg.Navicular.LigCalcaneoNavicularPlantar3;
    AnyDrawPLine DrawLig =
    {
      Thickness = 0.0015;
      RGB = Main.DrawSettings.Colors.Ligaments;
    };
    AnyVar Eps = (Line.Pos[0] - LigMdl.L0)/LigMdl.L0;
  };
}; //CalcaneoNavicularPlantar


AnyFolder CalcaneoCuboidPlantar = {
  AnyViaPointLigament CalcaneoCuboidPlantar1 =
  {
    AnyLigamentModelPol LigMdl =
    {
      L0 = 0.020156; //Slack length (0 force). Estimated value modified by calibration.
      eps1 = 1; //Nominal strain (relative elongation from L0)
      F1 = ...FootLigStiffnessScale*1662/2*4; //Nominal force (at L1 = L0 + eps1*L0)
    };
    AnyRefFrame &ref1 = ...Seg.Calcaneus.LigCalcaneoCuboidPlantar1;
    AnyRefFrame &ref2 = ...Seg.Cuboid.LigCalcaneoCuboidPlantar1;
    AnyDrawPLine DrawLig =
    {
      Thickness = 0.0015;
      RGB = Main.DrawSettings.Colors.Ligaments;
    };
    AnyVar Eps = (Line.Pos[0] - LigMdl.L0)/LigMdl.L0;
  };


  AnyViaPointLigament CalcaneoCuboidPlantar2 =
  {
    AnyLigamentModelPol LigMdl =
    {
      L0 = 0.02618506; //Slack length (0 force). Estimated value modified by calibration.
      eps1 = 1; //Nominal strain (relative elongation from L0)
      F1 = ...FootLigStiffnessScale*1662/2*4; //Nominal force (at L1 = L0 + eps1*L0)
    };
    AnyRefFrame &ref1 = ...Seg.Calcaneus.LigCalcaneoCuboidPlantar2;
    AnyRefFrame &ref2 = ...Seg.Cuboid.LigCalcaneoCuboidPlantar2;
    AnyDrawPLine DrawLig =
    {
      Thickness = 0.0015;
      RGB = Main.DrawSettings.Colors.Ligaments;
    };
    AnyVar Eps = (Line.Pos[0] - LigMdl.L0)/LigMdl.L0;
  };
}; //CalcaneoCuboidPlantar


AnyFolder LongPlantar = {
  AnyViaPointLigament LongPlantar1 =
  {
    AnyLigamentModelPol LigMdl =
    {
      L0 = 0.09165799; //Slack length (0 force). Estimated value modified by calibration.
      eps1 = 1; //Nominal strain (relative elongation from L0)
      F1 = ...FootLigStiffnessScale*1287/4*20; //Nominal force (at L1 = L0 + eps1*L0)
    };
    AnyRefFrame &ref1 = ...Seg.Calcaneus.LigPlantareLongum;
    AnyRefFrame &ref2 = ...Seg.Cuboid.LigPlantareLongumMtII;
    AnyRefFrame &ref3 = ...Seg.Metatarsal2.LigPlantareLongum;
    AnyDrawPLine DrawLig =
    {
      Thickness = 0.0015;
      RGB = Main.DrawSettings.Colors.Ligaments;
    };
    AnyVar Eps = (Line.Pos[0] - LigMdl.L0)/LigMdl.L0;
  };

  AnyViaPointLigament LongPlantar2 =
  {
    AnyLigamentModelPol LigMdl =
    {
      L0 = 0.08741503; //Slack length (0 force). Estimated value modified by calibration.
      eps1 = 1; //Nominal strain (relative elongation from L0)
      F1 = ...FootLigStiffnessScale*1287/4*15; //Nominal force (at L1 = L0 + eps1*L0)
    };
    AnyRefFrame &ref1 = ...Seg.Calcaneus.LigPlantareLongum;
    AnyRefFrame &ref2 = ...Seg.Cuboid.LigPlantareLongumMtIII;
    AnyRefFrame &ref3 = ...Seg.Metatarsal3.LigPlantareLongum;
    AnyDrawPLine DrawLig =
    {
      Thickness = 0.0015;
      RGB = Main.DrawSettings.Colors.Ligaments;
    };
    AnyVar Eps = (Line.Pos[0] - LigMdl.L0)/LigMdl.L0;
  };

  AnyViaPointLigament LongPlantar3 =
  {
    AnyLigamentModelPol LigMdl =
    {
      L0 = 0.08157232; //Slack length (0 force). Estimated value modified by calibration.
      eps1 = 1; //Nominal strain (relative elongation from L0)
      F1 = ...FootLigStiffnessScale*1287/4*10; //Nominal force (at L1 = L0 + eps1*L0)
    };
    AnyRefFrame &ref1 = ...Seg.Calcaneus.LigPlantareLongum;
    AnyRefFrame &ref2 = ...Seg.Cuboid.LigPlantareLongumMtIV;
    AnyRefFrame &ref3 = ...Seg.Metatarsal4.LigPlantareLongum;
    AnyDrawPLine DrawLig =
    {
      Thickness = 0.0015;
      RGB = Main.DrawSettings.Colors.Ligaments;
    };
    AnyVar Eps = (Line.Pos[0] - LigMdl.L0)/LigMdl.L0;
  };

  AnyViaPointLigament LongPlantar4 =
  {
    AnyLigamentModelPol LigMdl =
    {
      L0 = 0.07285362; //Slack length (0 force). Estimated value modified by calibration.
      eps1 = 1; //Nominal strain (relative elongation from L0)
      F1 = ...FootLigStiffnessScale*1287/4*5; //Nominal force (at L1 = L0 + eps1*L0)
    };
    AnyRefFrame &ref1 = ...Seg.Calcaneus.LigPlantareLongum;
    AnyRefFrame &ref2 = ...Seg.Cuboid.LigPlantareLongumMtV;
    AnyRefFrame &ref3 = ...Seg.Metatarsal5.LigPlantareLongum;
    AnyDrawPLine DrawLig =
    {
      Thickness = 0.0015;
      RGB = Main.DrawSettings.Colors.Ligaments;
    };
    AnyVar Eps = (Line.Pos[0] - LigMdl.L0)/LigMdl.L0;
  };
}; //LongPlantar


AnyFolder PlantarPlate = {

  AnyVar StiffnessCoeff = 0.1;

  AnyViaPointLigament PlantarPlate1Med =
  {
    AnyLigamentModelPol LigMdl =
    {
      L0 = 0.01058304; //Slack length (0 force). Estimated value modified by calibration.
      eps1 = 1; //Nominal strain (relative elongation from L0)
      F1 = ...FootLigStiffnessScale*1800/2 *..StiffnessCoeff; //Nominal force (at L1 = L0 + eps1*L0)
    };
    AnyRefFrame &ref1 = ...Seg.Metatarsal1.LigPlantarPlateMed;
    AnyRefFrame &ref2 = ...Seg.ProximalPhalange1.LigPlantarPlateMed;
    AnyDrawPLine DrawLig =
    {
      Thickness = 0.0015;
      RGB = Main.DrawSettings.Colors.Ligaments;
    };
    AnyVar Eps = (Line.Pos[0] - LigMdl.L0)/LigMdl.L0;
  };

  AnyViaPointLigament PlantarPlate1Lat =
  {
    AnyLigamentModelPol LigMdl =
    {
      L0 = 0.01181321; //Slack length (0 force). Estimated value modified by calibration.
      eps1 = 1; //Nominal strain (relative elongation from L0)
      F1 = ...FootLigStiffnessScale*1800/2 *..StiffnessCoeff; //Nominal force (at L1 = L0 + eps1*L0)
    };
    AnyRefFrame &ref1 = ...Seg.Metatarsal1.LigPlantarPlateLat;
    AnyRefFrame &ref2 = ...Seg.ProximalPhalange1.LigPlantarPlateLat;
    AnyDrawPLine DrawLig =
    {
      Thickness = 0.0015;
      RGB = Main.DrawSettings.Colors.Ligaments;
    };
    AnyVar Eps = (Line.Pos[0] - LigMdl.L0)/LigMdl.L0;
  };

  AnyViaPointLigament PlantarPlate2Med =
  {
    AnyLigamentModelPol LigMdl =
    {
      L0 = 0.00847192; //Slack length (0 force). Estimated value modified by calibration.
      eps1 = 1; //Nominal strain (relative elongation from L0)
      F1 = ...FootLigStiffnessScale*1500/2 *..StiffnessCoeff; //Nominal force (at L1 = L0 + eps1*L0)
    };
    AnyRefFrame &ref1 = ...Seg.Metatarsal2.LigPlantarPlateMed;
    AnyRefFrame &ref2 = ...Seg.ProximalPhalange2.LigPlantarPlateMed;
    AnyDrawPLine DrawLig =
    {
      Thickness = 0.0015;
      RGB = Main.DrawSettings.Colors.Ligaments;
    };
    AnyVar Eps = (Line.Pos[0] - LigMdl.L0)/LigMdl.L0;
  };

  AnyViaPointLigament PlantarPlate2Lat =
  {
    AnyLigamentModelPol LigMdl =
    {
      L0 = 0.007974526; //Slack length (0 force). Estimated value modified by calibration.
      eps1 = 1; //Nominal strain (relative elongation from L0)
      F1 = ...FootLigStiffnessScale*1500/2 *..StiffnessCoeff; //Nominal force (at L1 = L0 + eps1*L0)
    };
    AnyRefFrame &ref1 = ...Seg.Metatarsal2.LigPlantarPlateLat;
    AnyRefFrame &ref2 = ...Seg.ProximalPhalange2.LigPlantarPlateLat;
    AnyDrawPLine DrawLig =
    {
      Thickness = 0.0015;
      RGB = Main.DrawSettings.Colors.Ligaments;
    };
    AnyVar Eps = (Line.Pos[0] - LigMdl.L0)/LigMdl.L0;
  };

  AnyViaPointLigament PlantarPlate3Med =
  {
    AnyLigamentModelPol LigMdl =
    {
      L0 = 0.008522669; //Slack length (0 force). Estimated value modified by calibration.
      eps1 = 1; //Nominal strain (relative elongation from L0)
      F1 = ...FootLigStiffnessScale*1500/2 *..StiffnessCoeff; //Nominal force (at L1 = L0 + eps1*L0)
    };
    AnyRefFrame &ref1 = ...Seg.Metatarsal3.LigPlantarPlateMed;
    AnyRefFrame &ref2 = ...Seg.ProximalPhalange3.LigPlantarPlateMed;
    AnyDrawPLine DrawLig =
    {
      Thickness = 0.0015;
      RGB = Main.DrawSettings.Colors.Ligaments;
    };
    AnyVar Eps = (Line.Pos[0] - LigMdl.L0)/LigMdl.L0;
  };

  AnyViaPointLigament PlantarPlate3Lat =
  {
    AnyLigamentModelPol LigMdl =
    {
      L0 = 0.009161315; //Slack length (0 force). Estimated value modified by calibration.
      eps1 = 1; //Nominal strain (relative elongation from L0)
      F1 = ...FootLigStiffnessScale*1500/2 *..StiffnessCoeff; //Nominal force (at L1 = L0 + eps1*L0)
    };
    AnyRefFrame &ref1 = ...Seg.Metatarsal3.LigPlantarPlateLat;
    AnyRefFrame &ref2 = ...Seg.ProximalPhalange3.LigPlantarPlateLat;
    AnyDrawPLine DrawLig =
    {
      Thickness = 0.0015;
      RGB = Main.DrawSettings.Colors.Ligaments;
    };
    AnyVar Eps = (Line.Pos[0] - LigMdl.L0)/LigMdl.L0;
  };

  AnyViaPointLigament PlantarPlate4Med =
  {
    AnyLigamentModelPol LigMdl =
    {
      L0 = 0.007844019; //Slack length (0 force). Estimated value modified by calibration.
      eps1 = 1; //Nominal strain (relative elongation from L0)
      F1 = ...FootLigStiffnessScale*1500/2 *..StiffnessCoeff; //Nominal force (at L1 = L0 + eps1*L0)
    };
    AnyRefFrame &ref1 = ...Seg.Metatarsal4.LigPlantarPlateMed;
    AnyRefFrame &ref2 = ...Seg.ProximalPhalange4.LigPlantarPlateMed;
    AnyDrawPLine DrawLig =
    {
      Thickness = 0.0015;
      RGB = Main.DrawSettings.Colors.Ligaments;
    };
    AnyVar Eps = (Line.Pos[0] - LigMdl.L0)/LigMdl.L0;
  };

  AnyViaPointLigament PlantarPlate4Lat =
  {
    AnyLigamentModelPol LigMdl =
    {
      L0 = 0.007972855; //Slack length (0 force). Estimated value modified by calibration.
      eps1 = 1; //Nominal strain (relative elongation from L0)
      F1 = ...FootLigStiffnessScale*1500/2 *..StiffnessCoeff; //Nominal force (at L1 = L0 + eps1*L0)
    };
    AnyRefFrame &ref1 = ...Seg.Metatarsal4.LigPlantarPlateLat;
    AnyRefFrame &ref2 = ...Seg.ProximalPhalange4.LigPlantarPlateLat;
    AnyDrawPLine DrawLig =
    {
      Thickness = 0.0015;
      RGB = Main.DrawSettings.Colors.Ligaments;
    };
    AnyVar Eps = (Line.Pos[0] - LigMdl.L0)/LigMdl.L0;
  };

  AnyViaPointLigament PlantarPlate5Med =
  {
    AnyLigamentModelPol LigMdl =
    {
      L0 = 0.008546135; //Slack length (0 force). Estimated value modified by calibration.
      eps1 = 1; //Nominal strain (relative elongation from L0)
      F1 = ...FootLigStiffnessScale*1500/2 *..StiffnessCoeff; //Nominal force (at L1 = L0 + eps1*L0)
    };
    AnyRefFrame &ref1 = ...Seg.Metatarsal5.LigPlantarPlateMed;
    AnyRefFrame &ref2 = ...Seg.ProximalPhalange5.LigPlantarPlateMed;
    AnyDrawPLine DrawLig =
    {
      Thickness = 0.0015;
      RGB = Main.DrawSettings.Colors.Ligaments;
    };
    AnyVar Eps = (Line.Pos[0] - LigMdl.L0)/LigMdl.L0;
  };

  AnyViaPointLigament PlantarPlate5Lat =
  {
    AnyLigamentModelPol LigMdl =
    {
      L0 = 0.009851638; //Slack length (0 force). Estimated value modified by calibration.
      eps1 = 1; //Nominal strain (relative elongation from L0)
      F1 = ...FootLigStiffnessScale*1500/2 *..StiffnessCoeff; //Nominal force (at L1 = L0 + eps1*L0)
    };
    AnyRefFrame &ref1 = ...Seg.Metatarsal5.LigPlantarPlateLat;
    AnyRefFrame &ref2 = ...Seg.ProximalPhalange5.LigPlantarPlateLat;
    AnyDrawPLine DrawLig =
    {
      Thickness = 0.0015;
      RGB = Main.DrawSettings.Colors.Ligaments;
    };
    AnyVar Eps = (Line.Pos[0] - LigMdl.L0)/LigMdl.L0;
  };

};
