//Those ligaments are constructed in a special way. They represent the lock of the phalangeal joints when
//they are fully extended. They are modeled as a muscle which strength is zero when the joint is flexed and
//full strength in the locked position.


AnyFolder LigamentsPhalangeal = {


//The FullStrengthAngle is taken from the toe off position during gait,
//this is beleived to be the extended position.
//StartStrengthAngle is taken 3 deg before.


AnyFolder ProxPhDistPh1Lig = {
  AnyViaPointMuscle Ligament = {
    AnyMuscleModel &StrengthModel = .StrengthModel;
    AnyRefNode &Org = ....Seg.ProximalPhalange1.PhalangealLigNode;
    AnyRefNode &Ins = ....Seg.DistalPhalange1.PhalangealLigNode;
    AnyDrawMuscle DrwMus = { RGB = Main.DrawSettings.Colors.Ligaments;};
  };

  AnyMuscleModelUsr1 StrengthModel =
  {
    F0 = 0;
    S = .StrengthFun(....Jnt.FootJnt.ProxPhDistPh1.Pos[0])[0];
  };

  AnyFunInterpol StrengthFun =
  {
    AnyVar Strength = 500;
    AnyVar FullStrengthAngle = 5; //8;
    AnyVar StartStrengthAngle = 2; //5;
    Type = Bspline;
    BsplineOrder = 4;
    T = {-100, -80, -60, StartStrengthAngle-3, StartStrengthAngle-1, StartStrengthAngle+1, FullStrengthAngle-1, FullStrengthAngle, FullStrengthAngle+2, FullStrengthAngle+4, 60, 80, 100}*pi/180;
    Data = {{0, 0, 0, 0, 0, 0, Strength, Strength, Strength, Strength, Strength, Strength, Strength}};
  };
};


AnyFolder ProxPhMidPh2Lig = {
  AnyViaPointMuscle Ligament = {
    AnyMuscleModel &StrengthModel = .StrengthModel;
    AnyRefNode &Org = ....Seg.ProximalPhalange2.PhalangealLigNode;
    AnyRefNode &Ins = ....Seg.MiddlePhalange2.PhalangealLigNodeProx;
    AnyDrawMuscle DrwMus = { RGB = Main.DrawSettings.Colors.Ligaments;};
  };

  AnyMuscleModelUsr1 StrengthModel =
  {
    F0 = 0;
    S = .StrengthFun(....Jnt.FootJnt.ProxPhMidPh2.Pos[0])[0];
  };

  AnyFunInterpol StrengthFun =
  {
    AnyVar Strength = 500;
    AnyVar FullStrengthAngle = 3; //4;
    AnyVar StartStrengthAngle = 0; //1;
    Type = Bspline;
    BsplineOrder = 4;
    T = {-100, -80, -60, StartStrengthAngle-3, StartStrengthAngle-1, StartStrengthAngle+1, FullStrengthAngle-1, FullStrengthAngle, FullStrengthAngle+2, FullStrengthAngle+4, 60, 80, 100}*pi/180;
    Data = {{0, 0, 0, 0, 0, 0, Strength, Strength, Strength, Strength, Strength, Strength, Strength}};
  };
};


AnyFolder ProxPhMidPh3Lig = {
  AnyViaPointMuscle Ligament = {
    AnyMuscleModel &StrengthModel = .StrengthModel;
    AnyRefNode &Org = ....Seg.ProximalPhalange3.PhalangealLigNode;
    AnyRefNode &Ins = ....Seg.MiddlePhalange3.PhalangealLigNodeProx;
    AnyDrawMuscle DrwMus = { RGB = Main.DrawSettings.Colors.Ligaments;};
  };

  AnyMuscleModelUsr1 StrengthModel =
  {
    F0 = 0;
    S = .StrengthFun(....Jnt.FootJnt.ProxPhMidPh3.Pos[0])[0];
  };

  AnyFunInterpol StrengthFun =
  {
    AnyVar Strength = 500;
    AnyVar FullStrengthAngle = 3; //11;
    AnyVar StartStrengthAngle = 0; //8;
    Type = Bspline;
    BsplineOrder = 4;
    T = {-100, -80, -60, StartStrengthAngle-3, StartStrengthAngle-1, StartStrengthAngle+1, FullStrengthAngle-1, FullStrengthAngle, FullStrengthAngle+2, FullStrengthAngle+4, 60, 80, 100}*pi/180;
    Data = {{0, 0, 0, 0, 0, 0, Strength, Strength, Strength, Strength, Strength, Strength, Strength}};
  };
};


AnyFolder ProxPhMidPh4Lig = {
  AnyViaPointMuscle Ligament = {
    AnyMuscleModel &StrengthModel = .StrengthModel;
    AnyRefNode &Org = ....Seg.ProximalPhalange4.PhalangealLigNode;
    AnyRefNode &Ins = ....Seg.MiddlePhalange4.PhalangealLigNodeProx;
    AnyDrawMuscle DrwMus = { RGB = Main.DrawSettings.Colors.Ligaments;};
  };

  AnyMuscleModelUsr1 StrengthModel =
  {
    F0 = 0;
    S = .StrengthFun(....Jnt.FootJnt.ProxPhMidPh4.Pos[0])[0];
  };

  AnyFunInterpol StrengthFun =
  {
    AnyVar Strength = 500;
    AnyVar FullStrengthAngle = 13;
    AnyVar StartStrengthAngle = 10;
    Type = Bspline;
    BsplineOrder = 4;
    T = {-100, -80, -60, StartStrengthAngle-3, StartStrengthAngle-1, StartStrengthAngle+1, FullStrengthAngle-1, FullStrengthAngle, FullStrengthAngle+2, FullStrengthAngle+4, 60, 80, 100}*pi/180;
    Data = {{0, 0, 0, 0, 0, 0, Strength, Strength, Strength, Strength, Strength, Strength, Strength}};
  };
};


AnyFolder ProxPhMidPh5Lig = {
  AnyViaPointMuscle Ligament = {
    AnyMuscleModel &StrengthModel = .StrengthModel;
    AnyRefNode &Org = ....Seg.ProximalPhalange5.PhalangealLigNode;
    AnyRefNode &Ins = ....Seg.MiddlePhalange5.PhalangealLigNodeProx;
    AnyDrawMuscle DrwMus = { RGB = Main.DrawSettings.Colors.Ligaments;};
  };

  AnyMuscleModelUsr1 StrengthModel =
  {
    F0 = 0;
    S = .StrengthFun(....Jnt.FootJnt.ProxPhMidPh5.Pos[0])[0];
  };

  AnyFunInterpol StrengthFun =
  {
    AnyVar Strength = 500;
    AnyVar FullStrengthAngle = 6;
    AnyVar StartStrengthAngle = 3;
    Type = Bspline;
    BsplineOrder = 4;
    T = {-100, -80, -60, StartStrengthAngle-3, StartStrengthAngle-1, StartStrengthAngle+1, FullStrengthAngle-1, FullStrengthAngle, FullStrengthAngle+2, FullStrengthAngle+4, 60, 80, 100}*pi/180;
    Data = {{0, 0, 0, 0, 0, 0, Strength, Strength, Strength, Strength, Strength, Strength, Strength}};
  };
};


AnyFolder MidPhDistPh2Lig = {
  AnyViaPointMuscle Ligament = {
    AnyMuscleModel &StrengthModel = .StrengthModel;
    AnyRefNode &Org = ....Seg.MiddlePhalange2.PhalangealLigNodeDist;
    AnyRefNode &Ins = ....Seg.DistalPhalange2.PhalangealLigNode;
    AnyDrawMuscle DrwMus = { RGB = Main.DrawSettings.Colors.Ligaments;};
  };

  AnyMuscleModelUsr1 StrengthModel =
  {
    F0 = 0;
    S = .StrengthFun(....Jnt.FootJnt.MidPhDistPh2.Pos[0])[0];
  };

  AnyFunInterpol StrengthFun =
  {
    AnyVar Strength = 500;
    AnyVar FullStrengthAngle = 3;
    AnyVar StartStrengthAngle = 0;
    Type = Bspline;
    BsplineOrder = 4;
    T = {-100, -80, -60, StartStrengthAngle-3, StartStrengthAngle-1, StartStrengthAngle+1, FullStrengthAngle-1, FullStrengthAngle, FullStrengthAngle+2, FullStrengthAngle+4, 60, 80, 100}*pi/180;
    Data = {{0, 0, 0, 0, 0, 0, Strength, Strength, Strength, Strength, Strength, Strength, Strength}};
  };
};


AnyFolder MidPhDistPh3Lig = {
  AnyViaPointMuscle Ligament = {
    AnyMuscleModel &StrengthModel = .StrengthModel;
    AnyRefNode &Org = ....Seg.MiddlePhalange3.PhalangealLigNodeDist;
    AnyRefNode &Ins = ....Seg.DistalPhalange3.PhalangealLigNode;
    AnyDrawMuscle DrwMus = { RGB = Main.DrawSettings.Colors.Ligaments;};
  };

  AnyMuscleModelUsr1 StrengthModel =
  {
    F0 = 0;
    S = .StrengthFun(....Jnt.FootJnt.MidPhDistPh3.Pos[0])[0];
  };

  AnyFunInterpol StrengthFun =
  {
    AnyVar Strength = 500;
    AnyVar FullStrengthAngle = 3;
    AnyVar StartStrengthAngle = 0;
    Type = Bspline;
    BsplineOrder = 4;
    T = {-100, -80, -60, StartStrengthAngle-3, StartStrengthAngle-1, StartStrengthAngle+1, FullStrengthAngle-1, FullStrengthAngle, FullStrengthAngle+2, FullStrengthAngle+4, 60, 80, 100}*pi/180;
    Data = {{0, 0, 0, 0, 0, 0, Strength, Strength, Strength, Strength, Strength, Strength, Strength}};
  };
};


AnyFolder MidPhDistPh4Lig = {
  AnyViaPointMuscle Ligament = {
    AnyMuscleModel &StrengthModel = .StrengthModel;
    AnyRefNode &Org = ....Seg.MiddlePhalange4.PhalangealLigNodeDist;
    AnyRefNode &Ins = ....Seg.DistalPhalange4.PhalangealLigNode;
    AnyDrawMuscle DrwMus = { RGB = Main.DrawSettings.Colors.Ligaments;};
  };

  AnyMuscleModelUsr1 StrengthModel =
  {
    F0 = 0;
    S = .StrengthFun(....Jnt.FootJnt.MidPhDistPh4.Pos[0])[0];
  };

  AnyFunInterpol StrengthFun =
  {
    AnyVar Strength = 500;
    AnyVar FullStrengthAngle = 6;
    AnyVar StartStrengthAngle = 3;
    Type = Bspline;
    BsplineOrder = 4;
    T = {-100, -80, -60, StartStrengthAngle-3, StartStrengthAngle-1, StartStrengthAngle+1, FullStrengthAngle-1, FullStrengthAngle, FullStrengthAngle+2, FullStrengthAngle+4, 60, 80, 100}*pi/180;
    Data = {{0, 0, 0, 0, 0, 0, Strength, Strength, Strength, Strength, Strength, Strength, Strength}};
  };
};


AnyFolder MidPhDistPh5Lig = {
  AnyViaPointMuscle Ligament = {
    AnyMuscleModel &StrengthModel = .StrengthModel;
    AnyRefNode &Org = ....Seg.MiddlePhalange5.PhalangealLigNodeDist;
    AnyRefNode &Ins = ....Seg.DistalPhalange5.PhalangealLigNode;
    AnyDrawMuscle DrwMus = { RGB = Main.DrawSettings.Colors.Ligaments;};
  };

  AnyMuscleModelUsr1 StrengthModel =
  {
    F0 = 0;
    S = .StrengthFun(....Jnt.FootJnt.MidPhDistPh5.Pos[0])[0];
  };

  AnyFunInterpol StrengthFun =
  {
    AnyVar Strength = 500;
    AnyVar FullStrengthAngle = 3;
    AnyVar StartStrengthAngle = 0;
    Type = Bspline;
    BsplineOrder = 4;
    T = {-100, -80, -60, StartStrengthAngle-3, StartStrengthAngle-1, StartStrengthAngle+1, FullStrengthAngle-1, FullStrengthAngle, FullStrengthAngle+2, FullStrengthAngle+4, 60, 80, 100}*pi/180;
    Data = {{0, 0, 0, 0, 0, 0, Strength, Strength, Strength, Strength, Strength, Strength, Strength}};
  };
};


}; // LigamentsPhalangeal
