AnyFolder LigamentsTarsal = {

AnyFolder &Seg = ..Seg;


//***************************************************************************************************
//Ligaments as muscles
//***************************************************************************************************

AnyVar F0 = 1000;
AnyVar F0Push = 500; //500
AnyVar StrengthFactor = 1; //0.3;


AnySearchFun MusForceList =
{
  Search = ".*Mus.Fm";
};


AnyVar MusForceSum = sum(MusForceList());


//AnyViaPointMuscle TibioNavicularMus = {
//  AnyMuscleModelUsr1 MusMdl =
//  {
//    F0 = ..F0;
//    S = F0*StrengthCond;
//    AnyVar OnOff = gtfun(..TibioNavicularLig.Line.Pos[0], ..TibioNavicularLig.LigMdl.L0);
//    AnyVar StrengthCond = iffun(OnOff, 1.0, ..StrengthFactor);
//  };
//  AnyRefFrame &ref1 = .Seg.Shank.LigTibioNavicular;
//  AnyRefFrame &ref2 = .Seg.Navicular.LigTibioNavicular;
//  AnyDrawMuscle DrwMus = { RGB = Main.DrawSettings.Colors.Ligaments; Bulging=1;};
//};


AnyViaPointMuscle CalcaneoNavicularPlantar1Mus = {
  AnyMuscleModelUsr1 MusMdl =
  {
    F0 = ..F0;
    S = F0*StrengthCond;
    AnyVar OnOff = gtfun(..CalcaneoNavicularPlantar1Lig.Line.Pos[0], ..CalcaneoNavicularPlantar1Lig.LigMdl.L0);
    AnyVar StrengthCond = iffun(OnOff, 1.0, ..StrengthFactor);
  };
  AnyRefFrame &ref1 = .Seg.Calcaneus.LigCalcaneoNavicularPlantar1;
  AnyRefFrame &ref2 = .Seg.Navicular.LigCalcaneoNavicularPlantar1;
  AnyDrawMuscle DrwMus = { RGB = Main.DrawSettings.Colors.Ligaments; Bulging=1;};
};


AnyViaPointMuscle CalcaneoNavicularPlantar2Mus = {
  AnyMuscleModelUsr1 MusMdl =
  {
    F0 = ..F0;
    S = F0*StrengthCond;
    AnyVar OnOff = gtfun(..CalcaneoNavicularPlantar2Lig.Line.Pos[0], ..CalcaneoNavicularPlantar2Lig.LigMdl.L0);
    AnyVar StrengthCond = iffun(OnOff, 1.0, ..StrengthFactor);
  };
  AnyRefFrame &ref1 = .Seg.Calcaneus.LigCalcaneoNavicularPlantar2;
  AnyRefFrame &ref2 = .Seg.Navicular.LigCalcaneoNavicularPlantar2;
  AnyDrawMuscle DrwMus = { RGB = Main.DrawSettings.Colors.Ligaments; Bulging=1;};
};


AnyViaPointMuscle CalcaneoNavicularPlantar3Mus = {
  AnyMuscleModelUsr1 MusMdl =
  {
    F0 = ..F0;
    S = F0*StrengthCond;
    AnyVar OnOff = gtfun(..CalcaneoNavicularPlantar3Lig.Line.Pos[0], ..CalcaneoNavicularPlantar3Lig.LigMdl.L0);
    AnyVar StrengthCond = iffun(OnOff, 1.0, ..StrengthFactor);
  };
  AnyRefFrame &ref1 = .Seg.Calcaneus.LigCalcaneoNavicularPlantar3;
  AnyRefFrame &ref2 = .Seg.Navicular.LigCalcaneoNavicularPlantar3;
  AnyDrawMuscle DrwMus = { RGB = Main.DrawSettings.Colors.Ligaments; Bulging=1;};
};


AnyViaPointMuscle CalcaneoCuboidPlantar1Mus = {
  AnyMuscleModelUsr1 MusMdl =
  {
    F0 = ..F0;
    S = F0*StrengthCond;
    AnyVar OnOff = gtfun(..CalcaneoCuboidPlantar1Lig.Line.Pos[0], ..CalcaneoCuboidPlantar1Lig.LigMdl.L0);
    AnyVar StrengthCond = iffun(OnOff, 1.0, ..StrengthFactor);
  };
  AnyRefFrame &ref1 = .Seg.Calcaneus.LigCalcaneoCuboidPlantar1;
  AnyRefFrame &ref2 = .Seg.Cuboid.LigCalcaneoCuboidPlantar1;
  AnyDrawMuscle DrwMus = { RGB = Main.DrawSettings.Colors.Ligaments; Bulging=1;};
};


AnyViaPointMuscle CalcaneoCuboidPlantar2Mus = {
  AnyMuscleModelUsr1 MusMdl =
  {
    F0 = ..F0;
    S = F0*StrengthCond;
    AnyVar OnOff = gtfun(..CalcaneoCuboidPlantar2Lig.Line.Pos[0], ..CalcaneoCuboidPlantar2Lig.LigMdl.L0);
    AnyVar StrengthCond = iffun(OnOff, 1.0, ..StrengthFactor);
  };
  AnyRefFrame &ref1 = .Seg.Calcaneus.LigCalcaneoCuboidPlantar2;
  AnyRefFrame &ref2 = .Seg.Cuboid.LigCalcaneoCuboidPlantar2;
  AnyDrawMuscle DrwMus = { RGB = Main.DrawSettings.Colors.Ligaments; Bulging=1;};
};


AnyViaPointMuscle TaloNavicularDorsal1Mus = {
  AnyMuscleModelUsr1 MusMdl =
  {
    F0 = ..F0;
    S = F0*StrengthCond;
    AnyVar OnOff = gtfun(..TaloNavicularDorsal1Lig.Line.Pos[0], ..TaloNavicularDorsal1Lig.LigMdl.L0);
    AnyVar StrengthCond = iffun(OnOff, 1.0, ..StrengthFactor);
  };
  AnyRefFrame &ref1 = .Seg.Talus.LigTaloNavicularDorsalNode1;
  AnyRefFrame &ref2 = .Seg.Navicular.LigTaloNavicularDorsalNode1;
  AnyDrawMuscle DrwMus = { RGB = Main.DrawSettings.Colors.Ligaments; Bulging=1;};
};


AnyViaPointMuscle TaloNavicularDorsal2Mus = {
  AnyMuscleModelUsr1 MusMdl =
  {
    F0 = ..F0;
    S = F0*StrengthCond;
    AnyVar OnOff = gtfun(..TaloNavicularDorsal2Lig.Line.Pos[0], ..TaloNavicularDorsal2Lig.LigMdl.L0);
    AnyVar StrengthCond = iffun(OnOff, 1.0, ..StrengthFactor);
  };
  AnyRefFrame &ref1 = .Seg.Talus.LigTaloNavicularDorsalNode2;
  AnyRefFrame &ref2 = .Seg.Navicular.LigTaloNavicularDorsalNode2;
  AnyDrawMuscle DrwMus = { RGB = Main.DrawSettings.Colors.Ligaments; Bulging=1;};
};


AnyViaPointMuscle CalcaneoNavicularBifurcateMus = {
  AnyMuscleModelUsr1 MusMdl =
  {
    F0 = ..F0;
    S = F0*StrengthCond;
    AnyVar OnOff = gtfun(..CalcaneoNavicularBifurcateLig.Line.Pos[0], ..CalcaneoNavicularBifurcateLig.LigMdl.L0);
    AnyVar StrengthCond = iffun(OnOff, 1.0, ..StrengthFactor);
  };
  AnyRefFrame &ref1 = .Seg.Calcaneus.LigBifurcateNode;
  AnyRefFrame &ref2 = .Seg.Navicular.LigCalcaneoNavicularBifurcateNode;
  AnyDrawMuscle DrwMus = { RGB = Main.DrawSettings.Colors.Ligaments; Bulging=1;};
};


AnyViaPointMuscle CalcaneoCuboidBifurcateMus = {
  AnyMuscleModelUsr1 MusMdl =
  {
    F0 = ..F0;
    S = F0*StrengthCond;
    AnyVar OnOff = gtfun(..CalcaneoCuboidBifurcateLig.Line.Pos[0], ..CalcaneoCuboidBifurcateLig.LigMdl.L0);
    AnyVar StrengthCond = iffun(OnOff, 1.0, ..StrengthFactor);
  };
  AnyRefFrame &ref1 = .Seg.Calcaneus.LigBifurcateNode;
  AnyRefFrame &ref2 = .Seg.Cuboid.LigCalcaneoCuboidBifurcateNode;
  AnyDrawMuscle DrwMus = { RGB = Main.DrawSettings.Colors.Ligaments; Bulging=1;};
};


AnyViaPointMuscle CalcaneoCuboidDorsalMus = {
  AnyMuscleModelUsr1 MusMdl =
  {
    F0 = ..F0;
    S = F0*StrengthCond;
    AnyVar OnOff = gtfun(..CalcaneoCuboidDorsalLig.Line.Pos[0], ..CalcaneoCuboidDorsalLig.LigMdl.L0);
    AnyVar StrengthCond = iffun(OnOff, 1.0, ..StrengthFactor);
  };
  AnyRefFrame &ref1 = .Seg.Calcaneus.LigCalcaneoCuboidDorsalNode;
  AnyRefFrame &ref2 = .Seg.Cuboid.LigCalcaneoCuboidDorsalNode;
  AnyDrawMuscle DrwMus = { RGB = Main.DrawSettings.Colors.Ligaments; Bulging=1;};
};


AnyViaPointMuscle CuneoNavicularDorsal1Mus = {
  AnyMuscleModelUsr1 MusMdl =
  {
    F0 = ..F0;
    S = F0*StrengthCond;
    AnyVar OnOff = gtfun(..CuneoNavicularDorsal1Lig.Line.Pos[0], ..CuneoNavicularDorsal1Lig.LigMdl.L0);
    AnyVar StrengthCond = iffun(OnOff, 1.0, ..StrengthFactor);
  };
  AnyRefFrame &ref1 = .Seg.Navicular.LigCuneoNavicularDorsalNode1;
  AnyRefFrame &ref2 = .Seg.MedialCuneiform.LigCuneoNavicularDorsalNode;
  AnyDrawMuscle DrwMus = { RGB = Main.DrawSettings.Colors.Ligaments; Bulging=1;};
};


AnyViaPointMuscle CuneoNavicularDorsal2Mus = {
  AnyMuscleModelUsr1 MusMdl =
  {
    F0 = ..F0;
    S = F0*StrengthCond;
    AnyVar OnOff = gtfun(..CuneoNavicularDorsal2Lig.Line.Pos[0], ..CuneoNavicularDorsal2Lig.LigMdl.L0);
    AnyVar StrengthCond = iffun(OnOff, 1.0, ..StrengthFactor);
  };
  AnyRefFrame &ref1 = .Seg.Navicular.LigCuneoNavicularDorsalNode2;
  AnyRefFrame &ref2 = .Seg.IntermediateCuneiform.LigCuneoNavicularDorsalNode;
  AnyDrawMuscle DrwMus = { RGB = Main.DrawSettings.Colors.Ligaments; Bulging=1;};
};


AnyViaPointMuscle CuneoNavicularDorsal3Mus = {
  AnyMuscleModelUsr1 MusMdl =
  {
    F0 = ..F0;
    S = F0*StrengthCond;
    AnyVar OnOff = gtfun(..CuneoNavicularDorsal3Lig.Line.Pos[0], ..CuneoNavicularDorsal3Lig.LigMdl.L0);
    AnyVar StrengthCond = iffun(OnOff, 1.0, ..StrengthFactor);
  };
  AnyRefFrame &ref1 = .Seg.Navicular.LigCuneoNavicularDorsalNode3;
  AnyRefFrame &ref2 = .Seg.LateralCuneiform.LigCuneoNavicularDorsalNode;
  AnyDrawMuscle DrwMus = { RGB = Main.DrawSettings.Colors.Ligaments; Bulging=1;};
};


AnyViaPointMuscle CuneoNavicularPlantar1Mus = {
  AnyMuscleModelUsr1 MusMdl =
  {
    F0 = ..F0;
    S = F0*StrengthCond;
    AnyVar OnOff = gtfun(..CuneoNavicularPlantar1Lig.Line.Pos[0], ..CuneoNavicularPlantar1Lig.LigMdl.L0);
    AnyVar StrengthCond = iffun(OnOff, 1.0, ..StrengthFactor);
  };
  AnyRefFrame &ref1 = .Seg.Navicular.LigCuneoNavicularPlantarNode1;
  AnyRefFrame &ref2 = .Seg.MedialCuneiform.LigCuneoNavicularPlantarNode;
  AnyDrawMuscle DrwMus = { RGB = Main.DrawSettings.Colors.Ligaments; Bulging=1;};
};


AnyViaPointMuscle CuneoNavicularPlantar2Mus = {
  AnyMuscleModelUsr1 MusMdl =
  {
    F0 = ..F0;
    S = F0*StrengthCond;
    AnyVar OnOff = gtfun(..CuneoNavicularPlantar2Lig.Line.Pos[0], ..CuneoNavicularPlantar2Lig.LigMdl.L0);
    AnyVar StrengthCond = iffun(OnOff, 1.0, ..StrengthFactor);
  };
  AnyRefFrame &ref1 = .Seg.Navicular.LigCuneoNavicularPlantarNode2;
  AnyRefFrame &ref2 = .Seg.IntermediateCuneiform.LigCuneoNavicularPlantarNode;
  AnyDrawMuscle DrwMus = { RGB = Main.DrawSettings.Colors.Ligaments; Bulging=1;};
};


AnyViaPointMuscle CuneoNavicularPlantar3Mus = {
  AnyMuscleModelUsr1 MusMdl =
  {
    F0 = ..F0;
    S = F0*StrengthCond;
    AnyVar OnOff = gtfun(..CuneoNavicularPlantar3Lig.Line.Pos[0], ..CuneoNavicularPlantar3Lig.LigMdl.L0);
    AnyVar StrengthCond = iffun(OnOff, 1.0, ..StrengthFactor);
  };
  AnyRefFrame &ref1 = .Seg.Navicular.LigCuneoNavicularPlantarNode3;
  AnyRefFrame &ref2 = .Seg.LateralCuneiform.LigCuneoNavicularPlantarNode;
  AnyDrawMuscle DrwMus = { RGB = Main.DrawSettings.Colors.Ligaments; Bulging=1;};
};


AnyViaPointMuscle InterCuneiformDorsal1Mus = {
  AnyMuscleModelUsr1 MusMdl =
  {
    F0 = ..F0;
    S = F0*StrengthCond;
    AnyVar OnOff = gtfun(..InterCuneiformDorsal1Lig.Line.Pos[0], ..InterCuneiformDorsal1Lig.LigMdl.L0);
    AnyVar StrengthCond = iffun(OnOff, 1.0, ..StrengthFactor);
  };
  AnyRefFrame &ref1 = .Seg.MedialCuneiform.LigInterCuneiformDorsalNode;
  AnyRefFrame &ref2 = .Seg.IntermediateCuneiform.LigInterCuneiformDorsalNode1;
  AnyDrawMuscle DrwMus = { RGB = Main.DrawSettings.Colors.Ligaments; Bulging=1;};
};


AnyViaPointMuscle InterCuneiformDorsal2Mus = {
  AnyMuscleModelUsr1 MusMdl =
  {
    F0 = ..F0;
    S = F0*StrengthCond;
    AnyVar OnOff = gtfun(..InterCuneiformDorsal2Lig.Line.Pos[0], ..InterCuneiformDorsal2Lig.LigMdl.L0);
    AnyVar StrengthCond = iffun(OnOff, 1.0, ..StrengthFactor);
  };
  AnyRefFrame &ref1 = .Seg.IntermediateCuneiform.LigInterCuneiformDorsalNode2;
  AnyRefFrame &ref2 = .Seg.LateralCuneiform.LigInterCuneiformDorsalNode;
  AnyDrawMuscle DrwMus = { RGB = Main.DrawSettings.Colors.Ligaments; Bulging=1;};
};


AnyViaPointMuscle CuneoCuboidDorsalMus = {
  AnyMuscleModelUsr1 MusMdl =
  {
    F0 = ..F0;
    S = F0*StrengthCond;
    AnyVar OnOff = gtfun(..CuneoCuboidDorsalLig.Line.Pos[0], ..CuneoCuboidDorsalLig.LigMdl.L0);
    AnyVar StrengthCond = iffun(OnOff, 1.0, ..StrengthFactor);
  };
  AnyRefFrame &ref1 = .Seg.LateralCuneiform.LigCuneoCuboidDorsalNode;
  AnyRefFrame &ref2 = .Seg.Cuboid.LigCuneoCuboidDorsalNode;
  AnyDrawMuscle DrwMus = { RGB = Main.DrawSettings.Colors.Ligaments; Bulging=1;};
};


AnyViaPointMuscle InterCuneiformPlantar1Mus = {
  AnyMuscleModelUsr1 MusMdl =
  {
    F0 = ..F0;
    S = F0*StrengthCond;
    AnyVar OnOff = gtfun(..InterCuneiformPlantar1Lig.Line.Pos[0], ..InterCuneiformPlantar1Lig.LigMdl.L0);
    AnyVar StrengthCond = iffun(OnOff, 1.0, ..StrengthFactor);
  };
  AnyRefFrame &ref1 = .Seg.MedialCuneiform.LigInterCuneiformPlantarNode;
  AnyRefFrame &ref2 = .Seg.IntermediateCuneiform.LigInterCuneiformPlantarNode1;
  AnyDrawMuscle DrwMus = { RGB = Main.DrawSettings.Colors.Ligaments; Bulging=1;};
};


AnyViaPointMuscle InterCuneiformPlantar2Mus = {
  AnyMuscleModelUsr1 MusMdl =
  {
    F0 = ..F0;
    S = F0*StrengthCond;
    AnyVar OnOff = gtfun(..InterCuneiformPlantar2Lig.Line.Pos[0], ..InterCuneiformPlantar2Lig.LigMdl.L0);
    AnyVar StrengthCond = iffun(OnOff, 1.0, ..StrengthFactor);
  };
  AnyRefFrame &ref1 = .Seg.IntermediateCuneiform.LigInterCuneiformPlantarNode2;
  AnyRefFrame &ref2 = .Seg.LateralCuneiform.LigInterCuneiformPlantarNode;
  AnyDrawMuscle DrwMus = { RGB = Main.DrawSettings.Colors.Ligaments; Bulging=1;};
};


AnyViaPointMuscle CuneoCuboidPlantarMus = {
  AnyMuscleModelUsr1 MusMdl =
  {
    F0 = ..F0;
    S = F0*StrengthCond;
    AnyVar OnOff = gtfun(..CuneoCuboidPlantarLig.Line.Pos[0], ..CuneoCuboidPlantarLig.LigMdl.L0);
    AnyVar StrengthCond = iffun(OnOff, 1.0, ..StrengthFactor);
  };
  AnyRefFrame &ref1 = .Seg.LateralCuneiform.LigCuneoCuboidPlantarNode;
  AnyRefFrame &ref2 = .Seg.Cuboid.LigCuneoCuboidPlantarNode;
  AnyDrawMuscle DrwMus = { RGB = Main.DrawSettings.Colors.Ligaments; Bulging=1;};
};


AnyViaPointMuscle CuboideoNavicularDorsalMus = {
  AnyMuscleModelUsr1 MusMdl =
  {
    F0 = ..F0;
    S = F0*StrengthCond;
    AnyVar OnOff = gtfun(..CuboideoNavicularDorsalLig.Line.Pos[0], ..CuboideoNavicularDorsalLig.LigMdl.L0);
    AnyVar StrengthCond = iffun(OnOff, 1.0, ..StrengthFactor);
  };
  AnyRefFrame &ref1 = .Seg.Cuboid.LigCuboideoNavicularDorsalNode;
  AnyRefFrame &ref2 = .Seg.Navicular.LigCuboideoNavicularDorsalNode;
  AnyDrawMuscle DrwMus = { RGB = Main.DrawSettings.Colors.Ligaments; Bulging=1;};
};


AnyViaPointMuscle CuboideoNavicularPlantarMus = {
  AnyMuscleModelUsr1 MusMdl =
  {
    F0 = ..F0;
    S = F0*StrengthCond;
    AnyVar OnOff = gtfun(..CuboideoNavicularPlantarLig.Line.Pos[0], ..CuboideoNavicularPlantarLig.LigMdl.L0);
    AnyVar StrengthCond = iffun(OnOff, 1.0, ..StrengthFactor);
  };
  AnyRefFrame &ref1 = .Seg.Cuboid.LigCuboideoNavicularPlantarNode;
  AnyRefFrame &ref2 = .Seg.Navicular.LigCuboideoNavicularPlantarNode;
  AnyDrawMuscle DrwMus = { RGB = Main.DrawSettings.Colors.Ligaments; Bulging=1;};
};


AnyViaPointMuscle TarsoMetatarsalDorsal1Mus = {
  AnyMuscleModelUsr1 MusMdl =
  {
    F0 = ..F0;
    S = F0*StrengthCond;
    AnyVar OnOff = gtfun(..TarsoMetatarsalDorsal1Lig.Line.Pos[0], ..TarsoMetatarsalDorsal1Lig.LigMdl.L0);
    AnyVar StrengthCond = iffun(OnOff, 1.0, ..StrengthFactor);
  };
  AnyRefFrame &ref1 = .Seg.MedialCuneiform.LigTarsoMetatarsalDorsalNode1;
  AnyRefFrame &ref2 = .Seg.Metatarsal1.LigTarsoMetatarsalDorsalNode;
  AnyDrawMuscle DrwMus = { RGB = Main.DrawSettings.Colors.Ligaments; Bulging=1;};
};


AnyViaPointMuscle TarsoMetatarsalDorsal1BisMus = {
  AnyMuscleModelUsr1 MusMdl =
  {
    F0 = ..F0;
    S = F0*StrengthCond;
    AnyVar OnOff = gtfun(..TarsoMetatarsalDorsal1BisLig.Line.Pos[0], ..TarsoMetatarsalDorsal1BisLig.LigMdl.L0);
    AnyVar StrengthCond = iffun(OnOff, 1.0, ..StrengthFactor);
  };
  AnyRefFrame &ref1 = .Seg.MedialCuneiform.LigTarsoMetatarsalDorsalNode3;
  AnyRefFrame &ref2 = .Seg.Metatarsal1.LigTarsoMetatarsalDorsalNode2;
  AnyDrawMuscle DrwMus = { RGB = Main.DrawSettings.Colors.Ligaments; Bulging=1;};
};


AnyViaPointMuscle TarsoMetatarsalDorsal2Mus = {
  AnyMuscleModelUsr1 MusMdl =
  {
    F0 = ..F0;
    S = F0*StrengthCond;
    AnyVar OnOff = gtfun(..TarsoMetatarsalDorsal2Lig.Line.Pos[0], ..TarsoMetatarsalDorsal2Lig.LigMdl.L0);
    AnyVar StrengthCond = iffun(OnOff, 1.0, ..StrengthFactor);
  };
  AnyRefFrame &ref1 = .Seg.MedialCuneiform.LigTarsoMetatarsalDorsalNode2;
  AnyRefFrame &ref2 = .Seg.Metatarsal2.LigTarsoMetatarsalDorsalNode1;
  AnyDrawMuscle DrwMus = { RGB = Main.DrawSettings.Colors.Ligaments; Bulging=1;};
};


AnyViaPointMuscle TarsoMetatarsalDorsal3Mus = {
  AnyMuscleModelUsr1 MusMdl =
  {
    F0 = ..F0;
    S = F0*StrengthCond;
    AnyVar OnOff = gtfun(..TarsoMetatarsalDorsal3Lig.Line.Pos[0], ..TarsoMetatarsalDorsal3Lig.LigMdl.L0);
    AnyVar StrengthCond = iffun(OnOff, 1.0, ..StrengthFactor);
  };
  AnyRefFrame &ref1 = .Seg.IntermediateCuneiform.LigTarsoMetatarsalDorsalNode;
  AnyRefFrame &ref2 = .Seg.Metatarsal2.LigTarsoMetatarsalDorsalNode2;
  AnyDrawMuscle DrwMus = { RGB = Main.DrawSettings.Colors.Ligaments; Bulging=1;};
};


AnyViaPointMuscle TarsoMetatarsalDorsal4Mus = {
  AnyMuscleModelUsr1 MusMdl =
  {
    F0 = ..F0;
    S = F0*StrengthCond;
    AnyVar OnOff = gtfun(..TarsoMetatarsalDorsal4Lig.Line.Pos[0], ..TarsoMetatarsalDorsal4Lig.LigMdl.L0);
    AnyVar StrengthCond = iffun(OnOff, 1.0, ..StrengthFactor);
  };
  AnyRefFrame &ref1 = .Seg.LateralCuneiform.LigTarsoMetatarsalDorsalNode1;
  AnyRefFrame &ref2 = .Seg.Metatarsal2.LigTarsoMetatarsalDorsalNode3;
  AnyDrawMuscle DrwMus = { RGB = Main.DrawSettings.Colors.Ligaments; Bulging=1;};
};


AnyViaPointMuscle TarsoMetatarsalDorsal5Mus = {
  AnyMuscleModelUsr1 MusMdl =
  {
    F0 = ..F0;
    S = F0*StrengthCond;
    AnyVar OnOff = gtfun(..TarsoMetatarsalDorsal5Lig.Line.Pos[0], ..TarsoMetatarsalDorsal5Lig.LigMdl.L0);
    AnyVar StrengthCond = iffun(OnOff, 1.0, ..StrengthFactor);
  };
  AnyRefFrame &ref1 = .Seg.LateralCuneiform.LigTarsoMetatarsalDorsalNode2;
  AnyRefFrame &ref2 = .Seg.Metatarsal3.LigTarsoMetatarsalDorsalNode;
  AnyDrawMuscle DrwMus = { RGB = Main.DrawSettings.Colors.Ligaments; Bulging=1;};
};


AnyViaPointMuscle TarsoMetatarsalDorsal6Mus = {
  AnyMuscleModelUsr1 MusMdl =
  {
    F0 = ..F0;
    S = F0*StrengthCond;
    AnyVar OnOff = gtfun(..TarsoMetatarsalDorsal6Lig.Line.Pos[0], ..TarsoMetatarsalDorsal6Lig.LigMdl.L0);
    AnyVar StrengthCond = iffun(OnOff, 1.0, ..StrengthFactor);
  };
  AnyRefFrame &ref1 = .Seg.LateralCuneiform.LigTarsoMetatarsalDorsalNode3;
  AnyRefFrame &ref2 = .Seg.Metatarsal4.LigTarsoMetatarsalDorsalNode1;
  AnyDrawMuscle DrwMus = { RGB = Main.DrawSettings.Colors.Ligaments; Bulging=1;};
};


AnyViaPointMuscle TarsoMetatarsalDorsal7Mus = {
  AnyMuscleModelUsr1 MusMdl =
  {
    F0 = ..F0;
    S = F0*StrengthCond;
    AnyVar OnOff = gtfun(..TarsoMetatarsalDorsal7Lig.Line.Pos[0], ..TarsoMetatarsalDorsal7Lig.LigMdl.L0);
    AnyVar StrengthCond = iffun(OnOff, 1.0, ..StrengthFactor);
  };
  AnyRefFrame &ref1 = .Seg.Cuboid.LigTarsoMetatarsalDorsalNode1;
  AnyRefFrame &ref2 = .Seg.Metatarsal4.LigTarsoMetatarsalDorsalNode2;
  AnyDrawMuscle DrwMus = { RGB = Main.DrawSettings.Colors.Ligaments; Bulging=1;};
};


AnyViaPointMuscle TarsoMetatarsalDorsal8Mus = {
  AnyMuscleModelUsr1 MusMdl =
  {
    F0 = ..F0;
    S = F0*StrengthCond;
    AnyVar OnOff = gtfun(..TarsoMetatarsalDorsal8Lig.Line.Pos[0], ..TarsoMetatarsalDorsal8Lig.LigMdl.L0);
    AnyVar StrengthCond = iffun(OnOff, 1.0, ..StrengthFactor);
  };
  AnyRefFrame &ref1 = .Seg.Cuboid.LigTarsoMetatarsalDorsalNode2;
  AnyRefFrame &ref2 = .Seg.Metatarsal5.LigTarsoMetatarsalDorsalNode;
  AnyDrawMuscle DrwMus = { RGB = Main.DrawSettings.Colors.Ligaments; Bulging=1;};
};


AnyViaPointMuscle TarsoMetatarsalPlantar1Mus = {
  AnyMuscleModelUsr1 MusMdl =
  {
    F0 = ..F0;
    S = F0*StrengthCond;
    AnyVar OnOff = gtfun(..TarsoMetatarsalPlantar1Lig.Line.Pos[0], ..TarsoMetatarsalPlantar1Lig.LigMdl.L0);
    AnyVar StrengthCond = iffun(OnOff, 1.0, ..StrengthFactor);
  };
  AnyRefFrame &ref1 = .Seg.MedialCuneiform.LigTarsoMetatarsalPlantarNode;
  AnyRefFrame &ref2 = .Seg.Metatarsal1.LigTarsoMetatarsalPlantarNode;
  AnyDrawMuscle DrwMus = { RGB = Main.DrawSettings.Colors.Ligaments; Bulging=1;};
};


AnyViaPointMuscle TarsoMetatarsalPlantar1BisMus = {
  AnyMuscleModelUsr1 MusMdl =
  {
    F0 = ..F0;
    S = F0*StrengthCond;
    AnyVar OnOff = gtfun(..TarsoMetatarsalPlantar1BisLig.Line.Pos[0], ..TarsoMetatarsalPlantar1BisLig.LigMdl.L0);
    AnyVar StrengthCond = iffun(OnOff, 1.0, ..StrengthFactor);
  };
  AnyRefFrame &ref1 = .Seg.MedialCuneiform.LigTarsoMetatarsalPlantarNode3;
  AnyRefFrame &ref2 = .Seg.Metatarsal1.LigTarsoMetatarsalPlantarNode2;
  AnyDrawMuscle DrwMus = { RGB = Main.DrawSettings.Colors.Ligaments; Bulging=1;};
};


AnyViaPointMuscle TarsoMetatarsalPlantar2Mus = {
  AnyMuscleModelUsr1 MusMdl =
  {
    F0 = ..F0;
    S = F0*StrengthCond;
    AnyVar OnOff = gtfun(..TarsoMetatarsalPlantar2Lig.Line.Pos[0], ..TarsoMetatarsalPlantar2Lig.LigMdl.L0);
    AnyVar StrengthCond = iffun(OnOff, 1.0, ..StrengthFactor);
  };
  AnyRefFrame &ref1 = .Seg.IntermediateCuneiform.LigTarsoMetatarsalPlantarNode;
  AnyRefFrame &ref2 = .Seg.Metatarsal2.LigTarsoMetatarsalPlantarNode;
  AnyDrawMuscle DrwMus = { RGB = Main.DrawSettings.Colors.Ligaments; Bulging=1;};
};


AnyViaPointMuscle TarsoMetatarsalPlantar3Mus = {
  AnyMuscleModelUsr1 MusMdl =
  {
    F0 = ..F0;
    S = F0*StrengthCond;
    AnyVar OnOff = gtfun(..TarsoMetatarsalPlantar3Lig.Line.Pos[0], ..TarsoMetatarsalPlantar3Lig.LigMdl.L0);
    AnyVar StrengthCond = iffun(OnOff, 1.0, ..StrengthFactor);
  };
  AnyRefFrame &ref1 = .Seg.LateralCuneiform.LigTarsoMetatarsalPlantarNode;
  AnyRefFrame &ref2 = .Seg.Metatarsal3.LigTarsoMetatarsalPlantarNode;
  AnyDrawMuscle DrwMus = { RGB = Main.DrawSettings.Colors.Ligaments; Bulging=1;};
};


AnyViaPointMuscle TarsoMetatarsalPlantar4Mus = {
  AnyMuscleModelUsr1 MusMdl =
  {
    F0 = ..F0;
    S = F0*StrengthCond;
    AnyVar OnOff = gtfun(..TarsoMetatarsalPlantar4Lig.Line.Pos[0], ..TarsoMetatarsalPlantar4Lig.LigMdl.L0);
    AnyVar StrengthCond = iffun(OnOff, 1.0, ..StrengthFactor);
  };
  AnyRefFrame &ref1 = .Seg.Cuboid.LigTarsoMetatarsalPlantarNode1;
  AnyRefFrame &ref2 = .Seg.Metatarsal4.LigTarsoMetatarsalPlantarNode;
  AnyDrawMuscle DrwMus = { RGB = Main.DrawSettings.Colors.Ligaments; Bulging=1;};
};


AnyViaPointMuscle TarsoMetatarsalPlantar5Mus = {
  AnyMuscleModelUsr1 MusMdl =
  {
    F0 = ..F0;
    S = F0*StrengthCond;
    AnyVar OnOff = gtfun(..TarsoMetatarsalPlantar5Lig.Line.Pos[0], ..TarsoMetatarsalPlantar5Lig.LigMdl.L0);
    AnyVar StrengthCond = iffun(OnOff, 1.0, ..StrengthFactor);
  };
  AnyRefFrame &ref1 = .Seg.Cuboid.LigTarsoMetatarsalPlantarNode2;
  AnyRefFrame &ref2 = .Seg.Metatarsal5.LigTarsoMetatarsalPlantarNode;
  AnyDrawMuscle DrwMus = { RGB = Main.DrawSettings.Colors.Ligaments; Bulging=1;};
};


AnyViaPointMuscle TarsoMetatarsalPlantar6Mus = {
  AnyMuscleModelUsr1 MusMdl =
  {
    F0 = ..F0;
    S = F0*StrengthCond;
    AnyVar OnOff = gtfun(..TarsoMetatarsalPlantar6Lig.Line.Pos[0], ..TarsoMetatarsalPlantar6Lig.LigMdl.L0);
    AnyVar StrengthCond = iffun(OnOff, 1.0, ..StrengthFactor);
  };
  AnyRefFrame &ref1 = .Seg.MedialCuneiform.LigTarsoMetatarsalPlantarNode2;
  AnyRefFrame &ref2 = .Seg.Metatarsal3.LigTarsoMetatarsalPlantarNode2;
  AnyDrawMuscle DrwMus = { RGB = Main.DrawSettings.Colors.Ligaments; Bulging=1;};
};


AnyViaPointMuscle TarsoMetatarsalPlantar7Mus = {
  AnyMuscleModelUsr1 MusMdl =
  {
    F0 = ..F0;
    S = F0*StrengthCond;
    AnyVar OnOff = gtfun(..TarsoMetatarsalPlantar7Lig.Line.Pos[0], ..TarsoMetatarsalPlantar7Lig.LigMdl.L0);
    AnyVar StrengthCond = iffun(OnOff, 1.0, ..StrengthFactor);
  };
  AnyRefFrame &ref1 = .Seg.LateralCuneiform.LigTarsoMetatarsalPlantarNode2;
  AnyRefFrame &ref2 = .Seg.Metatarsal4.LigTarsoMetatarsalPlantarNode2;
  AnyDrawMuscle DrwMus = { RGB = Main.DrawSettings.Colors.Ligaments; Bulging=1;};
};


AnyViaPointMuscle InterMetatarsalDorsal1Mus = {
  AnyMuscleModelUsr1 MusMdl =
  {
    F0 = ..F0;
    S = F0*StrengthCond;
    AnyVar OnOff = gtfun(..InterMetatarsalDorsal1Lig.Line.Pos[0], ..InterMetatarsalDorsal1Lig.LigMdl.L0);
    AnyVar StrengthCond = iffun(OnOff, 1.0, ..StrengthFactor);
  };
  AnyRefFrame &ref1 = .Seg.Metatarsal2.LigInterMetatarsalDorsalNode;
  AnyRefFrame &ref2 = .Seg.Metatarsal3.LigInterMetatarsalDorsalNode1;
  AnyDrawMuscle DrwMus = { RGB = Main.DrawSettings.Colors.Ligaments; Bulging=1;};
};


AnyViaPointMuscle InterMetatarsalDorsal2Mus = {
  AnyMuscleModelUsr1 MusMdl =
  {
    F0 = ..F0;
    S = F0*StrengthCond;
    AnyVar OnOff = gtfun(..InterMetatarsalDorsal2Lig.Line.Pos[0], ..InterMetatarsalDorsal2Lig.LigMdl.L0);
    AnyVar StrengthCond = iffun(OnOff, 1.0, ..StrengthFactor);
  };
  AnyRefFrame &ref1 = .Seg.Metatarsal3.LigInterMetatarsalDorsalNode2;
  AnyRefFrame &ref2 = .Seg.Metatarsal4.LigInterMetatarsalDorsalNode1;
  AnyDrawMuscle DrwMus = { RGB = Main.DrawSettings.Colors.Ligaments; Bulging=1;};
};


AnyViaPointMuscle InterMetatarsalDorsal3Mus = {
  AnyMuscleModelUsr1 MusMdl =
  {
    F0 = ..F0;
    S = F0*StrengthCond;
    AnyVar OnOff = gtfun(..InterMetatarsalDorsal3Lig.Line.Pos[0], ..InterMetatarsalDorsal3Lig.LigMdl.L0);
    AnyVar StrengthCond = iffun(OnOff, 1.0, ..StrengthFactor);
  };
  AnyRefFrame &ref1 = .Seg.Metatarsal4.LigInterMetatarsalDorsalNode2;
  AnyRefFrame &ref2 = .Seg.Metatarsal5.LigInterMetatarsalDorsalNode;
  AnyDrawMuscle DrwMus = { RGB = Main.DrawSettings.Colors.Ligaments; Bulging=1;};
};


AnyViaPointMuscle InterMetatarsalPlantar1Mus = {
  AnyMuscleModelUsr1 MusMdl =
  {
    F0 = ..F0;
    S = F0*StrengthCond;
    AnyVar OnOff = gtfun(..InterMetatarsalPlantar1Lig.Line.Pos[0], ..InterMetatarsalPlantar1Lig.LigMdl.L0);
    AnyVar StrengthCond = iffun(OnOff, 1.0, ..StrengthFactor);
  };
  AnyRefFrame &ref1 = .Seg.Metatarsal2.LigInterMetatarsalPlantarNode;
  AnyRefFrame &ref2 = .Seg.Metatarsal3.LigInterMetatarsalPlantarNode1;
  AnyDrawMuscle DrwMus = { RGB = Main.DrawSettings.Colors.Ligaments; Bulging=1;};
};


AnyViaPointMuscle InterMetatarsalPlantar2Mus = {
  AnyMuscleModelUsr1 MusMdl =
  {
    F0 = ..F0;
    S = F0*StrengthCond;
    AnyVar OnOff = gtfun(..InterMetatarsalPlantar2Lig.Line.Pos[0], ..InterMetatarsalPlantar2Lig.LigMdl.L0);
    AnyVar StrengthCond = iffun(OnOff, 1.0, ..StrengthFactor);
  };
  AnyRefFrame &ref1 = .Seg.Metatarsal3.LigInterMetatarsalPlantarNode2;
  AnyRefFrame &ref2 = .Seg.Metatarsal4.LigInterMetatarsalPlantarNode1;
  AnyDrawMuscle DrwMus = { RGB = Main.DrawSettings.Colors.Ligaments; Bulging=1;};
};


AnyViaPointMuscle InterMetatarsalPlantar3Mus = {
  AnyMuscleModelUsr1 MusMdl =
  {
    F0 = ..F0;
    S = F0*StrengthCond;
    AnyVar OnOff = gtfun(..InterMetatarsalPlantar3Lig.Line.Pos[0], ..InterMetatarsalPlantar3Lig.LigMdl.L0);
    AnyVar StrengthCond = iffun(OnOff, 1.0, ..StrengthFactor);
  };
  AnyRefFrame &ref1 = .Seg.Metatarsal4.LigInterMetatarsalPlantarNode2;
  AnyRefFrame &ref2 = .Seg.Metatarsal5.LigInterMetatarsalPlantarNode;
  AnyDrawMuscle DrwMus = { RGB = Main.DrawSettings.Colors.Ligaments; Bulging=1;};
};


AnyViaPointMuscle MtTransversumProfundumMus = {
  AnyMuscleModelUsr1 MusMdl =
  {
    F0 = 200; //..F0;
    S = F0*StrengthCond;
    AnyVar OnOff = gtfun(..MtTransversumProfundumLig.Line.Pos[0], ..MtTransversumProfundumLig.LigMdl.L0);
    AnyVar StrengthCond = iffun(OnOff, 1.0, ..StrengthFactor);
  };
//  AnyRefFrame &ref1 = .Seg.Metatarsal1.LigMtTransversumProfundum;
//  AnyRefFrame &ref2 = .Seg.Metatarsal2.LigMtTransversumProfundum;
//  AnyRefFrame &ref3 = .Seg.Metatarsal3.LigMtTransversumProfundum;
//  AnyRefFrame &ref4 = .Seg.Metatarsal4.LigMtTransversumProfundum;
//  AnyRefFrame &ref5 = .Seg.Metatarsal5.LigMtTransversumProfundum;

  AnyRefFrame &ref1 = .Seg.Metatarsal1.MtPhalJoint;
  AnyRefFrame &ref2 = .Seg.Metatarsal2.MtPhalJoint;
  AnyRefFrame &ref3 = .Seg.Metatarsal3.MtPhalJoint;
  AnyRefFrame &ref4 = .Seg.Metatarsal4.MtPhalJoint;
  AnyRefFrame &ref5 = .Seg.Metatarsal5.MtPhalJoint;

  AnyDrawMuscle DrwMus = { RGB = Main.DrawSettings.Colors.Ligaments; Bulging=1;};
};


//**************************************************************************************************
// Pushing mus
//**************************************************************************************************


AnyGeneralMuscle CalcaneoNavicularPlantar1PushMus = {
  AnyMuscleModelUsr1 MusMdl =
  {
    F0 = ..F0Push;
    S = F0*StrengthCond;
    AnyVar OnOff = gtfun(..CalcaneoNavicularPlantar1Lig.Line.Pos[0], ..CalcaneoNavicularPlantar1Lig.LigMdl.L0);
    AnyVar StrengthCond = iffun(OnOff, 1.0, ..StrengthFactor);
  };
  ForceDirection = 1;
  AnyKinMeasure &ref1 = .CalcaneoNavicularPlantar1Mus.Line;
};


AnyGeneralMuscle CalcaneoNavicularPlantar2PushMus = {
  AnyMuscleModelUsr1 MusMdl =
  {
    F0 = ..F0Push;
    S = F0*StrengthCond;
    AnyVar OnOff = gtfun(..CalcaneoNavicularPlantar2Lig.Line.Pos[0], ..CalcaneoNavicularPlantar2Lig.LigMdl.L0);
    AnyVar StrengthCond = iffun(OnOff, 1.0, ..StrengthFactor);
  };
  ForceDirection = 1;
  AnyKinMeasure &ref1 = .CalcaneoNavicularPlantar2Mus.Line;
};


AnyGeneralMuscle CalcaneoNavicularPlantar3PushMus = {
  AnyMuscleModelUsr1 MusMdl =
  {
    F0 = ..F0Push;
    S = F0*StrengthCond;
    AnyVar OnOff = gtfun(..CalcaneoNavicularPlantar3Lig.Line.Pos[0], ..CalcaneoNavicularPlantar3Lig.LigMdl.L0);
    AnyVar StrengthCond = iffun(OnOff, 1.0, ..StrengthFactor);
  };
  ForceDirection = 1;
  AnyKinMeasure &ref1 = .CalcaneoNavicularPlantar3Mus.Line;
};


AnyGeneralMuscle CalcaneoCuboidPlantar1PushMus = {
  AnyMuscleModelUsr1 MusMdl =
  {
    F0 = ..F0Push;
    S = F0*StrengthCond;
    AnyVar OnOff = gtfun(..CalcaneoCuboidPlantar1Lig.Line.Pos[0], ..CalcaneoCuboidPlantar1Lig.LigMdl.L0);
    AnyVar StrengthCond = iffun(OnOff, 1.0, ..StrengthFactor);
  };
  ForceDirection = 1;
  AnyKinMeasure &ref1 = .CalcaneoCuboidPlantar1Mus.Line;
};


AnyGeneralMuscle CalcaneoCuboidPlantar2PushMus = {
  AnyMuscleModelUsr1 MusMdl =
  {
    F0 = ..F0Push;
    S = F0*StrengthCond;
    AnyVar OnOff = gtfun(..CalcaneoCuboidPlantar2Lig.Line.Pos[0], ..CalcaneoCuboidPlantar2Lig.LigMdl.L0);
    AnyVar StrengthCond = iffun(OnOff, 1.0, ..StrengthFactor);
  };
  ForceDirection = 1;
  AnyKinMeasure &ref1 = .CalcaneoCuboidPlantar2Mus.Line;
};


AnyGeneralMuscle TaloNavicularDorsal1PushMus = {
  AnyMuscleModelUsr1 MusMdl =
  {
    F0 = ..F0Push;
    S = F0*StrengthCond;
    AnyVar OnOff = gtfun(..TaloNavicularDorsal1Lig.Line.Pos[0], ..TaloNavicularDorsal1Lig.LigMdl.L0);
    AnyVar StrengthCond = iffun(OnOff, 1.0, ..StrengthFactor);
  };
  ForceDirection = 1;
  AnyKinMeasure &ref1 = .TaloNavicularDorsal1Mus.Line;
};


AnyGeneralMuscle TaloNavicularDorsal2PushMus = {
  AnyMuscleModelUsr1 MusMdl =
  {
    F0 = ..F0Push;
    S = F0*StrengthCond;
    AnyVar OnOff = gtfun(..TaloNavicularDorsal2Lig.Line.Pos[0], ..TaloNavicularDorsal2Lig.LigMdl.L0);
    AnyVar StrengthCond = iffun(OnOff, 1.0, ..StrengthFactor);
  };
  ForceDirection = 1;
  AnyKinMeasure &ref1 = .TaloNavicularDorsal2Mus.Line;
};


AnyGeneralMuscle CalcaneoNavicularBifurcatePushMus = {
  AnyMuscleModelUsr1 MusMdl =
  {
    F0 = ..F0Push;
    S = F0*StrengthCond;
    AnyVar OnOff = gtfun(..CalcaneoNavicularBifurcateLig.Line.Pos[0], ..CalcaneoNavicularBifurcateLig.LigMdl.L0);
    AnyVar StrengthCond = iffun(OnOff, 1.0, ..StrengthFactor);
  };
  ForceDirection = 1;
  AnyKinMeasure &ref1 = .CalcaneoNavicularBifurcateMus.Line;
};


AnyGeneralMuscle CalcaneoCuboidBifurcatePushMus = {
  AnyMuscleModelUsr1 MusMdl =
  {
    F0 = ..F0Push;
    S = F0*StrengthCond;
    AnyVar OnOff = gtfun(..CalcaneoCuboidBifurcateLig.Line.Pos[0], ..CalcaneoCuboidBifurcateLig.LigMdl.L0);
    AnyVar StrengthCond = iffun(OnOff, 1.0, ..StrengthFactor);
  };
  ForceDirection = 1;
  AnyKinMeasure &ref1 = .CalcaneoCuboidBifurcateMus.Line;
};


AnyGeneralMuscle CalcaneoCuboidDorsalPushMus = {
  AnyMuscleModelUsr1 MusMdl =
  {
    F0 = ..F0Push;
    S = F0*StrengthCond;
    AnyVar OnOff = gtfun(..CalcaneoCuboidDorsalLig.Line.Pos[0], ..CalcaneoCuboidDorsalLig.LigMdl.L0);
    AnyVar StrengthCond = iffun(OnOff, 1.0, ..StrengthFactor);
  };
  ForceDirection = 1;
  AnyKinMeasure &ref1 = .CalcaneoCuboidDorsalMus.Line;
};


AnyGeneralMuscle CuneoNavicularDorsal1PushMus = {
  AnyMuscleModelUsr1 MusMdl =
  {
    F0 = ..F0Push;
    S = F0*StrengthCond;
    AnyVar OnOff = gtfun(..CuneoNavicularDorsal1Lig.Line.Pos[0], ..CuneoNavicularDorsal1Lig.LigMdl.L0);
    AnyVar StrengthCond = iffun(OnOff, 1.0, ..StrengthFactor);
  };
  ForceDirection = 1;
  AnyKinMeasure &ref1 = .CuneoNavicularDorsal1Mus.Line;
};


AnyGeneralMuscle CuneoNavicularDorsal2PushMus = {
  AnyMuscleModelUsr1 MusMdl =
  {
    F0 = ..F0Push;
    S = F0*StrengthCond;
    AnyVar OnOff = gtfun(..CuneoNavicularDorsal2Lig.Line.Pos[0], ..CuneoNavicularDorsal2Lig.LigMdl.L0);
    AnyVar StrengthCond = iffun(OnOff, 1.0, ..StrengthFactor);
  };
  ForceDirection = 1;
  AnyKinMeasure &ref1 = .CuneoNavicularDorsal2Mus.Line;
};


AnyGeneralMuscle CuneoNavicularDorsal3PushMus = {
  AnyMuscleModelUsr1 MusMdl =
  {
    F0 = ..F0Push;
    S = F0*StrengthCond;
    AnyVar OnOff = gtfun(..CuneoNavicularDorsal3Lig.Line.Pos[0], ..CuneoNavicularDorsal3Lig.LigMdl.L0);
    AnyVar StrengthCond = iffun(OnOff, 1.0, ..StrengthFactor);
  };
  ForceDirection = 1;
  AnyKinMeasure &ref1 = .CuneoNavicularDorsal3Mus.Line;
};


AnyGeneralMuscle CuneoNavicularPlantar1PushMus = {
  AnyMuscleModelUsr1 MusMdl =
  {
    F0 = ..F0Push;
    S = F0*StrengthCond;
    AnyVar OnOff = gtfun(..CuneoNavicularPlantar1Lig.Line.Pos[0], ..CuneoNavicularPlantar1Lig.LigMdl.L0);
    AnyVar StrengthCond = iffun(OnOff, 1.0, ..StrengthFactor);
  };
  ForceDirection = 1;
  AnyKinMeasure &ref1 = .CuneoNavicularPlantar1Mus.Line;
};


AnyGeneralMuscle CuneoNavicularPlantar2PushMus = {
  AnyMuscleModelUsr1 MusMdl =
  {
    F0 = ..F0Push;
    S = F0*StrengthCond;
    AnyVar OnOff = gtfun(..CuneoNavicularPlantar2Lig.Line.Pos[0], ..CuneoNavicularPlantar2Lig.LigMdl.L0);
    AnyVar StrengthCond = iffun(OnOff, 1.0, ..StrengthFactor);
  };
  ForceDirection = 1;
  AnyKinMeasure &ref1 = .CuneoNavicularPlantar2Mus.Line;
};


AnyGeneralMuscle CuneoNavicularPlantar3PushMus = {
  AnyMuscleModelUsr1 MusMdl =
  {
    F0 = ..F0Push;
    S = F0*StrengthCond;
    AnyVar OnOff = gtfun(..CuneoNavicularPlantar3Lig.Line.Pos[0], ..CuneoNavicularPlantar3Lig.LigMdl.L0);
    AnyVar StrengthCond = iffun(OnOff, 1.0, ..StrengthFactor);
  };
  ForceDirection = 1;
  AnyKinMeasure &ref1 = .CuneoNavicularPlantar3Mus.Line;
};


AnyGeneralMuscle InterCuneiformDorsal1PushMus = {
  AnyMuscleModelUsr1 MusMdl =
  {
    F0 = ..F0Push;
    S = F0*StrengthCond;
    AnyVar OnOff = gtfun(..InterCuneiformDorsal1Lig.Line.Pos[0], ..InterCuneiformDorsal1Lig.LigMdl.L0);
    AnyVar StrengthCond = iffun(OnOff, 1.0, ..StrengthFactor);
  };
  ForceDirection = 1;
  AnyKinMeasure &ref1 = .InterCuneiformDorsal1Mus.Line;
};


AnyGeneralMuscle InterCuneiformDorsal2PushMus = {
  AnyMuscleModelUsr1 MusMdl =
  {
    F0 = ..F0Push;
    S = F0*StrengthCond;
    AnyVar OnOff = gtfun(..InterCuneiformDorsal2Lig.Line.Pos[0], ..InterCuneiformDorsal2Lig.LigMdl.L0);
    AnyVar StrengthCond = iffun(OnOff, 1.0, ..StrengthFactor);
  };
  ForceDirection = 1;
  AnyKinMeasure &ref1 = .InterCuneiformDorsal2Mus.Line;
};


AnyGeneralMuscle CuneoCuboidDorsalPushMus = {
  AnyMuscleModelUsr1 MusMdl =
  {
    F0 = ..F0Push;
    S = F0*StrengthCond;
    AnyVar OnOff = gtfun(..CuneoCuboidDorsalLig.Line.Pos[0], ..CuneoCuboidDorsalLig.LigMdl.L0);
    AnyVar StrengthCond = iffun(OnOff, 1.0, ..StrengthFactor);
  };
  ForceDirection = 1;
  AnyKinMeasure &ref1 = .CuneoCuboidDorsalMus.Line;
};


AnyGeneralMuscle InterCuneiformPlantar1PushMus = {
  AnyMuscleModelUsr1 MusMdl =
  {
    F0 = ..F0Push;
    S = F0*StrengthCond;
    AnyVar OnOff = gtfun(..InterCuneiformPlantar1Lig.Line.Pos[0], ..InterCuneiformPlantar1Lig.LigMdl.L0);
    AnyVar StrengthCond = iffun(OnOff, 1.0, ..StrengthFactor);
  };
  ForceDirection = 1;
  AnyKinMeasure &ref1 = .InterCuneiformPlantar1Mus.Line;
};


AnyGeneralMuscle InterCuneiformPlantar2PushMus = {
  AnyMuscleModelUsr1 MusMdl =
  {
    F0 = ..F0Push;
    S = F0*StrengthCond;
    AnyVar OnOff = gtfun(..InterCuneiformPlantar2Lig.Line.Pos[0], ..InterCuneiformPlantar2Lig.LigMdl.L0);
    AnyVar StrengthCond = iffun(OnOff, 1.0, ..StrengthFactor);
  };
  ForceDirection = 1;
  AnyKinMeasure &ref1 = .InterCuneiformPlantar2Mus.Line;
};


AnyGeneralMuscle CuneoCuboidPlantarPushMus = {
  AnyMuscleModelUsr1 MusMdl =
  {
    F0 = ..F0Push;
    S = F0*StrengthCond;
    AnyVar OnOff = gtfun(..CuneoCuboidPlantarLig.Line.Pos[0], ..CuneoCuboidPlantarLig.LigMdl.L0);
    AnyVar StrengthCond = iffun(OnOff, 1.0, ..StrengthFactor);
  };
  ForceDirection = 1;
  AnyKinMeasure &ref1 = .CuneoCuboidPlantarMus.Line;
};


AnyGeneralMuscle CuboideoNavicularDorsalPushMus = {
  AnyMuscleModelUsr1 MusMdl =
  {
    F0 = ..F0Push;
    S = F0*StrengthCond;
    AnyVar OnOff = gtfun(..CuboideoNavicularDorsalLig.Line.Pos[0], ..CuboideoNavicularDorsalLig.LigMdl.L0);
    AnyVar StrengthCond = iffun(OnOff, 1.0, ..StrengthFactor);
  };
  ForceDirection = 1;
  AnyKinMeasure &ref1 = .CuboideoNavicularDorsalMus.Line;
};


AnyGeneralMuscle CuboideoNavicularPlantarPushMus = {
  AnyMuscleModelUsr1 MusMdl =
  {
    F0 = ..F0Push;
    S = F0*StrengthCond;
    AnyVar OnOff = gtfun(..CuboideoNavicularPlantarLig.Line.Pos[0], ..CuboideoNavicularPlantarLig.LigMdl.L0);
    AnyVar StrengthCond = iffun(OnOff, 1.0, ..StrengthFactor);
  };
  ForceDirection = 1;
  AnyKinMeasure &ref1 = .CuboideoNavicularPlantarMus.Line;
};


AnyGeneralMuscle TarsoMetatarsalDorsal1PushMus = {
  AnyMuscleModelUsr1 MusMdl =
  {
    F0 = ..F0Push;
    S = F0*StrengthCond;
    AnyVar OnOff = gtfun(..TarsoMetatarsalDorsal1Lig.Line.Pos[0], ..TarsoMetatarsalDorsal1Lig.LigMdl.L0);
    AnyVar StrengthCond = iffun(OnOff, 1.0, ..StrengthFactor);
  };
  ForceDirection = 1;
  AnyKinMeasure &ref1 = .TarsoMetatarsalDorsal1Mus.Line;
};


AnyGeneralMuscle TarsoMetatarsalDorsal1BisPushMus = {
  AnyMuscleModelUsr1 MusMdl =
  {
    F0 = ..F0Push;
    S = F0*StrengthCond;
    AnyVar OnOff = gtfun(..TarsoMetatarsalDorsal1BisLig.Line.Pos[0], ..TarsoMetatarsalDorsal1BisLig.LigMdl.L0);
    AnyVar StrengthCond = iffun(OnOff, 1.0, ..StrengthFactor);
  };
  ForceDirection = 1;
  AnyKinMeasure &ref1 = .TarsoMetatarsalDorsal1BisMus.Line;
};


AnyGeneralMuscle TarsoMetatarsalDorsal2PushMus = {
  AnyMuscleModelUsr1 MusMdl =
  {
    F0 = ..F0Push;
    S = F0*StrengthCond;
    AnyVar OnOff = gtfun(..TarsoMetatarsalDorsal2Lig.Line.Pos[0], ..TarsoMetatarsalDorsal2Lig.LigMdl.L0);
    AnyVar StrengthCond = iffun(OnOff, 1.0, ..StrengthFactor);
  };
  ForceDirection = 1;
  AnyKinMeasure &ref1 = .TarsoMetatarsalDorsal2Mus.Line;
};


AnyGeneralMuscle TarsoMetatarsalDorsal3PushMus = {
  AnyMuscleModelUsr1 MusMdl =
  {
    F0 = ..F0Push;
    S = F0*StrengthCond;
    AnyVar OnOff = gtfun(..TarsoMetatarsalDorsal3Lig.Line.Pos[0], ..TarsoMetatarsalDorsal3Lig.LigMdl.L0);
    AnyVar StrengthCond = iffun(OnOff, 1.0, ..StrengthFactor);
  };
  ForceDirection = 1;
  AnyKinMeasure &ref1 = .TarsoMetatarsalDorsal3Mus.Line;
};


AnyGeneralMuscle TarsoMetatarsalDorsal4PushMus = {
  AnyMuscleModelUsr1 MusMdl =
  {
    F0 = ..F0Push;
    S = F0*StrengthCond;
    AnyVar OnOff = gtfun(..TarsoMetatarsalDorsal4Lig.Line.Pos[0], ..TarsoMetatarsalDorsal4Lig.LigMdl.L0);
    AnyVar StrengthCond = iffun(OnOff, 1.0, ..StrengthFactor);
  };
  ForceDirection = 1;
  AnyKinMeasure &ref1 = .TarsoMetatarsalDorsal4Mus.Line;
};


AnyGeneralMuscle TarsoMetatarsalDorsal5PushMus = {
  AnyMuscleModelUsr1 MusMdl =
  {
    F0 = ..F0Push;
    S = F0*StrengthCond;
    AnyVar OnOff = gtfun(..TarsoMetatarsalDorsal5Lig.Line.Pos[0], ..TarsoMetatarsalDorsal5Lig.LigMdl.L0);
    AnyVar StrengthCond = iffun(OnOff, 1.0, ..StrengthFactor);
  };
  ForceDirection = 1;
  AnyKinMeasure &ref1 = .TarsoMetatarsalDorsal5Mus.Line;
};


AnyGeneralMuscle TarsoMetatarsalDorsal6PushMus = {
  AnyMuscleModelUsr1 MusMdl =
  {
    F0 = ..F0Push;
    S = F0*StrengthCond;
    AnyVar OnOff = gtfun(..TarsoMetatarsalDorsal6Lig.Line.Pos[0], ..TarsoMetatarsalDorsal6Lig.LigMdl.L0);
    AnyVar StrengthCond = iffun(OnOff, 1.0, ..StrengthFactor);
  };
  ForceDirection = 1;
  AnyKinMeasure &ref1 = .TarsoMetatarsalDorsal6Mus.Line;
};


AnyGeneralMuscle TarsoMetatarsalDorsal7PushMus = {
  AnyMuscleModelUsr1 MusMdl =
  {
    F0 = ..F0Push;
    S = F0*StrengthCond;
    AnyVar OnOff = gtfun(..TarsoMetatarsalDorsal7Lig.Line.Pos[0], ..TarsoMetatarsalDorsal7Lig.LigMdl.L0);
    AnyVar StrengthCond = iffun(OnOff, 1.0, ..StrengthFactor);
  };
  ForceDirection = 1;
  AnyKinMeasure &ref1 = .TarsoMetatarsalDorsal7Mus.Line;
};


AnyGeneralMuscle TarsoMetatarsalDorsal8PushMus = {
  AnyMuscleModelUsr1 MusMdl =
  {
    F0 = ..F0Push;
    S = F0*StrengthCond;
    AnyVar OnOff = gtfun(..TarsoMetatarsalDorsal8Lig.Line.Pos[0], ..TarsoMetatarsalDorsal8Lig.LigMdl.L0);
    AnyVar StrengthCond = iffun(OnOff, 1.0, ..StrengthFactor);
  };
  ForceDirection = 1;
  AnyKinMeasure &ref1 = .TarsoMetatarsalDorsal8Mus.Line;
};


AnyGeneralMuscle TarsoMetatarsalPlantar1PushMus = {
  AnyMuscleModelUsr1 MusMdl =
  {
    F0 = ..F0Push;
    S = F0*StrengthCond;
    AnyVar OnOff = gtfun(..TarsoMetatarsalPlantar1Lig.Line.Pos[0], ..TarsoMetatarsalPlantar1Lig.LigMdl.L0);
    AnyVar StrengthCond = iffun(OnOff, 1.0, ..StrengthFactor);
  };
  ForceDirection = 1;
  AnyKinMeasure &ref1 = .TarsoMetatarsalPlantar1Mus.Line;
};


AnyGeneralMuscle TarsoMetatarsalPlantar1BisPushMus = {
  AnyMuscleModelUsr1 MusMdl =
  {
    F0 = ..F0Push;
    S = F0*StrengthCond;
    AnyVar OnOff = gtfun(..TarsoMetatarsalPlantar1BisLig.Line.Pos[0], ..TarsoMetatarsalPlantar1BisLig.LigMdl.L0);
    AnyVar StrengthCond = iffun(OnOff, 1.0, ..StrengthFactor);
  };
  ForceDirection = 1;
  AnyKinMeasure &ref1 = .TarsoMetatarsalPlantar1BisMus.Line;
};


AnyGeneralMuscle TarsoMetatarsalPlantar2PushMus = {
  AnyMuscleModelUsr1 MusMdl =
  {
    F0 = ..F0Push;
    S = F0*StrengthCond;
    AnyVar OnOff = gtfun(..TarsoMetatarsalPlantar2Lig.Line.Pos[0], ..TarsoMetatarsalPlantar2Lig.LigMdl.L0);
    AnyVar StrengthCond = iffun(OnOff, 1.0, ..StrengthFactor);
  };
  ForceDirection = 1;
  AnyKinMeasure &ref1 = .TarsoMetatarsalPlantar2Mus.Line;
};


AnyGeneralMuscle TarsoMetatarsalPlantar3PushMus = {
  AnyMuscleModelUsr1 MusMdl =
  {
    F0 = ..F0Push;
    S = F0*StrengthCond;
    AnyVar OnOff = gtfun(..TarsoMetatarsalPlantar3Lig.Line.Pos[0], ..TarsoMetatarsalPlantar3Lig.LigMdl.L0);
    AnyVar StrengthCond = iffun(OnOff, 1.0, ..StrengthFactor);
  };
  ForceDirection = 1;
  AnyKinMeasure &ref1 = .TarsoMetatarsalPlantar3Mus.Line;
};


AnyGeneralMuscle TarsoMetatarsalPlantar4PushMus = {
  AnyMuscleModelUsr1 MusMdl =
  {
    F0 = ..F0Push;
    S = F0*StrengthCond;
    AnyVar OnOff = gtfun(..TarsoMetatarsalPlantar4Lig.Line.Pos[0], ..TarsoMetatarsalPlantar4Lig.LigMdl.L0);
    AnyVar StrengthCond = iffun(OnOff, 1.0, ..StrengthFactor);
  };
  ForceDirection = 1;
  AnyKinMeasure &ref1 = .TarsoMetatarsalPlantar4Mus.Line;
};


AnyGeneralMuscle TarsoMetatarsalPlantar5PushMus = {
  AnyMuscleModelUsr1 MusMdl =
  {
    F0 = ..F0Push;
    S = F0*StrengthCond;
    AnyVar OnOff = gtfun(..TarsoMetatarsalPlantar5Lig.Line.Pos[0], ..TarsoMetatarsalPlantar5Lig.LigMdl.L0);
    AnyVar StrengthCond = iffun(OnOff, 1.0, ..StrengthFactor);
  };
  ForceDirection = 1;
  AnyKinMeasure &ref1 = .TarsoMetatarsalPlantar5Mus.Line;
};


AnyGeneralMuscle TarsoMetatarsalPlantar6PushMus = {
  AnyMuscleModelUsr1 MusMdl =
  {
    F0 = ..F0Push;
    S = F0*StrengthCond;
    AnyVar OnOff = gtfun(..TarsoMetatarsalPlantar6Lig.Line.Pos[0], ..TarsoMetatarsalPlantar6Lig.LigMdl.L0);
    AnyVar StrengthCond = iffun(OnOff, 1.0, ..StrengthFactor);
  };
  ForceDirection = 1;
  AnyKinMeasure &ref1 = .TarsoMetatarsalPlantar6Mus.Line;
};


AnyGeneralMuscle TarsoMetatarsalPlantar7PushMus = {
  AnyMuscleModelUsr1 MusMdl =
  {
    F0 = ..F0Push;
    S = F0*StrengthCond;
    AnyVar OnOff = gtfun(..TarsoMetatarsalPlantar7Lig.Line.Pos[0], ..TarsoMetatarsalPlantar7Lig.LigMdl.L0);
    AnyVar StrengthCond = iffun(OnOff, 1.0, ..StrengthFactor);
  };
  ForceDirection = 1;
  AnyKinMeasure &ref1 = .TarsoMetatarsalPlantar7Mus.Line;
};


AnyGeneralMuscle InterMetatarsalDorsal1PushMus = {
  AnyMuscleModelUsr1 MusMdl =
  {
    F0 = ..F0Push;
    S = F0*StrengthCond;
    AnyVar OnOff = gtfun(..InterMetatarsalDorsal1Lig.Line.Pos[0], ..InterMetatarsalDorsal1Lig.LigMdl.L0);
    AnyVar StrengthCond = iffun(OnOff, 1.0, ..StrengthFactor);
  };
  ForceDirection = 1;
  AnyKinMeasure &ref1 = .InterMetatarsalDorsal1Mus.Line;
};


AnyGeneralMuscle InterMetatarsalDorsal2PushMus = {
  AnyMuscleModelUsr1 MusMdl =
  {
    F0 = ..F0Push;
    S = F0*StrengthCond;
    AnyVar OnOff = gtfun(..InterMetatarsalDorsal2Lig.Line.Pos[0], ..InterMetatarsalDorsal2Lig.LigMdl.L0);
    AnyVar StrengthCond = iffun(OnOff, 1.0, ..StrengthFactor);
  };
  ForceDirection = 1;
  AnyKinMeasure &ref1 = .InterMetatarsalDorsal2Mus.Line;
};


AnyGeneralMuscle InterMetatarsalDorsal3PushMus = {
  AnyMuscleModelUsr1 MusMdl =
  {
    F0 = ..F0Push;
    S = F0*StrengthCond;
    AnyVar OnOff = gtfun(..InterMetatarsalDorsal3Lig.Line.Pos[0], ..InterMetatarsalDorsal3Lig.LigMdl.L0);
    AnyVar StrengthCond = iffun(OnOff, 1.0, ..StrengthFactor);
  };
  ForceDirection = 1;
  AnyKinMeasure &ref1 = .InterMetatarsalDorsal3Mus.Line;
};


AnyGeneralMuscle InterMetatarsalPlantar1PushMus = {
  AnyMuscleModelUsr1 MusMdl =
  {
    F0 = ..F0Push;
    S = F0*StrengthCond;
    AnyVar OnOff = gtfun(..InterMetatarsalPlantar1Lig.Line.Pos[0], ..InterMetatarsalPlantar1Lig.LigMdl.L0);
    AnyVar StrengthCond = iffun(OnOff, 1.0, ..StrengthFactor);
  };
  ForceDirection = 1;
  AnyKinMeasure &ref1 = .InterMetatarsalPlantar1Mus.Line;
};


AnyGeneralMuscle InterMetatarsalPlantar2PushMus = {
  AnyMuscleModelUsr1 MusMdl =
  {
    F0 = ..F0Push;
    S = F0*StrengthCond;
    AnyVar OnOff = gtfun(..InterMetatarsalPlantar2Lig.Line.Pos[0], ..InterMetatarsalPlantar2Lig.LigMdl.L0);
    AnyVar StrengthCond = iffun(OnOff, 1.0, ..StrengthFactor);
  };
  ForceDirection = 1;
  AnyKinMeasure &ref1 = .InterMetatarsalPlantar2Mus.Line;
};


AnyGeneralMuscle InterMetatarsalPlantar3PushMus = {
  AnyMuscleModelUsr1 MusMdl =
  {
    F0 = ..F0Push;
    S = F0*StrengthCond;
    AnyVar OnOff = gtfun(..InterMetatarsalPlantar3Lig.Line.Pos[0], ..InterMetatarsalPlantar3Lig.LigMdl.L0);
    AnyVar StrengthCond = iffun(OnOff, 1.0, ..StrengthFactor);
  };
  ForceDirection = 1;
  AnyKinMeasure &ref1 = .InterMetatarsalPlantar3Mus.Line;
};


//**************************************************************************************************
// Real ligaments
//**************************************************************************************************

AnyVar Ecoeff = 0; //1
AnyVar Ecoeff2 = 5; //1

//References for conditional strength of artificial muscles above.
AnyFolder &MtTransversumProfundumLig = .MtTransversumProfundum;
AnyFolder &TibioNavicularLig = .CollateralMedial.TibioNavicular;
AnyFolder &CalcaneoNavicularPlantar1Lig = .CalcaneoNavicularPlantar.CalcaneoNavicularPlantar1;
AnyFolder &CalcaneoNavicularPlantar2Lig = .CalcaneoNavicularPlantar.CalcaneoNavicularPlantar2;
AnyFolder &CalcaneoNavicularPlantar3Lig = .CalcaneoNavicularPlantar.CalcaneoNavicularPlantar3;
AnyFolder &CalcaneoCuboidPlantar1Lig = .CalcaneoCuboidPlantar.CalcaneoCuboidPlantar1;
AnyFolder &CalcaneoCuboidPlantar2Lig = .CalcaneoCuboidPlantar.CalcaneoCuboidPlantar2;


AnyViaPointLigament TaloNavicularDorsal1Lig = {
  AnyLigamentModelPol LigMdl =
  {
    L0 = 0.01326836;
    eps1 = 1;
    F1 = ...FootLigStiffnessScale*1000*..Ecoeff;
  };
  AnyRefFrame &ref1 = .Seg.Talus.LigTaloNavicularDorsalNode1;
  AnyRefFrame &ref2 = .Seg.Navicular.LigTaloNavicularDorsalNode1;
  AnyDrawPLine DrawLig =
  {
    Thickness = 0.0015;
    RGB = Main.DrawSettings.Colors.Ligaments;
  };
  AnyVar Eps = (Line.Pos[0] - LigMdl.L0)/LigMdl.L0;
};


AnyViaPointLigament TaloNavicularDorsal2Lig = {
  AnyLigamentModelPol LigMdl =
  {
    L0 = 0.01326837;
    eps1 = 1;
    F1 = ...FootLigStiffnessScale*1000*..Ecoeff;
  };
  AnyRefFrame &ref1 = .Seg.Talus.LigTaloNavicularDorsalNode2;
  AnyRefFrame &ref2 = .Seg.Navicular.LigTaloNavicularDorsalNode2;
  AnyDrawPLine DrawLig =
  {
    Thickness = 0.0015;
    RGB = Main.DrawSettings.Colors.Ligaments;
  };
  AnyVar Eps = (Line.Pos[0] - LigMdl.L0)/LigMdl.L0;
};


AnyViaPointLigament CalcaneoNavicularBifurcateLig = {
  AnyLigamentModelPol LigMdl =
  {
    L0 = 0.01891352;
    eps1 = 1;
    F1 = ...FootLigStiffnessScale*1000*..Ecoeff;
  };
  AnyRefFrame &ref1 = .Seg.Calcaneus.LigBifurcateNode;
  AnyRefFrame &ref2 = .Seg.Navicular.LigCalcaneoNavicularBifurcateNode;
  AnyDrawPLine DrawLig =
  {
    Thickness = 0.0015;
    RGB = Main.DrawSettings.Colors.Ligaments;
  };
  AnyVar Eps = (Line.Pos[0] - LigMdl.L0)/LigMdl.L0;
};


AnyViaPointLigament CalcaneoCuboidBifurcateLig = {
  AnyLigamentModelPol LigMdl =
  {
    L0 = 0.01621116;
    eps1 = 1;
    F1 = ...FootLigStiffnessScale*1000*..Ecoeff;
  };
  AnyRefFrame &ref1 = .Seg.Calcaneus.LigBifurcateNode;
  AnyRefFrame &ref2 = .Seg.Cuboid.LigCalcaneoCuboidBifurcateNode;
  AnyDrawPLine DrawLig =
  {
    Thickness = 0.0015;
    RGB = Main.DrawSettings.Colors.Ligaments;
  };
  AnyVar Eps = (Line.Pos[0] - LigMdl.L0)/LigMdl.L0;
};


AnyViaPointLigament CalcaneoCuboidDorsalLig = {
  AnyLigamentModelPol LigMdl =
  {
    L0 = 0.01328903;
    eps1 = 1;
    F1 = ...FootLigStiffnessScale*1000*..Ecoeff;
  };
  AnyRefFrame &ref1 = .Seg.Calcaneus.LigCalcaneoCuboidDorsalNode;
  AnyRefFrame &ref2 = .Seg.Cuboid.LigCalcaneoCuboidDorsalNode;
  AnyDrawPLine DrawLig =
  {
    Thickness = 0.0015;
    RGB = Main.DrawSettings.Colors.Ligaments;
  };
  AnyVar Eps = (Line.Pos[0] - LigMdl.L0)/LigMdl.L0;
};


AnyViaPointLigament CuneoNavicularDorsal1Lig = {
  AnyLigamentModelPol LigMdl =
  {
    L0 = 0.01059397;
    eps1 = 1;
    F1 = ...FootLigStiffnessScale*1000*..Ecoeff;
  };
  AnyRefFrame &ref1 = .Seg.Navicular.LigCuneoNavicularDorsalNode1;
  AnyRefFrame &ref2 = .Seg.MedialCuneiform.LigCuneoNavicularDorsalNode;
  AnyDrawPLine DrawLig =
  {
    Thickness = 0.0015;
    RGB = Main.DrawSettings.Colors.Ligaments;
  };
  AnyVar Eps = (Line.Pos[0] - LigMdl.L0)/LigMdl.L0;
};


AnyViaPointLigament CuneoNavicularDorsal2Lig = {
  AnyLigamentModelPol LigMdl =
  {
    L0 = 0.009015734;
    eps1 = 1;
    F1 = ...FootLigStiffnessScale*1000*..Ecoeff;
  };
  AnyRefFrame &ref1 = .Seg.Navicular.LigCuneoNavicularDorsalNode2;
  AnyRefFrame &ref2 = .Seg.IntermediateCuneiform.LigCuneoNavicularDorsalNode;
  AnyDrawPLine DrawLig =
  {
    Thickness = 0.0015;
    RGB = Main.DrawSettings.Colors.Ligaments;
  };
  AnyVar Eps = (Line.Pos[0] - LigMdl.L0)/LigMdl.L0;
};


AnyViaPointLigament CuneoNavicularDorsal3Lig = {
  AnyLigamentModelPol LigMdl =
  {
    L0 = 0.009238343;
    eps1 = 1;
    F1 = ...FootLigStiffnessScale*1000*..Ecoeff;
  };
  AnyRefFrame &ref1 = .Seg.Navicular.LigCuneoNavicularDorsalNode3;
  AnyRefFrame &ref2 = .Seg.LateralCuneiform.LigCuneoNavicularDorsalNode;
  AnyDrawPLine DrawLig =
  {
    Thickness = 0.0015;
    RGB = Main.DrawSettings.Colors.Ligaments;
  };
  AnyVar Eps = (Line.Pos[0] - LigMdl.L0)/LigMdl.L0;
};


AnyViaPointLigament CuneoNavicularPlantar1Lig = {
  AnyLigamentModelPol LigMdl =
  {
    L0 = 0.01469413;
    eps1 = 1;
    F1 = ...FootLigStiffnessScale*1000*..Ecoeff2;
  };
  AnyRefFrame &ref1 = .Seg.Navicular.LigCuneoNavicularPlantarNode1;
  AnyRefFrame &ref2 = .Seg.MedialCuneiform.LigCuneoNavicularPlantarNode;
  AnyDrawPLine DrawLig =
  {
    Thickness = 0.0015;
    RGB = Main.DrawSettings.Colors.Ligaments;
  };
  AnyVar Eps = (Line.Pos[0] - LigMdl.L0)/LigMdl.L0;
};


AnyViaPointLigament CuneoNavicularPlantar2Lig = {
  AnyLigamentModelPol LigMdl =
  {
    L0 = 0.01343254;
    eps1 = 1;
    F1 = ...FootLigStiffnessScale*1000*..Ecoeff2;
  };
  AnyRefFrame &ref1 = .Seg.Navicular.LigCuneoNavicularPlantarNode2;
  AnyRefFrame &ref2 = .Seg.IntermediateCuneiform.LigCuneoNavicularPlantarNode;
  AnyDrawPLine DrawLig =
  {
    Thickness = 0.0015;
    RGB = Main.DrawSettings.Colors.Ligaments;
  };
  AnyVar Eps = (Line.Pos[0] - LigMdl.L0)/LigMdl.L0;
};


AnyViaPointLigament CuneoNavicularPlantar3Lig = {
  AnyLigamentModelPol LigMdl =
  {
    L0 = 0.01189989;
    eps1 = 1;
    F1 = ...FootLigStiffnessScale*1000*..Ecoeff2;
  };
  AnyRefFrame &ref1 = .Seg.Navicular.LigCuneoNavicularPlantarNode3;
  AnyRefFrame &ref2 = .Seg.LateralCuneiform.LigCuneoNavicularPlantarNode;
  AnyDrawPLine DrawLig =
  {
    Thickness = 0.0015;
    RGB = Main.DrawSettings.Colors.Ligaments;
  };
  AnyVar Eps = (Line.Pos[0] - LigMdl.L0)/LigMdl.L0;
};


AnyViaPointLigament InterCuneiformDorsal1Lig = {
  AnyLigamentModelPol LigMdl =
  {
    L0 = 0.008882267;
    eps1 = 1;
    F1 = ...FootLigStiffnessScale*1000*..Ecoeff;
  };
  AnyRefFrame &ref1 = .Seg.MedialCuneiform.LigInterCuneiformDorsalNode;
  AnyRefFrame &ref2 = .Seg.IntermediateCuneiform.LigInterCuneiformDorsalNode1;
  AnyDrawPLine DrawLig =
  {
    Thickness = 0.0015;
    RGB = Main.DrawSettings.Colors.Ligaments;
  };
  AnyVar Eps = (Line.Pos[0] - LigMdl.L0)/LigMdl.L0;
};


AnyViaPointLigament InterCuneiformDorsal2Lig = {
  AnyLigamentModelPol LigMdl =
  {
    L0 = 0.01061765;
    eps1 = 1;
    F1 = ...FootLigStiffnessScale*1000*..Ecoeff;
  };
  AnyRefFrame &ref1 = .Seg.IntermediateCuneiform.LigInterCuneiformDorsalNode2;
  AnyRefFrame &ref2 = .Seg.LateralCuneiform.LigInterCuneiformDorsalNode;
  AnyDrawPLine DrawLig =
  {
    Thickness = 0.0015;
    RGB = Main.DrawSettings.Colors.Ligaments;
  };
  AnyVar Eps = (Line.Pos[0] - LigMdl.L0)/LigMdl.L0;
};


AnyViaPointLigament CuneoCuboidDorsalLig = {
  AnyLigamentModelPol LigMdl =
  {
    L0 = 0.008954292;
    eps1 = 1;
    F1 = ...FootLigStiffnessScale*1000*..Ecoeff;
  };
  AnyRefFrame &ref1 = .Seg.LateralCuneiform.LigCuneoCuboidDorsalNode;
  AnyRefFrame &ref2 = .Seg.Cuboid.LigCuneoCuboidDorsalNode;
  AnyDrawPLine DrawLig =
  {
    Thickness = 0.0015;
    RGB = Main.DrawSettings.Colors.Ligaments;
  };
  AnyVar Eps = (Line.Pos[0] - LigMdl.L0)/LigMdl.L0;
};


AnyViaPointLigament InterCuneiformPlantar1Lig = {
  AnyLigamentModelPol LigMdl =
  {
    L0 = 0.005078461;
    eps1 = 1;
    F1 = ...FootLigStiffnessScale*1000*..Ecoeff;
  };
  AnyRefFrame &ref1 = .Seg.MedialCuneiform.LigInterCuneiformPlantarNode;
  AnyRefFrame &ref2 = .Seg.IntermediateCuneiform.LigInterCuneiformPlantarNode1;
  AnyDrawPLine DrawLig =
  {
    Thickness = 0.0015;
    RGB = Main.DrawSettings.Colors.Ligaments;
  };
  AnyVar Eps = (Line.Pos[0] - LigMdl.L0)/LigMdl.L0;
};


AnyViaPointLigament InterCuneiformPlantar2Lig = {
  AnyLigamentModelPol LigMdl =
  {
    L0 = 0.004588108;
    eps1 = 1;
    F1 = ...FootLigStiffnessScale*1000*..Ecoeff;
  };
  AnyRefFrame &ref1 = .Seg.IntermediateCuneiform.LigInterCuneiformPlantarNode2;
  AnyRefFrame &ref2 = .Seg.LateralCuneiform.LigInterCuneiformPlantarNode;
  AnyDrawPLine DrawLig =
  {
    Thickness = 0.0015;
    RGB = Main.DrawSettings.Colors.Ligaments;
  };
  AnyVar Eps = (Line.Pos[0] - LigMdl.L0)/LigMdl.L0;
};


AnyViaPointLigament CuneoCuboidPlantarLig = {
  AnyLigamentModelPol LigMdl =
  {
    L0 = 0.008667141;
    eps1 = 1;
    F1 = ...FootLigStiffnessScale*1000*..Ecoeff;
  };
  AnyRefFrame &ref1 = .Seg.LateralCuneiform.LigCuneoCuboidPlantarNode;
  AnyRefFrame &ref2 = .Seg.Cuboid.LigCuneoCuboidPlantarNode;
  AnyDrawPLine DrawLig =
  {
    Thickness = 0.0015;
    RGB = Main.DrawSettings.Colors.Ligaments;
  };
  AnyVar Eps = (Line.Pos[0] - LigMdl.L0)/LigMdl.L0;
};


AnyViaPointLigament CuboideoNavicularDorsalLig = {
  AnyLigamentModelPol LigMdl =
  {
    L0 = 0.01302261;
    eps1 = 1;
    F1 = ...FootLigStiffnessScale*1000*..Ecoeff;
  };
  AnyRefFrame &ref1 = .Seg.Cuboid.LigCuboideoNavicularDorsalNode;
  AnyRefFrame &ref2 = .Seg.Navicular.LigCuboideoNavicularDorsalNode;
  AnyDrawPLine DrawLig =
  {
    Thickness = 0.0015;
    RGB = Main.DrawSettings.Colors.Ligaments;
  };
  AnyVar Eps = (Line.Pos[0] - LigMdl.L0)/LigMdl.L0;
};


AnyViaPointLigament CuboideoNavicularPlantarLig = {
  AnyLigamentModelPol LigMdl =
  {
    L0 = 0.02404579;
    eps1 = 1;
    F1 = ...FootLigStiffnessScale*1000*..Ecoeff;
  };
  AnyRefFrame &ref1 = .Seg.Cuboid.LigCuboideoNavicularPlantarNode;
  AnyRefFrame &ref2 = .Seg.Navicular.LigCuboideoNavicularPlantarNode;
  AnyDrawPLine DrawLig =
  {
    Thickness = 0.0015;
    RGB = Main.DrawSettings.Colors.Ligaments;
  };
  AnyVar Eps = (Line.Pos[0] - LigMdl.L0)/LigMdl.L0;
};


AnyViaPointLigament TarsoMetatarsalDorsal1Lig = {
  AnyLigamentModelPol LigMdl =
  {
    L0 = 0.01449342;
    eps1 = 1;
    F1 = ...FootLigStiffnessScale*1000*..Ecoeff;
  };
  AnyRefFrame &ref1 = .Seg.MedialCuneiform.LigTarsoMetatarsalDorsalNode1;
  AnyRefFrame &ref2 = .Seg.Metatarsal1.LigTarsoMetatarsalDorsalNode;
  AnyDrawPLine DrawLig =
  {
    Thickness = 0.0015;
    RGB = Main.DrawSettings.Colors.Ligaments;
  };
  AnyVar Eps = (Line.Pos[0] - LigMdl.L0)/LigMdl.L0;
};


AnyViaPointLigament TarsoMetatarsalDorsal1BisLig = {
  AnyLigamentModelPol LigMdl =
  {
    L0 = 0.01449342;
    eps1 = 1;
    F1 = ...FootLigStiffnessScale*1000*..Ecoeff;
  };
  AnyRefFrame &ref1 = .Seg.MedialCuneiform.LigTarsoMetatarsalDorsalNode3;
  AnyRefFrame &ref2 = .Seg.Metatarsal1.LigTarsoMetatarsalDorsalNode2;
  AnyDrawPLine DrawLig =
  {
    Thickness = 0.0015;
    RGB = Main.DrawSettings.Colors.Ligaments;
  };
  AnyVar Eps = (Line.Pos[0] - LigMdl.L0)/LigMdl.L0;
};


AnyViaPointLigament TarsoMetatarsalDorsal2Lig = {
  AnyLigamentModelPol LigMdl =
  {
    L0 = 0.008334492;
    eps1 = 1;
    F1 = ...FootLigStiffnessScale*1000*..Ecoeff;
  };
  AnyRefFrame &ref1 = .Seg.MedialCuneiform.LigTarsoMetatarsalDorsalNode2;
  AnyRefFrame &ref2 = .Seg.Metatarsal2.LigTarsoMetatarsalDorsalNode1;
  AnyDrawPLine DrawLig =
  {
    Thickness = 0.0015;
    RGB = Main.DrawSettings.Colors.Ligaments;
  };
  AnyVar Eps = (Line.Pos[0] - LigMdl.L0)/LigMdl.L0;
};


AnyViaPointLigament TarsoMetatarsalDorsal3Lig = {
  AnyLigamentModelPol LigMdl =
  {
    L0 = 0.0109831;
    eps1 = 1;
    F1 = ...FootLigStiffnessScale*1000*..Ecoeff;
  };
  AnyRefFrame &ref1 = .Seg.IntermediateCuneiform.LigTarsoMetatarsalDorsalNode;
  AnyRefFrame &ref2 = .Seg.Metatarsal2.LigTarsoMetatarsalDorsalNode2;
  AnyDrawPLine DrawLig =
  {
    Thickness = 0.0015;
    RGB = Main.DrawSettings.Colors.Ligaments;
  };
  AnyVar Eps = (Line.Pos[0] - LigMdl.L0)/LigMdl.L0;
};


AnyViaPointLigament TarsoMetatarsalDorsal4Lig = {
  AnyLigamentModelPol LigMdl =
  {
    L0 = 0.009602335;
    eps1 = 1;
    F1 = ...FootLigStiffnessScale*1000*..Ecoeff;
  };
  AnyRefFrame &ref1 = .Seg.LateralCuneiform.LigTarsoMetatarsalDorsalNode1;
  AnyRefFrame &ref2 = .Seg.Metatarsal2.LigTarsoMetatarsalDorsalNode3;
  AnyDrawPLine DrawLig =
  {
    Thickness = 0.0015;
    RGB = Main.DrawSettings.Colors.Ligaments;
  };
  AnyVar Eps = (Line.Pos[0] - LigMdl.L0)/LigMdl.L0;
};


AnyViaPointLigament TarsoMetatarsalDorsal5Lig = {
  AnyLigamentModelPol LigMdl =
  {
    L0 = 0.007804821;
    eps1 = 1;
    F1 = ...FootLigStiffnessScale*1000*..Ecoeff;
  };
  AnyRefFrame &ref1 = .Seg.LateralCuneiform.LigTarsoMetatarsalDorsalNode2;
  AnyRefFrame &ref2 = .Seg.Metatarsal3.LigTarsoMetatarsalDorsalNode;
  AnyDrawPLine DrawLig =
  {
    Thickness = 0.0015;
    RGB = Main.DrawSettings.Colors.Ligaments;
  };
  AnyVar Eps = (Line.Pos[0] - LigMdl.L0)/LigMdl.L0;
};


AnyViaPointLigament TarsoMetatarsalDorsal6Lig = {
  AnyLigamentModelPol LigMdl =
  {
    L0 = 0.00899461;
    eps1 = 1;
    F1 = ...FootLigStiffnessScale*1000*..Ecoeff;
  };
  AnyRefFrame &ref1 = .Seg.LateralCuneiform.LigTarsoMetatarsalDorsalNode3;
  AnyRefFrame &ref2 = .Seg.Metatarsal4.LigTarsoMetatarsalDorsalNode1;
  AnyDrawPLine DrawLig =
  {
    Thickness = 0.0015;
    RGB = Main.DrawSettings.Colors.Ligaments;
  };
  AnyVar Eps = (Line.Pos[0] - LigMdl.L0)/LigMdl.L0;
};


AnyViaPointLigament TarsoMetatarsalDorsal7Lig = {
  AnyLigamentModelPol LigMdl =
  {
    L0 = 0.009722269;
    eps1 = 1;
    F1 = ...FootLigStiffnessScale*1000*..Ecoeff;
  };
  AnyRefFrame &ref1 = .Seg.Cuboid.LigTarsoMetatarsalDorsalNode1;
  AnyRefFrame &ref2 = .Seg.Metatarsal4.LigTarsoMetatarsalDorsalNode2;
  AnyDrawPLine DrawLig =
  {
    Thickness = 0.0015;
    RGB = Main.DrawSettings.Colors.Ligaments;
  };
  AnyVar Eps = (Line.Pos[0] - LigMdl.L0)/LigMdl.L0;
};


AnyViaPointLigament TarsoMetatarsalDorsal8Lig = {
  AnyLigamentModelPol LigMdl =
  {
    L0 = 0.008355215;
    eps1 = 1;
    F1 = ...FootLigStiffnessScale*1000*..Ecoeff;
  };
  AnyRefFrame &ref1 = .Seg.Cuboid.LigTarsoMetatarsalDorsalNode2;
  AnyRefFrame &ref2 = .Seg.Metatarsal5.LigTarsoMetatarsalDorsalNode;
  AnyDrawPLine DrawLig =
  {
    Thickness = 0.0015;
    RGB = Main.DrawSettings.Colors.Ligaments;
  };
  AnyVar Eps = (Line.Pos[0] - LigMdl.L0)/LigMdl.L0;
};


AnyViaPointLigament TarsoMetatarsalPlantar1Lig = {
  AnyLigamentModelPol LigMdl =
  {
    L0 = 0.01029942;
    eps1 = 1;
    F1 = ...FootLigStiffnessScale*1000*..Ecoeff2*5;
  };
  AnyRefFrame &ref1 = .Seg.MedialCuneiform.LigTarsoMetatarsalPlantarNode;
  AnyRefFrame &ref2 = .Seg.Metatarsal1.LigTarsoMetatarsalPlantarNode;
  AnyDrawPLine DrawLig =
  {
    Thickness = 0.0015;
    RGB = Main.DrawSettings.Colors.Ligaments;
  };
  AnyVar Eps = (Line.Pos[0] - LigMdl.L0)/LigMdl.L0;
};


AnyViaPointLigament TarsoMetatarsalPlantar1BisLig = {
  AnyLigamentModelPol LigMdl =
  {
    L0 = 0.01029942;
    eps1 = 1;
    F1 = ...FootLigStiffnessScale*1000*..Ecoeff2*5;
  };
  AnyRefFrame &ref1 = .Seg.MedialCuneiform.LigTarsoMetatarsalPlantarNode3;
  AnyRefFrame &ref2 = .Seg.Metatarsal1.LigTarsoMetatarsalPlantarNode2;
  AnyDrawPLine DrawLig =
  {
    Thickness = 0.0015;
    RGB = Main.DrawSettings.Colors.Ligaments;
  };
  AnyVar Eps = (Line.Pos[0] - LigMdl.L0)/LigMdl.L0;
};


AnyViaPointLigament TarsoMetatarsalPlantar2Lig = {
  AnyLigamentModelPol LigMdl =
  {
    L0 = 0.008492584;
    eps1 = 1;
    F1 = ...FootLigStiffnessScale*1000*..Ecoeff2*5;
  };
  AnyRefFrame &ref1 = .Seg.IntermediateCuneiform.LigTarsoMetatarsalPlantarNode;
  AnyRefFrame &ref2 = .Seg.Metatarsal2.LigTarsoMetatarsalPlantarNode;
  AnyDrawPLine DrawLig =
  {
    Thickness = 0.0015;
    RGB = Main.DrawSettings.Colors.Ligaments;
  };
  AnyVar Eps = (Line.Pos[0] - LigMdl.L0)/LigMdl.L0;
};


AnyViaPointLigament TarsoMetatarsalPlantar3Lig = {
  AnyLigamentModelPol LigMdl =
  {
    L0 = 0.007952701;
    eps1 = 1;
    F1 = ...FootLigStiffnessScale*1000*..Ecoeff2*5;
  };
  AnyRefFrame &ref1 = .Seg.LateralCuneiform.LigTarsoMetatarsalPlantarNode;
  AnyRefFrame &ref2 = .Seg.Metatarsal3.LigTarsoMetatarsalPlantarNode;
  AnyDrawPLine DrawLig =
  {
    Thickness = 0.0015;
    RGB = Main.DrawSettings.Colors.Ligaments;
  };
  AnyVar Eps = (Line.Pos[0] - LigMdl.L0)/LigMdl.L0;
};


AnyViaPointLigament TarsoMetatarsalPlantar4Lig = {
  AnyLigamentModelPol LigMdl =
  {
    L0 = 0.008745027;
    eps1 = 1;
    F1 = ...FootLigStiffnessScale*1000*..Ecoeff2*3;
  };
  AnyRefFrame &ref1 = .Seg.Cuboid.LigTarsoMetatarsalPlantarNode1;
  AnyRefFrame &ref2 = .Seg.Metatarsal4.LigTarsoMetatarsalPlantarNode;
  AnyDrawPLine DrawLig =
  {
    Thickness = 0.0015;
    RGB = Main.DrawSettings.Colors.Ligaments;
  };
  AnyVar Eps = (Line.Pos[0] - LigMdl.L0)/LigMdl.L0;
};


AnyViaPointLigament TarsoMetatarsalPlantar5Lig = {
  AnyLigamentModelPol LigMdl =
  {
    L0 = 0.01022579;
    eps1 = 1;
    F1 = ...FootLigStiffnessScale*1000*..Ecoeff2*3;
  };
  AnyRefFrame &ref1 = .Seg.Cuboid.LigTarsoMetatarsalPlantarNode2;
  AnyRefFrame &ref2 = .Seg.Metatarsal5.LigTarsoMetatarsalPlantarNode;
  AnyDrawPLine DrawLig =
  {
    Thickness = 0.0015;
    RGB = Main.DrawSettings.Colors.Ligaments;
  };
  AnyVar Eps = (Line.Pos[0] - LigMdl.L0)/LigMdl.L0;
};


AnyViaPointLigament TarsoMetatarsalPlantar6Lig = {
  AnyLigamentModelPol LigMdl =
  {
    L0 = 0.01186463;
    eps1 = 1;
    F1 = ...FootLigStiffnessScale*1000*..Ecoeff;
  };
  AnyRefFrame &ref1 = .Seg.MedialCuneiform.LigTarsoMetatarsalPlantarNode2;
  AnyRefFrame &ref2 = .Seg.Metatarsal3.LigTarsoMetatarsalPlantarNode2;
  AnyDrawPLine DrawLig =
  {
    Thickness = 0.0015;
    RGB = Main.DrawSettings.Colors.Ligaments;
  };
  AnyVar Eps = (Line.Pos[0] - LigMdl.L0)/LigMdl.L0;
};


AnyViaPointLigament TarsoMetatarsalPlantar7Lig = {
  AnyLigamentModelPol LigMdl =
  {
    L0 = 0.009051016;
    eps1 = 1;
    F1 = ...FootLigStiffnessScale*1000*..Ecoeff;
  };
  AnyRefFrame &ref1 = .Seg.LateralCuneiform.LigTarsoMetatarsalPlantarNode2;
  AnyRefFrame &ref2 = .Seg.Metatarsal4.LigTarsoMetatarsalPlantarNode2;
  AnyDrawPLine DrawLig =
  {
    Thickness = 0.0015;
    RGB = Main.DrawSettings.Colors.Ligaments;
  };
  AnyVar Eps = (Line.Pos[0] - LigMdl.L0)/LigMdl.L0;
};


AnyViaPointLigament InterMetatarsalDorsal1Lig = {
  AnyLigamentModelPol LigMdl =
  {
    L0 = 0.006682714;
    eps1 = 1;
    F1 = ...FootLigStiffnessScale*1000*..Ecoeff;
  };
  AnyRefFrame &ref1 = .Seg.Metatarsal2.LigInterMetatarsalDorsalNode;
  AnyRefFrame &ref2 = .Seg.Metatarsal3.LigInterMetatarsalDorsalNode1;
  AnyDrawPLine DrawLig =
  {
    Thickness = 0.0015;
    RGB = Main.DrawSettings.Colors.Ligaments;
  };
  AnyVar Eps = (Line.Pos[0] - LigMdl.L0)/LigMdl.L0;
};


AnyViaPointLigament InterMetatarsalDorsal2Lig = {
  AnyLigamentModelPol LigMdl =
  {
    L0 = 0.007001778;
    eps1 = 1;
    F1 = ...FootLigStiffnessScale*1000*..Ecoeff;
  };
  AnyRefFrame &ref1 = .Seg.Metatarsal3.LigInterMetatarsalDorsalNode2;
  AnyRefFrame &ref2 = .Seg.Metatarsal4.LigInterMetatarsalDorsalNode1;
  AnyDrawPLine DrawLig =
  {
    Thickness = 0.0015;
    RGB = Main.DrawSettings.Colors.Ligaments;
  };
  AnyVar Eps = (Line.Pos[0] - LigMdl.L0)/LigMdl.L0;
};


AnyViaPointLigament InterMetatarsalDorsal3Lig = {
  AnyLigamentModelPol LigMdl =
  {
    L0 = 0.008090034;
    eps1 = 1;
    F1 = ...FootLigStiffnessScale*1000*..Ecoeff;
  };
  AnyRefFrame &ref1 = .Seg.Metatarsal4.LigInterMetatarsalDorsalNode2;
  AnyRefFrame &ref2 = .Seg.Metatarsal5.LigInterMetatarsalDorsalNode;
  AnyDrawPLine DrawLig =
  {
    Thickness = 0.0015;
    RGB = Main.DrawSettings.Colors.Ligaments;
  };
  AnyVar Eps = (Line.Pos[0] - LigMdl.L0)/LigMdl.L0;
};


AnyViaPointLigament InterMetatarsalPlantar1Lig = {
  AnyLigamentModelPol LigMdl =
  {
    L0 = 0.003999361;
    eps1 = 1;
    F1 = ...FootLigStiffnessScale*1000*..Ecoeff;
  };
  AnyRefFrame &ref1 = .Seg.Metatarsal2.LigInterMetatarsalPlantarNode;
  AnyRefFrame &ref2 = .Seg.Metatarsal3.LigInterMetatarsalPlantarNode1;
  AnyDrawPLine DrawLig =
  {
    Thickness = 0.0015;
    RGB = Main.DrawSettings.Colors.Ligaments;
  };
  AnyVar Eps = (Line.Pos[0] - LigMdl.L0)/LigMdl.L0;
};


AnyViaPointLigament InterMetatarsalPlantar2Lig = {
  AnyLigamentModelPol LigMdl =
  {
    L0 = 0.003859978;
    eps1 = 1;
    F1 = ...FootLigStiffnessScale*1000*..Ecoeff;
  };
  AnyRefFrame &ref1 = .Seg.Metatarsal3.LigInterMetatarsalPlantarNode2;
  AnyRefFrame &ref2 = .Seg.Metatarsal4.LigInterMetatarsalPlantarNode1;
  AnyDrawPLine DrawLig =
  {
    Thickness = 0.0015;
    RGB = Main.DrawSettings.Colors.Ligaments;
  };
  AnyVar Eps = (Line.Pos[0] - LigMdl.L0)/LigMdl.L0;
};


AnyViaPointLigament InterMetatarsalPlantar3Lig = {
  AnyLigamentModelPol LigMdl =
  {
    L0 = 0.009194649;
    eps1 = 1;
    F1 = ...FootLigStiffnessScale*1000*..Ecoeff;
  };
  AnyRefFrame &ref1 = .Seg.Metatarsal4.LigInterMetatarsalPlantarNode2;
  AnyRefFrame &ref2 = .Seg.Metatarsal5.LigInterMetatarsalPlantarNode;
  AnyDrawPLine DrawLig =
  {
    Thickness = 0.0015;
    RGB = Main.DrawSettings.Colors.Ligaments;
  };
  AnyVar Eps = (Line.Pos[0] - LigMdl.L0)/LigMdl.L0;
};


}; // LigamentsTarsal
