ModelSetup ={
  Views = {
    SetViewMacros = {

      AnyOperationMacro PlantarMuscleLayer1= {
        OPERATION_DISPLAY_PRIORITY(PriorityLow);
        MacroStr = {"classoperation "+ CompleteNameOf(&Main.ModelSetup.Views.PlantarMuscleLayer1) + strquote("Set View") };
      };
      AnyOperationMacro PlantarMuscleLayer2= {
        OPERATION_DISPLAY_PRIORITY(PriorityLow);
        MacroStr = {"classoperation "+ CompleteNameOf(&Main.ModelSetup.Views.PlantarMuscleLayer2) + strquote("Set View") };
      };

      AnyOperationMacro PlantarMuscleLayer3= {
        OPERATION_DISPLAY_PRIORITY(PriorityLow);
        MacroStr = {"classoperation "+ CompleteNameOf(&Main.ModelSetup.Views.PlantarMuscleLayer3) + strquote("Set View") };
      };

      AnyOperationMacro PlantarMuscleLayer4= {
        OPERATION_DISPLAY_PRIORITY(PriorityLow);
        MacroStr = {"classoperation "+ CompleteNameOf(&Main.ModelSetup.Views.PlantarMuscleLayer4) + strquote("Set View") };
      };
    };
    DrawGroups = {


      AnyDrawGroup PlantarMuscleLayer1=      {

        Objects = arrcat( ObjSearchRecursive("Main.HumanModel.BodyModel","FlexorDigitorumB*.DrwMus", "AnyDrawMuscle"),
        ObjSearchRecursive("Main.HumanModel.BodyModel","AbductorHallu*.DrwMus", "AnyDrawMuscle"),
        ObjSearchRecursive("Main.HumanModel.BodyModel","AbductorDigitiMin*.DrwMus", "AnyDrawMuscle"));
      };


      AnyDrawGroup PlantarMuscleLayer2=      {

        Objects = arrcat( ObjSearchRecursive("Main.HumanModel.BodyModel","FlexorDigitorumL*.DrwMus", "AnyDrawMuscle"),
        ObjSearchRecursive("Main.HumanModel.BodyModel","QuadratusPla*.DrwMus", "AnyDrawMuscle"),
        ObjSearchRecursive("Main.HumanModel.BodyModel","Lumbri*.DrwMus", "AnyDrawMuscle"),
        ObjSearchRecursive("Main.HumanModel.BodyModel","FlexorHallucisLon*.DrwMus", "AnyDrawMuscle") );
      };

      AnyDrawGroup PlantarMuscleLayer3=      {
        Objects = arrcat(
        ObjSearchRecursive("Main.HumanModel.BodyModel","FlexorHallucisBre*.DrwMus", "AnyDrawMuscle"),
        ObjSearchRecursive("Main.HumanModel.BodyModel","AdductorHallucis*.DrwMus", "AnyDrawMuscle"),
        ObjSearchRecursive("Main.HumanModel.BodyModel","FlexorDigitiMinimiBrev*.DrwMus", "AnyDrawMuscle") );
      };
      AnyDrawGroup PlantarMuscleLayer4=      {
        Objects = arrcat(
        ObjSearchRecursive("Main.HumanModel.BodyModel","TibialisPos*.DrwMus", "AnyDrawMuscle"),
        ObjSearchRecursive("Main.HumanModel.BodyModel","PeroneusL*.DrwMus", "AnyDrawMuscle"),
        ObjSearchRecursive("Main.HumanModel.BodyModel","PlantarInter*.DrwMus", "AnyDrawMuscle"),
        ObjSearchRecursive("Main.HumanModel.BodyModel","DorsalInter*.DrwMus", "AnyDrawMuscle") );
      };

      AnyDrawGroup FDLDummy=      {
        Objects =  ObjSearchRecursive("Main.HumanModel.BodyModel","FDLDumm*.DrawSeg", "AnyDrawSurf");
      };


      AnyDrawGroup All_Ligaments =
      {
        Objects = arrcat( ObjSearchRecursive("Main.HumanModel.BodyModel","*.DrawLig_size", "AnyDrawPLine"),ObjSearchRecursive("Main.HumanModel.BodyModel","*.DrawLig", "AnyDrawPLine"));
      };

    };

    AnyStandardModelViewDefinition PlantarMuscleLayer1 = {
      ViewName = "PlantarMuscleLayer1 View";
      DrawGroupSequence = {&.DrawGroups.All, &.DrawGroups.FDLDummy,&.DrawGroups.All_Muscles, &.DrawGroups.All_Ligaments,&.DrawGroups.PlantarMuscleLayer1};
      Reset = {On,Off,Off,Off,Off}; //Same behavior as not defining Reset.
      Hide = {Off,On,On,On,On}; //Same behavior as not defining Hide.
      ShowModelDefined = {Off,Off,Off,Off,On};
      ShowAutoGenerated = {Off,Off,Off,Off,Off}; //Same behavior as {Off, On}.
    };


    AnyStandardModelViewDefinition PlantarMuscleLayer2 = {
      ViewName = "PlantarMuscleLayer2 View";
      DrawGroupSequence = {&.DrawGroups.All, &.DrawGroups.All_Muscles, &.DrawGroups.All_Ligaments,&.DrawGroups.PlantarMuscleLayer2};
      Reset = {On,Off,Off,Off}; //Same behavior as not defining Reset.
      Hide = {Off,On,On,On}; //Same behavior as not defining Hide.
      ShowModelDefined = {Off,Off,Off,On};
      ShowAutoGenerated = {Off,Off,Off,Off}; //Same behavior as {Off, On}.
    };

    AnyStandardModelViewDefinition PlantarMuscleLayer3 = {
      ViewName = "PlantarMuscleLayer3 View";
      DrawGroupSequence = {&.DrawGroups.All,&.DrawGroups.FDLDummy, &.DrawGroups.All_Muscles, &.DrawGroups.All_Ligaments,&.DrawGroups.PlantarMuscleLayer3};
      Reset = {On,Off,Off,Off,Off}; //Same behavior as not defining Reset.
      Hide = {Off,On,On,On,On}; //Same behavior as not defining Hide.
      ShowModelDefined = {Off,Off,Off,Off,On};
      ShowAutoGenerated = {Off,Off,Off,Off,Off}; //Same behavior as {Off, On}.
    };

    AnyStandardModelViewDefinition PlantarMuscleLayer4 = {
      ViewName = "PlantarMuscleLayer4 View";
      DrawGroupSequence = {&.DrawGroups.All, &.DrawGroups.FDLDummy,&.DrawGroups.All_Muscles, &.DrawGroups.All_Ligaments,&.DrawGroups.PlantarMuscleLayer4};
      Reset = {On,Off,Off,Off,Off}; //Same behavior as not defining Reset.
      Hide = {Off,On,On,On,On}; //Same behavior as not defining Hide.
      ShowModelDefined = {Off,Off,Off,Off,On};
      ShowAutoGenerated = {Off,Off,Off,Off,Off}; //Same behavior as {Off, On}.
    };


  };
};
