RGB = Main.DrawSettings.Muscle.RGB;
Bulging = 3; // Set to avoid the ligament part to bulge
ColorScale = Main.DrawSettings.Muscle.ColorScale;
RGBColorScale = Main.DrawSettings.Muscle.RGBColorScale;
MaxStress = Main.DrawSettings.Muscle.MaxStress;
Opacity = Main.DrawSettings.Muscle.Opacity;
DrawScaleOnOff=Main.DrawSettings.Muscle.DrawScaleOnOff;


//#include "DrawMuscleForce.any"
