// Create pointers for reference frames representing different segments
AnyRefFrame &Calcaneus = RigidPart.Calcaneus;
AnyRefFrame &Cuboid = RigidPart.Cuboid;
AnyRefFrame &Navicular = RigidPart.Navicular;
AnyRefFrame &MedialCuneiform = RigidPart.MedialCuneiform;
AnyRefFrame &IntermediateCuneiform = RigidPart.IntermediateCuneiform;
AnyRefFrame &LateralCuneiform = RigidPart.LateralCuneiform;
AnyRefFrame &Metatarsal1 = RigidPart.Metatarsal1;
AnyRefFrame &Metatarsal2 = RigidPart.Metatarsal2;
AnyRefFrame &Metatarsal3 = RigidPart.Metatarsal3;
AnyRefFrame &Metatarsal4 = RigidPart.Metatarsal4;
AnyRefFrame &Metatarsal5 = RigidPart.Metatarsal5;
AnyRefFrame &ProximalPhalange1 = RigidPart.ProximalPhalange1;
AnyRefFrame &ProximalPhalange2 = RigidPart.ProximalPhalange2;
AnyRefFrame &ProximalPhalange3 = RigidPart.ProximalPhalange3;
AnyRefFrame &ProximalPhalange4 = RigidPart.ProximalPhalange4;
AnyRefFrame &ProximalPhalange5 = RigidPart.ProximalPhalange5;
AnyRefFrame &MiddlePhalange2 = RigidPart.MiddlePhalange2;
AnyRefFrame &MiddlePhalange3 = RigidPart.MiddlePhalange3;
AnyRefFrame &MiddlePhalange4 = RigidPart.MiddlePhalange4;
AnyRefFrame &MiddlePhalange5 = RigidPart.MiddlePhalange5;
AnyRefFrame &DistalPhalange1 = RigidPart.DistalPhalange1;
AnyRefFrame &DistalPhalange2 = RigidPart.DistalPhalange2;
AnyRefFrame &DistalPhalange3 = RigidPart.DistalPhalange3;
AnyRefFrame &DistalPhalange4 = RigidPart.DistalPhalange4;
AnyRefFrame &DistalPhalange5 = RigidPart.DistalPhalange5;

AnySeg Talus = {
  r0 ??= ..Shank.AnkleJoint.sRel*..Shank.Axes0'+..Shank.r0-AnkleJoint.sRel*Axes0';
  UseInertiaObjects = On;
}; // End of Talus


AnySeg RigidPart = {
  r0 ??= .Talus.SubTalarJoint.sRel*.Talus.Axes0'+.Talus.r0-Calcaneus.SubTalarJoint.sRel*Axes0';
  UseInertiaObjects = On;
  AnyFunTransform3D &Scale = .Scale;
  AnyFunTransform3D& GeomScale = .GeomScale;

  AnyRefNode Calcaneus = {
    AnyVec3 r0 ??= ..Talus.SubTalarJoint.sRel*..Talus.Axes0'+..Talus.r0-SubTalarJoint.sRel*Axes0';
    AnyMat33 Axes0 ??= .Axes0;
  }; // End of Calcaneus

  AnyRefNode Cuboid = {
    AnyVec3 r0 ??= .Calcaneus.CalcaneoCuboidJoint.sRel*.Calcaneus.Axes0'+.Calcaneus.r0-CalcaneoCuboidJoint.sRel*Axes0';
    AnyMat33 Axes0 ??= .Axes0;
  }; // End of cuboid

  AnyRefNode Navicular = {
    AnyVec3 r0 ??= ..Talus.TaloNavicularJoint.sRel*..Talus.Axes0'+..Talus.r0-TaloNavicularJoint.sRel*Axes0';
    AnyMat33 Axes0 ??= .Axes0;
  }; // End of Navicular

  AnyRefNode MedialCuneiform = {
    AnyVec3 r0 ??= .Navicular.MedCuneiNaviJoint.sRel*.Navicular.Axes0'+.Navicular.r0-CuneiNaviJoint.sRel*Axes0';
    AnyMat33 Axes0 ??= .Axes0;
  }; // End of MedialCuneiform

  AnyRefNode IntermediateCuneiform = {
    AnyVec3 r0 ??= .Navicular.IntCuneiNaviJoint.sRel*.Navicular.Axes0'+.Navicular.r0-CuneiNaviJoint.sRel*Axes0';
    AnyMat33 Axes0 ??= .Axes0;
  }; // End of IntermediateCuneiform

  AnyRefNode LateralCuneiform = {
    AnyVec3 r0 ??= .Navicular.LatCuneiNaviJoint.sRel*.Navicular.Axes0'+.Navicular.r0-CuneiNaviJoint.sRel*Axes0';
    AnyMat33 Axes0 ??= .Axes0;
  }; // End of LateralCuneiform


  //************************************************
  //Metatarsals
  //************************************************

  AnyRefNode Metatarsal1 = {
    AnyVec3 r0 ??= .MedialCuneiform.TarsoMtJoint.sRel*.MedialCuneiform.Axes0'+.MedialCuneiform.r0-TarsoMtJoint.sRel*Axes0';
    AnyMat33 Axes0 ??= .Axes0;
  }; // End of Metatarsal1

  AnyRefNode Metatarsal2 = {
    AnyVec3 r0 ??= .IntermediateCuneiform.TarsoMtJoint.sRel*.IntermediateCuneiform.Axes0'+.IntermediateCuneiform.r0-TarsoMtJoint.sRel*Axes0';
    AnyMat33 Axes0 ??= .Axes0;
  }; // End of Metatarsal2

  AnyRefNode Metatarsal3 = {
    AnyVec3 r0 ??= .LateralCuneiform.TarsoMtJoint.sRel*.LateralCuneiform.Axes0'+.LateralCuneiform.r0-TarsoMtJoint.sRel*Axes0';
    AnyMat33 Axes0 ??= .Axes0;
  }; // End of Metatarsal3

  AnyRefNode Metatarsal4 = {
    AnyVec3 r0 ??= .Cuboid.TarsoMt4Joint.sRel*.Cuboid.Axes0'+.Cuboid.r0-TarsoMtJoint.sRel*Axes0';
    AnyMat33 Axes0 ??= .Axes0;
  }; // End of Metatarsal4

  AnyRefNode Metatarsal5 = {
    AnyVec3 r0 ??= .Cuboid.TarsoMt5Joint.sRel*.Cuboid.Axes0'+.Cuboid.r0-TarsoMtJoint.sRel*Axes0';
    AnyMat33 Axes0 ??= .Axes0;
  }; // End of Metatarsal5


  //************************************************
  //Proximal Phalanges  bones
  //************************************************

  AnyRefNode ProximalPhalange1 = {
    AnyVec3 r0 ??= .Metatarsal1.MtPhalJoint.sRel*.Metatarsal1.Axes0'+.Metatarsal1.r0-MtPhalJoint.sRel*Axes0';
    AnyMat33 Axes0 ??= .Axes0;
  }; // End of ProximalPhalanges1

  AnyRefNode ProximalPhalange2 = {
    AnyVec3 r0 ??= .Metatarsal2.MtPhalJoint.sRel*.Metatarsal2.Axes0'+.Metatarsal2.r0-MtPhalJoint.sRel*Axes0';
    AnyMat33 Axes0 ??= .Axes0;
  }; // End of ProximalPhalanges2

  AnyRefNode ProximalPhalange3 = {
    AnyVec3 r0 ??= .Metatarsal3.MtPhalJoint.sRel*.Metatarsal3.Axes0'+.Metatarsal3.r0-MtPhalJoint.sRel*Axes0';
    AnyMat33 Axes0 ??= .Axes0;
  }; // End of ProximalPhalanges3

  AnyRefNode ProximalPhalange4 = {
    AnyVec3 r0 ??= .Metatarsal4.MtPhalJoint.sRel*.Metatarsal4.Axes0'+.Metatarsal4.r0-MtPhalJoint.sRel*Axes0';
    AnyMat33 Axes0 ??= .Axes0;
  }; // End of ProximalPhalanges4

  AnyRefNode ProximalPhalange5 = {
    AnyVec3 r0 ??= .Metatarsal5.MtPhalJoint.sRel*.Metatarsal5.Axes0'+.Metatarsal5.r0-MtPhalJoint.sRel*Axes0';
    AnyMat33 Axes0 ??= .Axes0;
  }; // End of ProximalPhalanges5


  //************************************************
  //Middle Phalanges  bones
  //************************************************

  AnyRefNode MiddlePhalange2 = {
    AnyVec3 r0 ??= .ProximalPhalange2.ProxPhalJoint.sRel*.ProximalPhalange2.Axes0'+.ProximalPhalange2.r0-ProxPhalJoint.sRel*Axes0';
    AnyMat33 Axes0 ??= .Axes0;
  }; // End of MiddlePhalanges2

  AnyRefNode MiddlePhalange3 = {
    AnyVec3 r0 ??= .ProximalPhalange3.ProxPhalJoint.sRel*.ProximalPhalange3.Axes0'+.ProximalPhalange3.r0-ProxPhalJoint.sRel*Axes0';
    AnyMat33 Axes0 ??= .Axes0;
  }; // End of MiddlePhalanges3

  AnyRefNode MiddlePhalange4 = {
    AnyVec3 r0 ??= .ProximalPhalange4.ProxPhalJoint.sRel*.ProximalPhalange4.Axes0'+.ProximalPhalange4.r0-ProxPhalJoint.sRel*Axes0';
    AnyMat33 Axes0 ??= .Axes0;
  }; // End of MiddlePhalanges4

  AnyRefNode MiddlePhalange5 = {
    AnyVec3 r0 ??= .ProximalPhalange5.ProxPhalJoint.sRel*.ProximalPhalange5.Axes0'+.ProximalPhalange5.r0-ProxPhalJoint.sRel*Axes0';
    AnyMat33 Axes0 ??= .Axes0;
  }; // End of MiddlePhalanges5


  //************************************************
  //Distal Phalanges  bones
  //************************************************

  AnyRefNode DistalPhalange1 = {
    AnyVec3 r0 ??= .ProximalPhalange1.DistPhalJoint.sRel*.ProximalPhalange1.Axes0'+.ProximalPhalange1.r0-DistPhalJoint.sRel*Axes0';
    AnyMat33 Axes0 ??= .Axes0;
  }; // End of DistalPhalanges1

  AnyRefNode DistalPhalange2 = {
    AnyVec3 r0 ??= .MiddlePhalange2.DistPhalJoint.sRel*.MiddlePhalange2.Axes0'+.MiddlePhalange2.r0-DistPhalJoint.sRel*Axes0';
    AnyMat33 Axes0 ??= .Axes0;
  }; // End of DistalPhalanges2

  AnyRefNode DistalPhalange3 = {
    AnyVec3 r0 ??= .MiddlePhalange3.DistPhalJoint.sRel*.MiddlePhalange3.Axes0'+.MiddlePhalange3.r0-DistPhalJoint.sRel*Axes0';
    AnyMat33 Axes0 ??= .Axes0;
  }; // End of DistalPhalanges3

  AnyRefNode DistalPhalange4 = {
    AnyVec3 r0 ??= .MiddlePhalange4.DistPhalJoint.sRel*.MiddlePhalange4.Axes0'+.MiddlePhalange4.r0-DistPhalJoint.sRel*Axes0';
    AnyMat33 Axes0 ??= .Axes0;
  }; // End of DistalPhalanges4

  AnyRefNode DistalPhalange5 = {
    AnyVec3 r0 ??= .MiddlePhalange5.DistPhalJoint.sRel*.MiddlePhalange5.Axes0'+.MiddlePhalange5.r0-DistPhalJoint.sRel*Axes0';
    AnyMat33 Axes0 ??= .Axes0;
  }; // End of DistalPhalanges5

}; // End of Rigid Part
