AnyFolder &FlexorDigitorumLongusToe2Tendon = FlexorDigitorumLongusToeTendon.FlexorDigitorumLongusToe2Tendon;
AnyFolder &FlexorDigitorumLongusToe3Tendon = FlexorDigitorumLongusToeTendon.FlexorDigitorumLongusToe3Tendon;
AnyFolder &FlexorDigitorumLongusToe4Tendon = FlexorDigitorumLongusToeTendon.FlexorDigitorumLongusToe4Tendon;
AnyFolder &FlexorDigitorumLongusToe5Tendon = FlexorDigitorumLongusToeTendon.FlexorDigitorumLongusToe5Tendon;
AnyFolder &ExtensorDigitorumLongusToe2Tendon = ExtensorDigitorumLongusToeTendon.ExtensorDigitorumLongusToe2Tendon;
AnyFolder &ExtensorDigitorumLongusToe2TendonPart1 = ExtensorDigitorumLongusToeTendon.ExtensorDigitorumLongusToe2TendonPart1;
AnyFolder &ExtensorDigitorumLongusToe2TendonPart2 = ExtensorDigitorumLongusToeTendon.ExtensorDigitorumLongusToe2TendonPart2;
AnyFolder &ExtensorDigitorumLongusToe2TendonPart3 = ExtensorDigitorumLongusToeTendon.ExtensorDigitorumLongusToe2TendonPart3;
AnyFolder &ExtensorDigitorumLongusToe2TendonPart4 = ExtensorDigitorumLongusToeTendon.ExtensorDigitorumLongusToe2TendonPart4;
AnyFolder &ExtensorDigitorumLongusToe3Tendon = ExtensorDigitorumLongusToeTendon.ExtensorDigitorumLongusToe3Tendon;
AnyFolder &ExtensorDigitorumLongusToe3TendonPart1 = ExtensorDigitorumLongusToeTendon.ExtensorDigitorumLongusToe3TendonPart1;
AnyFolder &ExtensorDigitorumLongusToe3TendonPart2 = ExtensorDigitorumLongusToeTendon.ExtensorDigitorumLongusToe3TendonPart2;
AnyFolder &ExtensorDigitorumLongusToe3TendonPart3 = ExtensorDigitorumLongusToeTendon.ExtensorDigitorumLongusToe3TendonPart3;
AnyFolder &ExtensorDigitorumLongusToe3TendonPart4 = ExtensorDigitorumLongusToeTendon.ExtensorDigitorumLongusToe3TendonPart4;
AnyFolder &ExtensorDigitorumLongusToe4Tendon = ExtensorDigitorumLongusToeTendon.ExtensorDigitorumLongusToe4Tendon;
AnyFolder &ExtensorDigitorumLongusToe4TendonPart1 = ExtensorDigitorumLongusToeTendon.ExtensorDigitorumLongusToe4TendonPart1;
AnyFolder &ExtensorDigitorumLongusToe4TendonPart2 = ExtensorDigitorumLongusToeTendon.ExtensorDigitorumLongusToe4TendonPart2;
AnyFolder &ExtensorDigitorumLongusToe4TendonPart3 = ExtensorDigitorumLongusToeTendon.ExtensorDigitorumLongusToe4TendonPart3;
AnyFolder &ExtensorDigitorumLongusToe4TendonPart4 = ExtensorDigitorumLongusToeTendon.ExtensorDigitorumLongusToe4TendonPart4;
AnyFolder &ExtensorDigitorumLongusToe5Tendon = ExtensorDigitorumLongusToeTendon.ExtensorDigitorumLongusToe5Tendon;
AnyFolder &ExtensorDigitorumLongusToe5TendonPart1 = ExtensorDigitorumLongusToeTendon.ExtensorDigitorumLongusToe5TendonPart1;
AnyFolder &ExtensorDigitorumLongusToe5TendonPart2 = ExtensorDigitorumLongusToeTendon.ExtensorDigitorumLongusToe5TendonPart2;
AnyFolder &ExtensorDigitorumLongusToe5TendonPart3 = ExtensorDigitorumLongusToeTendon.ExtensorDigitorumLongusToe5TendonPart3;
AnyFolder &ExtensorDigitorumLongusToe5TendonPart4 = ExtensorDigitorumLongusToeTendon.ExtensorDigitorumLongusToe5TendonPart4;
AnyFolder &ExtensorHallucisLongusTendonPart1 = ExtensorHallucisLongusTendon.ExtensorHallucisLongusTendonPart1;
AnyFolder &ExtensorHallucisLongusTendonPart2 = ExtensorHallucisLongusTendon.ExtensorHallucisLongusTendonPart2;
AnyFolder &ExtensorHallucisLongusTendonPart3 = ExtensorHallucisLongusTendon.ExtensorHallucisLongusTendonPart3;

#if BM_FOOT_MODEL == _FOOT_MODEL_DETAILED_GM_
AnyFolder &TibialisPosteriorNavicularTendon = TibialisPosteriorTendon.TibialisPosteriorNavicularTendon;
AnyFolder &TibialisPosteriorMedCuneiTendon = TibialisPosteriorTendon.TibialisPosteriorMedCuneiTendon;
AnyFolder &TibialisPosteriorIntCuneiTendon = TibialisPosteriorTendon.TibialisPosteriorIntCuneiTendon;
AnyFolder &TibialisPosteriorLatCuneiTendon = TibialisPosteriorTendon.TibialisPosteriorLatCuneiTendon;
AnyFolder &TibialisPosteriorCuboidTendon = TibialisPosteriorTendon.TibialisPosteriorCuboidTendon;
AnyFolder &TibialisPosteriorMt2Tendon = TibialisPosteriorTendon.TibialisPosteriorMt2Tendon;
AnyFolder &TibialisPosteriorMt3Tendon = TibialisPosteriorTendon.TibialisPosteriorMt3Tendon;
AnyFolder &TibialisPosteriorMt4Tendon = TibialisPosteriorTendon.TibialisPosteriorMt4Tendon;
AnyFolder &TibialisAnteriorMedCuneiTendon = TibialisAnteriorTendon.TibialisAnteriorMedCuneiTendon;
AnyFolder &TibialisAnteriorMt1Tendon = TibialisAnteriorTendon.TibialisAnteriorMt1Tendon;
AnyFolder &PeroneusLongusMedCuneiTendon = PeroneusLongusTendon.PeroneusLongusMedCuneiTendon;
AnyFolder &PeroneusLongusMt1Tendon = PeroneusLongusTendon.PeroneusLongusMt1Tendon;
#endif

AnyFolder &AbductorHallucis1 = AbductorHallucis.AbductorHallucis1;
AnyFolder &FlexorHallucisBrevisLateralis_1 = FlexorHallucisBrevisLateralis.FlexorHallucisBrevisLateralis_1;
AnyFolder &FlexorHallucisBrevisLateralis_2 = FlexorHallucisBrevisLateralis.FlexorHallucisBrevisLateralis_2;
AnyFolder &FlexorHallucisBrevisMedialis1 = FlexorHallucisBrevisMedialis.FlexorHallucisBrevisMedialis1;
AnyFolder &AdductorHallucisOblique1 = AdductorHallucisOblique.AdductorHallucisOblique1;
AnyFolder &AdductorHallucisOblique2 = AdductorHallucisOblique.AdductorHallucisOblique2;
AnyFolder &AdductorHallucisOblique3 = AdductorHallucisOblique.AdductorHallucisOblique3;
AnyFolder &AdductorHallucisOblique4 = AdductorHallucisOblique.AdductorHallucisOblique4;
AnyFolder &AdductorHallucisOblique5 = AdductorHallucisOblique.AdductorHallucisOblique5;
AnyFolder &AdductorHallucisTransverse1 = AdductorHallucisTransverse.AdductorHallucisTransverse1;
AnyFolder &AdductorHallucisTransverse2 = AdductorHallucisTransverse.AdductorHallucisTransverse2;
AnyFolder &AdductorHallucisTransverse3 = AdductorHallucisTransverse.AdductorHallucisTransverse3;
AnyFolder &ExtensorHallucisBrevis1 = ExtensorHallucisBrevis.ExtensorHallucisBrevis1;
AnyFolder &DorsalInterosseous1Part1 = DorsalInterosseous.DorsalInterosseous1Part1;
AnyFolder &DorsalInterosseous1Part2 = DorsalInterosseous.DorsalInterosseous1Part2;
AnyFolder &DorsalInterosseous2Part1 = DorsalInterosseous.DorsalInterosseous2Part1;
AnyFolder &DorsalInterosseous2Part2 = DorsalInterosseous.DorsalInterosseous2Part2;
AnyFolder &DorsalInterosseous3Part1 = DorsalInterosseous.DorsalInterosseous3Part1;
AnyFolder &DorsalInterosseous3Part2 = DorsalInterosseous.DorsalInterosseous3Part2;
AnyFolder &DorsalInterosseous4Part1 = DorsalInterosseous.DorsalInterosseous4Part1;
AnyFolder &DorsalInterosseous4Part2 = DorsalInterosseous.DorsalInterosseous4Part2;
AnyFolder &ExtensorDigitoriumBrevis2 = ExtensorDigitoriumBrevis.ExtensorDigitoriumBrevis2;
AnyFolder &ExtensorDigitoriumBrevis3 = ExtensorDigitoriumBrevis.ExtensorDigitoriumBrevis3;
AnyFolder &ExtensorDigitoriumBrevis4 = ExtensorDigitoriumBrevis.ExtensorDigitoriumBrevis4;
AnyFolder &PlantarInterosseous1 = PlantarInterosseous.PlantarInterosseous1;
AnyFolder &PlantarInterosseous2Part1 = PlantarInterosseous.PlantarInterosseous2Part1;
AnyFolder &PlantarInterosseous2Part2 = PlantarInterosseous.PlantarInterosseous2Part2;
AnyFolder &PlantarInterosseous2Part3 = PlantarInterosseous.PlantarInterosseous2Part3;
AnyFolder &PlantarInterosseous3Part1 = PlantarInterosseous.PlantarInterosseous3Part1;
AnyFolder &PlantarInterosseous3Part2 = PlantarInterosseous.PlantarInterosseous3Part2;
AnyFolder &PlantarInterosseous3Part3 = PlantarInterosseous.PlantarInterosseous3Part3;
AnyFolder &FlexorDigitorumBrevis2 = FlexorDigitorumBrevis.FlexorDigitorumBrevis2;
AnyFolder &FlexorDigitorumBrevis3 = FlexorDigitorumBrevis.FlexorDigitorumBrevis3;
AnyFolder &FlexorDigitorumBrevis4 = FlexorDigitorumBrevis.FlexorDigitorumBrevis4;
AnyFolder &FlexorDigitorumBrevis5 = FlexorDigitorumBrevis.FlexorDigitorumBrevis5;
AnyFolder &QuadratusPlantarMedialis1 = QuadratusPlantarMedialis.QuadratusPlantarMedialis1;
AnyFolder &QuadratusPlantarMedialis2 = QuadratusPlantarMedialis.QuadratusPlantarMedialis2;
AnyFolder &QuadratusPlantarMedialis3 = QuadratusPlantarMedialis.QuadratusPlantarMedialis3;
AnyFolder &QuadratusPlantarLateralis1 = QuadratusPlantarLateralis.QuadratusPlantarLateralis1;
AnyFolder &QuadratusPlantarLateralis2 = QuadratusPlantarLateralis.QuadratusPlantarLateralis2;
AnyFolder &QuadratusPlantarLateralis3 = QuadratusPlantarLateralis.QuadratusPlantarLateralis3;
AnyFolder &Lumbrical2 = Lumbrical.Lumbrical2;
AnyFolder &Lumbrical3 = Lumbrical.Lumbrical3;
AnyFolder &Lumbrical4 = Lumbrical.Lumbrical4;
AnyFolder &Lumbrical5 = Lumbrical.Lumbrical5;
AnyFolder &AbductorDigitiMinimi1 = AbductorDigitiMinimi.AbductorDigitiMinimi1;
AnyFolder &AbductorDigitiMinimi2 = AbductorDigitiMinimi.AbductorDigitiMinimi2;
AnyFolder &AbductorDigitiMinimi3 = AbductorDigitiMinimi.AbductorDigitiMinimi3;
AnyFolder &FlexorDigitiMinimiBrevis1 = FlexorDigitiMinimiBrevis.FlexorDigitiMinimiBrevis1;
AnyFolder &PeroneusTertius1 = PeroneusTertius.PeroneusTertius1;
AnyFolder &PeroneusTertius2 = PeroneusTertius.PeroneusTertius2;
AnyFolder &PeroneusTertius3 = PeroneusTertius.PeroneusTertius3;
