#ifdef BM_LEG_MODEL
  #if BM_LEG_MODEL != _LEG_MODEL_TLEM2_
  AnyInt GM_FOOT_ERROR1 = assert(1, "GM foot only works with the TLEM2 lower extremity model");
   AnyInt GM_foot_TLEM2 = assert(0, strformat("\n"+
      "------------------------------------------------------------------------------------------------------\n"+
      "     GM foot only works with the TLEM2 lower extremity model."+
      "     Please set: `BM_LEG_MODEL` to `_LEG_MODEL_TLEM2_`"+
      "-------------------------------------------------------------------------------------------------------"));
  #endif
#else
 #define BM_LEG_MODEL _LEG_MODEL_TLEM2_
#endif

#ifdef  BM_FOOT_MODEL
 #if BM_FOOT_MODEL != _FOOT_MODEL_NONE_
   AnyInt GM_foot_error= assert(0, strformat("\n"+
      "------------------------------------------------------------------------------------------------------\n"+
      "     Exsiting feet in the TLEM2 model must be disabled."+
      "     Please set `BM_FOOT_MODEL`  to `_FOOT_MODEL_NONE_`"+
      "-------------------------------------------------------------------------------------------------------"));
 #endif
#else
#define BM_FOOT_MODEL _FOOT_MODEL_NONE_
#endif

// This disables the Ankle joint of the TLEM2 model
// so the FootGM model can redfine the position.
#ifndef BM_JOINT_TYPE_ANKLE_RIGHT
#define BM_JOINT_TYPE_ANKLE_RIGHT 0
#endif
#ifndef BM_JOINT_TYPE_ANKLE_LEFT
#define BM_JOINT_TYPE_ANKLE_LEFT 0
#endif
