#if EVALUATE_MOMENT_ARMS == 1
AnyKinEqSimpleDriver CMC2 ={
  AnyKinLinear Lin={
    Ref=0;
    AnyRefNode &ref1=........BodyModel.Right.ShoulderArm.Seg.Hand.Finger2.Seg.Metacarpal.DistalJointNode;
    //       ref1={AnyDrawRefFrame drw2={RGB={1,1,1};};};
    AnyRefNode  &ref2= ........BodyModel.Right.ShoulderArm.Seg.Hand.Finger2.MCPNode;
  };
  MeasureOrganizer={0,2};  //x and z, y is longitudinal
  DriverPos={0,0};
  DriverVel={0,0};
  Reaction.Type ={Off,Off};
};
AnyKinEqSimpleDriver CMC3 ={
  AnyKinLinear Lin={
    Ref=0;
    AnyRefNode &ref1=........BodyModel.Right.ShoulderArm.Seg.Hand.Finger3.Seg.Metacarpal.DistalJointNode;
    //       ref1={AnyDrawRefFrame drw2={RGB={1,1,1};};};
    AnyRefNode  &ref2= ........BodyModel.Right.ShoulderArm.Seg.Hand.Finger3.MCPNode;
  };
  MeasureOrganizer={0,2};  //x and z, y is longitudinal
  DriverPos={0,0};
  DriverVel={0,0};
  Reaction.Type ={Off,Off};
};

AnyKinEqSimpleDriver CMC4 ={
  AnyKinLinear Lin={
    Ref=0;
    AnyRefNode &ref1=........BodyModel.Right.ShoulderArm.Seg.Hand.Finger4.Seg.Metacarpal.DistalJointNode;
    //       ref1={AnyDrawRefFrame drw2={RGB={1,1,1};};};
    AnyRefNode  &ref2= ........BodyModel.Right.ShoulderArm.Seg.Hand.Finger4.MCPNode;
  };
  MeasureOrganizer={0,2};  //x and z, y is longitudinal
  DriverPos={0,0};
  DriverVel={0,0};
  Reaction.Type ={Off,Off};
};

AnyKinEqSimpleDriver CMC5 ={
  AnyKinLinear Lin={
    Ref=0;
    AnyRefNode &ref1=........BodyModel.Right.ShoulderArm.Seg.Hand.Finger5.Seg.Metacarpal.DistalJointNode;
    //       ref1={AnyDrawRefFrame drw2={RGB={1,1,1};};};
    AnyRefNode  &ref2= ........BodyModel.Right.ShoulderArm.Seg.Hand.Finger5.MCPNode;
  };
  MeasureOrganizer={0,2};  //x and z, y is longitudinal
  DriverPos={0,0};
  DriverVel={0,0};
  Reaction.Type ={Off,Off};
};
#endif
