//This will run calibration of the ligaments on the left hand
AnyFolder LeftHandCalibration01={
  AnyFolder &SideHumanFolderRef=..BodyModel.Left;
  AnyFolder &SideInterfaceFolderRef=..BodyModel.Interface.Left;
  #include "RUHM-Cal0.any"
};

CalibrationSequence ={
 AnyOperation &HandCalLeft01 = .LeftHandCalibration01.HandCalibrationStudy01.LigamentLengthAdjustment;
};
