//This will run calibration of the ligaments on the right hand
AnyFolder RightHandCalibration01={
  AnyFolder &SideHumanFolderRef=..BodyModel.Right;
  AnyFolder &SideInterfaceFolderRef=..BodyModel.Interface.Right;
  #include "RUHM-Cal0.any"
};

CalibrationSequence ={
 AnyOperation &HandCalRight01 = .RightHandCalibration01.HandCalibrationStudy01.LigamentLengthAdjustment;
};
