Finger1MetaRef = {
  AnyRefNode I_Abductor_Pollicis_Longus = {
//     AnyDrawRefFrame drw={RGB={1,0,0};};
    sRel = ..Scale({-0.008, 0.007, ....Sign*0}); //guesstimate

  };


  AnyRefNode I_Extensor_Pollicis_Brevis = {
    //   AnyDrawRefFrame drw={};
    sRel = ..Scale({-0.006, -0.02, 0}); //guesstimate
  };

  AnyRefNode Via1_Extensor_Pollicis_Brevis = {
    //   AnyDrawRefFrame drw={};
    sRel = ..Scale({-0.008, 0.0, 0}); //guesstimate
  };

  AnyRefNode Via1_Extensor_Pollicis_Longus= {
    //   AnyDrawRefFrame drw={};
    sRel = ..Scale({-0.008, 0.0, 0}); //guesstimate
  };
  AnyRefNode Via2_Extensor_Pollicis_Longus= {
    //   AnyDrawRefFrame drw={};
    sRel = ..Scale({-0.006, -0.023, 0}); //guesstimate
  };

  AnyRefNode Via_Flexor_Pollicis_Longus = {
    // AnyDrawRefFrame drw={};
    sRel = ..Scale({0.008, 0.0, 0}); //guesstimate
    ARel = RotMat(-....Sign*pi/2,x)*RotMat(-....Sign*pi/2,y);  // used for the SPLine.InitWrapPosVectors
  };
  AnyRefNode Via2_Flexor_Pollicis_Longus = {
    // AnyDrawRefFrame drw={};
    sRel = ..Scale({0.0065, -0.015, 0}); //guesstimate
  };
  AnyRefNode O_DorsalInterosseous_Digit2 = {
     //AnyDrawRefFrame drw={};
    sRel = ..Scale({0, 0.015, 0}); //guesstimate
  };

  AnyRefNode Via_Abductor_Pollicis_Brevis= {
    //AnyDrawRefFrame drw={};
    sRel = ..Scale({0.005, 0.015, 0.011}); //guesstimate -0.002, 0.015, 0.011
  };
  AnyRefNode I_Abductor_Pollicis_Brevis = {
    // AnyDrawRefFrame drw={};
    sRel = ..Scale({0.008, -0.015, 0}); //guesstimate
  };
  AnyRefNode I_Abductor_Pollicis = {
    // AnyDrawRefFrame drw={};
    sRel = ..Scale({0.008, -0.015, 0}); //guesstimate
  };
  AnyRefNode I_Flexor_Pollicis_Brevis = {
    // AnyDrawRefFrame drw={};
    sRel = ..Scale({0.008, -0.015, 0}); //guesstimate
  };


};//End Finger1MetaRef

Finger1ProximalRef ={

  AnyRefNode Via3_Extensor_Pollicis_Longus = {
    //AnyDrawRefFrame drw={RGB={0,1,1};ScaleXYZ={0.02,0.02,0.02};};
    sRel = ..Scale({-0.006,-..SegmentLengthTable[0][2]/2,0.0}); //guesstimate
  };
  AnyRefNode Via3_Flexor_Pollicis_Longus = {
    //AnyDrawRefFrame drw={RGB={0,1,1};ScaleXYZ={0.02,0.02,0.02};};
    sRel = ..Scale({0.004,-..SegmentLengthTable[0][2]/2,0.0}); //guesstimate
  };
  AnyRefNode I_Opponens_Pollicis = {
    // AnyDrawRefFrame drw={};
    sRel = ..Scale({0.003,-0.004, 0.002}); //guesstimate
  };

};//End Finger1ProximalRef


Finger1DistalRef ={

  AnyRefNode I_Extensor_Pollicis_Longus = {
    //AnyDrawRefFrame drw={RGB={0,1,1};};
    sRel = ..Scale({-0.004,..SegmentLengthTable[0][3]/2-0.0085,0.0}); //guesstimate
  };
  AnyRefNode I_Flexor_Pollicis_Longus = {
    //AnyDrawRefFrame drw={RGB={0,1,1};};
    sRel = ..Scale({0.002,-..SegmentLengthTable[0][3]/2+0.003,0.0}); //guesstimate
  };


};//End Finger1DistalRef
