//All References of Finger 2

Finger2MetaRef = {
  AnyRefNode V_Extensor_Indicis = {
    //AnyDrawRefFrame drw={RGB={0,1,1};};
    sRel = ..Scale({-0.007,0.02,0.0}); //guesstimate
  };

  AnyRefNode V2_Extensor_Indicis = {
    //AnyDrawRefFrame drw={RGB={0,1,1};ScaleXYZ={0.02,0.02,0.02};};
    sRel = ..Scale({-0.0055,-..Carpals.LM2/2+0.003,0.0}); //guesstimate
  };


  AnyRefNode I_Extensor_Carpi_Radialis_Longus= {
    //AnyDrawRefFrame drw={RGB={0,1,1};};
    sRel = ..Scale({-0.004,0.023,0.0}); //guesstimate
  };

  AnyRefNode I_Flexor_Carpi_Radialis= {
    //AnyDrawRefFrame drw={RGB={0,1,1};};
    sRel = ..Scale({0.006,0.025,0.0}); //guesstimate
  };

  AnyRefNode Via_Flexor_Digitorum_Superficialis_Digit2 = {
    //AnyDrawRefFrame drw={RGB={0,1,1};};
    sRel = ..Scale({0.008,0.01,0.0}); //guesstimate
    ARel = RotMat(-....Sign*pi/2,x)*RotMat(-....Sign*pi/2,y);  // used for the SPLine.InitWrapPosVectors
  };

  AnyRefNode V2_Flexor_Digitorum_Superficialis_Digit2 = {
    //AnyDrawRefFrame drw={RGB={0,1,1};};
    sRel = ..Scale({0.0045,-..Carpals.LM3/2+0.014,0.0}); //guesstimate
  };

  AnyRefNode Via_Flexor_Digitorum_Profundus_Digit2 = {
    //AnyDrawRefFrame drw={RGB={0,1,1};};
    sRel = ..Scale({0.009,0.01,0.0}); //guesstimate
    ARel = RotMat(-....Sign*pi/2,x)*RotMat(-....Sign*pi/2,y);  // used for the SPLine.InitWrapPosVectors
  };

  AnyRefNode V2_Flexor_Digitorum_Profundus_Digit2 = {
    //AnyDrawRefFrame drw={RGB={0,1,1};};
    sRel = ..Scale({0.0045,-..Carpals.LM2/2+0.015,0.0}); //guesstimate
  };

  AnyRefNode Via_Extensor_Digitorum_Digit2 = {
    //AnyDrawRefFrame drw={RGB={0,1,1};};
    sRel = ..Scale({-0.0055,-..Carpals.LM2/2+0.003,0.0}); //guesstimate
  };

  AnyRefNode O_Palmar_Interosseous = {
    //AnyDrawRefFrame drw={RGB={0,1,1};};
    sRel = ..Scale({0.006,..Carpals.LM2/2,0}); //guesstimate
  };
  AnyRefNode Via_Palmar_Interosseous = {
    //AnyDrawRefFrame drw={RGB={0,1,1};};
    sRel = ..Scale({-0.002,-..Carpals.LM2/2+0.015,-0.0055}); //guesstimate
  };

  AnyRefNode O_Lumbrical_Digit2 = {
    //AnyDrawRefFrame drw={RGB={0,1,1};};
    sRel = ..Scale({0.006,..Carpals.LM2/2,0}); //guesstimate
  };
  AnyRefNode V_Lumbrical_Digit2 = {
    //AnyDrawRefFrame drw={RGB={0,1,1};};
    sRel = ..Scale({0.003,-..Carpals.LM2/2+0.0125,0.005}); //guesstimate
  };
  AnyRefNode O_DorsalInterosseous_Digit2 = {
    //AnyDrawRefFrame drw={RGB={0,1,1};};
    sRel = ..Scale({-0.006,..Carpals.LM2/2,0.004}); //guesstimate
  };
  AnyRefNode V_DorsalInterosseous_Digit2 = {
    //AnyDrawRefFrame drw={RGB={0,1,1};};
    sRel = ..Scale({-0.003,-..Carpals.LM2/2+0.011,0.005}); //guesstimate
  };
  AnyRefNode O_DorsalInterosseous_Digit3 = {
    //AnyDrawRefFrame drw={RGB={0,1,1};};
    sRel = ..Scale({-0.006,..Carpals.LM2/2,-0.002}); //guesstimate
  };


};//End Finger2MetaRef

Finger2ProximalRef ={
  AnyRefNode V_Extensor_Indicis = {
    //AnyDrawRefFrame drw={RGB={0,1,1}; ScaleXYZ={0.02,0.02,0.02};};
    sRel = ..Scale({-0.0045,-..SegmentLengthTable[1][1]/2+0.01,0.0}); //guesstimate
  };


   AnyRefNode V_Extensor_Digitorum_Digit2 = {
    //AnyDrawRefFrame drw={RGB={0,1,1};ScaleXYZ={0.02,0.02,0.02};};
    sRel = ..Scale({-0.005,..SegmentLengthTable[1][1]/2-0.007,0.0}); //guesstimate
  };
     AnyRefNode V2_Extensor_Digitorum_Digit2 = {
    //AnyDrawRefFrame drw={RGB={0,1,1};ScaleXYZ={0.02,0.02,0.02};};
    sRel = ..Scale({-0.005,-..SegmentLengthTable[1][1]/2+0.012,0.0}); //guesstimate
  };

  AnyRefNode V3_Flexor_Digitorum_Superficialis_Digit2 = {
    //AnyDrawRefFrame drw={RGB={0,1,1};};
    sRel = ..Scale({0.0047,..SegmentLengthTable[1][1]/2-0.003,0.00}); //guesstimate
  };

   AnyRefNode V4_Flexor_Digitorum_Superficialis_Digit2 = {
    //AnyDrawRefFrame drw={RGB={0,1,1};};
    sRel = ..Scale({0.0030,-..SegmentLengthTable[1][1]/2+0.0115,0.00}); //guesstimate
  };
  AnyRefNode Via2_Flexor_Digitorum_Profundus_Digit2 = {
   //AnyDrawRefFrame drw={RGB={0,1,1};};
    sRel = ..Scale({0.003,-..SegmentLengthTable[1][1]/2+0.013,0.0}); //guesstimate
  };
    AnyRefNode Via_Flexor_Digitorum_Profundus_Digit2 = {
   //AnyDrawRefFrame drw={RGB={0,1,1};};
    sRel = ..Scale({0.004,..SegmentLengthTable[1][1]/2-0.004,0.0}); //guesstimate
  };
  AnyRefNode Via_Palmar_Interosseous = {
    //AnyDrawRefFrame drw={RGB={0,1,1};};
    sRel = ..Scale({-0.0054,..SegmentLengthTable[1][1]/2-0.007,0}); //guesstimate
  };
  AnyRefNode Via2_Palmar_Interosseous = {
    //AnyDrawRefFrame drw={RGB={0,1,1};};
    sRel = ..Scale({-0.004,-..SegmentLengthTable[1][1]/2+0.009,0}); //guesstimate
  };

  AnyRefNode V_Lumbrical_Digit2 = {
    //AnyDrawRefFrame drw={RGB={0,1,1};};
    sRel = ..Scale({-0.005,-..SegmentLengthTable[1][1]/2+0.007,0}); //guesstimate
  };
  AnyRefNode V_DorsalInterosseous_Digit2 = {
    //AnyDrawRefFrame drw={RGB={0,1,1};};
    sRel = ..Scale({-0.0054,..SegmentLengthTable[1][1]/2-0.007,0}); //guesstimate
  };
    AnyRefNode V2_DorsalInterosseous_Digit2 = {
    //AnyDrawRefFrame drw={RGB={0,1,1};};
    sRel = ..Scale({-0.0048,-..SegmentLengthTable[1][1]/2+0.007,0}); //guesstimate
  };


};//End Finger2ProximalRef


Finger2MiddleRef ={

  AnyRefNode V_Extensor_Indicis = {
    //AnyDrawRefFrame drw={RGB={0,1,1}; ScaleXYZ={0.02,0.02,0.02};};
    sRel = ..Scale({-0.0043,..SegmentLengthTable[1][2]/2-0.004,0.0}); //guesstimate
  };

  AnyRefNode V2_Extensor_Indicis = {
    //AnyDrawRefFrame drw={RGB={0,1,1}; ScaleXYZ={0.02,0.02,0.02};};
    sRel = ..Scale({-0.0038,-..SegmentLengthTable[1][2]/2+0.005,0.0}); //guesstimate
  };

  AnyRefNode I_Flexor_Digitorum_Superficialis_Digit2 = {
    //AnyDrawRefFrame drw={RGB={0,1,1}; ScaleXYZ={0.02,0.02,0.02};};
    sRel = ..Scale({0.003,..SegmentLengthTable[1][2]/2-0.0045,0.0}); //guesstimate
  };
  AnyRefNode V_Extensor_Digitorum_Digit2 = {
    //AnyDrawRefFrame drw={RGB={0,1,1};ScaleXYZ={0.02,0.02,0.02};};
    sRel = ..Scale({-0.0045,..SegmentLengthTable[1][2]/2-0.001,0.0}); //guesstimate
  };

  AnyRefNode I_Extensor_Digitorum_Digit2 = {
    //AnyDrawRefFrame drw={RGB={0,1,1};ScaleXYZ={0.02,0.02,0.02};};
    sRel = ..Scale({-0.0038,-..SegmentLengthTable[1][2]/2+0.0075,0.0}); //guesstimate
  };
  AnyRefNode Via_Flexor_Digitorum_Profundus_Digit2 = {
    //AnyDrawRefFrame drw={RGB={0,1,1};};
    sRel = ..Scale({0.0025,..SegmentLengthTable[1][2]/2-0.0035,0.0}); //guesstimate
  };
  AnyRefNode Via2_Flexor_Digitorum_Profundus_Digit2 = {
    //AnyDrawRefFrame drw={RGB={0,1,1};};
    sRel = ..Scale({0.002,-..SegmentLengthTable[1][2]/2+0.01,0.0}); //guesstimate
  };

  AnyRefNode Via_Palmar_Interosseous = {
    //AnyDrawRefFrame drw={RGB={0,1,1};};
    sRel = ..Scale({-0.0047,..SegmentLengthTable[1][2]/2-0.002,0}); //guesstimate
  };
    AnyRefNode Via2_Palmar_Interosseous = {
   // AnyDrawRefFrame drw={RGB={0,1,1};};
    sRel = ..Scale({-0.0043,-..SegmentLengthTable[1][2]/2+0.008,0}); //guesstimate
  };
  AnyRefNode V_Lumbrical_Digit2 = {
    //AnyDrawRefFrame drw={RGB={0,1,1};};
    sRel = ..Scale({-0.0035,-..SegmentLengthTable[1][2]/2+0.006,0}); //guesstimate
  };

  AnyRefNode I_DorsalInterosseous_Digit2 = {
    //AnyDrawRefFrame drw={RGB={0,1,1};};
    sRel = ..Scale({-0.0048,..SegmentLengthTable[1][2]/2-0.0055,0}); //guesstimate
  };


};//End Finger2MiddleRef


Finger2DistalRef ={

  AnyRefNode I_Extensor_Indicis = {
    //AnyDrawRefFrame drw={RGB={0,1,1}; ScaleXYZ={0.02,0.02,0.02};};
    sRel = ..Scale({-0.002,-..SegmentLengthTable[1][3]/2+0.008,0.0}); //guesstimate
  };
  AnyRefNode I_Flexor_Digitorum_Profundus_Digit2 = {
    //AnyDrawRefFrame drw={RGB={0,1,1};};
    sRel = ..Scale({0.002,-..SegmentLengthTable[1][3]/2+0.003,0.0}); //guesstimate
  };
  AnyRefNode I_Palmar_Interosseous = {
    //AnyDrawRefFrame drw={RGB={0,1,1};};
    sRel = ..Scale({-0.002,-..SegmentLengthTable[1][3]/2+0.003,0}); //guesstimate
  };
  AnyRefNode I_Lumbrical_Digit2 = {
    //AnyDrawRefFrame drw={RGB={0,1,1};};
    sRel = ..Scale({-0.002,-..SegmentLengthTable[1][3]/2+0.003,0}); //guesstimate
  };


};//End Finger2DistalRef
