Finger3MetaRef={

  AnyRefNode Via_Extensor_Carpi_Radialis_Brevis = {
    //AnyDrawRefFrame drw={RGB={0,1,1};};
    sRel = ..Scale({-0.006,0.027,0.0}); //guesstimate
  };

  AnyRefNode I_Extensor_Carpi_Radialis_Brevis = {
    //AnyDrawRefFrame drw={RGB={0,1,1};};
    sRel = ..Scale({-0.006,0.025,0.0}); //guesstimate
  };

  AnyRefNode Via_Flexor_Digitorum_Superficialis_Digit3 = {
    //AnyDrawRefFrame drw={RGB={0,1,1};};
    sRel = ..Scale({0.008,0.01,0.0}); //guesstimate
    ARel = RotMat(-....Sign*pi/2,x)*RotMat(-....Sign*pi/2,y);  // used for the SPLine.InitWrapPosVectors
  };

  AnyRefNode V2_Flexor_Digitorum_Superficialis_Digit3 = {
    //AnyDrawRefFrame drw={RGB={0,1,1};};
    sRel = ..Scale({0.0025,-..Carpals.LM3/2+0.0145,0.0}); //guesstimate
  };

  AnyRefNode Via_Flexor_Digitorum_Profundus_Digit3 = {
    //AnyDrawRefFrame drw={RGB={0,1,1};};
    sRel = ..Scale({0.009,0.01,0.0}); //guesstimate
    ARel = RotMat(-....Sign*pi/2,x)*RotMat(-....Sign*pi/2,y);  // used for the SPLine.InitWrapPosVectors
  };

  AnyRefNode V2_Flexor_Digitorum_Profundus_Digit3 = {
    //AnyDrawRefFrame drw={RGB={0,1,1};};
    sRel = ..Scale({0.003,-..Carpals.LM3/2+0.014,0.0}); //guesstimate
  };

  AnyRefNode Via_Extensor_Digitorum_Digit3 = {
    //AnyDrawRefFrame drw={RGB={0,1,1};};
    sRel = ..Scale({-0.0055,-..Carpals.LM3/2+0.003,0.0}); //guesstimate
  };

  AnyRefNode O_Lumbrical_Digit3 = {
    //AnyDrawRefFrame drw={RGB={0,1,1};};
    sRel = ..Scale({0.006,..Carpals.LM3/2,0}); //guesstimate
  };
  AnyRefNode V_Lumbrical_Digit3 = {
    //AnyDrawRefFrame drw={RGB={0,1,1};};
    sRel = ..Scale({0.0005,-..Carpals.LM3/2+0.014,0.0045}); //guesstimate
  };

  AnyRefNode O_DorsalInterosseous_Digit3 = {
    //AnyDrawRefFrame drw={RGB={0,1,1};};
    sRel = ..Scale({-0.006,..Carpals.LM3/2,0.004}); //guesstimate
  };
  AnyRefNode V_DorsalInterosseous_Digit3 = {
    //AnyDrawRefFrame drw={RGB={0,1,1};};
    sRel = ..Scale({-0.001,-..Carpals.LM3/2+0.011,0.0055}); //guesstimate
  };
  AnyRefNode O_DorsalInterosseous_Digit31 = {
    //AnyDrawRefFrame drw={RGB={0,1,1};};
    sRel = ..Scale({-0.006,..Carpals.LM3/2,-0.002}); //guesstimate
  };
  AnyRefNode V_DorsalInterosseous_Digit31 = {
    //AnyDrawRefFrame drw={RGB={0,1,1};};
    sRel = ..Scale({-0.001,-..Carpals.LM3/2+0.01,-0.0055}); //guesstimate
  };


};//End Finger3MetaRef

Finger3ProximalRef ={

  AnyRefNode V_Extensor_Digitorum_Digit3 = {
    //AnyDrawRefFrame drw={RGB={0,1,1};ScaleXYZ={0.02,0.02,0.02};};
    sRel = ..Scale({-0.006,..SegmentLengthTable[2][1]/2-0.007,0.0}); //guesstimate
  };
   AnyRefNode V2_Extensor_Digitorum_Digit3 = {
    //AnyDrawRefFrame drw={RGB={0,1,1};ScaleXYZ={0.02,0.02,0.02};};
    sRel = ..Scale({-0.0045,-..SegmentLengthTable[2][1]/2+0.008,0.0}); //guesstimate
  };
   AnyRefNode V3_Flexor_Digitorum_Superficialis_Digit3 = {
    //AnyDrawRefFrame drw={RGB={0,1,1};};
    sRel = ..Scale({0.004,..SegmentLengthTable[2][1]/2-0.006,0.0}); //guesstimate
  };

  AnyRefNode V4_Flexor_Digitorum_Superficialis_Digit3 = {
    //AnyDrawRefFrame drw={RGB={0,1,1};};
    sRel = ..Scale({0.0025,-..SegmentLengthTable[2][1]/2+0.013,0.0}); //guesstimate
  };


  AnyRefNode Via_Flexor_Digitorum_Profundus_Digit3 = {
    //AnyDrawRefFrame drw={RGB={0,1,1};};
    sRel = ..Scale({0.005,..SegmentLengthTable[2][1]/2-0.005,0.0}); //guesstimate
  };
   AnyRefNode Via2_Flexor_Digitorum_Profundus_Digit3 = {
    //AnyDrawRefFrame drw={RGB={0,1,1};};
    sRel = ..Scale({0.0026,-..SegmentLengthTable[2][1]/2+0.0125,0.0}); //guesstimate
  };

  AnyRefNode V_Lumbrical_Digit3 = {
    //AnyDrawRefFrame drw={RGB={0,1,1};};
    sRel = ..Scale({-0.005,-..SegmentLengthTable[2][1]/2+0.008,0}); //guesstimate
  };
    AnyRefNode V_DorsalInterosseous_Digit3 = {
    //AnyDrawRefFrame drw={RGB={0,1,1};};
    sRel = ..Scale({-0.0057,..SegmentLengthTable[2][1]/2-0.0065,0}); //guesstimate
  };
  AnyRefNode V2_DorsalInterosseous_Digit3 = {
    //AnyDrawRefFrame drw={RGB={0,1,1};};
    sRel = ..Scale({-0.005,-..SegmentLengthTable[2][1]/2+0.008,0}); //guesstimate
  };

};//End Finger3ProximalRef


Finger3MiddleRef ={


  AnyRefNode I_Extensor_Digitorum_Digit3 = {
    //AnyDrawRefFrame drw={RGB={0,1,1};ScaleXYZ={0.02,0.02,0.02};};
    sRel = ..Scale({-0.0038,-..SegmentLengthTable[2][2]/2+0.01,0.0}); //guesstimate
  };
  AnyRefNode Via_Flexor_Digitorum_Profundus_Digit3 = {
    //AnyDrawRefFrame drw={RGB={0,1,1};};
    sRel = ..Scale({0.002,..SegmentLengthTable[2][2]/2-0.005,0.0}); //guesstimate
  };
   AnyRefNode Via2_Flexor_Digitorum_Profundus_Digit3 = {
    //AnyDrawRefFrame drw={RGB={0,1,1};};
    sRel = ..Scale({0.002,-..SegmentLengthTable[2][2]/2+0.01,0.0}); //guesstimate
  };

  AnyRefNode I_Flexor_Digitorum_Superficialis_Digit3 = {
    //AnyDrawRefFrame drw={RGB={0,1,1}; ScaleXYZ={0.02,0.02,0.02};};
    sRel = ..Scale({0.003,..SegmentLengthTable[2][2]/2-0.0045,0.0}); //guesstimate
  };

  AnyRefNode V_Lumbrical_Digit3 = {
    //AnyDrawRefFrame drw={RGB={0,1,1};};
    sRel = ..Scale({-0.004,-..SegmentLengthTable[2][2]/2+0.006,0}); //guesstimate
  };
  AnyRefNode I_DorsalInterosseous_Digit3 = {
    //AnyDrawRefFrame drw={RGB={0,1,1};};
    sRel = ..Scale({-0.0035,-..SegmentLengthTable[2][2]/2+0.006,0}); //guesstimate
  };

};//End Finger3MiddleRef


Finger3DistalRef ={

  AnyRefNode I_Flexor_Digitorum_Profundus_Digit3 = {
    //AnyDrawRefFrame drw={RGB={0,1,1};};
    sRel = ..Scale({0.002,-..SegmentLengthTable[2][3]/2+0.003,0.0}); //guesstimate
  };
  AnyRefNode I_Lumbrical_Digit3 = {
    //AnyDrawRefFrame drw={RGB={0,1,1};};
    sRel = ..Scale({-0.002,-..SegmentLengthTable[2][3]/2+0.003,0}); //guesstimate
  };
  AnyRefNode I_DorsalInterosseous_Digit3 = {
    //AnyDrawRefFrame drw={RGB={0,1,1};};
    sRel = ..Scale({-0.002,-..SegmentLengthTable[2][3]/2+0.003,0}); //guesstimate
  };


};//End Finger3DistalRef
