Finger5MetaRef = {

  AnyRefNode I_Extensor_Carpi_Ulnaris = {
    //AnyDrawRefFrame drw={RGB={0,1,1};};
    sRel = ..Scale({-0.002,0.02,....Sign*-0.007}); //guesstimate {-0.002,0.02,....Sign*-0.007}
  };

  AnyRefNode I_Flexor_Carpi_Ulnaris = {
    //AnyDrawRefFrame drw={RGB={0,1,1};};
    sRel = ..Scale({0.009,0.02,....Sign*0.007}); //guesstimate
    ARel = RotMat(-....Sign*pi/2,x)*RotMat(-....Sign*pi/2,y);  // used for the SPLine.InitWrapPosVectors
  };


  AnyRefNode Via_Flexor_Digitorum_Superficialis_Digit5 = {
    //AnyDrawRefFrame drw={RGB={0,1,1};};
    sRel = ..Scale({0.009,0.01,0.0}); //guesstimate
    ARel = RotMat(-....Sign*pi/2,x)*RotMat(-....Sign*pi/2,y);  // used for the SPLine.InitWrapPosVectors
  };

  AnyRefNode V2_Flexor_Digitorum_Superficialis_Digit5 = {
    //AnyDrawRefFrame drw={RGB={0,1,1};};
    sRel = ..Scale({0.002,-..Carpals.LM5/2+0.013,0.0}); //guesstimate
  };

  AnyRefNode Via_Flexor_Digitorum_Profundus_Digit5 = {
    //AnyDrawRefFrame drw={RGB={0,1,1};};
    sRel = ..Scale({0.009,0.01,0.0}); //guesstimate
    ARel = RotMat(-....Sign*pi/2,x)*RotMat(-....Sign*pi/2,y);  // used for the SPLine.InitWrapPosVectors
  };

  AnyRefNode V2_Flexor_Digitorum_Profundus_Digit5 = {
    //AnyDrawRefFrame drw={RGB={0,1,1};};
    sRel = ..Scale({0.004,-..Carpals.LM5/2+0.013,0.0}); //guesstimate
  };

  AnyRefNode V_Extensor_Digitorum_Digit5 = {
    //AnyDrawRefFrame drw={RGB={0,1,1};ScaleXYZ={0.02,0.02,0.02};};
    sRel = ..Scale({-0.0055,-..Carpals.LM5/2+0.003,0.0}); //guesstimate
  };


  AnyRefNode Via_Extensor_Digiti_Minimi= {
    //AnyDrawRefFrame drw={RGB={0,1,1};};
    sRel = ..Scale({-0.009,0.01,0.0}); //guesstimate
  };

  AnyRefNode V2_Extensor_Digiti_Minimi= {
    //AnyDrawRefFrame drw={RGB={0,1,1};ScaleXYZ={0.02,0.02,0.02};};
    sRel = ..Scale({-0.006,-..Carpals.LM5/2+0.008,0.0}); //guesstimate
  };

  AnyRefNode O_Abductor_Digiti_Minimi= {
    //AnyDrawRefFrame drw={RGB={0,1,1};ScaleXYZ={0.02,0.02,0.02};};
    sRel = ..Scale({0.009,..Carpals.LM5/2,0.0}); //guesstimate
  };
  AnyRefNode Via_Abductor_Digiti_Minimi= {
    //AnyDrawRefFrame drw={RGB={0,1,1};ScaleXYZ={0.02,0.02,0.02};};
    sRel = ..Scale({0.001,-..Carpals.LM5/2+0.01,-0.006}); //guesstimate
  };

  AnyRefNode O_Flexor_Digiti_Minimi= {
    //AnyDrawRefFrame drw={RGB={0,1,1};ScaleXYZ={0.02,0.02,0.02};};
    sRel = ..Scale({0.009,..Carpals.LM5/2,0.0}); //guesstimate
  };
  AnyRefNode Via_Flexor_Digiti_Minimi= {
    //AnyDrawRefFrame drw={RGB={0,1,1};ScaleXYZ={0.02,0.02,0.02};};
    sRel = ..Scale({0.003,-..Carpals.LM5/2+0.014,-0.0045}); //guesstimate
  };

  AnyRefNode O_Palmar_Interosseous = {
    //AnyDrawRefFrame drw={RGB={0,1,1};};
    sRel = ..Scale({0.006,..Carpals.LM5/2,0.002}); //guesstimate
  };
  AnyRefNode Via_Palmar_Interosseous = {
    //AnyDrawRefFrame drw={RGB={0,1,1};};
    sRel = ..Scale({0.003,-..Carpals.LM5/2+0.012,0.003}); //guesstimate
  };
   AnyRefNode O_Lumbrical_Digit5 = {
    //AnyDrawRefFrame drw={RGB={0,1,1};};
    sRel = ..Scale({0.006,..Carpals.LM5/2,0}); //guesstimate
  };
  AnyRefNode V_Lumbrical_Digit5 = {
    //AnyDrawRefFrame drw={RGB={0,1,1};};
    sRel = ..Scale({0.003,-..Carpals.LM5/2+0.012,0.004}); //guesstimate
  };

  AnyRefNode DorsalInterosseous_Digit4 = {
    //AnyDrawRefFrame drw={RGB={0,1,1};};
    sRel = ..Scale({-0.008,..Carpals.LM5/2-0.01,0.002}); //guesstimate
  };

  AnyRefNode Messn = {
    //AnyDrawRefFrame drw={RGB={0,1,1};};
    sRel = ..Scale({0.0,0,0}); //guesstimate
  };

    AnyRefNode Gripfix5 = {
    #ifdef FINGERGRIPNODES
      #if FINGERGRIPNODES == 1
    AnyDrawNode drw={RGB={0,1,1}; ScaleXYZ={0.002,0.002,0.002};};
    AnyDrawRefFrame drwref={RGB={0,1,1};ScaleXYZ={0.02,0.02,0.02};};
    #endif
    #endif

    //sRel = ..Scaling.Scale({0.0,0.0,0.0}); //guesstimate
    //sRel ={0.01112113, -0.01955699, -0.007097496}; //Without SCaling!! Hantel1
    sRel ={0.004202407, 0.02040706, -0.002251505};//Without SCaling!!
  };

};//End Finger5MetaRef

Finger5ProximalRef ={

  AnyRefNode V_Extensor_Digiti_Minimi = {
    //AnyDrawRefFrame drw={RGB={0,1,1}; ScaleXYZ={0.02,0.02,0.02};};
    sRel = ..Scale({-0.0045,..SegmentLengthTable[4][1]/2-0.006,0.0}); //guesstimate
  };
  AnyRefNode V2_Extensor_Digiti_Minimi = {
    //AnyDrawRefFrame drw={RGB={0,1,1}; ScaleXYZ={0.02,0.02,0.02};};
    sRel = ..Scale({-0.0035,-..SegmentLengthTable[4][1]/2+0.01,0.0}); //guesstimate
  };


   AnyRefNode V_Extensor_Digitorum_Digit5 = {
    //AnyDrawRefFrame drw={RGB={0,1,1};ScaleXYZ={0.02,0.02,0.02};};
    sRel = ..Scale({-0.0045,..SegmentLengthTable[4][1]/2-0.005,0.0}); //guesstimate
  };

  AnyRefNode V2_Extensor_Digitorum_Digit5 = {
    //AnyDrawRefFrame drw={RGB={0,1,1};ScaleXYZ={0.02,0.02,0.02};};
    sRel = ..Scale({-0.0045,-..SegmentLengthTable[4][1]/2+0.01,0.0}); //guesstimate
  };
    AnyRefNode V4_Flexor_Digitorum_Superficialis_Digit5 = {
    //AnyDrawRefFrame drw={RGB={0,1,1};};
    sRel = ..Scale({0.004,-..SegmentLengthTable[4][1]/2+0.01,0.0}); //guesstimate
  };

  AnyRefNode V3_Flexor_Digitorum_Superficialis_Digit5 = {
    //AnyDrawRefFrame drw={RGB={0,1,1};};
    sRel = ..Scale({0.004,..SegmentLengthTable[4][1]/2-0.005,0.0}); //guesstimate
  };

  AnyRefNode Via_Flexor_Digitorum_Profundus_Digit5 = {
    //AnyDrawRefFrame drw={RGB={0,1,1};};
    sRel = ..Scale({0.004,..SegmentLengthTable[4][1]/2-0.005,0.0}); //guesstimate
  };
  AnyRefNode Via2_Flexor_Digitorum_Profundus_Digit5 = {
    //AnyDrawRefFrame drw={RGB={0,1,1};};
    sRel = ..Scale({0.003,-..SegmentLengthTable[4][1]/2+0.01,0.0}); //guesstimate
  };
  AnyRefNode Via_Abductor_Digiti_Minimi= {
    //AnyDrawRefFrame drw={RGB={0,1,1};ScaleXYZ={0.02,0.02,0.02};};
    sRel = ..Scale({-0.004,-..SegmentLengthTable[4][1]/2+0.009,0}); //guesstimate
  };
  AnyRefNode I_Flexor_Digiti_Minimi= {
    //AnyDrawRefFrame drw={RGB={0,1,1};ScaleXYZ={0.02,0.02,0.02};};
    sRel = ..Scale({0.00,..SegmentLengthTable[4][1]/2-0.004,-0.0055}); //guesstimate
  };
  AnyRefNode Via_Palmar_Interosseous = {
    //AnyDrawRefFrame drw={RGB={0,1,1};};
    sRel = ..Scale({-0.004,-..SegmentLengthTable[4][1]/2+0.009,0}); //guesstimate
  };
  AnyRefNode V_Lumbrical_Digit5 = {
    //AnyDrawRefFrame drw={RGB={0,1,1};};
    sRel = ..Scale({-0.004,-..SegmentLengthTable[4][1]/2+0.009,0}); //guesstimate
  };


};//End Finger5ProximalRef


Finger5MiddleRef ={

 AnyRefNode I_Extensor_Digiti_Minimi = {
    //AnyDrawRefFrame drw={RGB={0,1,1}; ScaleXYZ={0.02,0.02,0.02};};
    sRel = ..Scale({-0.003,-..SegmentLengthTable[4][2]/2+0.008,0.0}); //guesstimate
  };

 AnyRefNode I_Extensor_Digitorum_Digit5 = {
    //AnyDrawRefFrame drw={RGB={0,1,1};ScaleXYZ={0.02,0.02,0.02};};
    sRel = ..Scale({-0.003,-..SegmentLengthTable[4][2]/2+0.008,0.0}); //guesstimate
  };

  AnyRefNode Via_Flexor_Digitorum_Profundus_Digit5 = {
    //AnyDrawRefFrame drw={RGB={0,1,1};};
    sRel = ..Scale({0.002,..SegmentLengthTable[4][2]/2-0.004,0.0}); //guesstimate
  };
  AnyRefNode Via2_Flexor_Digitorum_Profundus_Digit5 = {
    //AnyDrawRefFrame drw={RGB={0,1,1};};
    sRel = ..Scale({0.002,-..SegmentLengthTable[4][2]/2+0.008,0.0}); //guesstimate
  };

  AnyRefNode I_Flexor_Digitorum_Superficialis_Digit5 = {
    //AnyDrawRefFrame drw={RGB={0,1,1}; ScaleXYZ={0.02,0.02,0.02};};
    sRel = ..Scale({0.0025,..SegmentLengthTable[4][2]/2-0.0045,0.0}); //guesstimate
  };

  AnyRefNode Via_Abductor_Digiti_Minimi= {
    //AnyDrawRefFrame drw={RGB={0,1,1};ScaleXYZ={0.02,0.02,0.02};};
    sRel = ..Scale({-0.003,-..SegmentLengthTable[4][2]/2+0.0055,0.000}); //guesstimate
  };
  AnyRefNode Via_Palmar_Interosseous = {
    //AnyDrawRefFrame drw={RGB={0,1,1};};
    sRel = ..Scale({-0.003,-..SegmentLengthTable[4][2]/2+0.0055,0}); //guesstimate
  };
  AnyRefNode V_Lumbrical_Digit5 = {
    //AnyDrawRefFrame drw={RGB={0,1,1};};
    sRel = ..Scale({-0.0035,-..SegmentLengthTable[4][2]/2+0.0055,0}); //guesstimate
  };

};//End Finger5MiddleRef


Finger5DistalRef ={

  AnyRefNode I_Flexor_Digitorum_Profundus_Digit5 = {
    //AnyDrawRefFrame drw={RGB={0,1,1};};
    sRel = ..Scale({0.002,-..SegmentLengthTable[4][3]/2+0.003,0.0}); //guesstimate
  };
  AnyRefNode I_Abductor_Digiti_Minimi= {
    //AnyDrawRefFrame drw={RGB={0,1,1};ScaleXYZ={0.02,0.02,0.02};};
    sRel = ..Scale({-0.002,-..SegmentLengthTable[4][3]/2+0.005,0.000}); //guesstimate
  };

  AnyRefNode I_Palmar_Interosseous = {
    //AnyDrawRefFrame drw={RGB={0,1,1};};
    sRel = ..Scale({-0.002,-..SegmentLengthTable[4][3]/2+0.003,0}); //guesstimate
  };
  AnyRefNode I_Lumbrical_Digit5 = {
    //AnyDrawRefFrame drw={RGB={0,1,1};};
    sRel = ..Scale({-0.002,-..SegmentLengthTable[4][3]/2+0.003,0}); //guesstimate
  };

};//End Finger5DistalRef
