AnySurfEllipsoid Jointsphere =
        {
          Radius = {0.0046, 0.005, 0.006};
		  #if SHOW_TORI == 1
          AnyDrawParamSurf drw = {
            RGB = {1, 1, 1};
            Opacity  =0.8;
          };
          #endif
        };
