 AnyRefNode TorusCenter2 = {
  viewRefFrame.Visible =Off;
  viewRefFrame.ScaleXYZ ={5.0, 5.0, 5.0} ;
  sRel = ..Scale*{-0.006,-0.002,0.0};
  ARel= RotMat((90*pi/180),x)*RotMat((10*pi/180),y);

  AnySurfTorus Torus =
  {

//    MajorRadius = 0.0097;
//    MinorRadius = 0.0028;
   MajorRadius = 0.004;
    MinorRadius = 0.002;
    #if SHOW_TORI == 1
    AnyDrawParamSurf drw = {
      RGB = {0.92, 1, 0.92};
      Opacity  =0.5;
    };
    #endif

  };
};
