AnySeg Torus ={
        r0=..DistalTorusNode.r;
        Mass = 0.0;
        Jii = {0.0, 0.0, 0.0};

        AnyRefNode TorusCenter = {
          viewRefFrame.Visible =Off;
          viewRefFrame.ScaleXYZ ={5.0, 5.0, 5.0} ;
          sRel = {0.05,0.05,0.0};
          ARel= RotMat((90*pi/180),y);

          AnySurfTorus Torus =
          {

            MajorRadius = 0.0082;
            MinorRadius = 0.0025;
            AnyDrawParamSurf drw = {
              RGB = {1, 1, 1};
              Opacity  =0.5;
            };

          };
        };

        AnyUniversalJoint Torus =
        {
          Axis1 =z;
          Axis2 =y;
          //Ref =1;
          AnyRefFrame &ref1 = ...DistalTorusNode;
          AnyRefFrame &ref2 = ..Torus.TorusCenter;

        };
        AnyKinEqSimpleDriver TorusDR = {
          DriverPos ={90*pi/180,90*pi/180};
          AnyVar Velo= 0;//..JointVel;
          DriverVel = {-Velo/2,0};
          AnyUniversalJoint &driver = .Torus;

        };

      };
