 AnyRefNode TorusCenter = {
          viewRefFrame.Visible =Off;
          viewRefFrame.ScaleXYZ ={5.0, 5.0, 5.0} ;
          sRel = {0.0,0.0,0.0};
          ARel= RotMat((90*pi/180),x);

          AnySurfTorus Torus =
          {

            MajorRadius = 0.0082;
            MinorRadius = 0.0025;
            AnyDrawParamSurf drw = {
              RGB = {1, 1, 1};
              Opacity  =0.5;
            };

          };
        };
