 AnyRefNode TorusCenter = {
  viewRefFrame.Visible =Off;
  viewRefFrame.ScaleXYZ ={5.0, 5.0, 5.0} ;
  sRel = {0.0,0.0,0.0};
  //AnyVar alpha=40+1*Main.Study.t;
  AnyVar alpha=30;

  ARel= RotMat((90*pi/180),x)*RotMat((alpha*pi/180),y);


  AnySurfTorus Torus =
  {

//    MajorRadius = 0.0097;
//    MinorRadius = 0.0028;
//   MajorRadius = 0.012;
//    MinorRadius = 0.0053;
  //MajorRadius = 0.016;
  //MinorRadius = 0.009;
     MajorRadius = 0.0125;
    MinorRadius = 0.0055;
    #if SHOW_TORI == 1
    AnyDrawParamSurf drw = {
      RGB = {0.92, 0.92, 1};
      Opacity  =0.3;
    };
    #endif

  };
};

//AnyRevoluteJoint torusturn =
//{
//  //RefFrames = ;
//  //Surfaces = ;
//  //KinMeasureArr = ;
//  //KinMeasureIndexArr = ;
//  //Axis = z;
//  //Ref = 0;
//  AnyRefFrame &torus = .TorusCenter;
//  AnyRefFrame &bone = ..DistalJointNode;
//};

//AnyKinEqInterPolDriver  MCP2={
//  AnyRevoluteJoint &ref=  .torusturn;
//  Data={Main.Model.ModelEnvironmentConnection.Drivers.Right.MCP2.Data}*pi/180;
//  T=..JntPos.Right.Finger2.FingerTime;
//  Type=Bspline;
//  CType = {Soft,Soft};
//  Reaction.Type={Off,Off};
//};
