 AnyRefNode TorusCenter = {
  viewRefFrame.Visible =Off;
  viewRefFrame.ScaleXYZ ={5.0, 5.0, 5.0} ;
  sRel = {0.0,0.0,0.0};
  ARel= RotMat((90*pi/180),x)*RotMat((-15*pi/180),y);

  AnySurfTorus Torus =
  {

    MajorRadius = 0.0072;
    MinorRadius = 0.0019;
    #if SHOW_TORI == 1
    AnyDrawParamSurf drw = {
      RGB = {1, 1, 1};
      Opacity  =0.5;
    };
    #endif

  };
};
