 AnyRefNode TorusCenter = {
  viewRefFrame.Visible =Off;
  viewRefFrame.ScaleXYZ ={5.0, 5.0, 5.0} ;
  sRel = ..Scale({0,0.0,0.0});
  ARel= RotMat((90*pi/180),x);

  AnySurfTorus Torus = {
    MajorRadius = 0.006;
    MinorRadius = 0.005;
    #if SHOW_HAND_WRAP_EX == ON
    AnyDrawParamSurf drw = {
      RGB = {0.92, 0.92, 0};
      Opacity  =0.3;
      WireFrameOnOff = On;
    };
    #endif
  };
};
