 AnyRefNode TorusCenter = {
  viewRefFrame.Visible =Off;
  viewRefFrame.ScaleXYZ ={5.0, 5.0, 5.0} ;
  sRel = ..Scale({-0.00,0.00,0.00});
  ARel= RotMat((90*pi/180),x)*RotMat((10*pi/180),y);
  AnySurfTorus Torus =
  {
    MajorRadius = 0.0055;
    MinorRadius = 0.0019;
    #if SHOW_HAND_WRAP_EX == ON
    AnyDrawParamSurf drw = {
      RGB = {1, 1, 1};
      Opacity  =0.5;
    };
    #endif
  };
};
