 AnyRefNode TorusCenter = {
  viewRefFrame.Visible =Off;
  viewRefFrame.ScaleXYZ ={5.0, 5.0, 5.0} ;
  sRel = .Scale({0.0,0.01,-0.0});
  ARel= RotMat((90*pi/180),x)*RotMat((0*pi/180),y);

  AnySurfTorus Torus = {
    MajorRadius = 0.029; //29
    MinorRadius = 0.012;  //16
    #if SHOW_HAND_WRAP_EX == ON
    AnyDrawParamSurf drw = {
      RGB = {1, 1, 1};
      Opacity  =0.5;
      WireFrameOnOff = On;
    };
    #endif
  };
};
