Finger1MetaRef = {

  AnyFolder &Data = .ModelParameters.MuscleNodes.Finger1.Metacarpal;
  AnyMat33 Mirror ={{1,0,0},{0,1,0},{0,0,...Sign}};

  #if RUHM_DETAILED_MODEL == ON
  AnyRefNode I_Abductor_Pollicis_Longus_1                = {sRel = ..Scale(.Data.I_Abductor_Pollicis_Longus_pos_1*.Mirror);};
  AnyRefNode I_Abductor_Pollicis_Longus_2                = {sRel = ..Scale(.Data.I_Abductor_Pollicis_Longus_pos_2*.Mirror);};  //guesstimate
  AnyRefNode I_Abductor_Pollicis_Longus_3                = {sRel = ..Scale(.Data.I_Abductor_Pollicis_Longus_pos_3*.Mirror);};  //guesstimate
  AnyRefNode I_Abductor_Pollicis_Longus_4                = {sRel = ..Scale(.Data.I_Abductor_Pollicis_Longus_pos_4*.Mirror);};  //guesstimate
  AnyRefNode I_Abductor_Pollicis_Longus_5                = {sRel = ..Scale(.Data.I_Abductor_Pollicis_Longus_pos_5*.Mirror);};  //guesstimate
  AnyRefNode I_Abductor_Pollicis_Longus_6                = {sRel = ..Scale(.Data.I_Abductor_Pollicis_Longus_pos_6*.Mirror);};  //guesstimate
  AnyRefNode I_Abductor_Pollicis_Longus_7                = {sRel = ..Scale(.Data.I_Abductor_Pollicis_Longus_pos_7*.Mirror);};  //guesstimate
  AnyRefNode I_Abductor_Pollicis_Longus_8                = {sRel = ..Scale(.Data.I_Abductor_Pollicis_Longus_pos_8*.Mirror);};  //guesstimate
  #else
  AnyRefNode I_Abductor_Pollicis_Longus_1                = {sRel = ..Scale(.Data.I_Abductor_Pollicis_Longus_pos_1*.Mirror);};
  #endif

  AnyRefNode I_Extensor_Pollicis_Brevis               = {sRel = ..Scale(.Data.I_Extensor_Pollicis_Brevis_pos*.Mirror);}; //guesstimate
  AnyRefNode Via1_Extensor_Pollicis_Brevis            = {sRel = ..Scale(.Data.Via1_Extensor_Pollicis_Brevis_pos*.Mirror);};//guesstimate
  AnyRefNode Via1_Extensor_Pollicis_Longus            = {sRel = ..Scale(.Data.Via1_Extensor_Pollicis_Longus_pos*.Mirror);};  //guesstimate
  AnyRefNode Via2_Extensor_Pollicis_Longus            = {sRel = ..Scale(.Data.Via2_Extensor_Pollicis_Longus_pos*.Mirror);}; //guesstimate
  AnyRefNode Via_Flexor_Pollicis_Longus               = {sRel = ..Scale(.Data.Via_Flexor_Pollicis_Longus_pos*.Mirror); //guesstimate
                                                         ARel = RotMat(-....Sign*pi/2,x)*RotMat(-....Sign*pi/2,y);};   // used for the SPLine.InitWrapPosVectors
  AnyRefNode Via2_Flexor_Pollicis_Longus              = {sRel = ..Scale(.Data.Via2_Flexor_Pollicis_Longus_pos*.Mirror);};  //guesstimate
  AnyRefNode O_DorsalInterosseous_Digit2              = {sRel = ..Scale(.Data.O_DorsalInterosseous_Digit2_pos*.Mirror);};  //guesstimate
  AnyRefNode Via_Abductor_Pollicis_Brevis             = {sRel = ..Scale(.Data.Via_Abductor_Pollicis_Brevis_pos*.Mirror);}; //guesstimate -0.002, 0.015, 0.011
  AnyRefNode I_Abductor_Pollicis_Brevis               = {sRel = ..Scale(.Data.I_Abductor_Pollicis_Brevis_pos*.Mirror);}; //guesstimate
  AnyRefNode I_Abductor_Pollicis                      = {sRel = ..Scale(.Data.I_Abductor_Pollicis_pos*.Mirror);}; //guesstimate
  AnyRefNode I_Flexor_Pollicis_Brevis                 = {sRel = ..Scale(.Data.I_Flexor_Pollicis_Brevis_pos*.Mirror);};//guesstimate

  AnyRefNode I_Opponens_Pollicis_1                    = {sRel = ..Scale(.Data.I_Opponens_Pollicis_pos_1*.Mirror);}; //guesstimate
  AnyRefNode I_Opponens_Pollicis_2                    = {sRel = ..Scale(.Data.I_Opponens_Pollicis_pos_2*.Mirror);};
  AnyRefNode I_Opponens_Pollicis_3                    = {sRel = ..Scale(.Data.I_Opponens_Pollicis_pos_3*.Mirror);};
  AnyRefNode I_Opponens_Pollicis_4                    = {sRel = ..Scale(.Data.I_Opponens_Pollicis_pos_4*.Mirror);};

  AnyRefNode Via_Opponens_Pollicis_pos_1              = {sRel = ..Scale(.Data.Via_Opponens_Pollicis_pos_1*.Mirror);};
  AnyRefNode Via_Opponens_Pollicis_pos_2              = {sRel = ..Scale(.Data.Via_Opponens_Pollicis_pos_2*.Mirror);};
  AnyRefNode Via_Opponens_Pollicis_pos_3              = {sRel = ..Scale(.Data.Via_Opponens_Pollicis_pos_3*.Mirror);};
  AnyRefNode Via_Opponens_Pollicis_pos_4              = {sRel = ..Scale(.Data.Via_Opponens_Pollicis_pos_4*.Mirror);};

  AnyRefNode Via_Flexor_Pollicis_Brevis_Caput_Profundum            = {sRel = ..Scale(.Data.Via_Flexor_Pollicis_Brevis_Caput_Profundum*.Mirror);};
  AnyRefNode Via_Flexor_Pollicis_Brevis_Caput_Superficiale_1       = {sRel = ..Scale(.Data.Via_Flexor_Pollicis_Brevis_Caput_Superficiale_1*.Mirror);};
  AnyRefNode Via_Flexor_Pollicis_Brevis_Caput_Superficiale_2       = {sRel = ..Scale(.Data.Via_Flexor_Pollicis_Brevis_Caput_Superficiale_2*.Mirror);};

  AnyRefNode Via_Abductor_Pollicis_Brevis_1            = {sRel = ..Scale(.Data.Via_Abductor_Pollicis_Brevis_1*.Mirror);};
  AnyRefNode Via_Abductor_Pollicis_Brevis_2            = {sRel = ..Scale(.Data.Via_Abductor_Pollicis_Brevis_2*.Mirror);};
  AnyRefNode Via_Abductor_Pollicis_Brevis_3            = {sRel = ..Scale(.Data.Via_Abductor_Pollicis_Brevis_3*.Mirror);};
  AnyRefNode Via_Abductor_Pollicis_Brevis_4            = {sRel = ..Scale(.Data.Via_Abductor_Pollicis_Brevis_4*.Mirror);};
  AnyRefNode Via_Abductor_Pollicis_Brevis_5            = {sRel = ..Scale(.Data.Via_Abductor_Pollicis_Brevis_5*.Mirror);};

  AnyRefNode O_Interossei_I_Dorsales_Finger1_1         = {sRel = ..Scale(.Data.O_Interossei_I_Dorsales_Finger1_1*.Mirror);};
  AnyRefNode O_Interossei_I_Dorsales_Finger1_2         = {sRel = ..Scale(.Data.O_Interossei_I_Dorsales_Finger1_2*.Mirror);};

  AnyRefNode Via_Interossei_I_Dorsales_Finger1_1       = {sRel = ..Scale(.Data.Via_Interossei_I_Dorsales_Finger1_1*.Mirror);};
  AnyRefNode Via_Interossei_I_Dorsales_Finger1_2       = {sRel = ..Scale(.Data.Via_Interossei_I_Dorsales_Finger1_2*.Mirror);};

  #if RUHM_DETAILED_MODEL == ON
  AnyRefNode Via3_Flexor_Pollicis_Longus_1              = {sRel = ..Scale(.Data.Via3_Flexor_Pollicis_Longus_1*.Mirror);};
  AnyRefNode Via3_Flexor_Pollicis_Longus_2              = {sRel = ..Scale(.Data.Via3_Flexor_Pollicis_Longus_2*.Mirror);};
  AnyRefNode Via3_Flexor_Pollicis_Longus_3              = {sRel = ..Scale(.Data.Via3_Flexor_Pollicis_Longus_3*.Mirror);};
  AnyRefNode Via3_Flexor_Pollicis_Longus_4              = {sRel = ..Scale(.Data.Via3_Flexor_Pollicis_Longus_4*.Mirror);};
  AnyRefNode Via3_Flexor_Pollicis_Longus_5              = {sRel = ..Scale(.Data.Via3_Flexor_Pollicis_Longus_5*.Mirror);};
  AnyRefNode Via3_Flexor_Pollicis_Longus_6              = {sRel = ..Scale(.Data.Via3_Flexor_Pollicis_Longus_6*.Mirror);};
  AnyRefNode Via3_Flexor_Pollicis_Longus_7              = {sRel = ..Scale(.Data.Via3_Flexor_Pollicis_Longus_7*.Mirror);};
  AnyRefNode Via3_Flexor_Pollicis_Longus_8              = {sRel = ..Scale(.Data.Via3_Flexor_Pollicis_Longus_8*.Mirror);};
  AnyRefNode Via3_Flexor_Pollicis_Longus_9              = {sRel = ..Scale(.Data.Via3_Flexor_Pollicis_Longus_9*.Mirror);};
  AnyRefNode Via3_Flexor_Pollicis_Longus_10              = {sRel = ..Scale(.Data.Via3_Flexor_Pollicis_Longus_10*.Mirror);};
  AnyRefNode Via3_Flexor_Pollicis_Longus_11              = {sRel = ..Scale(.Data.Via3_Flexor_Pollicis_Longus_11*.Mirror);};
  AnyRefNode Via3_Flexor_Pollicis_Longus_12              = {sRel = ..Scale(.Data.Via3_Flexor_Pollicis_Longus_12*.Mirror);};
  AnyRefNode Via3_Flexor_Pollicis_Longus_13              = {sRel = ..Scale(.Data.Via3_Flexor_Pollicis_Longus_13*.Mirror);};
  #else
  AnyRefNode Via3_Flexor_Pollicis_Longus_1              = {sRel = ..Scale(.Data.Via3_Flexor_Pollicis_Longus_1*.Mirror);};
  #endif

  #if RUHM_DETAILED_MODEL == ON
  AnyRefNode Via4_Flexor_Pollicis_Longus_1              = {sRel = ..Scale(.Data.Via4_Flexor_Pollicis_Longus_1*.Mirror);};
  AnyRefNode Via4_Flexor_Pollicis_Longus_2              = {sRel = ..Scale(.Data.Via4_Flexor_Pollicis_Longus_2*.Mirror);};
  AnyRefNode Via4_Flexor_Pollicis_Longus_3              = {sRel = ..Scale(.Data.Via4_Flexor_Pollicis_Longus_3*.Mirror);};
  AnyRefNode Via4_Flexor_Pollicis_Longus_4              = {sRel = ..Scale(.Data.Via4_Flexor_Pollicis_Longus_4*.Mirror);};
  AnyRefNode Via4_Flexor_Pollicis_Longus_5              = {sRel = ..Scale(.Data.Via4_Flexor_Pollicis_Longus_5*.Mirror);};
  AnyRefNode Via4_Flexor_Pollicis_Longus_6              = {sRel = ..Scale(.Data.Via4_Flexor_Pollicis_Longus_6*.Mirror);};
  AnyRefNode Via4_Flexor_Pollicis_Longus_7              = {sRel = ..Scale(.Data.Via4_Flexor_Pollicis_Longus_7*.Mirror);};
  AnyRefNode Via4_Flexor_Pollicis_Longus_8              = {sRel = ..Scale(.Data.Via4_Flexor_Pollicis_Longus_8*.Mirror);};
  AnyRefNode Via4_Flexor_Pollicis_Longus_9              = {sRel = ..Scale(.Data.Via4_Flexor_Pollicis_Longus_9*.Mirror);};
  AnyRefNode Via4_Flexor_Pollicis_Longus_10              = {sRel = ..Scale(.Data.Via4_Flexor_Pollicis_Longus_10*.Mirror);};
  AnyRefNode Via4_Flexor_Pollicis_Longus_11              = {sRel = ..Scale(.Data.Via4_Flexor_Pollicis_Longus_11*.Mirror);};
  AnyRefNode Via4_Flexor_Pollicis_Longus_12              = {sRel = ..Scale(.Data.Via4_Flexor_Pollicis_Longus_12*.Mirror);};
  AnyRefNode Via4_Flexor_Pollicis_Longus_13              = {sRel = ..Scale(.Data.Via4_Flexor_Pollicis_Longus_13*.Mirror);};
  #else
  AnyRefNode Via4_Flexor_Pollicis_Longus_1              = {sRel = ..Scale(.Data.Via4_Flexor_Pollicis_Longus_1*.Mirror);};
  #endif

  #if RUHM_DETAILED_MODEL == ON
  AnyRefNode Via1_Extensor_Pollicis_Longus_1            = {sRel = ..Scale(.Data.Via1_Extensor_Pollicis_Longus_1*.Mirror);};
  AnyRefNode Via1_Extensor_Pollicis_Longus_2            = {sRel = ..Scale(.Data.Via1_Extensor_Pollicis_Longus_2*.Mirror);};
  AnyRefNode Via1_Extensor_Pollicis_Longus_3            = {sRel = ..Scale(.Data.Via1_Extensor_Pollicis_Longus_3*.Mirror);};
  AnyRefNode Via1_Extensor_Pollicis_Longus_4            = {sRel = ..Scale(.Data.Via1_Extensor_Pollicis_Longus_4*.Mirror);};
  #else
  AnyRefNode Via1_Extensor_Pollicis_Longus_1            = {sRel = ..Scale(.Data.Via1_Extensor_Pollicis_Longus_1*.Mirror);};
  #endif

   AnyRefNode JointCyl={
    sRel={-0.001,-0.022,-0.01};
    ARel=RotMat(pi*0,y);
    AnySurfCylinder cyl={
      Radius=0.006;
      Length=0.02;
      #if SHOW_HAND_WRAP_EX == ON
      AnyDrawParamSurf surf={
        Opacity = 0.3;
        WireFrameOnOff = On;
        RGB={0,1,0};
      };
      #endif
    };
  };

};//End Finger1MetaRef

Finger1ProximalRef ={

  AnyFolder &Data = .ModelParameters.MuscleNodes.Finger1.Proximal;

  AnyRefNode Via3_Extensor_Pollicis_Longus            = {sRel = ..Scale(.Data.Via3_Extensor_Pollicis_Longus_pos*..Mirror);};//guesstimate
  AnyRefNode Via3_Flexor_Pollicis_Longus              = {sRel = ..Scale(.Data.Via3_Flexor_Pollicis_Longus_pos*..Mirror);};//guesstimate
  AnyRefNode I_Adductor_Pollicis_Caput_Transversum_1  = {sRel = ..Scale(.Data.I_Adductor_Pollicis_Caput_Transversum_1*..Mirror);};
  AnyRefNode I_Adductor_Pollicis_Caput_Transversum_2  = {sRel = ..Scale(.Data.I_Adductor_Pollicis_Caput_Transversum_2*..Mirror);};
  AnyRefNode I_Adductor_Pollicis_Caput_Transversum_3  = {sRel = ..Scale(.Data.I_Adductor_Pollicis_Caput_Transversum_3*..Mirror);};
  AnyRefNode I_Adductor_Pollicis_Caput_Transversum_4  = {sRel = ..Scale(.Data.I_Adductor_Pollicis_Caput_Transversum_4*..Mirror);};

  AnyRefNode I_Adductor_Pollicis_Caput_Obliquum_1     = {sRel = ..Scale(.Data.I_Adductor_Pollicis_Caput_Obliquum_1*..Mirror);};
  AnyRefNode I_Adductor_Pollicis_Caput_Obliquum_2     = {sRel = ..Scale(.Data.I_Adductor_Pollicis_Caput_Obliquum_2*..Mirror);};
  AnyRefNode I_Adductor_Pollicis_Caput_Obliquum_3     = {sRel = ..Scale(.Data.I_Adductor_Pollicis_Caput_Obliquum_3*..Mirror);};

  AnyRefNode I_Flexor_Pollicis_Brevis_Caput_Profundum       = {sRel = ..Scale(.Data.I_Flexor_Pollicis_Brevis_Caput_Profundum*..Mirror);};
  AnyRefNode I_Flexor_Pollicis_Brevis_Caput_Superficiale_1  = {sRel = ..Scale(.Data.I_Flexor_Pollicis_Brevis_Caput_Superficiale_1*..Mirror);};
  AnyRefNode I_Flexor_Pollicis_Brevis_Caput_Superficiale_2  = {sRel = ..Scale(.Data.I_Flexor_Pollicis_Brevis_Caput_Superficiale_2*..Mirror);};

  AnyRefNode I_Abductor_Pollicis_Brevis_1  = {sRel = ..Scale(.Data.I_Abductor_Pollicis_Brevis_1*..Mirror);};
  AnyRefNode I_Abductor_Pollicis_Brevis_2  = {sRel = ..Scale(.Data.I_Abductor_Pollicis_Brevis_2*..Mirror);};
  AnyRefNode I_Abductor_Pollicis_Brevis_3  = {sRel = ..Scale(.Data.I_Abductor_Pollicis_Brevis_3*..Mirror);};
  AnyRefNode I_Abductor_Pollicis_Brevis_4  = {sRel = ..Scale(.Data.I_Abductor_Pollicis_Brevis_4*..Mirror);};
  AnyRefNode I_Abductor_Pollicis_Brevis_5  = {sRel = ..Scale(.Data.I_Abductor_Pollicis_Brevis_5*..Mirror);};

  #if RUHM_DETAILED_MODEL == ON
  AnyRefNode I_Extensor_Pollicis_Brevis_1  = {sRel = ..Scale(.Data.I_Extensor_Pollicis_Brevis_1*..Mirror);};
  AnyRefNode I_Extensor_Pollicis_Brevis_2  = {sRel = ..Scale(.Data.I_Extensor_Pollicis_Brevis_2*..Mirror);};
  #else
  AnyRefNode I_Extensor_Pollicis_Brevis_1  = {sRel = ..Scale(.Data.I_Extensor_Pollicis_Brevis_1*..Mirror);};
  #endif

  #if RUHM_DETAILED_MODEL == ON
  AnyRefNode Via2_Flexor_Pollicis_Longus_1              = {sRel = ..Scale(.Data.Via2_Flexor_Pollicis_Longus_1*..Mirror);};
  AnyRefNode Via2_Flexor_Pollicis_Longus_2              = {sRel = ..Scale(.Data.Via2_Flexor_Pollicis_Longus_2*..Mirror);};
  AnyRefNode Via2_Flexor_Pollicis_Longus_3              = {sRel = ..Scale(.Data.Via2_Flexor_Pollicis_Longus_3*..Mirror);};
  AnyRefNode Via2_Flexor_Pollicis_Longus_4              = {sRel = ..Scale(.Data.Via2_Flexor_Pollicis_Longus_4*..Mirror);};
  AnyRefNode Via2_Flexor_Pollicis_Longus_5              = {sRel = ..Scale(.Data.Via2_Flexor_Pollicis_Longus_5*..Mirror);};
  AnyRefNode Via2_Flexor_Pollicis_Longus_6              = {sRel = ..Scale(.Data.Via2_Flexor_Pollicis_Longus_6*..Mirror);};
  AnyRefNode Via2_Flexor_Pollicis_Longus_7              = {sRel = ..Scale(.Data.Via2_Flexor_Pollicis_Longus_7*..Mirror);};
  AnyRefNode Via2_Flexor_Pollicis_Longus_8              = {sRel = ..Scale(.Data.Via2_Flexor_Pollicis_Longus_8*..Mirror);};
  AnyRefNode Via2_Flexor_Pollicis_Longus_9              = {sRel = ..Scale(.Data.Via2_Flexor_Pollicis_Longus_9*..Mirror);};
  AnyRefNode Via2_Flexor_Pollicis_Longus_10              = {sRel = ..Scale(.Data.Via2_Flexor_Pollicis_Longus_10*..Mirror);};
  AnyRefNode Via2_Flexor_Pollicis_Longus_11              = {sRel = ..Scale(.Data.Via2_Flexor_Pollicis_Longus_11*..Mirror);};
  AnyRefNode Via2_Flexor_Pollicis_Longus_12              = {sRel = ..Scale(.Data.Via2_Flexor_Pollicis_Longus_12*..Mirror);};
  AnyRefNode Via2_Flexor_Pollicis_Longus_13              = {sRel = ..Scale(.Data.Via2_Flexor_Pollicis_Longus_13*..Mirror);};
  #else
  AnyRefNode Via2_Flexor_Pollicis_Longus_1              = {sRel = ..Scale(.Data.Via2_Flexor_Pollicis_Longus_1*..Mirror);};
  #endif

  #if RUHM_DETAILED_MODEL == ON
  AnyRefNode Via_Extensor_Pollicis_Longus_1            = {sRel = ..Scale(.Data.Via_Extensor_Pollicis_Longus_1*..Mirror);};
  AnyRefNode Via_Extensor_Pollicis_Longus_2            = {sRel = ..Scale(.Data.Via_Extensor_Pollicis_Longus_2*..Mirror);};
  AnyRefNode Via_Extensor_Pollicis_Longus_3            = {sRel = ..Scale(.Data.Via_Extensor_Pollicis_Longus_3*..Mirror);};
  AnyRefNode Via_Extensor_Pollicis_Longus_4            = {sRel = ..Scale(.Data.Via_Extensor_Pollicis_Longus_4*..Mirror);};
  #else
  AnyRefNode Via_Extensor_Pollicis_Longus_1            = {sRel = ..Scale(.Data.Via_Extensor_Pollicis_Longus_1*..Mirror);};
  #endif

  AnyRefNode JointCyl={
    sRel={-0.0025,-0.013,-0.01};
    ARel=RotMat(pi*0,y);
    AnySurfCylinder cyl={
      Radius=0.0020;
      Length=0.02;
      #if SHOW_HAND_WRAP_EX == ON
      AnyDrawParamSurf surf={
      Opacity = 0.3;
      WireFrameOnOff = On;
      RGB={0,1,0};
      };
      #endif
    };
        AnySurfCylinder cyl_FPL={
      Radius=0.0060;
      Length=0.02;
      #if SHOW_HAND_WRAP_EX == ON
      AnyDrawParamSurf surf={
      Opacity = 0.3;
      WireFrameOnOff = On;
      RGB={0,1,0};
      };
      #endif
    };
  };

};//End Finger1ProximalRef

Finger1DistalRef ={

  AnyFolder &Data = .ModelParameters.MuscleNodes.Finger1.Distal;

  AnyRefNode I_Extensor_Pollicis_Longus              = {sRel = ..Scale(.Data.I_Extensor_Pollicis_Longus_pos*..Mirror);}; //guesstimate
  AnyRefNode I_Flexor_Pollicis_Longus                = {sRel = ..Scale(.Data.I_Flexor_Pollicis_Longus_pos*..Mirror);}; //guesstimate

  #if RUHM_DETAILED_MODEL == ON
  AnyRefNode I_Extensor_Pollicis_Longus_1            = {sRel = ..Scale(.Data.I_Extensor_Pollicis_Longus_1*..Mirror);};
  AnyRefNode I_Extensor_Pollicis_Longus_2            = {sRel = ..Scale(.Data.I_Extensor_Pollicis_Longus_2*..Mirror);};
  AnyRefNode I_Extensor_Pollicis_Longus_3            = {sRel = ..Scale(.Data.I_Extensor_Pollicis_Longus_3*..Mirror);};
  AnyRefNode I_Extensor_Pollicis_Longus_4            = {sRel = ..Scale(.Data.I_Extensor_Pollicis_Longus_4*..Mirror);};
  #else
  AnyRefNode I_Extensor_Pollicis_Longus_1            = {sRel = ..Scale(.Data.I_Extensor_Pollicis_Longus_1*..Mirror);};
  #endif

  #if RUHM_DETAILED_MODEL == ON
  AnyRefNode I_Flexor_Pollicis_Longus_1              = {sRel = ..Scale(.Data.I_Flexor_Pollicis_Longus_1*..Mirror);};
  AnyRefNode I_Flexor_Pollicis_Longus_2              = {sRel = ..Scale(.Data.I_Flexor_Pollicis_Longus_2*..Mirror);};
  AnyRefNode I_Flexor_Pollicis_Longus_3              = {sRel = ..Scale(.Data.I_Flexor_Pollicis_Longus_3*..Mirror);};
  AnyRefNode I_Flexor_Pollicis_Longus_4              = {sRel = ..Scale(.Data.I_Flexor_Pollicis_Longus_4*..Mirror);};
  AnyRefNode I_Flexor_Pollicis_Longus_5              = {sRel = ..Scale(.Data.I_Flexor_Pollicis_Longus_5*..Mirror);};
  AnyRefNode I_Flexor_Pollicis_Longus_6              = {sRel = ..Scale(.Data.I_Flexor_Pollicis_Longus_6*..Mirror);};
  AnyRefNode I_Flexor_Pollicis_Longus_7              = {sRel = ..Scale(.Data.I_Flexor_Pollicis_Longus_7*..Mirror);};
  AnyRefNode I_Flexor_Pollicis_Longus_8              = {sRel = ..Scale(.Data.I_Flexor_Pollicis_Longus_8*..Mirror);};
  AnyRefNode I_Flexor_Pollicis_Longus_9              = {sRel = ..Scale(.Data.I_Flexor_Pollicis_Longus_9*..Mirror);};
  AnyRefNode I_Flexor_Pollicis_Longus_10              = {sRel = ..Scale(.Data.I_Flexor_Pollicis_Longus_10*..Mirror);};
  AnyRefNode I_Flexor_Pollicis_Longus_11              = {sRel = ..Scale(.Data.I_Flexor_Pollicis_Longus_11*..Mirror);};
  AnyRefNode I_Flexor_Pollicis_Longus_12              = {sRel = ..Scale(.Data.I_Flexor_Pollicis_Longus_12*..Mirror);};
  AnyRefNode I_Flexor_Pollicis_Longus_13              = {sRel = ..Scale(.Data.I_Flexor_Pollicis_Longus_13*..Mirror);};
  #else
  AnyRefNode I_Flexor_Pollicis_Longus_1              = {sRel = ..Scale(.Data.I_Flexor_Pollicis_Longus_1*..Mirror);};
  #endif

//  AnyRefNode JointCyl={
//    sRel={0.005,0.012,-0.01};
//    ARel=RotMat(pi*0,y);
//    AnySurfCylinder cyl={
//      Radius=0.0040;
//      Length=0.02;
//      #if SHOW_HAND_WRAP_EX == ON
//      AnyDrawParamSurf surf={
//      Opacity = 0.3;
//      WireFrameOnOff = On;
//      RGB={0,1,0};
//      };
//      #endif
//    };
//  };
};//End Finger1DistalRef
