//Datapoints for the Fingers delivered by An et.al 1979


AnyFolder DIP2 = {
  AnyFolder &Data = .ModelParameters.MuscleNodes.Finger2.DIP;
  //Muscle Tendon aligns
  AnyFolder ProximalPoint = {
    AnyFloat TE = .Data.ProximalPoint.TE_pos;
    AnyFloat FP = .Data.ProximalPoint.FP_pos;

  };

  AnyFolder DistalPoint={
    AnyFloat TE = .Data.DistalPoint.TE_pos;
    AnyFloat FP = .Data.DistalPoint.FP_pos;
  };


};


AnyFolder PIP2 = {
  AnyFolder &Data = .ModelParameters.MuscleNodes.Finger2.PIP;
  //Muscle Tendon aligns
  AnyFolder ProximalPoint = {
    AnyFloat FP= .Data.ProximalPoint.FP_pos;
    AnyFloat RB= .Data.ProximalPoint.RB_pos;
    AnyFloat UB= .Data.ProximalPoint.UB_pos;
    AnyFloat FS= .Data.ProximalPoint.FS_pos;
    AnyFloat ES= .Data.ProximalPoint.ES_pos;

  };

  AnyFolder DistalPoint={
    AnyFloat FP= .Data.DistalPoint.FP_pos;
    AnyFloat RB= .Data.DistalPoint.RB_pos;
    AnyFloat UB= .Data.DistalPoint.UB_pos;
    AnyFloat FS= .Data.DistalPoint.FS_pos;
    AnyFloat ES= .Data.DistalPoint.ES_pos;

  };


};


AnyFolder MP2 = {
  AnyFolder &Data = .ModelParameters.MuscleNodes.Finger2.MP;
  //Muscle Tendon aligns
  AnyFolder ProximalPoint = {
    AnyFloat FP= .Data.ProximalPoint.FP_pos;
    AnyFloat FS= .Data.ProximalPoint.FS_pos;
    AnyFloat RI= .Data.ProximalPoint.RI_pos;
    AnyFloat LU= .Data.ProximalPoint.LU_pos;
    AnyFloat UI= .Data.ProximalPoint.UI_pos;
    AnyFloat LE= .Data.ProximalPoint.LE_pos;

  };

  AnyFolder DistalPoint={
    AnyFloat FP= .Data.DistalPoint.FP_pos;
    AnyFloat FS= .Data.DistalPoint.FS_pos;
    AnyFloat RI= .Data.DistalPoint.RI_pos;
    AnyFloat LU= .Data.DistalPoint.LU_pos;
    AnyFloat UI= .Data.DistalPoint.UI_pos;
    AnyFloat LE= .Data.DistalPoint.LE_pos;

  };


};
