Finger3MetaRef={

  AnyFolder &Data = .ModelParameters.MuscleNodes.Finger3.Metacarpal;

  AnyRefNode Via_Extensor_Carpi_Radialis_Brevis               = {sRel = ..Scale(.Data.Via_Extensor_Carpi_Radialis_Brevis_pos)*..Mirror;}; //guesstimate
  AnyRefNode I_Extensor_Carpi_Radialis_Brevis                 = {sRel = ..Scale(.Data.I_Extensor_Carpi_Radialis_Brevis_pos)*..Mirror;}; //guesstimate
  AnyRefNode Via_Flexor_Digitorum_Superficialis_Digit3        = {sRel = ..Scale(.Data.Via_Flexor_Digitorum_Superficialis_Digit3_pos)*..Mirror; //guesstimate
                                                                 ARel = RotMat(-....Sign*pi/2,x)*RotMat(-....Sign*pi/2,y);};  // used for the SPLine.InitWrapPosVectors
  AnyRefNode V2_Flexor_Digitorum_Superficialis_Digit3         = {sRel = ..Scale(.Data.V2_Flexor_Digitorum_Superficialis_Digit3_pos)*..Mirror;}; //guesstimate
  AnyRefNode Via_Flexor_Digitorum_Profundus_Digit3            = {sRel = ..Scale(.Data.Via_Flexor_Digitorum_Profundus_Digit3_pos)*..Mirror; //guesstimate
                                                                 ARel = RotMat(-....Sign*pi/2,x)*RotMat(-....Sign*pi/2,y);};  // used for the SPLine.InitWrapPosVectors
  AnyRefNode V2_Flexor_Digitorum_Profundus_Digit3             = {sRel = ..Scale(.Data.V2_Flexor_Digitorum_Profundus_Digit3_pos)*..Mirror;}; //guesstimate
  AnyRefNode Via_Extensor_Digitorum_Digit3                    = {sRel = ..Scale(.Data.Via_Extensor_Digitorum_Digit3_pos)*..Mirror;}; //guesstimate
  AnyRefNode O_DorsalInterosseous_Digit3                      = {sRel = ..Scale(.Data.O_DorsalInterosseous_Digit3_pos)*..Mirror;}; //guesstimate
  AnyRefNode V_DorsalInterosseous_Digit3                      = {sRel = ..Scale(.Data.V_DorsalInterosseous_Digit3_pos)*..Mirror;}; //guesstimate
  AnyRefNode O_DorsalInterosseous_Digit31                     = {sRel = ..Scale(.Data.O_DorsalInterosseous_Digit31_pos)*..Mirror;}; //guesstimate
  AnyRefNode V_DorsalInterosseous_Digit31                     = {sRel = ..Scale(.Data.V_DorsalInterosseous_Digit31_pos)*..Mirror;}; //guesstimate

  AnyRefNode O_Adductor_Pollicis_Caput_Transversum_1          = {sRel = ..Scale(.Data.O_Adductor_Pollicis_Caput_Transversum_1)*..Mirror;};
  AnyRefNode O_Adductor_Pollicis_Caput_Transversum_2          = {sRel = ..Scale(.Data.O_Adductor_Pollicis_Caput_Transversum_2)*..Mirror;};
  AnyRefNode O_Adductor_Pollicis_Caput_Transversum_3          = {sRel = ..Scale(.Data.O_Adductor_Pollicis_Caput_Transversum_3)*..Mirror;};
  AnyRefNode O_Adductor_Pollicis_Caput_Transversum_4          = {sRel = ..Scale(.Data.O_Adductor_Pollicis_Caput_Transversum_4)*..Mirror;};

  AnyRefNode Via_Interossei_II_Dorsales_Finger2_1             = {sRel = ..Scale(.Data.Via_Interossei_II_Dorsales_Finger2_1)*..Mirror;};
  AnyRefNode Via_Interossei_II_Dorsales_Finger2_2             = {sRel = ..Scale(.Data.Via_Interossei_II_Dorsales_Finger2_2)*..Mirror;};
  AnyRefNode Via_Interossei_II_Dorsales_Finger2_3             = {sRel = ..Scale(.Data.Via_Interossei_II_Dorsales_Finger2_3)*..Mirror;};

  AnyRefNode Via_Interossei_II_Dorsales_Finger3_1             = {sRel = ..Scale(.Data.Via_Interossei_II_Dorsales_Finger3_1)*..Mirror;};
  AnyRefNode Via_Interossei_II_Dorsales_Finger3_2             = {sRel = ..Scale(.Data.Via_Interossei_II_Dorsales_Finger3_2)*..Mirror;};
  AnyRefNode Via_Interossei_II_Dorsales_Finger3_3             = {sRel = ..Scale(.Data.Via_Interossei_II_Dorsales_Finger3_3)*..Mirror;};


  AnyRefNode O_Interossei_II_Dorsales_Finger3_1               = {sRel = ..Scale(.Data.O_Interossei_II_Dorsales_Finger3_1)*..Mirror;};
  AnyRefNode O_Interossei_II_Dorsales_Finger3_2               = {sRel = ..Scale(.Data.O_Interossei_II_Dorsales_Finger3_2)*..Mirror;};
  AnyRefNode O_Interossei_II_Dorsales_Finger3_3               = {sRel = ..Scale(.Data.O_Interossei_II_Dorsales_Finger3_3)*..Mirror;};


  AnyRefNode Via_Interossei_III_Dorsales_Finger3_1            = {sRel = ..Scale(.Data.Via_Interossei_III_Dorsales_Finger3_1)*..Mirror;};
  AnyRefNode Via_Interossei_III_Dorsales_Finger3_2            = {sRel = ..Scale(.Data.Via_Interossei_III_Dorsales_Finger3_2)*..Mirror;};
  AnyRefNode Via_Interossei_III_Dorsales_Finger3_3            = {sRel = ..Scale(.Data.Via_Interossei_III_Dorsales_Finger3_3)*..Mirror;};

  AnyRefNode O_Interossei_III_Dorsales_Finger3_1              = {sRel = ..Scale(.Data.O_Interossei_III_Dorsales_Finger3_1)*..Mirror;};
  AnyRefNode O_Interossei_III_Dorsales_Finger3_2              = {sRel = ..Scale(.Data.O_Interossei_III_Dorsales_Finger3_2)*..Mirror;};
  AnyRefNode O_Interossei_III_Dorsales_Finger3_3              = {sRel = ..Scale(.Data.O_Interossei_III_Dorsales_Finger3_3)*..Mirror;};

  AnyRefNode Via_Interossei_III_Dorsales_Finger4_1            = {sRel = ..Scale(.Data.Via_Interossei_III_Dorsales_Finger4_1)*..Mirror;};
  AnyRefNode Via_Interossei_III_Dorsales_Finger4_2            = {sRel = ..Scale(.Data.Via_Interossei_III_Dorsales_Finger4_2)*..Mirror;};
  AnyRefNode Via_Interossei_III_Dorsales_Finger4_3            = {sRel = ..Scale(.Data.Via_Interossei_III_Dorsales_Finger4_3)*..Mirror;};

  AnyRefNode Via_Lumbricales_II                               = {sRel = ..Scale(.Data.Via_Lumbricales_II)*..Mirror;};

  AnyRefNode O_Lumbricales_II                                 = {sRel = ..Scale(.Data.O_Lumbricales_II)*..Mirror;};

  AnyRefNode Via_Lumbricales_III_Finger3                      = {sRel = ..Scale(.Data.Via_Lumbricales_III_Finger3)*..Mirror;};

  AnyRefNode O_Lumbricales_III_Finger3                        = {sRel = ..Scale(.Data.O_Lumbricales_III_Finger3)*..Mirror;};

  AnyRefNode Via01_Interossei_II_Dorsales_Finger2_1           = {sRel = ..Scale(.Data.Via01_Interossei_II_Dorsales_Finger2_1)*..Mirror;};
  AnyRefNode Via01_Interossei_II_Dorsales_Finger2_2           = {sRel = ..Scale(.Data.Via01_Interossei_II_Dorsales_Finger2_2)*..Mirror;};
  AnyRefNode Via01_Interossei_II_Dorsales_Finger2_3           = {sRel = ..Scale(.Data.Via01_Interossei_II_Dorsales_Finger2_3)*..Mirror;};

  AnyRefNode Via01_Interossei_II_Dorsales_Finger3_2           = {sRel = ..Scale(.Data.Via01_Interossei_II_Dorsales_Finger3_2)*..Mirror;};
  AnyRefNode Via01_Interossei_II_Dorsales_Finger3_3           = {sRel = ..Scale(.Data.Via01_Interossei_II_Dorsales_Finger3_3)*..Mirror;};

  AnyRefNode Via01_Interossei_III_Dorsales_Finger3_1          = {sRel = ..Scale(.Data.Via01_Interossei_III_Dorsales_Finger3_1)*..Mirror;};
  AnyRefNode Via01_Interossei_III_Dorsales_Finger3_2          = {sRel = ..Scale(.Data.Via01_Interossei_III_Dorsales_Finger3_2)*..Mirror;};

  AnyRefNode Via01_Interossei_III_Dorsales_Finger4_1          = {sRel = ..Scale(.Data.Via01_Interossei_III_Dorsales_Finger4_1)*..Mirror;};

  #if RUHM_DETAILED_MODEL == ON
  AnyRefNode I_Extensor_Carpi_Radialis_Brevis_1          = {sRel = ..Scale(.Data.I_Extensor_Carpi_Radialis_Brevis_1)*..Mirror;};
  AnyRefNode I_Extensor_Carpi_Radialis_Brevis_2          = {sRel = ..Scale(.Data.I_Extensor_Carpi_Radialis_Brevis_2)*..Mirror;};
  AnyRefNode I_Extensor_Carpi_Radialis_Brevis_3          = {sRel = ..Scale(.Data.I_Extensor_Carpi_Radialis_Brevis_3)*..Mirror;};
  AnyRefNode I_Extensor_Carpi_Radialis_Brevis_4          = {sRel = ..Scale(.Data.I_Extensor_Carpi_Radialis_Brevis_4)*..Mirror;};
  AnyRefNode I_Extensor_Carpi_Radialis_Brevis_5          = {sRel = ..Scale(.Data.I_Extensor_Carpi_Radialis_Brevis_5)*..Mirror;};
  AnyRefNode I_Extensor_Carpi_Radialis_Brevis_6          = {sRel = ..Scale(.Data.I_Extensor_Carpi_Radialis_Brevis_6)*..Mirror;};
  AnyRefNode I_Extensor_Carpi_Radialis_Brevis_7          = {sRel = ..Scale(.Data.I_Extensor_Carpi_Radialis_Brevis_7)*..Mirror;};
  AnyRefNode I_Extensor_Carpi_Radialis_Brevis_8          = {sRel = ..Scale(.Data.I_Extensor_Carpi_Radialis_Brevis_8)*..Mirror;};
  AnyRefNode I_Extensor_Carpi_Radialis_Brevis_9          = {sRel = ..Scale(.Data.I_Extensor_Carpi_Radialis_Brevis_9)*..Mirror;};
  #else
  AnyRefNode I_Extensor_Carpi_Radialis_Brevis_1          = {sRel = ..Scale(.Data.I_Extensor_Carpi_Radialis_Brevis_1)*..Mirror;};
  #endif

    AnyRefNode Interossei_Dorsales_II_Finger2_1 = {
      sRel = {0,0.00001,0} + ..Scale(.Data.Via_Interossei_II_Dorsales_Finger2_1)*..Mirror;
//      #include "../Torus_Interossei_Dorsales01.any"
//      AnyDrawNode drw = {
//        ScaleXYZ = {0.001, 0.001, 0.001};};
    };
    AnyRefNode Interossei_Dorsales_II_Finger2_2 = {
      sRel = {0,0.00001,0} + ..Scale(.Data.Via_Interossei_II_Dorsales_Finger2_2)*..Mirror;
//      #include "../Torus_Interossei_Dorsales01.any"
//      AnyDrawNode drw = {
//        ScaleXYZ = {0.001, 0.001, 0.001};};
    };
    AnyRefNode Interossei_Dorsales_II_Finger2_3 = {
      sRel = {0,0.00001,0} + ..Scale(.Data.Via_Interossei_II_Dorsales_Finger2_3)*..Mirror;
//      #include "../Torus_Interossei_Dorsales01.any"
//      AnyDrawNode drw = {
//        ScaleXYZ = {0.001, 0.001, 0.001};};
    };
    AnyRefNode Interossei_Dorsales_II_Finger2_1_01 = {
      sRel = {0,0.00001,0} + ..Scale(.Data.Via01_Interossei_II_Dorsales_Finger2_1)*..Mirror;
//      #include "../Torus_Interossei_Dorsales.any"
//      AnyDrawNode drw = {
//        ScaleXYZ = {0.001, 0.001, 0.001};};
    };
    AnyRefNode Interossei_Dorsales_II_Finger2_2_01 = {
      sRel = {0,0.00001,0} + ..Scale(.Data.Via01_Interossei_II_Dorsales_Finger2_2)*..Mirror;
//      #include "../Torus_Interossei_Dorsales.any"
//      AnyDrawNode drw = {
//        ScaleXYZ = {0.001, 0.001, 0.001};};
    };
    AnyRefNode Interossei_Dorsales_II_Finger2_3_01 = {
      sRel = {0,0.00001,0} + ..Scale(.Data.Via01_Interossei_II_Dorsales_Finger2_3)*..Mirror;
//      #include "../Torus_Interossei_Dorsales.any"
//      AnyDrawNode drw = {
//        ScaleXYZ = {0.001, 0.001, 0.001};};
    };
    AnyRefNode Interossei_Dorsales_II_Finger3_1_01 = {
      sRel = {0,0.00001,0} + ..Scale(.Data.Via_Interossei_II_Dorsales_Finger3_1)*..Mirror;
//      #include "../Torus_Interossei_Dorsales01.any"
//      AnyDrawNode drw = {
//        ScaleXYZ = {0.001, 0.001, 0.001};};
    };
    AnyRefNode Interossei_Dorsales_II_Finger3_2_01 = {
      sRel = {0,0.00001,0} + ..Scale(.Data.Via_Interossei_II_Dorsales_Finger3_2)*..Mirror;
//      #include "../Torus_Interossei_Dorsales01.any"
//      AnyDrawNode drw = {
//        ScaleXYZ = {0.001, 0.001, 0.001};};
    };
    AnyRefNode Interossei_Dorsales_II_Finger3_3_01 = {
      sRel = {0,0.00001,0} + ..Scale(.Data.Via_Interossei_II_Dorsales_Finger3_3)*..Mirror;
//      #include "../Torus_Interossei_Dorsales01.any"
//      AnyDrawNode drw = {
//        ScaleXYZ = {0.001, 0.001, 0.001};};
    };
    AnyRefNode Interossei_Dorsales_II_Finger3_2 = {
      sRel = {0,0.00001,0} + ..Scale(.Data.Via01_Interossei_II_Dorsales_Finger3_2)*..Mirror;
//      #include "../Torus_Interossei_Dorsales.any"
//      AnyDrawNode drw = {
//        ScaleXYZ = {0.001, 0.001, 0.001};};
    };
    AnyRefNode Interossei_Dorsales_II_Finger3_3 = {
      sRel = {0,0.00001,0} + ..Scale(.Data.Via01_Interossei_II_Dorsales_Finger3_3)*..Mirror;
//      #include "../Torus_Interossei_Dorsales.any"
//      AnyDrawNode drw = {
//        ScaleXYZ = {0.001, 0.001, 0.001};};
    };
    AnyRefNode Interossei_Dorsales_III_Finger3_1_01 = {
      sRel = {0,0.00001,0} + ..Scale(.Data.Via_Interossei_III_Dorsales_Finger3_1)*..Mirror;
//      #include "../Torus_Interossei_Dorsales01.any"
//      AnyDrawNode drw = {
//        ScaleXYZ = {0.001, 0.001, 0.001};};
    };
    AnyRefNode Interossei_Dorsales_III_Finger3_2_01 = {
      sRel = {0,0.00001,0} + ..Scale(.Data.Via_Interossei_III_Dorsales_Finger3_2)*..Mirror;
//      #include "../Torus_Interossei_Dorsales01.any"
//      AnyDrawNode drw = {
//        ScaleXYZ = {0.001, 0.001, 0.001};};
    };
    AnyRefNode Interossei_Dorsales_III_Finger3_1 = {
      sRel = {0,0.00001,0} + ..Scale(.Data.Via01_Interossei_III_Dorsales_Finger3_1)*..Mirror;
//      #include "../Torus_Interossei_Dorsales.any"
//      AnyDrawNode drw = {
//        ScaleXYZ = {0.001, 0.001, 0.001};};
    };
    AnyRefNode Interossei_Dorsales_III_Finger3_2 = {
      sRel = {0,0.00001,0} + ..Scale(.Data.Via01_Interossei_III_Dorsales_Finger3_2)*..Mirror;
//      #include "../Torus_Interossei_Dorsales.any"
//      AnyDrawNode drw = {
//        ScaleXYZ = {0.001, 0.001, 0.001};};
    };
    AnyRefNode Interossei_Dorsales_III_Finger3_3_01 = {
      sRel = {0,0.00001,0} + ..Scale(.Data.Via_Interossei_III_Dorsales_Finger3_3)*..Mirror;
//      #include "../Torus_Interossei_Dorsales01.any"
//      AnyDrawNode drw = {
//        ScaleXYZ = {0.001, 0.001, 0.001};};
    };
    AnyRefNode Interossei_Dorsales_III_Finger4_1_01 = {
      sRel = {0,0.00001,0} + ..Scale(.Data.Via_Interossei_III_Dorsales_Finger4_1)*..Mirror;
//      #include "../Torus_Interossei_Dorsales01.any"
//      AnyDrawNode drw = {
//        ScaleXYZ = {0.001, 0.001, 0.001};};
    };
    AnyRefNode Interossei_Dorsales_III_Finger4_1 = {
      sRel = {0,0.00001,0} + ..Scale(.Data.Via01_Interossei_III_Dorsales_Finger4_1)*..Mirror;
//      #include "../Torus_Interossei_Dorsales.any"
//      AnyDrawNode drw = {
//        ScaleXYZ = {0.001, 0.001, 0.001};};
    };
    AnyRefNode Interossei_Dorsales_III_Finger4_2_01 = {
      sRel = {0,0.00001,0} + ..Scale(.Data.Via_Interossei_III_Dorsales_Finger4_2)*..Mirror;
//      #include "../Torus_Interossei_Dorsales01.any"
//      AnyDrawNode drw = {
//        ScaleXYZ = {0.001, 0.001, 0.001};};
    };
    AnyRefNode Interossei_Dorsales_III_Finger4_3_01 = {
      sRel = {0,0.00001,0} + ..Scale(.Data.Via_Interossei_III_Dorsales_Finger4_3)*..Mirror;
//      #include "../Torus_Interossei_Dorsales01.any"
//      AnyDrawNode drw = {
//        ScaleXYZ = {0.001, 0.001, 0.001};};
    };

};//End Finger3MetaRef

Finger3ProximalRef ={

  AnyFolder &Data = .ModelParameters.MuscleNodes.Finger3.Proximal;

  AnyRefNode V_Extensor_Digitorum_Digit3                      = {sRel = ..Scale(.Data.V_Extensor_Digitorum_Digit3_pos)*..Mirror;}; //guesstimate
  AnyRefNode V2_Extensor_Digitorum_Digit3                     = {sRel = ..Scale(.Data.V2_Extensor_Digitorum_Digit3_pos)*..Mirror;}; //guesstimate
  AnyRefNode V3_Flexor_Digitorum_Superficialis_Digit3         = {sRel = ..Scale(.Data.V3_Flexor_Digitorum_Superficialis_Digit3_pos)*..Mirror;}; //guesstimate
  AnyRefNode V4_Flexor_Digitorum_Superficialis_Digit3         = {sRel = ..Scale(.Data.V4_Flexor_Digitorum_Superficialis_Digit3_pos)*..Mirror;}; //guesstimate
  AnyRefNode Via_Flexor_Digitorum_Profundus_Digit3            = {sRel = ..Scale(.Data.Via_Flexor_Digitorum_Profundus_Digit3_pos)*..Mirror;}; //guesstimate
  AnyRefNode Via2_Flexor_Digitorum_Profundus_Digit3           = {sRel = ..Scale(.Data.Via2_Flexor_Digitorum_Profundus_Digit3_pos)*..Mirror;};  //guesstimate
  AnyRefNode I_Lumbrical_Digit3                               = {sRel = ..Scale(.Data.I_Lumbrical_Digit3_pos)*..Mirror;}; //guesstimate
  AnyRefNode V_DorsalInterosseous_Digit3                      = {sRel = ..Scale(.Data.V_DorsalInterosseous_Digit3_pos)*..Mirror;}; //guesstimate
  AnyRefNode V2_DorsalInterosseous_Digit3                     = {sRel = ..Scale(.Data.V2_DorsalInterosseous_Digit3_pos)*..Mirror;}; //guesstimate

  AnyRefNode I_Interossei_II_Dorsales_Finger2_1               = {sRel = ..Scale(.Data.I_Interossei_II_Dorsales_Finger2_1)*..Mirror;};
  AnyRefNode I_Interossei_II_Dorsales_Finger2_2               = {sRel = ..Scale(.Data.I_Interossei_II_Dorsales_Finger2_2)*..Mirror;};
  AnyRefNode I_Interossei_II_Dorsales_Finger2_3               = {sRel = ..Scale(.Data.I_Interossei_II_Dorsales_Finger2_3)*..Mirror;};

  AnyRefNode I_Interossei_II_Dorsales_Finger3_1               = {sRel = ..Scale(.Data.I_Interossei_II_Dorsales_Finger3_1)*..Mirror;};
  AnyRefNode I_Interossei_II_Dorsales_Finger3_2               = {sRel = ..Scale(.Data.I_Interossei_II_Dorsales_Finger3_2)*..Mirror;};
  AnyRefNode I_Interossei_II_Dorsales_Finger3_3               = {sRel = ..Scale(.Data.I_Interossei_II_Dorsales_Finger3_3)*..Mirror;};

  AnyRefNode I_Interossei_III_Dorsales_Finger3_1              = {sRel = ..Scale(.Data.I_Interossei_III_Dorsales_Finger3_1)*..Mirror;};
  AnyRefNode I_Interossei_III_Dorsales_Finger3_2              = {sRel = ..Scale(.Data.I_Interossei_III_Dorsales_Finger3_2)*..Mirror;};
  AnyRefNode I_Interossei_III_Dorsales_Finger3_3              = {sRel = ..Scale(.Data.I_Interossei_III_Dorsales_Finger3_3)*..Mirror;};

  AnyRefNode I_Interossei_III_Dorsales_Finger3a_1             = {sRel = ..Scale(.Data.I_Interossei_III_Dorsales_Finger3a_1)*..Mirror;};
  AnyRefNode I_Interossei_III_Dorsales_Finger3a_2             = {sRel = ..Scale(.Data.I_Interossei_III_Dorsales_Finger3a_2)*..Mirror;};
  AnyRefNode I_Interossei_III_Dorsales_Finger3a_3             = {sRel = ..Scale(.Data.I_Interossei_III_Dorsales_Finger3a_3)*..Mirror;};

  AnyRefNode I_Interossei_III_Dorsales_Finger4_1              = {sRel = ..Scale(.Data.I_Interossei_III_Dorsales_Finger4_1)*..Mirror;};
  AnyRefNode I_Interossei_III_Dorsales_Finger4_2              = {sRel = ..Scale(.Data.I_Interossei_III_Dorsales_Finger4_2)*..Mirror;};
  AnyRefNode I_Interossei_III_Dorsales_Finger4_3              = {sRel = ..Scale(.Data.I_Interossei_III_Dorsales_Finger4_3)*..Mirror;};

  AnyRefNode I_Lumbricales_II                                 = {sRel = ..Scale(.Data.I_Lumbricales_II)*..Mirror;};

  #if RUHM_DETAILED_MODEL == ON
  AnyRefNode Via3_Extensor_Digitorum_Finger3_1                     = {sRel = ..Scale(.Data.Via3_Extensor_Digitorum_Finger3_pos_1)*..Mirror;};
  AnyRefNode Via3_Extensor_Digitorum_Finger3_2                     = {sRel = ..Scale(.Data.Via3_Extensor_Digitorum_Finger3_pos_2)*..Mirror;};
  AnyRefNode Via3_Extensor_Digitorum_Finger3_3                     = {sRel = ..Scale(.Data.Via3_Extensor_Digitorum_Finger3_pos_3)*..Mirror;};
  AnyRefNode Via3_Extensor_Digitorum_Finger3_4                     = {sRel = ..Scale(.Data.Via3_Extensor_Digitorum_Finger3_pos_4)*..Mirror;};
  AnyRefNode Via3_Extensor_Digitorum_Finger3_5                     = {sRel = ..Scale(.Data.Via3_Extensor_Digitorum_Finger3_pos_5)*..Mirror;};
  AnyRefNode Via3_Extensor_Digitorum_Finger3_6                     = {sRel = ..Scale(.Data.Via3_Extensor_Digitorum_Finger3_pos_6)*..Mirror;};
  AnyRefNode Via3_Extensor_Digitorum_Finger3_7                     = {sRel = ..Scale(.Data.Via3_Extensor_Digitorum_Finger3_pos_7)*..Mirror;};
  AnyRefNode Via3_Extensor_Digitorum_Finger3_8                     = {sRel = ..Scale(.Data.Via3_Extensor_Digitorum_Finger3_pos_8)*..Mirror;};
  AnyRefNode Via3_Extensor_Digitorum_Finger3_9                     = {sRel = ..Scale(.Data.Via3_Extensor_Digitorum_Finger3_pos_9)*..Mirror;};
  AnyRefNode Via3_Extensor_Digitorum_Finger3_10                     = {sRel = ..Scale(.Data.Via3_Extensor_Digitorum_Finger3_pos_10)*..Mirror;};
  #else
  AnyRefNode Via3_Extensor_Digitorum_Finger3_1                       = {sRel = ..Scale(.Data.Via3_Extensor_Digitorum_Finger3_pos_1)*..Mirror;};
  #endif

  #if RUHM_DETAILED_MODEL == ON
  AnyRefNode Via_Flexor_Digitorum_Profundus_Finger3_1          = { sRel = ..Scale(.Data.Via_Flexor_Digitorum_Profundus_Finger3_1)*..Mirror;};
  AnyRefNode Via_Flexor_Digitorum_Profundus_Finger3_2          = { sRel = ..Scale(.Data.Via_Flexor_Digitorum_Profundus_Finger3_2)*..Mirror;};
  AnyRefNode Via_Flexor_Digitorum_Profundus_Finger3_3          = { sRel = ..Scale(.Data.Via_Flexor_Digitorum_Profundus_Finger3_3)*..Mirror;};
  AnyRefNode Via_Flexor_Digitorum_Profundus_Finger3_4          = { sRel = ..Scale(.Data.Via_Flexor_Digitorum_Profundus_Finger3_4)*..Mirror;};
  #else
  AnyRefNode Via_Flexor_Digitorum_Profundus_Finger3_1            = { sRel = ..Scale(.Data.Via_Flexor_Digitorum_Profundus_Finger3_1)*..Mirror;};
  #endif

  #if RUHM_DETAILED_MODEL == ON
  AnyRefNode Via1_Flexor_Digitorum_Superficialis_Finger3_1   = { sRel = ..Scale(.Data.Via1_Flexor_Digitorum_Superficialis_Finger3_pos_1)*..Mirror;};
  AnyRefNode Via1_Flexor_Digitorum_Superficialis_Finger3_2   = { sRel = ..Scale(.Data.Via1_Flexor_Digitorum_Superficialis_Finger3_pos_2)*..Mirror;};
  AnyRefNode Via1_Flexor_Digitorum_Superficialis_Finger3_3   = { sRel = ..Scale(.Data.Via1_Flexor_Digitorum_Superficialis_Finger3_pos_3)*..Mirror;};
  AnyRefNode Via1_Flexor_Digitorum_Superficialis_Finger3_4   = { sRel = ..Scale(.Data.Via1_Flexor_Digitorum_Superficialis_Finger3_pos_4)*..Mirror;};
  AnyRefNode Via1_Flexor_Digitorum_Superficialis_Finger3_5   = { sRel = ..Scale(.Data.Via1_Flexor_Digitorum_Superficialis_Finger3_pos_5)*..Mirror;};
  AnyRefNode Via1_Flexor_Digitorum_Superficialis_Finger3_6   = { sRel = ..Scale(.Data.Via1_Flexor_Digitorum_Superficialis_Finger3_pos_6)*..Mirror;};
  AnyRefNode Via1_Flexor_Digitorum_Superficialis_Finger3_7   = { sRel = ..Scale(.Data.Via1_Flexor_Digitorum_Superficialis_Finger3_pos_7)*..Mirror;};
  AnyRefNode Via1_Flexor_Digitorum_Superficialis_Finger3_8   = { sRel = ..Scale(.Data.Via1_Flexor_Digitorum_Superficialis_Finger3_pos_8)*..Mirror;};
  AnyRefNode Via1_Flexor_Digitorum_Superficialis_Finger3_9   = { sRel = ..Scale(.Data.Via1_Flexor_Digitorum_Superficialis_Finger3_pos_9)*..Mirror;};
  #else
  AnyRefNode Via1_Flexor_Digitorum_Superficialis_Finger3_1    = { sRel = ..Scale(.Data.Via1_Flexor_Digitorum_Superficialis_Finger3_pos_1)*..Mirror;};
  #endif

};//End Finger3ProximalRef

Finger3MiddleRef ={

  AnyFolder &Data = .ModelParameters.MuscleNodes.Finger3.Middle;

  AnyRefNode I_Extensor_Digitorum_Digit3                      = {sRel = ..Scale(.Data.I_Extensor_Digitorum_Digit3_pos)*..Mirror;}; //guesstimate
  AnyRefNode Via_Flexor_Digitorum_Profundus_Digit3            = {sRel = ..Scale(.Data.Via_Flexor_Digitorum_Profundus_Digit3_pos)*..Mirror;}; //guesstimate
  AnyRefNode Via2_Flexor_Digitorum_Profundus_Digit3           = {sRel = ..Scale(.Data.Via2_Flexor_Digitorum_Profundus_Digit3_pos)*..Mirror;};  //guesstimate
  AnyRefNode I_Flexor_Digitorum_Superficialis_Digit3          = {sRel = ..Scale(.Data.I_Flexor_Digitorum_Superficialis_Digit3_pos)*..Mirror;}; //guesstimate
  AnyRefNode I_DorsalInterosseous_Digit3                      = {sRel = ..Scale(.Data.I_DorsalInterosseous_Digit3_pos)*..Mirror;}; //guesstimate

  #if RUHM_DETAILED_MODEL == ON
  AnyRefNode Via2_Extensor_Digitorum_Finger3_1                     = {sRel = ..Scale(.Data.Via2_Extensor_Digitorum_Finger3_pos_1)*..Mirror;};
  AnyRefNode Via2_Extensor_Digitorum_Finger3_2                     = {sRel = ..Scale(.Data.Via2_Extensor_Digitorum_Finger3_pos_2)*..Mirror;};
  AnyRefNode Via2_Extensor_Digitorum_Finger3_3                     = {sRel = ..Scale(.Data.Via2_Extensor_Digitorum_Finger3_pos_3)*..Mirror;};
  AnyRefNode Via2_Extensor_Digitorum_Finger3_4                     = {sRel = ..Scale(.Data.Via2_Extensor_Digitorum_Finger3_pos_4)*..Mirror;};
  AnyRefNode Via2_Extensor_Digitorum_Finger3_5                     = {sRel = ..Scale(.Data.Via2_Extensor_Digitorum_Finger3_pos_5)*..Mirror;};
  AnyRefNode Via2_Extensor_Digitorum_Finger3_6                     = {sRel = ..Scale(.Data.Via2_Extensor_Digitorum_Finger3_pos_6)*..Mirror;};
  AnyRefNode Via2_Extensor_Digitorum_Finger3_7                     = {sRel = ..Scale(.Data.Via2_Extensor_Digitorum_Finger3_pos_7)*..Mirror;};
  AnyRefNode Via2_Extensor_Digitorum_Finger3_8                     = {sRel = ..Scale(.Data.Via2_Extensor_Digitorum_Finger3_pos_8)*..Mirror;};
  AnyRefNode Via2_Extensor_Digitorum_Finger3_9                     = {sRel = ..Scale(.Data.Via2_Extensor_Digitorum_Finger3_pos_9)*..Mirror;};
  AnyRefNode Via2_Extensor_Digitorum_Finger3_10                    = {sRel = ..Scale(.Data.Via2_Extensor_Digitorum_Finger3_pos_10)*..Mirror;};
  #else
  AnyRefNode Via2_Extensor_Digitorum_Finger3_1                        = {sRel = ..Scale(.Data.Via2_Extensor_Digitorum_Finger3_pos_1)*..Mirror;};
  #endif

  #if RUHM_DETAILED_MODEL == ON
  AnyRefNode I_Flexor_Digitorum_Superficialis_Finger3_1   = { sRel = ..Scale(.Data.I_Flexor_Digitorum_Superficialis_Finger3_pos_1)*..Mirror;};
  AnyRefNode I_Flexor_Digitorum_Superficialis_Finger3_2   = { sRel = ..Scale(.Data.I_Flexor_Digitorum_Superficialis_Finger3_pos_2)*..Mirror;};
  AnyRefNode I_Flexor_Digitorum_Superficialis_Finger3_3   = { sRel = ..Scale(.Data.I_Flexor_Digitorum_Superficialis_Finger3_pos_3)*..Mirror;};
  AnyRefNode I_Flexor_Digitorum_Superficialis_Finger3_4   = { sRel = ..Scale(.Data.I_Flexor_Digitorum_Superficialis_Finger3_pos_4)*..Mirror;};
  AnyRefNode I_Flexor_Digitorum_Superficialis_Finger3_5   = { sRel = ..Scale(.Data.I_Flexor_Digitorum_Superficialis_Finger3_pos_5)*..Mirror;};
  AnyRefNode I_Flexor_Digitorum_Superficialis_Finger3_6   = { sRel = ..Scale(.Data.I_Flexor_Digitorum_Superficialis_Finger3_pos_6)*..Mirror;};
  AnyRefNode I_Flexor_Digitorum_Superficialis_Finger3_7   = { sRel = ..Scale(.Data.I_Flexor_Digitorum_Superficialis_Finger3_pos_7)*..Mirror;};
  AnyRefNode I_Flexor_Digitorum_Superficialis_Finger3_8   = { sRel = ..Scale(.Data.I_Flexor_Digitorum_Superficialis_Finger3_pos_8)*..Mirror;};
  AnyRefNode I_Flexor_Digitorum_Superficialis_Finger3_9   = { sRel = ..Scale(.Data.I_Flexor_Digitorum_Superficialis_Finger3_pos_9)*..Mirror;};
  #else
  AnyRefNode I_Flexor_Digitorum_Superficialis_Finger3_1     = { sRel = ..Scale(.Data.I_Flexor_Digitorum_Superficialis_Finger3_pos_1)*..Mirror;};
  #endif

};//End Finger3MiddleRef

Finger3DistalRef ={

  AnyFolder &Data = .ModelParameters.MuscleNodes.Finger3.Distal;

  AnyRefNode I_Flexor_Digitorum_Profundus_Digit3             = {sRel = ..Scale(.Data.I_Flexor_Digitorum_Profundus_Digit3_pos)*..Mirror;}; //guesstimate
  AnyRefNode I_DorsalInterosseous_Digit3                     = {sRel = ..Scale(.Data.I_DorsalInterosseous_Digit3_pos)*..Mirror;}; //guesstimate

  #if RUHM_DETAILED_MODEL == ON
  AnyRefNode I_Extensor_Digitorum_Finger3_1                     = {sRel = ..Scale(.Data.I_Extensor_Digitorum_Finger3_pos_1)*..Mirror;};
  AnyRefNode I_Extensor_Digitorum_Finger3_2                     = {sRel = ..Scale(.Data.I_Extensor_Digitorum_Finger3_pos_2)*..Mirror;};
  AnyRefNode I_Extensor_Digitorum_Finger3_3                     = {sRel = ..Scale(.Data.I_Extensor_Digitorum_Finger3_pos_3)*..Mirror;};
  AnyRefNode I_Extensor_Digitorum_Finger3_4                     = {sRel = ..Scale(.Data.I_Extensor_Digitorum_Finger3_pos_4)*..Mirror;};
  AnyRefNode I_Extensor_Digitorum_Finger3_5                     = {sRel = ..Scale(.Data.I_Extensor_Digitorum_Finger3_pos_5)*..Mirror;};
  AnyRefNode I_Extensor_Digitorum_Finger3_6                     = {sRel = ..Scale(.Data.I_Extensor_Digitorum_Finger3_pos_6)*..Mirror;};
  AnyRefNode I_Extensor_Digitorum_Finger3_7                     = {sRel = ..Scale(.Data.I_Extensor_Digitorum_Finger3_pos_7)*..Mirror;};
  AnyRefNode I_Extensor_Digitorum_Finger3_8                     = {sRel = ..Scale(.Data.I_Extensor_Digitorum_Finger3_pos_8)*..Mirror;};
  AnyRefNode I_Extensor_Digitorum_Finger3_9                     = {sRel = ..Scale(.Data.I_Extensor_Digitorum_Finger3_pos_9)*..Mirror;};
  AnyRefNode I_Extensor_Digitorum_Finger3_10                    = {sRel = ..Scale(.Data.I_Extensor_Digitorum_Finger3_pos_10)*..Mirror;};
  #else
  AnyRefNode I_Extensor_Digitorum_Finger3_1                       = {sRel = ..Scale(.Data.I_Extensor_Digitorum_Finger3_pos_1)*..Mirror;};
  #endif

  AnyRefNode I_Flexor_Digitorum_Profndus_Finger3_pos_1          = {sRel = ..Scale(.Data.I_Flexor_Digitorum_Profndus_Finger3_pos_1)*..Mirror;};
  AnyRefNode I_Flexor_Digitorum_Profndus_Finger3_pos_2          = {sRel = ..Scale(.Data.I_Flexor_Digitorum_Profndus_Finger3_pos_2)*..Mirror;};
  AnyRefNode I_Flexor_Digitorum_Profndus_Finger3_pos_3          = {sRel = ..Scale(.Data.I_Flexor_Digitorum_Profndus_Finger3_pos_3)*..Mirror;};
  AnyRefNode I_Flexor_Digitorum_Profndus_Finger3_pos_4          = {sRel = ..Scale(.Data.I_Flexor_Digitorum_Profndus_Finger3_pos_4)*..Mirror;};

  #if RUHM_DETAILED_MODEL == ON
  AnyRefNode I_Flexor_Digitorum_Profundus_Finger3_1          = { sRel = ..Scale(.Data.I_Flexor_Digitorum_Profundus_Finger3_1)*..Mirror;};
  AnyRefNode I_Flexor_Digitorum_Profundus_Finger3_2          = { sRel = ..Scale(.Data.I_Flexor_Digitorum_Profundus_Finger3_2)*..Mirror;};
  AnyRefNode I_Flexor_Digitorum_Profundus_Finger3_3          = { sRel = ..Scale(.Data.I_Flexor_Digitorum_Profundus_Finger3_3)*..Mirror;};
  AnyRefNode I_Flexor_Digitorum_Profundus_Finger3_4          = { sRel = ..Scale(.Data.I_Flexor_Digitorum_Profundus_Finger3_4)*..Mirror;};
  #else
  AnyRefNode I_Flexor_Digitorum_Profundus_Finger3_1            = { sRel = ..Scale(.Data.I_Flexor_Digitorum_Profundus_Finger3_1)*..Mirror;};
  #endif

};//End Finger3DistalRef

Finger3TendonIns = {
  AnyFolder Lumbrical= {
    AnyRefFrame &OrObj = .....ShoulderArm.Mus.Hand.Flexor_Digitorum_Profundus_Finger3_1.Via1;
    AnyRefFrame &InObj = .....ShoulderArm.Mus.Hand.Flexor_Digitorum_Profundus_Finger3_1.Via2;
    AnyRefFrame &Global = ..Finger3.Seg.Metacarpal;
    // Dist is the distance between OrObj and InObj in relation to the total distance.
    //Dist=0 means that the intrinsic muscle point would be OrObj and Dist=1 means that the intrinsic muscle point would be InObj
    AnyVar Dist= 0.2;
    #include ".CreateMusclePoint.any"
  };

};
