//All References of Finger 4
#include "Finger4TendonNodes.any"
 //AnyVector &Lengths2 =...Lengths;


AnyVar O2O3F4 = Finger4.Seg.MiddlePhalanx.O2O3;


Finger4O1 = {


AnyRefNode TE = {
    //AnyDrawNode drw={RGB={0,1,1}; ScaleXYZ={0.001,0.001,0.001};};
    sRel = ..O2O3F4*..DIP4.DistalPoint.TE;
    #include ".MuscleNodeTorus.any"
  };

AnyRefNode FP = {
    //AnyDrawNode drw={RGB={0,1,1}; ScaleXYZ={0.001,0.001,0.001};};
    sRel = ..O2O3F4*..DIP4.DistalPoint.FP;
    #include ".MuscleNodeTorus.any"
  };

};

Finger4O2 ={

  AnyRefNode TE = {
    //AnyDrawNode drw={RGB={0,1,1}; ScaleXYZ={0.001,0.001,0.001};};
    sRel = ..O2O3F4*..DIP4.ProximalPoint.TE;
    #include ".MuscleNodeTorus.any"
  };

  AnyRefNode FP = {
    //AnyDrawNode drw={RGB={0,1,1}; ScaleXYZ={0.001,0.001,0.001};};
    sRel = ..O2O3F4*..DIP4.ProximalPoint.FP;
    #include ".MuscleNodeTorus.any"
  };


};//End Finger4O2


Finger4O3 = {


AnyRefNode FP = {
    //AnyDrawNode drw={RGB={0,1,1}; ScaleXYZ={0.001,0.001,0.001};};
    sRel = ..O2O3F4*..PIP4.DistalPoint.FP;
    #include ".MuscleNodeTorus.any"
  };

AnyRefNode RB = {
    //AnyDrawNode drw={RGB={0,1,1}; ScaleXYZ={0.001,0.001,0.001};};
    sRel = ..O2O3F4*..PIP4.DistalPoint.RB;
    #include ".MuscleNodeTorus.any"
  };
 AnyRefNode UB = {
    //AnyDrawNode drw={RGB={0,1,1}; ScaleXYZ={0.001,0.001,0.001};};
    sRel = ..O2O3F4*..PIP4.DistalPoint.UB;
    #include ".MuscleNodeTorus.any"
  };
 AnyRefNode FS = {
    //AnyDrawNode drw={RGB={0,1,1}; ScaleXYZ={0.001,0.001,0.001};};
    sRel = ..O2O3F4*..PIP4.DistalPoint.FS;
    #include ".MuscleNodeTorus.any"
  };
 AnyRefNode ES = {
    //AnyDrawNode drw={RGB={0,1,1}; ScaleXYZ={0.001,0.001,0.001};};
    sRel = ..O2O3F4*..PIP4.DistalPoint.ES;
    #include ".MuscleNodeTorus.any"
  };

};

Finger4O4 ={

AnyRefNode FP = {
    //AnyDrawNode drw={RGB={0,1,1}; ScaleXYZ={0.001,0.001,0.001};};
    sRel = ..O2O3F4*..PIP4.ProximalPoint.FP;
    #include ".MuscleNodeTorus.any"
  };

AnyRefNode RB = {
    //AnyDrawNode drw={RGB={0,1,1}; ScaleXYZ={0.001,0.001,0.001};};
    sRel = ..O2O3F4*..PIP4.ProximalPoint.RB;
    #include ".MuscleNodeTorus.any"
  };
 AnyRefNode UB = {
    //AnyDrawNode drw={RGB={0,1,1}; ScaleXYZ={0.001,0.001,0.001};};
    sRel = ..O2O3F4*..PIP4.ProximalPoint.UB;
    #include ".MuscleNodeTorus.any"
  };
 AnyRefNode FS = {
    //AnyDrawNode drw={RGB={0,1,1}; ScaleXYZ={0.001,0.001,0.001};};
    sRel = ..O2O3F4*..PIP4.ProximalPoint.FS;
    #include ".MuscleNodeTorus.any"
  };
 AnyRefNode ES = {
    //AnyDrawNode drw={RGB={0,1,1}; ScaleXYZ={0.001,0.001,0.001};};
    sRel = ..O2O3F4*..PIP4.ProximalPoint.ES;
    #include ".MuscleNodeTorus.any"
  };

};//End Finger4O4

Finger4O5 ={

AnyRefNode FP = {
    //AnyDrawNode drw={RGB={0,1,1}; ScaleXYZ={0.001,0.001,0.001};};
    sRel = ..O2O3F4*..MP4.DistalPoint.FP;
    #include ".MuscleNodeTorus.any"
  };
  AnyRefNode FS = {
    //AnyDrawNode drw={RGB={0,1,1}; ScaleXYZ={0.001,0.001,0.001};};
    sRel = ..O2O3F4*..MP4.DistalPoint.FS;
    #include ".MuscleNodeTorus.any"
  };
  AnyRefNode RI = {
    //AnyDrawNode drw={RGB={0,1,1}; ScaleXYZ={0.001,0.001,0.001};};
    sRel = ..O2O3F4*..MP4.DistalPoint.RI;
    #include ".MuscleNodeTorus.any"
  };
  AnyRefNode LU = {
    //AnyDrawNode drw={RGB={0,1,1}; ScaleXYZ={0.001,0.001,0.001};};
    sRel = ..O2O3F4*..MP4.DistalPoint.LU;
    #include ".MuscleNodeTorus.any"
  };
  AnyRefNode UI = {
    //AnyDrawNode drw={RGB={0,1,1}; ScaleXYZ={0.001,0.001,0.001};};
    sRel = ..O2O3F4*..MP4.DistalPoint.UI;
    #include ".MuscleNodeTorus.any"
  };
  AnyRefNode LE = {
    //AnyDrawNode drw={RGB={0,1,1}; ScaleXYZ={0.001,0.001,0.001};};
    sRel = ..O2O3F4*..MP4.DistalPoint.LE;
    #include ".MuscleNodeTorus.any"
  };


};//End Finger4O5

Finger4O6 ={

AnyRefNode FP = {
    //AnyDrawNode drw={RGB={0,1,1}; ScaleXYZ={0.001,0.001,0.001};};
    sRel = ..O2O3F4*..MP4.ProximalPoint.FP;
    #include ".MuscleNodeTorus.any"
  };
  AnyRefNode FS = {
    //AnyDrawNode drw={RGB={0,1,1}; ScaleXYZ={0.001,0.001,0.001};};
    sRel = ..O2O3F4*..MP4.ProximalPoint.FS;
    #include ".MuscleNodeTorus.any"
  };
  AnyRefNode RI = {
    //AnyDrawNode drw={RGB={0,1,1}; ScaleXYZ={0.001,0.001,0.001};};
    sRel = ..O2O3F4*..MP4.ProximalPoint.RI;
    #include ".MuscleNodeTorus.any"
  };
  AnyRefNode LU = {
    //AnyDrawNode drw={RGB={0,1,1}; ScaleXYZ={0.001,0.001,0.001};};
    sRel = ..O2O3F4*..MP4.ProximalPoint.LU;
    #include ".MuscleNodeTorus.any"
  };
  AnyRefNode UI = {
    //AnyDrawNode drw={RGB={0,1,1}; ScaleXYZ={0.001,0.001,0.001};};
    sRel = ..O2O3F4*..MP4.ProximalPoint.UI;
    #include ".MuscleNodeTorus.any"
  };
  AnyRefNode LE = {
    //AnyDrawNode drw={RGB={0,1,1}; ScaleXYZ={0.001,0.001,0.001};};
    sRel = ..O2O3F4*..MP4.ProximalPoint.LE;
    #include ".MuscleNodeTorus.any"
  };


};//End Finger4O6
