AnySurfEllipsoid Jointsphere = {
  Radius = {0.0046, 0.0035, 0.006}*..EllipsoidNode.Ellipsoid.BoneLength/........ShoulderArm.Seg.Hand.Finger2.Seg.ProximalPhalanx.EllipsoidNode.Ellipsoid.BoneLength;
  #if SHOW_HAND_WRAP_EX == ON
  AnyDrawParamSurf drw = {
    RGB = {1, 1, 1};
    Opacity  =0.8;
  };
  #endif
};
