//Estimation according to Wu et al. 2008. These values are for the index finger. As a simplification every phalanx is treated as the one from the index finger with only a different length
//metacarpal phalanxes are treated as extended proximal phalanxes
// The bone canal is roughly 25% shorter than the external bone measurement
//
AnyMatrix BoneMatrix = {
  {6.57/1000, 4.65/1000, ..Lengths[0]},
  {3.29/1000, 1.53/1000, ..Lengths[0]-0.25*..Lengths[0]},
  {9.75/1000, 9.52/1000, ..Lengths[0]}
};
