ARel = RotMat(90*pi/180,y)*RotMat(90*pi/180,x);

AnySurfTorus TorusCenter =
{
  MajorRadius = 0.002;
  MinorRadius = 0.0005;
  #if SHOW_HAND_WRAP_EX == ON
  AnyDrawParamSurf Torus = {
    RGB={0,1,1};
    WireFrameOnOff = Off;
    Opacity=0.5;
  };
  #else
  #endif
};
