AnyRefNode TorusCenter1 = {
  sRel={0,0.01,0};
  ARel = RotMat(90*pi/180,y)*RotMat(90*pi/180,x);

  AnySurfTorus Torus =
  {
    MajorRadius = ..EllipsoidNode.Ellipsoid.BoneLength/1.5;
    MinorRadius = ..EllipsoidNode.Ellipsoid.BoneLength/4;
    #if SHOW_HAND_WRAP_EX == ON
    AnyDrawParamSurf drw = {
      WireFrameOnOff = Off;
      Opacity=0.5;
    };
    #endif
  };


};
