 AnyRefNode TorusCenter2 = {
  sRel={.EllipsoidNode.Ellipsoid.BoneLength/20,.EllipsoidNode.Ellipsoid.BoneLength/2,0};
  ARel = RotMat(90*pi/180,y)*RotMat(90*pi/180,x);

  AnySurfTorus Torus =
  {
    MajorRadius = 0.007;
    MinorRadius = 0.0013;
    #if SHOW_HAND_WRAP_EX == ON
    AnyDrawParamSurf drw = {
      WireFrameOnOff = Off;
      Opacity=0.5;
    };
    #endif
  };
};
