 AnyRefNode TorusCenter = {
  viewRefFrame.Visible =Off;
  viewRefFrame.ScaleXYZ ={5.0, 5.0, 5.0} ;
  sRel = ..Scale({0.0,0.0,0.0});
  ARel= RotMat((90*pi/180),x)*RotMat((20*pi/180),y);

  AnySurfTorus Torus = {
    MajorRadius = 0.007;
    MinorRadius = 0.0065;
	#if SHOW_HAND_WRAP_IN == ON
   AnyDrawParamSurf drw = {
     RGB = {1, 1, 1};
     Opacity  =0.5;
   };
   #endif
};
};

 AnyRefNode TorusCenter01 = {
  viewRefFrame.Visible =Off;
  viewRefFrame.ScaleXYZ ={5.0, 5.0, 5.0} ;
  sRel = ..Scale({0.0,0.0,0.0});
  ARel= RotMat((90*pi/180),x)*RotMat((40*pi/180),y);

  AnySurfTorus Torus01 = {
    MajorRadius = 0.0045;
    MinorRadius = 0.004;
	#if SHOW_HAND_WRAP_IN == ON
   AnyDrawParamSurf drw = {
     RGB = {1, 1, 1};
     Opacity  =0.5;
   };
   #endif
};
};
