 AnyRefNode TorusCenter = {
  viewRefFrame.Visible =Off;
  viewRefFrame.ScaleXYZ ={5.0, 5.0, 5.0} ;
  sRel = 1.7*.......ShoulderArm.Seg.Hand.Finger1.Seg.Metacarpal.DistalJointNode.sRel;
  ARel= RotMat((90*pi/180),x)*RotMat((0*pi/180),y);

  AnySurfTorus Torus = {
    MajorRadius = 0.023;
    MinorRadius = 0.014;
	#if SHOW_HAND_WRAP_EX == ON
   AnyDrawParamSurf drw = {
     RGB = {1, 1, 1};
     Opacity  =0.5;
   };
   #endif
};
};
