 AnyRefNode TorusCenter01_I = {
  viewRefFrame.Visible =Off;
  viewRefFrame.ScaleXYZ ={5.0, 5.0, 5.0} ;
  sRel = ..Scale({0.0,0.0,0.0});
  ARel= RotMat((90*pi/180),x)*RotMat((20*pi/180),y);

  AnySurfTorus Torus01_I = {
    MajorRadius = 0.007;
    MinorRadius = 0.0065;
	#if SHOW_HAND_WRAP_IN == ON
   AnyDrawParamSurf drw = {
     RGB = {1, 1, 1};
     Opacity  =0.5;
   };
   #endif
};
};

AnyRefNode TorusCenter01_II = {
  viewRefFrame.Visible =Off;
  viewRefFrame.ScaleXYZ ={5.0, 5.0, 5.0} ;
  sRel = ..Scale({0.0,0.0,0.0});
  ARel= RotMat((90*pi/180),x)*RotMat((20*pi/180),y);

  AnySurfTorus Torus01_II = {
    MajorRadius = 0.006;
    MinorRadius = 0.0058;
	 #if SHOW_HAND_WRAP_IN == ON
      AnyDrawParamSurf drw = {
     RGB = {1, 1, 1};
     Opacity  =0.5;
     };
     #endif
};
};

AnyRefNode TorusCenter01_III = {
  viewRefFrame.Visible =Off;
  viewRefFrame.ScaleXYZ ={5.0, 5.0, 5.0} ;
  sRel = ..Scale({0.0,0.0,0.0});
  ARel= RotMat((90*pi/180),x)*RotMat((20*pi/180),y);

  AnySurfTorus Torus01_III = {
    MajorRadius = 0.005;
    MinorRadius = 0.0048;
	#if SHOW_HAND_WRAP_IN == ON
   AnyDrawParamSurf drw = {
     RGB = {1, 1, 1};
     Opacity  =0.5;
   };
   #endif
};
};
