 AnyRefNode TorusCenter = {
  viewRefFrame.Visible =Off;
  viewRefFrame.ScaleXYZ ={5.0, 5.0, 5.0} ;
  sRel = ..Scale({0.0,0.0,0.0});
  ARel= RotMat((0*pi/180),x)*RotMat((90*pi/180),y);

  AnySurfTorus Torus = {
    MajorRadius = 0.01;
    MinorRadius = 0.0095;
//	#if SHOW_WRAPPING_SURF_PLZEN == ON
   AnyDrawParamSurf drw = {
     RGB = {1, 1, 1};
     Opacity  =0.5;
   };
//   #endi
};
};
