  Left = {
    AnyFolder Arm = {

    AnyFolder SCPronation={

      // Change the following variables to adjust the moment arm study
      AnyVector RangeOfMotion = DesignVar({-20,20});
      //AnyVar ScapulaThoraxProtraction = DesignVar(0);
      //AnyVar ScapulaThoraxElevation = DesignVar(0);
      AnyVar SCElevation = DesignVar(0);
      AnyVar SCAxialRotation = DesignVar(0);
      AnyVar GHFlexion = DesignVar(0);
      AnyVar GHAbduction = DesignVar(0);
      AnyVar GHExternalRotation = DesignVar(0);
      AnyVar ElbowFlexion = DesignVar(0);
      AnyVar ElbowPronation = DesignVar(0);
      AnyVar WristFlexion = DesignVar(0);
      AnyVar WristAbduction = DesignVar(0);
      AnyVar CMC1Flexion = DesignVar(0);
      AnyVar CMC1Abduction = DesignVar(0);
      AnyVar MCP1Flexion = DesignVar(0);
      AnyVar MCP1Abduction = DesignVar(0);
      AnyVar DIP1 = DesignVar(0);
      AnyVar MCP2Flexion = DesignVar(0);
      AnyVar MCP2Abduction = DesignVar(0);
      AnyVar PIP2 = DesignVar(0);
      AnyVar DIP2 = DesignVar(0);
      AnyVar MCP3Flexion = DesignVar(0);
      AnyVar MCP3Abduction = DesignVar(0);
      AnyVar PIP3 = DesignVar(0);
      AnyVar DIP3 = DesignVar(0);
      AnyVar MCP4Flexion = DesignVar(0);
      AnyVar MCP4Abduction = DesignVar(0);
      AnyVar PIP4 = DesignVar(0);
      AnyVar DIP4 = DesignVar(0);
      AnyVar MCP5Flexion = DesignVar(0);
      AnyVar MCP5Abduction = DesignVar(0);
      AnyVar PIP5 = DesignVar(0);
      AnyVar DIP5 = DesignVar(0);
      /////////////////////////////////////////

      // The following should not be changed
      AnyFolder &SideHumanFolderRef=....BodyModel.Left;
      AnyFolder &SideHumanInterfaceRef = ....BodyModel.Interface.Left;
      AnyFolder &SideHandInterfaceRef = ....BodyModel.Left.ShoulderArm.Seg.Hand;
      AnyFolder &SideTrunkMusRef = ....BodyModel.Trunk.MusclesSpineLeft;
      #include "EvaluateMomentArmsStudy.any"
      AnyString OutputFileName =  "MomentArms_Arm_Left_SCPronation";
      Model.Drivers = {
        AnyKinEqSimpleDriver ArmDriver= {
          AnyKinMeasure &ref = .ArmMeasure;
          DriverPos = {  ...RangeOfMotion[0], ...SCElevation, ...SCAxialRotation, ...GHFlexion, ...GHAbduction ,...GHExternalRotation ,...ElbowFlexion, ...ElbowPronation, ...WristFlexion ,...WristAbduction,...CMC1Flexion ,...CMC1Abduction ,...MCP1Flexion ,...MCP1Abduction ,...DIP1 ,...MCP2Flexion ,...MCP2Abduction ,...PIP2 ,...DIP2 ,...MCP3Flexion ,...MCP3Abduction ,...PIP3 ,...DIP3 ,...MCP4Flexion ,...MCP4Abduction ,...PIP4 ,...DIP4 ,...MCP5Flexion ,...MCP5Abduction ,...PIP5 ,...DIP5 }*pi/180;
          DriverVel = { ...RangeOfMotion[1]-...RangeOfMotion[0],0,0,0,0,0,0,0,0,0,0,0,0,0,0,0,0,0,0,0,0,0,0,0,0,0,0,0,0,0,0}*pi/180;
        };
        AnyKinEqSimpleDriver CMC2={
          AnyUniversalJoint &ref=  .......BodyModel.Left.ShoulderArm.Seg.Hand.Finger2.Jnt.CMC;
          DriverPos={0,0};
          DriverVel={0,0}*pi/180;
          Reaction.Type={Off,Off};
        };
        AnyKinEqSimpleDriver CMC3={
          AnyUniversalJoint &ref=  .......BodyModel.Left.ShoulderArm.Seg.Hand.Finger3.Jnt.CMC;
          DriverPos={0,0};
          DriverVel={0,0}*pi/180;
          Reaction.Type={Off,Off};
        };
        AnyKinEqSimpleDriver CMC4={
          AnyUniversalJoint &ref=  .......BodyModel.Left.ShoulderArm.Seg.Hand.Finger4.Jnt.CMC;
          DriverPos={0,0};
          DriverVel={0,0}*pi/180;
          Reaction.Type={Off,Off};
        };
        AnyKinEqSimpleDriver CMC5={
          AnyUniversalJoint &ref=  .......BodyModel.Left.ShoulderArm.Seg.Hand.Finger5.Jnt.CMC;
          DriverPos={0,0};
          DriverVel={0,0}*pi/180;
          Reaction.Type={Off,Off};
        };
      };
    };

    AnyFolder SCElevation={

      // Change the following variables to adjust the moment arm study
      AnyVector RangeOfMotion = DesignVar({-20,20});
//      AnyVar ScapulaThoraxProtraction = DesignVar(0);
//      AnyVar ScapulaThoraxElevation = DesignVar(0);
      AnyVar SCPronation = DesignVar(0);
      AnyVar SCAxialRotation = DesignVar(0);
      AnyVar GHFlexion = DesignVar(0);
      AnyVar GHAbduction = DesignVar(0);
      AnyVar GHExternalRotation = DesignVar(0);
      AnyVar ElbowFlexion = DesignVar(0);
      AnyVar ElbowPronation = DesignVar(0);
      AnyVar WristFlexion = DesignVar(0);
      AnyVar WristAbduction = DesignVar(0);
      AnyVar CMC1Flexion = DesignVar(0);
      AnyVar CMC1Abduction = DesignVar(0);
      AnyVar MCP1Flexion = DesignVar(0);
      AnyVar MCP1Abduction = DesignVar(0);
      AnyVar DIP1 = DesignVar(0);
      AnyVar MCP2Flexion = DesignVar(0);
      AnyVar MCP2Abduction = DesignVar(0);
      AnyVar PIP2 = DesignVar(0);
      AnyVar DIP2 = DesignVar(0);
      AnyVar MCP3Flexion = DesignVar(0);
      AnyVar MCP3Abduction = DesignVar(0);
      AnyVar PIP3 = DesignVar(0);
      AnyVar DIP3 = DesignVar(0);
      AnyVar MCP4Flexion = DesignVar(0);
      AnyVar MCP4Abduction = DesignVar(0);
      AnyVar PIP4 = DesignVar(0);
      AnyVar DIP4 = DesignVar(0);
      AnyVar MCP5Flexion = DesignVar(0);
      AnyVar MCP5Abduction = DesignVar(0);
      AnyVar PIP5 = DesignVar(0);
      AnyVar DIP5 = DesignVar(0);
      /////////////////////////////////////////

      // The following should not be changed
      AnyFolder &SideHumanFolderRef=....BodyModel.Left;
      AnyFolder &SideHumanInterfaceRef = ....BodyModel.Interface.Left;
      AnyFolder &SideHandInterfaceRef = ....BodyModel.Left.ShoulderArm.Seg.Hand;
      AnyFolder &SideTrunkMusRef = ....BodyModel.Trunk.MusclesSpineLeft;
      #include "EvaluateMomentArmsStudy.any"
      AnyString OutputFileName =  "MomentArms_Arm_Left_SCElevation";
      Model.Drivers = {
        AnyKinEqSimpleDriver ArmDriver= {
          AnyKinMeasure &ref = .ArmMeasure;
          DriverPos = { ...SCPronation, ...RangeOfMotion[0], ...SCAxialRotation, ...GHFlexion, ...GHAbduction ,...GHExternalRotation ,...ElbowFlexion, ...ElbowPronation, ...WristFlexion ,...WristAbduction,...CMC1Flexion ,...CMC1Abduction ,...MCP1Flexion ,...MCP1Abduction ,...DIP1 ,...MCP2Flexion ,...MCP2Abduction ,...PIP2 ,...DIP2 ,...MCP3Flexion ,...MCP3Abduction ,...PIP3 ,...DIP3 ,...MCP4Flexion ,...MCP4Abduction ,...PIP4 ,...DIP4 ,...MCP5Flexion ,...MCP5Abduction ,...PIP5 ,...DIP5 }*pi/180;
          DriverVel = { 0, ...RangeOfMotion[1]-...RangeOfMotion[0],0,0,0,0,0,0,0,0,0,0,0,0,0,0,0,0,0,0,0,0,0,0,0,0,0,0,0,0,0}*pi/180;
        };
        AnyKinEqSimpleDriver CMC2={
          AnyUniversalJoint &ref=  .......BodyModel.Left.ShoulderArm.Seg.Hand.Finger2.Jnt.CMC;
          DriverPos={0,0};
          DriverVel={0,0}*pi/180;
          Reaction.Type={Off,Off};
        };
        AnyKinEqSimpleDriver CMC3={
          AnyUniversalJoint &ref=  .......BodyModel.Left.ShoulderArm.Seg.Hand.Finger3.Jnt.CMC;
          DriverPos={0,0};
          DriverVel={0,0}*pi/180;
          Reaction.Type={Off,Off};
        };
        AnyKinEqSimpleDriver CMC4={
          AnyUniversalJoint &ref=  .......BodyModel.Left.ShoulderArm.Seg.Hand.Finger4.Jnt.CMC;
          DriverPos={0,0};
          DriverVel={0,0}*pi/180;
          Reaction.Type={Off,Off};
        };
        AnyKinEqSimpleDriver CMC5={
          AnyUniversalJoint &ref=  .......BodyModel.Left.ShoulderArm.Seg.Hand.Finger5.Jnt.CMC;
          DriverPos={0,0};
          DriverVel={0,0}*pi/180;
          Reaction.Type={Off,Off};
        };

      };
    };

    AnyFolder SCAxialRotation={

      // Change the following variables to adjust the moment arm study
      AnyVector RangeOfMotion = DesignVar({-20,20});

      AnyVar SCPronation = DesignVar(0);
      AnyVar SCElevation = DesignVar(0);
      AnyVar GHFlexion = DesignVar(0);
      AnyVar GHAbduction = DesignVar(0);
      AnyVar GHExternalRotation = DesignVar(0);
      AnyVar ElbowFlexion = DesignVar(0);
      AnyVar ElbowPronation = DesignVar(0);
      AnyVar WristFlexion = DesignVar(0);
      AnyVar WristAbduction = DesignVar(0);
      AnyVar CMC1Flexion = DesignVar(0);
      AnyVar CMC1Abduction = DesignVar(0);
      AnyVar MCP1Flexion = DesignVar(0);
      AnyVar MCP1Abduction = DesignVar(0);
      AnyVar DIP1 = DesignVar(0);
      AnyVar MCP2Flexion = DesignVar(0);
      AnyVar MCP2Abduction = DesignVar(0);
      AnyVar PIP2 = DesignVar(0);
      AnyVar DIP2 = DesignVar(0);
      AnyVar MCP3Flexion = DesignVar(0);
      AnyVar MCP3Abduction = DesignVar(0);
      AnyVar PIP3 = DesignVar(0);
      AnyVar DIP3 = DesignVar(0);
      AnyVar MCP4Flexion = DesignVar(0);
      AnyVar MCP4Abduction = DesignVar(0);
      AnyVar PIP4 = DesignVar(0);
      AnyVar DIP4 = DesignVar(0);
      AnyVar MCP5Flexion = DesignVar(0);
      AnyVar MCP5Abduction = DesignVar(0);
      AnyVar PIP5 = DesignVar(0);
      AnyVar DIP5 = DesignVar(0);
      /////////////////////////////////////////

      // The following should not be changed
      AnyFolder &SideHumanFolderRef=....BodyModel.Left;
      AnyFolder &SideHumanInterfaceRef = ....BodyModel.Interface.Left;
      AnyFolder &SideHandInterfaceRef = ....BodyModel.Left.ShoulderArm.Seg.Hand;
      AnyFolder &SideTrunkMusRef = ....BodyModel.Trunk.MusclesSpineLeft;
      #include "EvaluateMomentArmsStudy.any"
      AnyString OutputFileName =  "MomentArms_Arm_Left_SCAxialRotation";
      Model.Drivers = {
        AnyKinEqSimpleDriver ArmDriver= {
          AnyKinMeasure &ref = .ArmMeasure;
          DriverPos = { ...SCPronation, ...SCElevation, ...RangeOfMotion[0], ...GHFlexion, ...GHAbduction ,...GHExternalRotation ,...ElbowFlexion, ...ElbowPronation, ...WristFlexion ,...WristAbduction,...CMC1Flexion ,...CMC1Abduction ,...MCP1Flexion ,...MCP1Abduction ,...DIP1 ,...MCP2Flexion ,...MCP2Abduction ,...PIP2 ,...DIP2 ,...MCP3Flexion ,...MCP3Abduction ,...PIP3 ,...DIP3 ,...MCP4Flexion ,...MCP4Abduction ,...PIP4 ,...DIP4 ,...MCP5Flexion ,...MCP5Abduction ,...PIP5 ,...DIP5 }*pi/180;
          DriverVel = { 0, 0, ...RangeOfMotion[1]-...RangeOfMotion[0],0,0,0,0,0,0,0,0,0,0,0,0,0,0,0,0,0,0,0,0,0,0,0,0,0,0,0,0}*pi/180;
        };
        AnyKinEqSimpleDriver CMC2={
          AnyUniversalJoint &ref=  .......BodyModel.Left.ShoulderArm.Seg.Hand.Finger2.Jnt.CMC;
          DriverPos={0,0};
          DriverVel={0,0}*pi/180;
          Reaction.Type={Off,Off};
        };
        AnyKinEqSimpleDriver CMC3={
          AnyUniversalJoint &ref=  .......BodyModel.Left.ShoulderArm.Seg.Hand.Finger3.Jnt.CMC;
          DriverPos={0,0};
          DriverVel={0,0}*pi/180;
          Reaction.Type={Off,Off};
        };
        AnyKinEqSimpleDriver CMC4={
          AnyUniversalJoint &ref=  .......BodyModel.Left.ShoulderArm.Seg.Hand.Finger4.Jnt.CMC;
          DriverPos={0,0};
          DriverVel={0,0}*pi/180;
          Reaction.Type={Off,Off};
        };
        AnyKinEqSimpleDriver CMC5={
          AnyUniversalJoint &ref=  .......BodyModel.Left.ShoulderArm.Seg.Hand.Finger5.Jnt.CMC;
          DriverPos={0,0};
          DriverVel={0,0}*pi/180;
          Reaction.Type={Off,Off};
        };

      };
    };

    AnyFolder GHFlexion={

      // Change the following variables to adjust the moment arm study
      AnyVector RangeOfMotion = DesignVar({-30,70});

      AnyVar SCPronation = DesignVar(0);
      AnyVar SCElevation = DesignVar(0);
      AnyVar SCAxialRotation = DesignVar(0);
      AnyVar GHAbduction = DesignVar(0);
      AnyVar GHExternalRotation = DesignVar(0);
      AnyVar ElbowFlexion = DesignVar(0);
      AnyVar ElbowPronation = DesignVar(0);
      AnyVar WristFlexion = DesignVar(0);
      AnyVar WristAbduction = DesignVar(0);
      AnyVar CMC1Flexion = DesignVar(0);
      AnyVar CMC1Abduction = DesignVar(0);
      AnyVar MCP1Flexion = DesignVar(0);
      AnyVar MCP1Abduction = DesignVar(0);
      AnyVar DIP1 = DesignVar(0);
      AnyVar MCP2Flexion = DesignVar(0);
      AnyVar MCP2Abduction = DesignVar(0);
      AnyVar PIP2 = DesignVar(0);
      AnyVar DIP2 = DesignVar(0);
      AnyVar MCP3Flexion = DesignVar(0);
      AnyVar MCP3Abduction = DesignVar(0);
      AnyVar PIP3 = DesignVar(0);
      AnyVar DIP3 = DesignVar(0);
      AnyVar MCP4Flexion = DesignVar(0);
      AnyVar MCP4Abduction = DesignVar(0);
      AnyVar PIP4 = DesignVar(0);
      AnyVar DIP4 = DesignVar(0);
      AnyVar MCP5Flexion = DesignVar(0);
      AnyVar MCP5Abduction = DesignVar(0);
      AnyVar PIP5 = DesignVar(0);
      AnyVar DIP5 = DesignVar(0);
      /////////////////////////////////////////

      // The following should not be changed
      AnyFolder &SideHumanFolderRef=....BodyModel.Left;
      AnyFolder &SideHumanInterfaceRef = ....BodyModel.Interface.Left;
      AnyFolder &SideHandInterfaceRef = ....BodyModel.Left.ShoulderArm.Seg.Hand;
      AnyFolder &SideTrunkMusRef = ....BodyModel.Trunk.MusclesSpineLeft;
      #include "EvaluateMomentArmsStudy.any"
      AnyString OutputFileName =  "MomentArms_Arm_Left_GHFlexion";
      Model.Drivers = {
        AnyKinEqSimpleDriver ArmDriver= {
          AnyKinMeasure &ref = .ArmMeasure;
          DriverPos = { ...SCPronation, ...SCElevation, ...SCAxialRotation, ...RangeOfMotion[0],...GHAbduction ,...GHExternalRotation ,...ElbowFlexion, ...ElbowPronation, ...WristFlexion ,...WristAbduction,...CMC1Flexion ,...CMC1Abduction ,...MCP1Flexion ,...MCP1Abduction ,...DIP1 ,...MCP2Flexion ,...MCP2Abduction ,...PIP2 ,...DIP2 ,...MCP3Flexion ,...MCP3Abduction ,...PIP3 ,...DIP3 ,...MCP4Flexion ,...MCP4Abduction ,...PIP4 ,...DIP4 ,...MCP5Flexion ,...MCP5Abduction ,...PIP5 ,...DIP5 }*pi/180;
          DriverVel = { 0, 0, 0, ...RangeOfMotion[1]-...RangeOfMotion[0],0,0,0,0,0,0,0,0,0,0,0,0,0,0,0,0,0,0,0,0,0,0,0,0,0,0,0}*pi/180;
        };
        AnyKinEqSimpleDriver CMC2={
          AnyUniversalJoint &ref=  .......BodyModel.Left.ShoulderArm.Seg.Hand.Finger2.Jnt.CMC;
          DriverPos={0,0};
          DriverVel={0,0}*pi/180;
          Reaction.Type={Off,Off};
        };
        AnyKinEqSimpleDriver CMC3={
          AnyUniversalJoint &ref=  .......BodyModel.Left.ShoulderArm.Seg.Hand.Finger3.Jnt.CMC;
          DriverPos={0,0};
          DriverVel={0,0}*pi/180;
          Reaction.Type={Off,Off};
        };
        AnyKinEqSimpleDriver CMC4={
          AnyUniversalJoint &ref=  .......BodyModel.Left.ShoulderArm.Seg.Hand.Finger4.Jnt.CMC;
          DriverPos={0,0};
          DriverVel={0,0}*pi/180;
          Reaction.Type={Off,Off};
        };
        AnyKinEqSimpleDriver CMC5={
          AnyUniversalJoint &ref=  .......BodyModel.Left.ShoulderArm.Seg.Hand.Finger5.Jnt.CMC;
          DriverPos={0,0};
          DriverVel={0,0}*pi/180;
          Reaction.Type={Off,Off};
        };

      };
    };

    AnyFolder GHAbduction={
      // Change the following variables to adjust the moment arm study
      AnyVector RangeOfMotion = DesignVar({-10,90});

      AnyVar SCPronation = DesignVar(0);
      AnyVar SCElevation = DesignVar(0);
      AnyVar SCAxialRotation = DesignVar(0);
      AnyVar GHFlexion = DesignVar(0);
      AnyVar GHExternalRotation = DesignVar(0);
      AnyVar ElbowFlexion = DesignVar(0);
      AnyVar ElbowPronation = DesignVar(0);
      AnyVar WristFlexion = DesignVar(0);
      AnyVar WristAbduction = DesignVar(0);
      AnyVar CMC1Flexion = DesignVar(0);
      AnyVar CMC1Abduction = DesignVar(0);
      AnyVar MCP1Flexion = DesignVar(0);
      AnyVar MCP1Abduction = DesignVar(0);
      AnyVar DIP1 = DesignVar(0);
      AnyVar MCP2Flexion = DesignVar(0);
      AnyVar MCP2Abduction = DesignVar(0);
      AnyVar PIP2 = DesignVar(0);
      AnyVar DIP2 = DesignVar(0);
      AnyVar MCP3Flexion = DesignVar(0);
      AnyVar MCP3Abduction = DesignVar(0);
      AnyVar PIP3 = DesignVar(0);
      AnyVar DIP3 = DesignVar(0);
      AnyVar MCP4Flexion = DesignVar(0);
      AnyVar MCP4Abduction = DesignVar(0);
      AnyVar PIP4 = DesignVar(0);
      AnyVar DIP4 = DesignVar(0);
      AnyVar MCP5Flexion = DesignVar(0);
      AnyVar MCP5Abduction = DesignVar(0);
      AnyVar PIP5 = DesignVar(0);
      AnyVar DIP5 = DesignVar(0);
      /////////////////////////////////////////

      AnyFolder &SideHumanFolderRef=....BodyModel.Left;
      AnyFolder &SideHumanInterfaceRef = ....BodyModel.Interface.Left;
      AnyFolder &SideHandInterfaceRef = ....BodyModel.Left.ShoulderArm.Seg.Hand;
      AnyFolder &SideTrunkMusRef = ....BodyModel.Trunk.MusclesSpineLeft;
      #include "EvaluateMomentArmsStudy.any"
      AnyString OutputFile =  "MomentArms_LegTD_Left_GHAbduction";
      Model.Drivers = {
        AnyKinEqSimpleDriver ArmDriver= {
          AnyKinMeasure &ref = .ArmMeasure;
          DriverPos = { ...SCPronation, ...SCElevation, ...SCAxialRotation, ...GHFlexion,...RangeOfMotion[0],...GHExternalRotation ,...ElbowFlexion, ...ElbowPronation, ...WristFlexion ,...WristAbduction,...CMC1Flexion ,...CMC1Abduction ,...MCP1Flexion ,...MCP1Abduction ,...DIP1 ,...MCP2Flexion ,...MCP2Abduction ,...PIP2 ,...DIP2 ,...MCP3Flexion ,...MCP3Abduction ,...PIP3 ,...DIP3 ,...MCP4Flexion ,...MCP4Abduction ,...PIP4 ,...DIP4 ,...MCP5Flexion ,...MCP5Abduction ,...PIP5 ,...DIP5 }*pi/180;
          DriverVel = { 0, 0, 0, 0,...RangeOfMotion[1]-...RangeOfMotion[0],0,0,0,0,0,0,0,0,0,0,0,0,0,0,0,0,0,0,0,0,0,0,0,0,0,0}*pi/180;
        };
        AnyKinEqSimpleDriver CMC2={
          AnyUniversalJoint &ref=  .......BodyModel.Left.ShoulderArm.Seg.Hand.Finger2.Jnt.CMC;
          DriverPos={0,0};
          DriverVel={0,0}*pi/180;
          Reaction.Type={Off,Off};
        };
        AnyKinEqSimpleDriver CMC3={
          AnyUniversalJoint &ref=  .......BodyModel.Left.ShoulderArm.Seg.Hand.Finger3.Jnt.CMC;
          DriverPos={0,0};
          DriverVel={0,0}*pi/180;
          Reaction.Type={Off,Off};
        };
        AnyKinEqSimpleDriver CMC4={
          AnyUniversalJoint &ref=  .......BodyModel.Left.ShoulderArm.Seg.Hand.Finger4.Jnt.CMC;
          DriverPos={0,0};
          DriverVel={0,0}*pi/180;
          Reaction.Type={Off,Off};
        };
        AnyKinEqSimpleDriver CMC5={
          AnyUniversalJoint &ref=  .......BodyModel.Left.ShoulderArm.Seg.Hand.Finger5.Jnt.CMC;
          DriverPos={0,0};
          DriverVel={0,0}*pi/180;
          Reaction.Type={Off,Off};
        };

      };
    };

    AnyFolder GHExternalRotation={
      // Change the following variables to adjust the moment arm study
      AnyVector RangeOfMotion = DesignVar({-40,40});

      AnyVar SCPronation = DesignVar(0);
      AnyVar SCElevation = DesignVar(0);
      AnyVar SCAxialRotation = DesignVar(0);
      AnyVar GHFlexion = DesignVar(0);
      AnyVar GHAbduction = DesignVar(0);
      AnyVar ElbowFlexion = DesignVar(0);
      AnyVar ElbowPronation = DesignVar(0);
      AnyVar WristFlexion = DesignVar(0);
      AnyVar WristAbduction = DesignVar(0);
      AnyVar CMC1Flexion = DesignVar(0);
      AnyVar CMC1Abduction = DesignVar(0);
      AnyVar MCP1Flexion = DesignVar(0);
      AnyVar MCP1Abduction = DesignVar(0);
      AnyVar DIP1 = DesignVar(0);
      AnyVar MCP2Flexion = DesignVar(0);
      AnyVar MCP2Abduction = DesignVar(0);
      AnyVar PIP2 = DesignVar(0);
      AnyVar DIP2 = DesignVar(0);
      AnyVar MCP3Flexion = DesignVar(0);
      AnyVar MCP3Abduction = DesignVar(0);
      AnyVar PIP3 = DesignVar(0);
      AnyVar DIP3 = DesignVar(0);
      AnyVar MCP4Flexion = DesignVar(0);
      AnyVar MCP4Abduction = DesignVar(0);
      AnyVar PIP4 = DesignVar(0);
      AnyVar DIP4 = DesignVar(0);
      AnyVar MCP5Flexion = DesignVar(0);
      AnyVar MCP5Abduction = DesignVar(0);
      AnyVar PIP5 = DesignVar(0);
      AnyVar DIP5 = DesignVar(0);
      /////////////////////////////////////////

      AnyFolder &SideHumanFolderRef=....BodyModel.Left;
      AnyFolder &SideHumanInterfaceRef = ....BodyModel.Interface.Left;
      AnyFolder &SideHandInterfaceRef = ....BodyModel.Left.ShoulderArm.Seg.Hand;
      AnyFolder &SideTrunkMusRef = ....BodyModel.Trunk.MusclesSpineLeft;
      #include "EvaluateMomentArmsStudy.any"
      AnyString OutputFile =  "MomentArms_LegTD_Left_GHExternalRotation";
      Model.Drivers = {
        AnyKinEqSimpleDriver ArmDriver= {
          AnyKinMeasure &ref = .ArmMeasure;
          DriverPos = { ...SCPronation, ...SCElevation, ...SCAxialRotation, ...GHFlexion,...GHAbduction,...RangeOfMotion[0],...ElbowFlexion, ...ElbowPronation, ...WristFlexion ,...WristAbduction,...CMC1Flexion ,...CMC1Abduction ,...MCP1Flexion ,...MCP1Abduction ,...DIP1 ,...MCP2Flexion ,...MCP2Abduction ,...PIP2 ,...DIP2 ,...MCP3Flexion ,...MCP3Abduction ,...PIP3 ,...DIP3 ,...MCP4Flexion ,...MCP4Abduction ,...PIP4 ,...DIP4 ,...MCP5Flexion ,...MCP5Abduction ,...PIP5 ,...DIP5 }*pi/180;
          DriverVel = { 0, 0, 0, 0,0,...RangeOfMotion[1]-...RangeOfMotion[0],0,0,0,0,0,0,0,0,0,0,0,0,0,0,0,0,0,0,0,0,0,0,0,0,0}*pi/180;
        };
        AnyKinEqSimpleDriver CMC2={
          AnyUniversalJoint &ref=  .......BodyModel.Left.ShoulderArm.Seg.Hand.Finger2.Jnt.CMC;
          DriverPos={0,0};
          DriverVel={0,0}*pi/180;
          Reaction.Type={Off,Off};
        };
        AnyKinEqSimpleDriver CMC3={
          AnyUniversalJoint &ref=  .......BodyModel.Left.ShoulderArm.Seg.Hand.Finger3.Jnt.CMC;
          DriverPos={0,0};
          DriverVel={0,0}*pi/180;
          Reaction.Type={Off,Off};
        };
        AnyKinEqSimpleDriver CMC4={
          AnyUniversalJoint &ref=  .......BodyModel.Left.ShoulderArm.Seg.Hand.Finger4.Jnt.CMC;
          DriverPos={0,0};
          DriverVel={0,0}*pi/180;
          Reaction.Type={Off,Off};
        };
        AnyKinEqSimpleDriver CMC5={
          AnyUniversalJoint &ref=  .......BodyModel.Left.ShoulderArm.Seg.Hand.Finger5.Jnt.CMC;
          DriverPos={0,0};
          DriverVel={0,0}*pi/180;
          Reaction.Type={Off,Off};
        };

      };
    };

    AnyFolder ElbowFlexion={
      // Change the following variables to adjust the moment arm study
      AnyVector RangeOfMotion = DesignVar({0,110});

      AnyVar SCPronation = DesignVar(0);
      AnyVar SCElevation = DesignVar(0);
      AnyVar SCAxialRotation = DesignVar(0);
      AnyVar GHFlexion = DesignVar(0);
      AnyVar GHAbduction = DesignVar(0);
      AnyVar GHExternalRotation = DesignVar(0);
      AnyVar ElbowPronation = DesignVar(0);
      AnyVar WristFlexion = DesignVar(0);
      AnyVar WristAbduction = DesignVar(0);
      AnyVar CMC1Flexion = DesignVar(0);
      AnyVar CMC1Abduction = DesignVar(0);
      AnyVar MCP1Flexion = DesignVar(0);
      AnyVar MCP1Abduction = DesignVar(0);
      AnyVar DIP1 = DesignVar(0);
      AnyVar MCP2Flexion = DesignVar(0);
      AnyVar MCP2Abduction = DesignVar(0);
      AnyVar PIP2 = DesignVar(0);
      AnyVar DIP2 = DesignVar(0);
      AnyVar MCP3Flexion = DesignVar(0);
      AnyVar MCP3Abduction = DesignVar(0);
      AnyVar PIP3 = DesignVar(0);
      AnyVar DIP3 = DesignVar(0);
      AnyVar MCP4Flexion = DesignVar(0);
      AnyVar MCP4Abduction = DesignVar(0);
      AnyVar PIP4 = DesignVar(0);
      AnyVar DIP4 = DesignVar(0);
      AnyVar MCP5Flexion = DesignVar(0);
      AnyVar MCP5Abduction = DesignVar(0);
      AnyVar PIP5 = DesignVar(0);
      AnyVar DIP5 = DesignVar(0);
      /////////////////////////////////////////

      AnyFolder &SideHumanFolderRef=....BodyModel.Left;
      AnyFolder &SideHumanInterfaceRef = ....BodyModel.Interface.Left;
      AnyFolder &SideHandInterfaceRef = ....BodyModel.Left.ShoulderArm.Seg.Hand;
      AnyFolder &SideTrunkMusRef = ....BodyModel.Trunk.MusclesSpineLeft;
      #include "EvaluateMomentArmsStudy.any"
      AnyString OutputFile =  "MomentArms_LegTD_Left_ElbowFlexion";
      Model.Drivers = {
        AnyKinEqSimpleDriver ArmDriver= {
          AnyKinMeasure &ref = .ArmMeasure;
          DriverPos = { ...SCPronation, ...SCElevation, ...SCAxialRotation, ...GHFlexion,...GHAbduction ,...GHExternalRotation ,...RangeOfMotion[0], ...ElbowPronation, ...WristFlexion ,...WristAbduction,...CMC1Flexion ,...CMC1Abduction ,...MCP1Flexion ,...MCP1Abduction ,...DIP1 ,...MCP2Flexion ,...MCP2Abduction ,...PIP2 ,...DIP2 ,...MCP3Flexion ,...MCP3Abduction ,...PIP3 ,...DIP3 ,...MCP4Flexion ,...MCP4Abduction ,...PIP4 ,...DIP4 ,...MCP5Flexion ,...MCP5Abduction ,...PIP5 ,...DIP5 }*pi/180;
          DriverVel = { 0, 0, 0, 0,0,0,...RangeOfMotion[1]-...RangeOfMotion[0],0,0,0,0,0,0,0,0,0,0,0,0,0,0,0,0,0,0,0,0,0,0,0,0}*pi/180;
        };
        AnyKinEqSimpleDriver CMC2={
          AnyUniversalJoint &ref=  .......BodyModel.Left.ShoulderArm.Seg.Hand.Finger2.Jnt.CMC;
          DriverPos={0,0};
          DriverVel={0,0}*pi/180;
          Reaction.Type={Off,Off};
        };
        AnyKinEqSimpleDriver CMC3={
          AnyUniversalJoint &ref=  .......BodyModel.Left.ShoulderArm.Seg.Hand.Finger3.Jnt.CMC;
          DriverPos={0,0};
          DriverVel={0,0}*pi/180;
          Reaction.Type={Off,Off};
        };
        AnyKinEqSimpleDriver CMC4={
          AnyUniversalJoint &ref=  .......BodyModel.Left.ShoulderArm.Seg.Hand.Finger4.Jnt.CMC;
          DriverPos={0,0};
          DriverVel={0,0}*pi/180;
          Reaction.Type={Off,Off};
        };
        AnyKinEqSimpleDriver CMC5={
          AnyUniversalJoint &ref=  .......BodyModel.Left.ShoulderArm.Seg.Hand.Finger5.Jnt.CMC;
          DriverPos={0,0};
          DriverVel={0,0}*pi/180;
          Reaction.Type={Off,Off};
        };

      };
    };

    AnyFolder ElbowPronation={
      // Change the following variables to adjust the moment arm study
      AnyVector RangeOfMotion = DesignVar({-40,40});

      AnyVar SCPronation = DesignVar(0);
      AnyVar SCElevation = DesignVar(0);
      AnyVar SCAxialRotation = DesignVar(0);
      AnyVar GHFlexion = DesignVar(0);
      AnyVar GHAbduction = DesignVar(0);
      AnyVar GHExternalRotation = DesignVar(0);
      AnyVar ElbowFlexion = DesignVar(0);
      AnyVar WristFlexion = DesignVar(0);
      AnyVar WristAbduction = DesignVar(0);
      AnyVar CMC1Flexion = DesignVar(0);
      AnyVar CMC1Abduction = DesignVar(0);
      AnyVar MCP1Flexion = DesignVar(0);
      AnyVar MCP1Abduction = DesignVar(0);
      AnyVar DIP1 = DesignVar(0);
      AnyVar MCP2Flexion = DesignVar(0);
      AnyVar MCP2Abduction = DesignVar(0);
      AnyVar PIP2 = DesignVar(0);
      AnyVar DIP2 = DesignVar(0);
      AnyVar MCP3Flexion = DesignVar(0);
      AnyVar MCP3Abduction = DesignVar(0);
      AnyVar PIP3 = DesignVar(0);
      AnyVar DIP3 = DesignVar(0);
      AnyVar MCP4Flexion = DesignVar(0);
      AnyVar MCP4Abduction = DesignVar(0);
      AnyVar PIP4 = DesignVar(0);
      AnyVar DIP4 = DesignVar(0);
      AnyVar MCP5Flexion = DesignVar(0);
      AnyVar MCP5Abduction = DesignVar(0);
      AnyVar PIP5 = DesignVar(0);
      AnyVar DIP5 = DesignVar(0);
      /////////////////////////////////////////

      AnyFolder &SideHumanFolderRef=....BodyModel.Left;
      AnyFolder &SideHumanInterfaceRef = ....BodyModel.Interface.Left;
      AnyFolder &SideHandInterfaceRef = ....BodyModel.Left.ShoulderArm.Seg.Hand;
      AnyFolder &SideTrunkMusRef = ....BodyModel.Trunk.MusclesSpineLeft;
      #include "EvaluateMomentArmsStudy.any"
      AnyString OutputFile =  "MomentArms_LegTD_Left_ElbowFlexion";
      Model.Drivers = {
        AnyKinEqSimpleDriver ArmDriver= {
          AnyKinMeasure &ref = .ArmMeasure;
          DriverPos = { ...SCPronation, ...SCElevation, ...SCAxialRotation, ...GHFlexion,...GHAbduction ,...GHExternalRotation , ...ElbowFlexion, ...RangeOfMotion[0], ...WristFlexion ,...WristAbduction,...CMC1Flexion ,...CMC1Abduction ,...MCP1Flexion ,...MCP1Abduction ,...DIP1 ,...MCP2Flexion ,...MCP2Abduction ,...PIP2 ,...DIP2 ,...MCP3Flexion ,...MCP3Abduction ,...PIP3 ,...DIP3 ,...MCP4Flexion ,...MCP4Abduction ,...PIP4 ,...DIP4 ,...MCP5Flexion ,...MCP5Abduction ,...PIP5 ,...DIP5 }*pi/180;
          DriverVel = { 0, 0, 0, 0,0,0,0,...RangeOfMotion[1]-...RangeOfMotion[0],0,0,0,0,0,0,0,0,0,0,0,0,0,0,0,0,0,0,0,0,0,0,0}*pi/180;
        };
        AnyKinEqSimpleDriver CMC2={
          AnyUniversalJoint &ref=  .......BodyModel.Left.ShoulderArm.Seg.Hand.Finger2.Jnt.CMC;
          DriverPos={0,0};
          DriverVel={0,0}*pi/180;
          Reaction.Type={Off,Off};
        };
        AnyKinEqSimpleDriver CMC3={
          AnyUniversalJoint &ref=  .......BodyModel.Left.ShoulderArm.Seg.Hand.Finger3.Jnt.CMC;
          DriverPos={0,0};
          DriverVel={0,0}*pi/180;
          Reaction.Type={Off,Off};
        };
        AnyKinEqSimpleDriver CMC4={
          AnyUniversalJoint &ref=  .......BodyModel.Left.ShoulderArm.Seg.Hand.Finger4.Jnt.CMC;
          DriverPos={0,0};
          DriverVel={0,0}*pi/180;
          Reaction.Type={Off,Off};
        };
        AnyKinEqSimpleDriver CMC5={
          AnyUniversalJoint &ref=  .......BodyModel.Left.ShoulderArm.Seg.Hand.Finger5.Jnt.CMC;
          DriverPos={0,0};
          DriverVel={0,0}*pi/180;
          Reaction.Type={Off,Off};
        };

      };
    };


    AnyFolder WristFlexion ={
      AnyVector RangeOfMotion = DesignVar({-30,90});

      AnyVar SCPronation = DesignVar(0);
      AnyVar SCElevation = DesignVar(0);
      AnyVar SCAxialRotation = DesignVar(0);
      AnyVar GHFlexion = DesignVar(0);
      AnyVar GHAbduction = DesignVar(0);
      AnyVar GHExternalRotation = DesignVar(0);
      AnyVar ElbowFlexion = DesignVar(0);
      AnyVar ElbowPronation = DesignVar(0);
      AnyVar WristAbduction = DesignVar(0);
      AnyVar CMC1Flexion = DesignVar(0);
      AnyVar CMC1Abduction = DesignVar(0);
      AnyVar MCP1Flexion = DesignVar(0);
      AnyVar MCP1Abduction = DesignVar(0);
      AnyVar DIP1 = DesignVar(0);
      AnyVar MCP2Flexion = DesignVar(0);
      AnyVar MCP2Abduction = DesignVar(0);
      AnyVar PIP2 = DesignVar(0);
      AnyVar DIP2 = DesignVar(0);
      AnyVar MCP3Flexion = DesignVar(0);
      AnyVar MCP3Abduction = DesignVar(0);
      AnyVar PIP3 = DesignVar(0);
      AnyVar DIP3 = DesignVar(0);
      AnyVar MCP4Flexion = DesignVar(0);
      AnyVar MCP4Abduction = DesignVar(0);
      AnyVar PIP4 = DesignVar(0);
      AnyVar DIP4 = DesignVar(0);
      AnyVar MCP5Flexion = DesignVar(0);
      AnyVar MCP5Abduction = DesignVar(0);
      AnyVar PIP5 = DesignVar(0);
      AnyVar DIP5 = DesignVar(0);
      /////////////////////////////////////////

      AnyFolder &SideHumanFolderRef=....BodyModel.Left;
      AnyFolder &SideHumanInterfaceRef = ....BodyModel.Interface.Left;
      AnyFolder &SideHandInterfaceRef = ....BodyModel.Left.ShoulderArm.Seg.Hand;
      AnyFolder &SideTrunkMusRef = ....BodyModel.Trunk.MusclesSpineLeft;
      #include "EvaluateMomentArmsStudy.any"
      AnyString OutputFile =  "MomentArms_LegTD_Left_WristFlexion";
      Model.Drivers = {
        AnyKinEqSimpleDriver ArmDriver= {
          AnyKinMeasure &ref = .ArmMeasure;
          DriverPos = { ...SCPronation, ...SCElevation, ...SCAxialRotation, ...GHFlexion,...GHAbduction ,...GHExternalRotation ,...ElbowFlexion, ...ElbowPronation, ...RangeOfMotion[0],...WristAbduction,...CMC1Flexion ,...CMC1Abduction ,...MCP1Flexion ,...MCP1Abduction ,...DIP1 ,...MCP2Flexion ,...MCP2Abduction ,...PIP2 ,...DIP2 ,...MCP3Flexion ,...MCP3Abduction ,...PIP3 ,...DIP3 ,...MCP4Flexion ,...MCP4Abduction ,...PIP4 ,...DIP4 ,...MCP5Flexion ,...MCP5Abduction ,...PIP5 ,...DIP5 }*pi/180;
          DriverVel = { 0, 0, 0, 0,0,0,0,0,...RangeOfMotion[1]-...RangeOfMotion[0],0,0,0,0,0,0,0,0,0,0,0,0,0,0,0,0,0,0,0,0,0,0}*pi/180;
        };
        AnyKinEqSimpleDriver CMC2={
          AnyUniversalJoint &ref=  .......BodyModel.Left.ShoulderArm.Seg.Hand.Finger2.Jnt.CMC;
          DriverPos={0,0};
          DriverVel={0,0}*pi/180;
          Reaction.Type={Off,Off};
        };
        AnyKinEqSimpleDriver CMC3={
          AnyUniversalJoint &ref=  .......BodyModel.Left.ShoulderArm.Seg.Hand.Finger3.Jnt.CMC;
          DriverPos={0,0};
          DriverVel={0,0}*pi/180;
          Reaction.Type={Off,Off};
        };
        AnyKinEqSimpleDriver CMC4={
          AnyUniversalJoint &ref=  .......BodyModel.Left.ShoulderArm.Seg.Hand.Finger4.Jnt.CMC;
          DriverPos={0,0};
          DriverVel={0,0}*pi/180;
          Reaction.Type={Off,Off};
        };
        AnyKinEqSimpleDriver CMC5={
          AnyUniversalJoint &ref=  .......BodyModel.Left.ShoulderArm.Seg.Hand.Finger5.Jnt.CMC;
          DriverPos={0,0};
          DriverVel={0,0}*pi/180;
          Reaction.Type={Off,Off};
        };
      };
    };

    AnyFolder WristAbduction ={
      AnyVector RangeOfMotion = DesignVar({-20,20});

      AnyVar SCPronation = DesignVar(0);
      AnyVar SCElevation = DesignVar(0);
      AnyVar SCAxialRotation = DesignVar(0);
      AnyVar GHFlexion = DesignVar(0);
      AnyVar GHAbduction = DesignVar(0);
      AnyVar GHExternalRotation = DesignVar(0);
      AnyVar ElbowFlexion = DesignVar(0);
      AnyVar ElbowPronation = DesignVar(0);
      AnyVar WristFlexion = DesignVar(0);
      AnyVar CMC1Flexion = DesignVar(0);
      AnyVar CMC1Abduction = DesignVar(0);
      AnyVar MCP1Flexion = DesignVar(0);
      AnyVar MCP1Abduction = DesignVar(0);
      AnyVar DIP1 = DesignVar(0);
      AnyVar MCP2Flexion = DesignVar(0);
      AnyVar MCP2Abduction = DesignVar(0);
      AnyVar PIP2 = DesignVar(0);
      AnyVar DIP2 = DesignVar(0);
      AnyVar MCP3Flexion = DesignVar(0);
      AnyVar MCP3Abduction = DesignVar(0);
      AnyVar PIP3 = DesignVar(0);
      AnyVar DIP3 = DesignVar(0);
      AnyVar MCP4Flexion = DesignVar(0);
      AnyVar MCP4Abduction = DesignVar(0);
      AnyVar PIP4 = DesignVar(0);
      AnyVar DIP4 = DesignVar(0);
      AnyVar MCP5Flexion = DesignVar(0);
      AnyVar MCP5Abduction = DesignVar(0);
      AnyVar PIP5 = DesignVar(0);
      AnyVar DIP5 = DesignVar(0);
      /////////////////////////////////////////

      AnyFolder &SideHumanFolderRef=....BodyModel.Left;
      AnyFolder &SideHumanInterfaceRef = ....BodyModel.Interface.Left;
      AnyFolder &SideHandInterfaceRef = ....BodyModel.Left.ShoulderArm.Seg.Hand;
      AnyFolder &SideTrunkMusRef = ....BodyModel.Trunk.MusclesSpineLeft;
      #include "EvaluateMomentArmsStudy.any"
      AnyString OutputFile =  "MomentArms_LegTD_Left_WristAbduction";
      Model.Drivers = {
        AnyKinEqSimpleDriver ArmDriver= {
          AnyKinMeasure &ref = .ArmMeasure;
          DriverPos = { ...SCPronation, ...SCElevation, ...SCAxialRotation, ...GHFlexion,...GHAbduction ,...GHExternalRotation ,...ElbowFlexion, ...ElbowPronation,...WristFlexion,...RangeOfMotion[0],...CMC1Flexion ,...CMC1Abduction ,...MCP1Flexion ,...MCP1Abduction ,...DIP1 ,...MCP2Flexion ,...MCP2Abduction ,...PIP2 ,...DIP2 ,...MCP3Flexion ,...MCP3Abduction ,...PIP3 ,...DIP3 ,...MCP4Flexion ,...MCP4Abduction ,...PIP4 ,...DIP4 ,...MCP5Flexion ,...MCP5Abduction ,...PIP5 ,...DIP5 }*pi/180;
          DriverVel = { 0, 0, 0, 0,0,0,0,0,0,...RangeOfMotion[1]-...RangeOfMotion[0],0,0,0,0,0,0,0,0,0,0,0,0,0,0,0,0,0,0,0,0,0}*pi/180;
        };
        AnyKinEqSimpleDriver CMC2={
          AnyUniversalJoint &ref=  .......BodyModel.Left.ShoulderArm.Seg.Hand.Finger2.Jnt.CMC;
          DriverPos={0,0};
          DriverVel={0,0}*pi/180;
          Reaction.Type={Off,Off};
        };
        AnyKinEqSimpleDriver CMC3={
          AnyUniversalJoint &ref=  .......BodyModel.Left.ShoulderArm.Seg.Hand.Finger3.Jnt.CMC;
          DriverPos={0,0};
          DriverVel={0,0}*pi/180;
          Reaction.Type={Off,Off};
        };
        AnyKinEqSimpleDriver CMC4={
          AnyUniversalJoint &ref=  .......BodyModel.Left.ShoulderArm.Seg.Hand.Finger4.Jnt.CMC;
          DriverPos={0,0};
          DriverVel={0,0}*pi/180;
          Reaction.Type={Off,Off};
        };
        AnyKinEqSimpleDriver CMC5={
          AnyUniversalJoint &ref=  .......BodyModel.Left.ShoulderArm.Seg.Hand.Finger5.Jnt.CMC;
          DriverPos={0,0};
          DriverVel={0,0}*pi/180;
          Reaction.Type={Off,Off};
        };
      };
    };

   AnyFolder IndexFingerFlexion ={
      AnyVector RangeOfMotion = DesignVar({0,90});

      AnyVar SCPronation = DesignVar(0);
      AnyVar SCElevation = DesignVar(0);
      AnyVar SCAxialRotation = DesignVar(0);
      AnyVar GHFlexion = DesignVar(0);
      AnyVar GHAbduction = DesignVar(0);
      AnyVar GHExternalRotation = DesignVar(0);
      AnyVar ElbowFlexion = DesignVar(0);
      AnyVar ElbowPronation = DesignVar(0);
      AnyVar WristFlexion = DesignVar(0);
      AnyVar WristAbduction = DesignVar(0);
      AnyVar CMC1Flexion = DesignVar(0);
      AnyVar CMC1Abduction = DesignVar(0);
      AnyVar MCP1Flexion = DesignVar(0);
      AnyVar MCP1Abduction = DesignVar(0);
      AnyVar DIP1 = DesignVar(0);
      AnyVar MCP2Flexion = DesignVar(0);
      AnyVar MCP2Abduction = DesignVar(0);
      AnyVar PIP2 = DesignVar(0);
      AnyVar DIP2 = DesignVar(0);
      AnyVar MCP3Flexion = DesignVar(0);
      AnyVar MCP3Abduction = DesignVar(0);
      AnyVar PIP3 = DesignVar(0);
      AnyVar DIP3 = DesignVar(0);
      AnyVar MCP4Flexion = DesignVar(0);
      AnyVar MCP4Abduction = DesignVar(0);
      AnyVar PIP4 = DesignVar(0);
      AnyVar DIP4 = DesignVar(0);
      AnyVar MCP5Flexion = DesignVar(0);
      AnyVar MCP5Abduction = DesignVar(0);
      AnyVar PIP5 = DesignVar(0);
      AnyVar DIP5 = DesignVar(0);
      ////////////////////////////////////////////////////////////////////

      AnyFolder &SideHumanFolderRef=....BodyModel.Left;
      AnyFolder &SideHumanInterfaceRef = ....BodyModel.Interface.Left;
      AnyFolder &SideHandInterfaceRef = ....BodyModel.Left.ShoulderArm.Seg.Hand;
      AnyFolder &SideTrunkMusRef = ....BodyModel.Trunk.MusclesSpineRight;
      #include "EvaluateMomentArmsStudy.any"
      AnyString OutputFile =  "MomentArms_LegTD_Left_IndexFingerFlexion";
      Model.Drivers = {
        AnyKinEqSimpleDriver ArmDriver= {
          AnyKinMeasure &ref = .ArmMeasure;
          DriverPos = { ...SCPronation, ...SCElevation, ...SCAxialRotation, ...GHFlexion,...GHAbduction ,...GHExternalRotation ,...ElbowFlexion, ...ElbowPronation,...WristFlexion,...WristAbduction,...CMC1Flexion ,...CMC1Abduction ,...MCP1Flexion ,...MCP1Abduction ,...DIP1 ,...MCP2Flexion ,...MCP2Abduction ,...RangeOfMotion[0] ,...RangeOfMotion[0] ,...MCP3Flexion ,...MCP3Abduction ,...PIP3 ,...DIP3 ,...MCP4Flexion ,...MCP4Abduction ,...PIP4 ,...DIP4 ,...MCP5Flexion ,...MCP5Abduction ,...PIP5 ,...DIP5 }*pi/180;
          DriverVel = { 0, 0, 0, 0,0,0,0,0,0,0,0,0,0,0,0,0,0,...RangeOfMotion[1]-...RangeOfMotion[0],...RangeOfMotion[1]-...RangeOfMotion[0],0,0,0,0,0,0,0,0,0,0,0,0}*pi/180;
        };
        AnyKinEqSimpleDriver CMC2={
          AnyUniversalJoint &ref=  .......BodyModel.Left.ShoulderArm.Seg.Hand.Finger2.Jnt.CMC;
          DriverPos={0,0};
          DriverVel={0,0}*pi/180;
          Reaction.Type={Off,Off};
        };
        AnyKinEqSimpleDriver CMC3={
          AnyUniversalJoint &ref=  .......BodyModel.Left.ShoulderArm.Seg.Hand.Finger3.Jnt.CMC;
          DriverPos={0,0};
          DriverVel={0,0}*pi/180;
          Reaction.Type={Off,Off};
        };
        AnyKinEqSimpleDriver CMC4={
          AnyUniversalJoint &ref=  .......BodyModel.Left.ShoulderArm.Seg.Hand.Finger4.Jnt.CMC;
          DriverPos={0,0};
          DriverVel={0,0}*pi/180;
          Reaction.Type={Off,Off};
        };
        AnyKinEqSimpleDriver CMC5={
          AnyUniversalJoint &ref=  .......BodyModel.Left.ShoulderArm.Seg.Hand.Finger5.Jnt.CMC;
          DriverPos={0,0};
          DriverVel={0,0}*pi/180;
          Reaction.Type={Off,Off};
        };
      };
    };


   };//Arm
  };//Left


 Run_all_studies ={
   AnyOperation &RGHFlexionLeft = .Left.Arm.GHFlexion.Run;
   AnyOperation &RGHAbductionLeft = .Left.Arm.GHAbduction.Run;
   AnyOperation &RGHExternalRotationLeft = .Left.Arm.GHExternalRotation.Run;
   AnyOperation &RElbowFlexionLeft = .Left.Arm.ElbowFlexion.Run;
   AnyOperation &RWristFlexionLeft = .Left.Arm.WristFlexion.Run;
   AnyOperation &RWristAbductionLeft = .Left.Arm.WristAbduction.Run;
   AnyOperation &RIndexFingerFlexionLeft = .Left.Arm.IndexFingerFlexion.Run;
 };
