#include "BodyModels/GenericBodyModel/BodyModel.constants.any"
#include "BodyModels/GenericBodyModel/Helper.ClassTemplates.any"
#include "BodyModels/GenericBodyModel/AnyMan.ClassTemplates.any"
#include "BodyModels/GenericBodyModel/PointGenerator.ClassTemplate.any"
#include "BodyModels/GenericBodyModel/SplineMuscle.ClassTemplate.any"
#include "BodyModels/GenericBodyModel/Spline.ClassTemplate.any"
#include "BodyModels/GenericBodyModel/inertia.ClassTemplate.any"
#include "BodyModels/GenericBodyModel/LigamentModelParameter.ClassTemplate.any"
#include "BodyModels/GenericBodyModel/ScaleFunctions.ClassTemplate.any"
#include "<ANYBODY_PATH_AMMR>/Tools/GRFPrediction/FootPlateConditionalContact.any"
#include "<ANYBODY_PATH_MODELUTILS>/WrappingSurfaces/include_templates.any"
#include "<ANYBODY_PATH_MODELUTILS>/Rhythms/SimpleRhythms.any"
#include "<ANYBODY_PATH_MODELUTILS>/WrappingSurfaces/Torus3PointOuterFit.any"
#include "<ANYBODY_PATH_MODELUTILS>/Video/VideoLookAtCamera.any"
#include "<ANYBODY_PATH_MODELUTILS>/KinematicLimits/RotationPenetrationCombiDriver_template.any"
#include "BodyModels/GenericBodyModel/RigidBodyAverageMeasure.ClassTemplate.any"
#include "BodyModels/GenericBodyModel/ComponentAndGroupDefinitions.ClassTemplate.any"
#ifndef ANYBODY_PATH_TOOLBOX
// Deprecated
#path ANYBODY_PATH_TOOLBOX "<ANYBODY_PATH_MODELUTILS>"
#else
Error("ANYBODY_PATH_TOOLBOX is deprecated. Use ANYBODY_PATH_MODELUTILS instead")

#endif


#ifpathexists "../../.git"
#define AMMR_IS_GIT_REPOSITORY 1
#else
#define AMMR_IS_GIT_REPOSITORY 0
#endif


#define ANYBODY_PYTHON_AVAILABLE 0
#ifdef ANYBODY_PATH_PYTHONHOME
  #ifpathexists "<ANYBODY_PATH_PYTHONHOME>/python.exe"
    #undef ANYBODY_PYTHON_AVAILABLE
    #define ANYBODY_PYTHON_AVAILABLE 1
  #endif
#endif

// Check for built-in Python (shipped with AnyBody, or part of the AnyBody conda package)
#ifndef ANYBODY_BUILTIN_PYTHON_AVAILABLE
  #define ANYBODY_BUILTIN_PYTHON_AVAILABLE 0
  #ifpathexists "<ANYBODY_PATH_EXEDIR>/Python/python.exe"
    #undef ANYBODY_PYTHON_AVAILABLE
    #undef ANYBODY_BUILTIN_PYTHON_AVAILABLE
    #define ANYBODY_PYTHON_AVAILABLE 1
    #define ANYBODY_BUILTIN_PYTHON_AVAILABLE 1
  #endif
  #ifpathexists "<ANYBODY_PATH_EXEDIR>/../python.exe"
    #undef ANYBODY_PYTHON_AVAILABLE
    #undef ANYBODY_BUILTIN_PYTHON_AVAILABLE
    #define ANYBODY_PYTHON_AVAILABLE 1
    #define ANYBODY_BUILTIN_PYTHON_AVAILABLE 1
  #endif
#endif
