//This file can be used for making shortcuts to the muscle data

#if BM_FOOT_MODEL == _FOOT_MODEL_DEFAULT_
AnyFolder &mus1=..Mus.Soleus;
AnyFolder &mus2=..Mus.Gastrocnemius;
AnyFolder &mus3=..Mus.FlexorDigitorumLongus;
AnyFolder &mus4=..Mus.FlexorHallucisLongus;
AnyFolder &mus6=..Mus.TibialisPosterior;
AnyFolder &mus5=..Mus.PeroneusBrevis   ;
AnyFolder &mus7=..Mus.ExtensorDigitorumLongus;
AnyFolder &mus8=..Mus.ExtensorHallucisLongus;
#endif
AnyFolder &mus9=..Mus.VastusLateralis;
AnyFolder &mus10=..Mus.VastusMedialis;
AnyFolder &mus11=..Mus.VastusIntermedius;
AnyFolder &mus12=..Mus.RectusFemoris;
AnyFolder &mus13=..Mus.Semitendinosus;
AnyFolder &mus14=..Mus.Semimembranosus;
AnyFolder &mus15=..Mus.BicepsFemorisCaputLongum;
AnyFolder &mus16=..Mus.BicepsFemorisCaputBreve;
AnyFolder &mus17=..Mus.Sartorius;
AnyFolder &mus18=..Mus.Gracilis;
AnyFolder &mus19=..Mus.Iliopsoas;
AnyFolder &mus20=..Mus.GluteusMinimus1;
AnyFolder &mus21=..Mus.GluteusMinimus2;
AnyFolder &mus22=..Mus.GluteusMinimus3;
AnyFolder &mus23=..Mus.GluteusMedius1;
AnyFolder &mus24=..Mus.GluteusMedius2;
AnyFolder &mus25=..Mus.GluteusMedius3;
AnyFolder &mus26=..Mus.GluteusMaximus1;
AnyFolder &mus27=..Mus.GluteusMaximus2;
AnyFolder &mus28=..Mus.GluteusMaximus3;
AnyFolder &mus29=..Mus.TensorFasciaeLatae;
AnyFolder &mus30=..Mus.Piriformis;
AnyFolder &mus31=..Mus.AdductorLongus;
AnyFolder &mus32=..Mus.AdductorMagnus1;
AnyFolder &mus33=..Mus.AdductorMagnus2;
AnyFolder &mus34=..Mus.AdductorMagnus3;
AnyFolder &mus35=..Mus.QuadratusFemoris ;
AnyFolder &mus36=..Mus.AbductorBrevis ;
AnyFolder &mus37=..Mus.ObturatoriusInternus ;
AnyFolder &mus38=..Mus.ObturatoriusExternus  ;
AnyFolder &mus39=..Mus.Pictineus ;
AnyFolder &mus40=..Mus.GemmelusInferior ;
AnyFolder &mus41=..Mus.GemmelusSuperior ;

AnyFolder &mus42= .TrunkMuscles.PsoasMajor.PMT12I_TM;
AnyFolder &mus43= .TrunkMuscles.PsoasMajor.PML1I_TM;
AnyFolder &mus44= .TrunkMuscles.PsoasMajor.PML1T_TM;
AnyFolder &mus45= .TrunkMuscles.PsoasMajor.PML2I_TM;
AnyFolder &mus46= .TrunkMuscles.PsoasMajor.PML2T_TM;
AnyFolder &mus47= .TrunkMuscles.PsoasMajor.PML3I_TM;
AnyFolder &mus48= .TrunkMuscles.PsoasMajor.PML3T_TM;
AnyFolder &mus49= .TrunkMuscles.PsoasMajor.PML4I_TM;
AnyFolder &mus50= .TrunkMuscles.PsoasMajor.PML4T_TM;
AnyFolder &mus51= .TrunkMuscles.PsoasMajor.PML5_TM;
AnyFolder &mus52= .TrunkMuscles.PsoasMajor.PML5T_TM;
