//This file can be used for making shortcuts to the muscle data

AnyFolder &mus1=.Side.Leg.MuscleModels.SoleusPar;
AnyFolder &mus2=.Side.Leg.MuscleModels.GastrocnemiusPar;
AnyFolder &mus3=.Side.Leg.MuscleModels.FlexorDigitorumLongusPar;
AnyFolder &mus4=.Side.Leg.MuscleModels.FlexorHallucisLongusPar;
AnyFolder &mus5=.Side.Leg.MuscleModels.PeroneusBrevisPar;
AnyFolder &mus6=.Side.Leg.MuscleModels.TibialisPosteriorPar;
AnyFolder &mus7=.Side.Leg.MuscleModels.ExtensorDigitorumLongusPar;
AnyFolder &mus8=.Side.Leg.MuscleModels.ExtensorHallucisLongusPar;
AnyFolder &mus9=.Side.Leg.MuscleModels.VastusLateralisPar;
AnyFolder &mus10=.Side.Leg.MuscleModels.VastusMedialisPar;
AnyFolder &mus11=.Side.Leg.MuscleModels.VastusIntermediusPar;
AnyFolder &mus12=.Side.Leg.MuscleModels.RectusFemorisPar;
AnyFolder &mus13=.Side.Leg.MuscleModels.SemitendinosusPar;
AnyFolder &mus14=.Side.Leg.MuscleModels.SemimembranosusPar;
AnyFolder &mus15=.Side.Leg.MuscleModels.BicepsFemorisCaputLongumPar;
AnyFolder &mus16=.Side.Leg.MuscleModels.BicepsFemorisCaputBrevePar;
AnyFolder &mus17=.Side.Leg.MuscleModels.SartoriusPar;
AnyFolder &mus18=.Side.Leg.MuscleModels.GracilisPar;
AnyFolder &mus19=.Side.Leg.MuscleModels.IliopsoasPar;
AnyFolder &mus20=.Side.Leg.MuscleModels.GluteusMinimus1Par;
AnyFolder &mus21=.Side.Leg.MuscleModels.GluteusMinimus2Par;
AnyFolder &mus22=.Side.Leg.MuscleModels.GluteusMinimus3Par;
AnyFolder &mus23=.Side.Leg.MuscleModels.GluteusMedius1Par;
AnyFolder &mus24=.Side.Leg.MuscleModels.GluteusMedius2Par;
AnyFolder &mus25=.Side.Leg.MuscleModels.GluteusMedius3Par;
AnyFolder &mus26=.Side.Leg.MuscleModels.GluteusMaximus1Par;
AnyFolder &mus27=.Side.Leg.MuscleModels.GluteusMaximus2Par;
AnyFolder &mus28=.Side.Leg.MuscleModels.GluteusMaximus3Par;
AnyFolder &mus29=.Side.Leg.MuscleModels.TensorFasciaeLataePar;
AnyFolder &mus30=.Side.Leg.MuscleModels.PiriformisPar;
AnyFolder &mus31=.Side.Leg.MuscleModels.AdductorLongusPar;
AnyFolder &mus32=.Side.Leg.MuscleModels.AdductorMagnus1Par;
AnyFolder &mus33=.Side.Leg.MuscleModels.AdductorMagnus2Par;
AnyFolder &mus34=.Side.Leg.MuscleModels.AdductorMagnus3Par;
AnyFolder &mus35=.Side.Leg.MuscleModels.QuadratusFemorisPar;
AnyFolder &mus36=.Side.Leg.MuscleModels.AbductorBrevisPar;
AnyFolder &mus37=.Side.Leg.MuscleModels.ObturatoriusInternusPar;
AnyFolder &mus38=.Side.Leg.MuscleModels.ObturatoriusExternusPar;
AnyFolder &mus39=.Side.Leg.MuscleModels.PictineusPar;
AnyFolder &mus40=.Side.Leg.MuscleModels.GemellusInferiorPar;
AnyFolder &mus41=.Side.Leg.MuscleModels.GemellusSuperiorPar;
