// The leg muscle parameters.
// Mark de Zee
AnyMuscleModel HamMdl = {F0 = 2080;};
AnyMuscleModel BiFemShMdl = {F0 = 400;};
AnyMuscleModel GlutMaxMdl = {F0 = 1300;};
AnyMuscleModel RectFemMdl = {F0 = 780;};
AnyMuscleModel VastiMdl = {F0 = 4400;};
AnyMuscleModel GasMdl = {F0 = 1605;};
AnyMuscleModel SolMdl = {F0 = 2830;};
AnyMuscleModel TibAntMdl = {F0 = 1605;};
