  Right = {
    AnyFolder Leg = {
    AnyFolder HipFlexion={

      // Change the following variables to adjust the moment arm study
      AnyVector RangeOfMotion = DesignVar({-20,90});
      AnyVar HipAbduction = DesignVar(0);
      AnyVar HipExternalRotation = DesignVar(0);
      AnyVar KneeFlexion = DesignVar(0);
      AnyVar AnklePlantarFlexion = DesignVar(0);
      AnyVar SubtalarEversion = DesignVar(0);
      /////////////////////////////////////////

      // The following should not be changed
      AnyFolder &SideHumanFolderRef=....HumanFolderRef.Right;
      AnyFolder &SideHumanInterfaceRef = ....HumanFolderRef.Interface.Right;
      AnyFolder &SideTrunkMusRef = ....HumanFolderRef.Trunk.MusclesSpineRight;
      #include "EvaluateMomentArmsStudy.any"
      AnyString OutputFileName =  "MomentArms_LegTD_Right_HipFlexion";
      Model.Drivers = {
        AnyKinEqSimpleDriver LegDriver= {
          AnyKinMeasure &ref = .LegMeasure;
          DriverPos = {...RangeOfMotion[0],...HipAbduction ,...HipExternalRotation ,...KneeFlexion, ...AnklePlantarFlexion ,...SubtalarEversion }*pi/180;
          DriverVel = {...RangeOfMotion[1]-...RangeOfMotion[0],0,0,0,0,0}*pi/180;
        };
      };
    };

    AnyFolder HipAbduction={
      // Change the following variables to adjust the moment arm study
      AnyVector RangeOfMotion = DesignVar({-30,50});
      AnyVar HipFlexion = DesignVar(0);
      AnyVar HipExternalRotation = DesignVar(0);
      AnyVar KneeFlexion = DesignVar(0);
      AnyVar AnklePlantarFlexion = DesignVar(0);
      AnyVar SubtalarEversion = DesignVar(0);
      /////////////////////////////////////////////////////////////

      AnyFolder &SideHumanFolderRef=....HumanFolderRef.Right;
      AnyFolder &SideHumanInterfaceRef = ....HumanFolderRef.Interface.Right;
      AnyFolder &SideTrunkMusRef = ....HumanFolderRef.Trunk.MusclesSpineRight;
      #include "EvaluateMomentArmsStudy.any"
      AnyString OutputFile =  "MomentArms_LegTD_Right_HipAbduction";
      Model.Drivers = {
        AnyKinEqSimpleDriver LegDriver= {
          AnyKinMeasure &ref = .LegMeasure;
          DriverPos = {...HipFlexion,...RangeOfMotion[0],...HipExternalRotation ,...KneeFlexion, ...AnklePlantarFlexion ,...SubtalarEversion }*pi/180;
          DriverVel = {0,...RangeOfMotion[1]-...RangeOfMotion[0],0,0,0,0}*pi/180;
        };
      };
    };

    AnyFolder HipExternalRotation={
      // Change the following variables to adjust the moment arm study
      AnyVector RangeOfMotion = DesignVar({-40,40});
      AnyVar HipFlexion = DesignVar(0);
      AnyVar HipAbduction = DesignVar(0);
      AnyVar KneeFlexion = DesignVar(0);
      AnyVar AnklePlantarFlexion = DesignVar(0);
      AnyVar SubtalarEversion = DesignVar(0);
      ////////////////////////////////////////////////////////////////

      AnyFolder &SideHumanFolderRef=....HumanFolderRef.Right;
      AnyFolder &SideHumanInterfaceRef = ....HumanFolderRef.Interface.Right;
      AnyFolder &SideTrunkMusRef = ....HumanFolderRef.Trunk.MusclesSpineRight;
      #include "EvaluateMomentArmsStudy.any"
      AnyString OutputFile =  "MomentArms_LegTD_Right_HipExternalRotation";
      Model.Drivers = {
        AnyKinEqSimpleDriver LegDriver= {
          AnyKinMeasure &ref = .LegMeasure;
          DriverPos = {...HipFlexion,...HipAbduction,...RangeOfMotion[0],...KneeFlexion, ...AnklePlantarFlexion ,...SubtalarEversion }*pi/180;
          DriverVel = {0,0,...RangeOfMotion[1]-...RangeOfMotion[0],0,0,0}*pi/180;
        };
      };
    };

    AnyFolder KneeFlexion={
      // Change the following variables to adjust the moment arm study
      AnyVector RangeOfMotion = DesignVar({0,90});
      AnyVar HipFlexion = DesignVar(0);
      AnyVar HipAbduction = DesignVar(0);
      AnyVar HipExternalRotation = DesignVar(0);
      AnyVar AnklePlantarFlexion = DesignVar(0);
      AnyVar SubtalarEversion = DesignVar(0);
      ////////////////////////////////////////////////////////////////////

      AnyFolder &SideHumanFolderRef=....HumanFolderRef.Right;
      AnyFolder &SideHumanInterfaceRef = ....HumanFolderRef.Interface.Right;
      AnyFolder &SideTrunkMusRef = ....HumanFolderRef.Trunk.MusclesSpineRight;
      #include "EvaluateMomentArmsStudy.any"
      AnyString OutputFile =  "MomentArms_LegTD_Right_KneeFlexion";
      Model.Drivers = {
        AnyKinEqSimpleDriver LegDriver= {
          AnyKinMeasure &ref = .LegMeasure;
          DriverPos = {...HipFlexion,...HipAbduction ,...HipExternalRotation ,...RangeOfMotion[0], ...AnklePlantarFlexion ,...SubtalarEversion }*pi/180;
          DriverVel = {0,0,0,...RangeOfMotion[1]-...RangeOfMotion[0],0,0}*pi/180;
        };
      };
    };


    AnyFolder AnklePlantarFlexion ={
      AnyVector RangeOfMotion = DesignVar({40,-40});
      AnyVar HipFlexion = DesignVar(0);
      AnyVar HipAbduction = DesignVar(0);
      AnyVar HipExternalRotation = DesignVar(0);
      AnyVar KneeFlexion = DesignVar(0);
      AnyVar SubtalarEversion = DesignVar(0);

      AnyFolder &SideHumanFolderRef=....HumanFolderRef.Right;
      AnyFolder &SideHumanInterfaceRef = ....HumanFolderRef.Interface.Right;
      AnyFolder &SideTrunkMusRef = ....HumanFolderRef.Trunk.MusclesSpineRight;
      #include "EvaluateMomentArmsStudy.any"
      AnyString OutputFile =  "MomentArms_LegTD_Right_AnklePlantarFlexion";
      Model.Drivers = {
        AnyKinEqSimpleDriver LegDriver= {
          AnyKinMeasure &ref = .LegMeasure;
          DriverPos = {...HipFlexion,...HipAbduction ,...HipExternalRotation ,...KneeFlexion,...RangeOfMotion[0],...SubtalarEversion }*pi/180;
          DriverVel = {0,0,0,0,...RangeOfMotion[1]-...RangeOfMotion[0],0}*pi/180;
        };
      };
    };

    AnyFolder SubTalarEversion ={
      AnyVector RangeOfMotion = DesignVar({-30,30});
      AnyVar HipFlexion = DesignVar(0);
      AnyVar HipAbduction = DesignVar(0);
      AnyVar HipExternalRotation = DesignVar(0);
      AnyVar KneeFlexion = DesignVar(0);
      AnyVar AnklePlantarFlexion = DesignVar(0);

      AnyFolder &SideHumanFolderRef=....HumanFolderRef.Right;
      AnyFolder &SideHumanInterfaceRef = ....HumanFolderRef.Interface.Right;
      AnyFolder &SideTrunkMusRef = ....HumanFolderRef.Trunk.MusclesSpineRight;
      #include "EvaluateMomentArmsStudy.any"
      AnyString OutputFile =  "MomentArms_LegTD_Right_SubTalarEversion";
      Model.Drivers = {
        AnyKinEqSimpleDriver LegDriver= {
          AnyKinMeasure &ref = .LegMeasure;
          DriverPos = {...HipFlexion,...HipAbduction ,...HipExternalRotation ,...KneeFlexion,...AnklePlantarFlexion,...RangeOfMotion[0]}*pi/180;
          DriverVel = {0,0,0,0,0,...RangeOfMotion[1]-...RangeOfMotion[0]}*pi/180;
        };
      };
    };
   };//Leg
  };//Right


 Run_all_studies ={
   AnyOperation &RHipFlexion = .Right.Leg.HipFlexion.MacroCmd;
   AnyOperation &RHipAbduction = .Right.Leg.HipAbduction.MacroCmd;
   AnyOperation &RHipExternalRotation = .Right.Leg.HipExternalRotation.MacroCmd;
   AnyOperation &RKneeFlexion = .Right.Leg.KneeFlexion.MacroCmd;
   AnyOperation &RAnklePlantarFlexion = .Right.Leg.AnklePlantarFlexion.MacroCmd;
   AnyOperation &RSubTalarEversion = .Right.Leg.SubTalarEversion.MacroCmd;
 };
