AnyFolder &Trunk=..Trunk;
//Right leg
Seg.Thigh.Axes0 =
Trunk.SegmentsLumbar.PelvisSeg.Axes0*
HipNodeRef.ARel*
HipNodeRef.HipJoint.ARel*
HipNodeRef.HipJoint.RotNode.ARel*
#ifndef USE_AMMR14_HIP_ROTATIONS
  RotMat((pi/180)*.JointPos.HipFlexion,z)*
  RotMat((pi/180)*.JointPos.HipAbduction,x)*
  RotMat((pi/180)*.JointPos.HipExternalRotation,y)*
#else
  RotMat((pi/180)*.JointPos.HipFlexion,z)*
  RotMat((pi/180)*.JointPos.HipExternalRotation,y)*
  RotMat((pi/180)*.JointPos.HipAbduction,x)*
#endif
Seg.Thigh.HipJoint.RotNode.ARel'*
Seg.Thigh.HipJoint.ARel';

//shank
Seg.Shank.Axes0 =
Seg.Thigh.Axes0*
Seg.Thigh.KneeJoint.ARel*
Seg.Thigh.KneeJoint.RotNode.ARel*
RotMat((-pi/180)*.JointPos.KneeFlexion,z)*
Seg.Shank.KneeJoint.RotNode.ARel'*
Seg.Shank.KneeJoint.ARel';

//Patella
Seg.Patella.Axes0 = Seg.Shank.Axes0;


//Talus
Seg.Talus.Axes0 =
Seg.Shank.Axes0*
Seg.Shank.AnkleJoint.ARel*
//Seg.Shank.AnkleJoint.RotNode.ARel*
RotMat((pi/180)*.JointPos.AnklePlantarFlexion ,z)*
//Seg.Talus.AnkleJoint.RotNode.ARel'*
Seg.Talus.AnkleJoint.ARel';


//Foot
Seg.Calcaneus.Axes0 =
Seg.Talus.Axes0*
Seg.Talus.SubTalarJoint.ARel*
//Seg.Talus.SubTalarJoint.RotNode.ARel*
RotMat((pi/180)*.JointPos.SubTalarEversion ,z)*
//Seg.Foot.SubTalarJoint.RotNode.ARel'*
Seg.Calcaneus.SubTalarJoint.ARel';
