SelectedOutput.Left = {

  AnyFolder Leg = {


    AnyFolder JointReactionForce = {


      /// Medial positive
      AnyVar Hip_MediolateralForce = ....Left.Leg.Jnt.Hip.Constraints.Reaction.Fout[2];
      /// Proximal positive
      AnyVar Hip_ProximoDistalForce = ....Left.Leg.Jnt.Hip.Constraints.Reaction.Fout[1];
      /// Anterior positive
      AnyVar Hip_AnteroPosteriorForce = ....Left.Leg.Jnt.Hip.Constraints.Reaction.Fout[0];
      // Thigh.HipJoint ref

      /// Medial positive
      AnyVar Knee_MedioLateralForce = ....Left.Leg.Jnt.Knee.Constraints.Reaction.Fout[2];
      /// Proximal positive
      AnyVar Knee_ProximoDistalForce = ....Left.Leg.Jnt.Knee.Constraints.Reaction.Fout[1];
      /// Anterior positive
      AnyVar Knee_AnteroPosteriorForce = ....Left.Leg.Jnt.Knee.Constraints.Reaction.Fout[0];
      /// External positive
      AnyVar Knee_AxialMoment = ....Left.Leg.MomentMeasure.KneeJointReactionMoments.Mlocal[1];
      /// Internal positive
      AnyVar Knee_LateralMoment = ....Left.Leg.MomentMeasure.KneeJointReactionMoments.Mlocal[0];
      // Thigh.KneeJoint ref

      /// Medial positive
      AnyVar Ankle_MedioLateralForce = ....Left.Leg.Jnt.Ankle.Constraints.Reaction.Fout[2];
      /// Proximal positive
      AnyVar Ankle_ProximoDistalForce = ....Left.Leg.Jnt.Ankle.Constraints.Reaction.Fout[1];
      /// Anterior positive
      AnyVar Ankle_AnteroPosteriorForce = ....Left.Leg.Jnt.Ankle.Constraints.Reaction.Fout[0];
      /// External positive
      AnyVar Ankle_AxialMoment = ....Left.Leg.MomentMeasure.AnkleJointReactionMoments.Mlocal[1];
      // Shank.AnkleJoint ref


            AnyFolder FootJoints = {

AnyVar   	TaloNavi_X	 = .....Left.Leg.Jnt.FootJnt.TaloNavi.Constraints.Reaction.Fout[0];
AnyVar   	TaloNavi_Y	 = .....Left.Leg.Jnt.FootJnt.TaloNavi.Constraints.Reaction.Fout[1];
AnyVar   	TaloNavi_Z	 = .....Left.Leg.Jnt.FootJnt.TaloNavi.Constraints.Reaction.Fout[2];
AnyVar   	CuneiNaviMed_X	 = .....Left.Leg.Jnt.FootJnt.CuneiNaviMed.Constraints.Reaction.Fout[0];
AnyVar   	CuneiNaviMed_Y	 = .....Left.Leg.Jnt.FootJnt.CuneiNaviMed.Constraints.Reaction.Fout[1];
AnyVar   	CuneiNaviMed_Z	 = .....Left.Leg.Jnt.FootJnt.CuneiNaviMed.Constraints.Reaction.Fout[2];
AnyVar   	CuneiNaviInt_X	 = .....Left.Leg.Jnt.FootJnt.CuneiNaviInt.Constraints.Reaction.Fout[0];
AnyVar   	CuneiNaviInt_Y	 = .....Left.Leg.Jnt.FootJnt.CuneiNaviInt.Constraints.Reaction.Fout[1];
AnyVar   	CuneiNaviInt_Z	 = .....Left.Leg.Jnt.FootJnt.CuneiNaviInt.Constraints.Reaction.Fout[2];
AnyVar   	CuneiNaviLat_X	 = .....Left.Leg.Jnt.FootJnt.CuneiNaviLat.Constraints.Reaction.Fout[0];
AnyVar   	CuneiNaviLat_Y	 = .....Left.Leg.Jnt.FootJnt.CuneiNaviLat.Constraints.Reaction.Fout[1];
AnyVar   	CuneiNaviLat_Z	 = .....Left.Leg.Jnt.FootJnt.CuneiNaviLat.Constraints.Reaction.Fout[2];
AnyVar   	CalCuboid_X	 = .....Left.Leg.Jnt.FootJnt.CalCuboid.Constraints.Reaction.Fout[0];
AnyVar   	CalCuboid_Y	 = .....Left.Leg.Jnt.FootJnt.CalCuboid.Constraints.Reaction.Fout[1];
AnyVar   	CalCuboid_Z	 = .....Left.Leg.Jnt.FootJnt.CalCuboid.Constraints.Reaction.Fout[2];
AnyVar   	MedCuneiMt1_X	 = .....Left.Leg.Jnt.FootJnt.MedCuneiMt1.Constraints.Reaction.Fout[0];
AnyVar   	MedCuneiMt1_Y	 = .....Left.Leg.Jnt.FootJnt.MedCuneiMt1.Constraints.Reaction.Fout[1];
AnyVar   	MedCuneiMt1_Z	 = .....Left.Leg.Jnt.FootJnt.MedCuneiMt1.Constraints.Reaction.Fout[2];
AnyVar   	IntCuneiMt2_X	 = .....Left.Leg.Jnt.FootJnt.IntCuneiMt2.Constraints.Reaction.Fout[0];
AnyVar   	IntCuneiMt2_Y	 = .....Left.Leg.Jnt.FootJnt.IntCuneiMt2.Constraints.Reaction.Fout[1];
AnyVar   	IntCuneiMt2_Z	 = .....Left.Leg.Jnt.FootJnt.IntCuneiMt2.Constraints.Reaction.Fout[2];
AnyVar   	LatCuneiMt3_X	 = .....Left.Leg.Jnt.FootJnt.LatCuneiMt3.Constraints.Reaction.Fout[0];
AnyVar   	LatCuneiMt3_Y	 = .....Left.Leg.Jnt.FootJnt.LatCuneiMt3.Constraints.Reaction.Fout[1];
AnyVar   	LatCuneiMt3_Z	 = .....Left.Leg.Jnt.FootJnt.LatCuneiMt3.Constraints.Reaction.Fout[2];
AnyVar   	CuboidMt4_X	 = .....Left.Leg.Jnt.FootJnt.CuboidMt4.Constraints.Reaction.Fout[0];
AnyVar   	CuboidMt4_Y	 = .....Left.Leg.Jnt.FootJnt.CuboidMt4.Constraints.Reaction.Fout[1];
AnyVar   	CuboidMt4_Z	 = .....Left.Leg.Jnt.FootJnt.CuboidMt4.Constraints.Reaction.Fout[2];
AnyVar   	CuboidMt5_X	 = .....Left.Leg.Jnt.FootJnt.CuboidMt5.Constraints.Reaction.Fout[0];
AnyVar   	CuboidMt5_Y	 = .....Left.Leg.Jnt.FootJnt.CuboidMt5.Constraints.Reaction.Fout[1];
AnyVar   	CuboidMt5_Z	 = .....Left.Leg.Jnt.FootJnt.CuboidMt5.Constraints.Reaction.Fout[2];
AnyVar   	MtProxPh1_X	 = .....Left.Leg.Jnt.FootJnt.MtProxPh1.Constraints.Reaction.Fout[0];
AnyVar   	MtProxPh2_Y	 = .....Left.Leg.Jnt.FootJnt.MtProxPh1.Constraints.Reaction.Fout[1];
AnyVar   	MtProxPh3_Z	 = .....Left.Leg.Jnt.FootJnt.MtProxPh1.Constraints.Reaction.Fout[2];
AnyVar   	MtProxPhal2_X	 = .....Left.Leg.Jnt.FootJnt.MtProxPhal2.Constraints.Reaction.Fout[0];
AnyVar   	MtProxPhal2_Y	 = .....Left.Leg.Jnt.FootJnt.MtProxPhal2.Constraints.Reaction.Fout[1];
AnyVar   	MtProxPhal2_Z	 = .....Left.Leg.Jnt.FootJnt.MtProxPhal2.Constraints.Reaction.Fout[2];
AnyVar   	MtProxPhal3_X	 = .....Left.Leg.Jnt.FootJnt.MtProxPhal3.Constraints.Reaction.Fout[0];
AnyVar   	MtProxPhal3_Y	 = .....Left.Leg.Jnt.FootJnt.MtProxPhal3.Constraints.Reaction.Fout[1];
AnyVar   	MtProxPhal3_Z	 = .....Left.Leg.Jnt.FootJnt.MtProxPhal3.Constraints.Reaction.Fout[2];
AnyVar   	MtProxPhal4_X	 = .....Left.Leg.Jnt.FootJnt.MtProxPhal4.Constraints.Reaction.Fout[0];
AnyVar   	MtProxPhal4_Y	 = .....Left.Leg.Jnt.FootJnt.MtProxPhal4.Constraints.Reaction.Fout[1];
AnyVar   	MtProxPhal4_Z	 = .....Left.Leg.Jnt.FootJnt.MtProxPhal4.Constraints.Reaction.Fout[2];
AnyVar   	MtProxPhal5_X	 = .....Left.Leg.Jnt.FootJnt.MtProxPhal5.Constraints.Reaction.Fout[0];
AnyVar   	MtProxPhal5_Y	 = .....Left.Leg.Jnt.FootJnt.MtProxPhal5.Constraints.Reaction.Fout[1];
AnyVar   	MtProxPhal5_Z	 = .....Left.Leg.Jnt.FootJnt.MtProxPhal5.Constraints.Reaction.Fout[2];
AnyVar   	ProxPhDistPh1_X	 = .....Left.Leg.Jnt.FootJnt.ProxPhDistPh1.Constraints.Reaction.Fout[0];
AnyVar   	ProxPhDistPh1_Y	 = .....Left.Leg.Jnt.FootJnt.ProxPhDistPh1.Constraints.Reaction.Fout[1];
AnyVar   	ProxPhDistPh1_Z	 = .....Left.Leg.Jnt.FootJnt.ProxPhDistPh1.Constraints.Reaction.Fout[2];
AnyVar   	ProxPhMidPh2_X	 = .....Left.Leg.Jnt.FootJnt.ProxPhMidPh2.Constraints.Reaction.Fout[0];
AnyVar   	ProxPhMidPh2_Y	 = .....Left.Leg.Jnt.FootJnt.ProxPhMidPh2.Constraints.Reaction.Fout[1];
AnyVar   	ProxPhMidPh2_Z	 = .....Left.Leg.Jnt.FootJnt.ProxPhMidPh2.Constraints.Reaction.Fout[2];
AnyVar   	ProxPhMidPh3_X	 = .....Left.Leg.Jnt.FootJnt.ProxPhMidPh3.Constraints.Reaction.Fout[0];
AnyVar   	ProxPhMidPh3_Y	 = .....Left.Leg.Jnt.FootJnt.ProxPhMidPh3.Constraints.Reaction.Fout[1];
AnyVar   	ProxPhMidPh3_Z	 = .....Left.Leg.Jnt.FootJnt.ProxPhMidPh3.Constraints.Reaction.Fout[2];
AnyVar   	ProxPhMidPh4_X	 = .....Left.Leg.Jnt.FootJnt.ProxPhMidPh4.Constraints.Reaction.Fout[0];
AnyVar   	ProxPhMidPh4_Y	 = .....Left.Leg.Jnt.FootJnt.ProxPhMidPh4.Constraints.Reaction.Fout[1];
AnyVar   	ProxPhMidPh4_Z	 = .....Left.Leg.Jnt.FootJnt.ProxPhMidPh4.Constraints.Reaction.Fout[2];
AnyVar   	ProxPhMidPh5_X	 = .....Left.Leg.Jnt.FootJnt.ProxPhMidPh5.Constraints.Reaction.Fout[0];
AnyVar   	ProxPhMidPh5_Y	 = .....Left.Leg.Jnt.FootJnt.ProxPhMidPh5.Constraints.Reaction.Fout[1];
AnyVar   	ProxPhMidPh5_Z	 = .....Left.Leg.Jnt.FootJnt.ProxPhMidPh5.Constraints.Reaction.Fout[2];
AnyVar   	MidPhDistPh2_X	 = .....Left.Leg.Jnt.FootJnt.MidPhDistPh2.Constraints.Reaction.Fout[0];
AnyVar   	MidPhDistPh2_Y	 = .....Left.Leg.Jnt.FootJnt.MidPhDistPh2.Constraints.Reaction.Fout[1];
AnyVar   	MidPhDistPh2_Z	 = .....Left.Leg.Jnt.FootJnt.MidPhDistPh2.Constraints.Reaction.Fout[2];
AnyVar   	MidPhDistPh3_X	 = .....Left.Leg.Jnt.FootJnt.MidPhDistPh3.Constraints.Reaction.Fout[0];
AnyVar   	MidPhDistPh3_Y	 = .....Left.Leg.Jnt.FootJnt.MidPhDistPh3.Constraints.Reaction.Fout[1];
AnyVar   	MidPhDistPh3_Z	 = .....Left.Leg.Jnt.FootJnt.MidPhDistPh3.Constraints.Reaction.Fout[2];
AnyVar   	MidPhDistPh4_X	 = .....Left.Leg.Jnt.FootJnt.MidPhDistPh4.Constraints.Reaction.Fout[0];
AnyVar   	MidPhDistPh4_Y	 = .....Left.Leg.Jnt.FootJnt.MidPhDistPh4.Constraints.Reaction.Fout[1];
AnyVar   	MidPhDistPh4_Z	 = .....Left.Leg.Jnt.FootJnt.MidPhDistPh4.Constraints.Reaction.Fout[2];
AnyVar   	MidPhDistPh5_X	 = .....Left.Leg.Jnt.FootJnt.MidPhDistPh5.Constraints.Reaction.Fout[0];
AnyVar   	MidPhDistPh5_Y	 = .....Left.Leg.Jnt.FootJnt.MidPhDistPh5.Constraints.Reaction.Fout[1];
AnyVar   	MidPhDistPh5_Z	 = .....Left.Leg.Jnt.FootJnt.MidPhDistPh5.Constraints.Reaction.Fout[2];

              };

      //****************************************************


      //****************************************************

//      /// External positive
//      AnyVar Ankle_LateralMoment = ....Left.Leg.Jnt.Ankle.Constraints.Reaction.Fout[4];
//      // Shank.AnkleJoint ref
//
//      /// Lateral positive
//      AnyVar Talus_MedioLateralForce = ....Left.Leg.Jnt.SubTalar.Constraints.Reaction.Fout[0];
//      /// Proximal positive
//      AnyVar Talus_ProximoDistalForce = ....Left.Leg.Jnt.SubTalar.Constraints.Reaction.Fout[1];
//      /// Anterior positive
//      AnyVar Talus_AnteroPosteriorForce = ....Left.Leg.Jnt.SubTalar.Constraints.Reaction.Fout[2];
//      /// External positive
//      AnyVar Talus_AxialMoment = ....Left.Leg.Jnt.SubTalar.Constraints.Reaction.Fout[3];
//      /// Flexion positive
//      AnyVar Talus_FlexionExtensionMoment = ....Left.Leg.Jnt.SubTalar.Constraints.Reaction.Fout[4];
//      // Talus.SubTalarJoint ref


    }; //End JointReactionForce


    AnyFolder JointMomentMeasure = {


      AnyVar HipAbduction = ....Left.Leg.MomentMeasure.HipNetMomentMuscle.MHipAbduction;

      AnyVar HipFlexion = ....Left.Leg.MomentMeasure.HipNetMomentMuscle.MHipFlexion;

      AnyVar HipExternalRotation = ....Left.Leg.MomentMeasure.HipNetMomentMuscle.MHipExternalRotation;
      // HipNodeRef.RotNode ref

      AnyVar KneeFlexion = -....Left.Leg.MomentMeasure.KneeNetMomentMuscle.MKneeFlexion;
      // Shank.KneeJoint.RotNode ref

      AnyVar AnklePlantarFlexion = ....Left.Leg.MomentMeasure.AnklePlantarFlexionNetMomentMuscle.MPlantarFlexion;
      // Shank.AnkleJoint ref

      AnyVar SubTalarEversion = ....Left.Leg.MomentMeasure.SubTalarEversionNetMomentMuscle.MSubTalarEversion;
      // Talus.SubTalarJoint ref


    }; //End JointMomentMeasure


    AnyFolder Muscles = {


      AnySearchFun MuscleList = {
        Search = ".....Left.Leg.Mus.*.Activity";
      };

      AnyVar Envelope = max(MuscleList());


      /*   Hip Abductors
      o	Gluteus medius
      o	Gluteus minimus
      o	Sartorius
      o	Tensor fasciae latae
      */

      AnyVar HipAbductorMuscleActivity = MuscleActivity.GluteusMedActivity + MuscleActivity.GluteusMedActivity + MuscleActivity.SartoriusActivity + MuscleActivity.TensorFasciaeActivity;


      /* Hip Flexors:
      o	Psoas major
      o	Psoas minor
      o	Iliacus
      o	Rectus femoris
      o	Sartorius
      o	Tensor fasciae latae
      o	Pectineus
      o	Adductor longus
      o	Adductor brevis
      o	Gracilis
      */

      AnyVar HipFlexorMuscleActivity = MuscleActivity.PsoasMajorActivity + MuscleActivity.IliacusActivity + MuscleActivity.RectusFemorisActivity + MuscleActivity.SartoriusActivity + MuscleActivity.TensorFasciaeActivity
      + MuscleActivity.PectineusActivity
      + MuscleActivity.AdductorLongusActivity + MuscleActivity.AdductorBrevisActivity + MuscleActivity.GracilisActivity;

      /*  Hip adductors:
      o	Adductor brevis
      o	Adductor longus
      o	Adductor magnus
      o	Adductor minimus
      o	pectineus
      o	gracilis
      o	Obturator externus
      */

      AnyVar HipAdductorMuscleActivity = MuscleActivity.ObturatorExtActivity + MuscleActivity.PectineusActivity + MuscleActivity.AdductorMagnusActivity // + AdductorMinimusActivity
      + MuscleActivity.AdductorLongusActivity + MuscleActivity.AdductorBrevisActivity + MuscleActivity.GracilisActivity;


      /* Hip extensors:
      o	Gluteus maximus
      o	Most of the hamstrings:
      "	Long head of biceps femoris, short head is not a hip extensor, only a knee flexor
      "	Semimembranosus muscle
      "	Semitendinosus muscle

      */

      AnyVar HipExtensorMuscleActivity = MuscleActivity.GluteusMaxActivity + MuscleActivity.BicepsFemorisCaputBreveActivity + MuscleActivity.SemimembranosusActivity + MuscleActivity.SemitendinosusActivity;

      /* Knee flexors:
      o	hamstrings (also hip extensors):
      "	biceps femoris (short head does not extend hip)
      "	semimembranosus
      "	semitendinosus
      o	gastrocnemius (also plantar flexor as a calf muscle)
      o	gracilis (also hip flexor/adductor)
      o	sartorius (also hip flexor/abductor/lateral rotator)
      */

      AnyVar KneeFlexorMuscleActivity = MuscleActivity.BicepsFemorisCaputLongActivity + MuscleActivity.GastrocActivity + MuscleActivity.GracilisActivity + MuscleActivity.SartoriusActivity;


      //********************************************************************************


      AnyFolder MuscleActivity = {


        AnySearchFun GluteusMaxActivityList =  {
          #if ((LEFT_LEG_TD_SIMPLE_MUSCLES) + (LEFT_LEG_TD_MUS_3E)) == 0
          #else
          Search = "......Left.Leg.Mus.GluteusMax*.Activity";
          #endif
        };


        // GlutMed
        AnySearchFun GlutMedActivityList =  {
          #if ((LEFT_LEG_TD_SIMPLE_MUSCLES) + (LEFT_LEG_TD_MUS_3E)) == 0
          #else
          Search = "......Left.Leg.Mus.GluteusMed*.Activity";
          #endif
        };

        // GlutMin
        AnySearchFun GlutMinActivityList =  {
          #if ((LEFT_LEG_TD_SIMPLE_MUSCLES) + (LEFT_LEG_TD_MUS_3E)) == 0
          #else
          Search = "......Left.Leg.Mus.GluteusMin*.Activity";
          #endif
        };

        // Sartorius
        AnySearchFun SartoriusActivityList =  {
          #if ((LEFT_LEG_TD_SIMPLE_MUSCLES) + (LEFT_LEG_TD_MUS_3E)) == 0
          #else
          Search = "......Left.Leg.Mus.Sartorius*.Activity";
          #endif
        };

        // Tensor Fasciae Latae
        AnySearchFun TensorFasciaeActivityList =  {
          #if ((LEFT_LEG_TD_SIMPLE_MUSCLES) + (LEFT_LEG_TD_MUS_3E)) == 0
          #else
          Search = "......Left.Leg.Mus.TensorFasciae*.Activity";
          #endif
        };


        // Psoas Major
        AnySearchFun PsoasMajorActivityList =  {
          #if ((LEFT_LEG_TD_SIMPLE_MUSCLES) + (LEFT_LEG_TD_MUS_3E)) == 0
          #else
          Search = "......Trunk.MusclesSpineLeft.PsoasMajor.*.Activity";
          #endif
        };

        //        // Psoas Minor
        //        AnySearchFun PsoasMinorActivityList =  {
        //          #if ((LEFT_LEG_TD_SIMPLE_MUSCLES) + (LEFT_LEG_TD_MUS_3E)) == 0
        //          #else
        //          Search = "......Trunk.Leg.MusclesSpineLeft.PsoasMinor.*.Activity";
        //          #endif
        //        };

        AnySearchFun IliacusActivityList =  {
          #if ((LEFT_LEG_TD_SIMPLE_MUSCLES) + (LEFT_LEG_TD_MUS_3E)) == 0
          #else
          Search = "......Left.Leg.Mus.Iliac*.Activity";
          #endif
        };

        AnySearchFun RectusFemorisActivityList =  {
          #if ((LEFT_LEG_TD_SIMPLE_MUSCLES) + (LEFT_LEG_TD_MUS_3E)) == 0
          #else
          Search = "......Left.Leg.Mus.RectusF*.Activity";
          #endif
        };

        AnySearchFun PectineusActivityList =  {
          #if ((LEFT_LEG_TD_SIMPLE_MUSCLES) + (LEFT_LEG_TD_MUS_3E)) == 0
          #else
          Search = "......Left.Leg.Mus.Pect*.Activity";
          #endif
        };

        AnySearchFun GracilisActivityList =  {
          #if ((LEFT_LEG_TD_SIMPLE_MUSCLES) + (LEFT_LEG_TD_MUS_3E)) == 0
          #else
          Search = "......Left.Leg.Mus.Gracili*.Activity";
          #endif
        };

        AnySearchFun AdductorLongusActivityList =  {
          #if ((LEFT_LEG_TD_SIMPLE_MUSCLES) + (LEFT_LEG_TD_MUS_3E)) == 0
          #else
          Search = "......Left.Leg.Mus.AdductorLongus*.Activity";
          #endif
        };

        AnySearchFun AdductorBrevisActivityList =  {
          #if ((LEFT_LEG_TD_SIMPLE_MUSCLES) + (LEFT_LEG_TD_MUS_3E)) == 0
          #else
          Search = "......Left.Leg.Mus.AdductorBr*.Activity";
          #endif
        };


        AnySearchFun AdductorMagnusActivityList =  {
          #if ((LEFT_LEG_TD_SIMPLE_MUSCLES) + (LEFT_LEG_TD_MUS_3E)) == 0
          #else
          Search = "......Left.Leg.Mus.AdductorMag*.Activity";
          #endif
        };

        //                 AnySearchFun AdductorMinimusActivityList =  {
        //          #if ((LEFT_LEG_TD_SIMPLE_MUSCLES) + (LEFT_LEG_TD_MUS_3E)) == 0
        //          #else
        //          Search = "......Left.Leg.Mus.AdductorMin*.Activity";
        //          #endif
        //        };


        AnySearchFun ObturatorExtActivityList =  {
          #if ((LEFT_LEG_TD_SIMPLE_MUSCLES) + (LEFT_LEG_TD_MUS_3E)) == 0
          #else
          Search = "......Left.Leg.Mus.ObturatorExt*.Activity";
          #endif
        };


        AnySearchFun SemimembranosusActivityList =  {
          #if ((LEFT_LEG_TD_SIMPLE_MUSCLES) + (LEFT_LEG_TD_MUS_3E)) == 0
          #else
          Search = "......Left.Leg.Mus.Semimembr*.Activity";
          #endif
        };

        AnySearchFun SemimemtendinosusActivityList =  {
          #if ((LEFT_LEG_TD_SIMPLE_MUSCLES) + (LEFT_LEG_TD_MUS_3E)) == 0
          #else
          Search = "......Left.Leg.Mus.Semitend*.Activity";
          #endif
        };

        AnySearchFun BicepsFemorisCaputBreveActivityList =  {
          #if ((LEFT_LEG_TD_SIMPLE_MUSCLES) + (LEFT_LEG_TD_MUS_3E)) == 0
          #else
          Search = "......Left.Leg.Mus.BicepsFemorisCaputBreve*.Activity";
          #endif
        };

        AnySearchFun BicepsFemorisCaputLongActivityList =  {
          #if ((LEFT_LEG_TD_SIMPLE_MUSCLES) + (LEFT_LEG_TD_MUS_3E)) == 0
          #else
          Search = "......Left.Leg.Mus.BicepsFemorisCaputL*.Activity";
          #endif
        };


        AnySearchFun GastrocActivityList =  {
          #if ((LEFT_LEG_TD_SIMPLE_MUSCLES) + (LEFT_LEG_TD_MUS_3E)) == 0
          #else
          Search = "......Left.Leg.Mus.Gastroc*.Activity";
          #endif
        };
         AnySearchFun TibAntList =  {
          #if ((LEFT_LEG_TD_SIMPLE_MUSCLES) + (LEFT_LEG_TD_MUS_3E)) == 0
          #else
          Search = "......Left.Leg.Mus.TibialisAnt*.Activity";
          #endif
        };


        AnySearchFun TibPostList =  {
          #if ((LEFT_LEG_TD_SIMPLE_MUSCLES) + (LEFT_LEG_TD_MUS_3E)) == 0
          #else
          Search = "......Left.Leg.Mus.TibialisPost*.Activity";
          #endif
        };


        AnyVar GluteusMaxActivity = max(GluteusMaxActivityList());
        AnyVar GluteusMedActivity = max(GlutMedActivityList());
        AnyVar GluteusMinActivity = max(GlutMinActivityList());
        AnyVar SartoriusActivity = max(SartoriusActivityList());
        AnyVar TensorFasciaeActivity = max(TensorFasciaeActivityList());
        AnyVar PsoasMajorActivity = max(PsoasMajorActivityList());
        //        AnyVar PsoasMinorActivity = max(PsoasMinorActivityList());
        AnyVar IliacusActivity = max(IliacusActivityList());
        AnyVar RectusFemorisActivity = max(RectusFemorisActivityList());
        AnyVar PectineusActivity = max(PectineusActivityList());
        AnyVar GracilisActivity = max(GracilisActivityList());
        AnyVar AdductorLongusActivity = max(AdductorLongusActivityList());
        AnyVar AdductorBrevisActivity = max(AdductorBrevisActivityList());
        AnyVar AdductorMagnusActivity = max(AdductorMagnusActivityList());
        //        AnyVar AdductorMinimusActivity = max(AdductorMinimusActivityList());
        AnyVar ObturatorExtActivity = max(ObturatorExtActivityList());
        AnyVar SemimembranosusActivity = max(SemimembranosusActivityList());
        AnyVar SemitendinosusActivity = max(SemimemtendinosusActivityList());
        AnyVar BicepsFemorisCaputBreveActivity = max(BicepsFemorisCaputBreveActivityList());
        AnyVar BicepsFemorisCaputLongActivity = max(BicepsFemorisCaputLongActivityList());
        AnyVar GastrocActivity = max(GastrocActivityList());
         AnyVar TibAntActivity = max(TibAntList());
        AnyVar TibPostActivity = max(TibPostList());
      };
       //*************************************************


      /*   Hip Abductors
      o	Gluteus medius
      o	Gluteus minimus
      o	Sartorius
      o	Tensor fasciae latae
      */

      AnyVar HipAbductorMuscleForce = MuscleForces.GluteusMedForce + MuscleForces.GluteusMedForce + MuscleForces.SartoriusForce + MuscleForces.TensorFasciaeForce;


      /* Hip Flexors:
      o	Psoas major
      o	Psoas minor
      o	Iliacus
      o	Rectus femoris
      o	Sartorius
      o	Tensor fasciae latae
      o	Pectineus
      o	Adductor longus
      o	Adductor brevis
      o	Gracilis
      */

      AnyVar HipFlexorMuscleForce = MuscleForces.PsoasMajorForce + MuscleForces.IliacusForce + MuscleForces.RectusFemorisForce + MuscleForces.SartoriusForce + MuscleForces.TensorFasciaeForce
      + MuscleForces.PectineusForce
      + MuscleForces.AdductorLongusForce + MuscleForces.AdductorBrevisForce + MuscleForces.GracilisForce;

      /*  Hip adductors:
      o	Adductor brevis
      o	Adductor longus
      o	Adductor magnus
      o	Adductor minimus
      o	pectineus
      o	gracilis
      o	Obturator externus
      */

      AnyVar HipAdductorMuscleForce = MuscleForces.ObturatorExtForce + MuscleForces.PectineusForce + MuscleForces.AdductorMagnusForce // + AdductorMinimusForce
      + MuscleForces.AdductorLongusForce + MuscleForces.AdductorBrevisForce + MuscleForces.GracilisForce;


      /* Hip extensors:
      o	Gluteus maximus
      o	Most of the hamstrings:
      "	Long head of biceps femoris, short head is not a hip extensor, only a knee flexor
      "	Semimembranosus muscle
      "	Semitendinosus muscle

      */

      AnyVar HipExtensorMuscleForce = MuscleForces.GluteusMaxForce + MuscleForces.BicepsFemorisCaputBreveForce + MuscleForces.SemimembranosusForce + MuscleForces.SemitendinosusForce;

      /* Knee flexors:
      o	hamstrings (also hip extensors):
      "	biceps femoris (short head does not extend hip)
      "	semimembranosus
      "	semitendinosus
      o	gastrocnemius (also plantar flexor as a calf muscle)
      o	gracilis (also hip flexor/adductor)
      o	sartorius (also hip flexor/abductor/lateral rotator)
      */

      AnyVar KneeFlexorMuscleForce = MuscleForces.BicepsFemorisCaputLongForce + MuscleForces.GastrocForce + MuscleForces.GracilisForce + MuscleForces.SartoriusForce;


       //*************************************************

      // Search Functions:

      AnyFolder MuscleForces = {


        AnySearchFun GluteusMaxForceList =  {
          #if ((LEFT_LEG_TD_SIMPLE_MUSCLES) + (LEFT_LEG_TD_MUS_3E)) == 0
          #else
          Search = "......Left.Leg.Mus.GluteusMax*.Fout";
          #endif
        };


        // GlutMed
        AnySearchFun GlutMedForceList =  {
          #if ((LEFT_LEG_TD_SIMPLE_MUSCLES) + (LEFT_LEG_TD_MUS_3E)) == 0
          #else
          Search = "......Left.Leg.Mus.GluteusMed*.Fout";
          #endif
        };

        // GlutMin
        AnySearchFun GlutMinForceList =  {
          #if ((LEFT_LEG_TD_SIMPLE_MUSCLES) + (LEFT_LEG_TD_MUS_3E)) == 0
          #else
          Search = "......Left.Leg.Mus.GluteusMin*.Fout";
          #endif
        };

        // Sartorius
        AnySearchFun SartoriusForceList =  {
          #if ((LEFT_LEG_TD_SIMPLE_MUSCLES) + (LEFT_LEG_TD_MUS_3E)) == 0
          #else
          Search = "......Left.Leg.Mus.Sartorius*.Fout";
          #endif
        };

        // Tensor Fasciae Latae
        AnySearchFun TensorFasciaeForceList =  {
          #if ((LEFT_LEG_TD_SIMPLE_MUSCLES) + (LEFT_LEG_TD_MUS_3E)) == 0
          #else
          Search = "......Left.Leg.Mus.TensorFasciae*.Fout";
          #endif
        };


        // Psoas Major
        AnySearchFun PsoasMajorForceList =  {
          #if ((LEFT_LEG_TD_SIMPLE_MUSCLES) + (LEFT_LEG_TD_MUS_3E)) == 0
          #else
          Search = "......Trunk.MusclesSpineLeft.PsoasMajor.*.Fout";
          #endif
        };


        //        // Psoas Minor
        //        AnySearchFun PsoasMinorForceList =  {
        //          #if ((LEFT_LEG_TD_SIMPLE_MUSCLES) + (LEFT_LEG_TD_MUS_3E)) == 0
        //          #else
        //          Search = "......Trunk.Leg.MusclesSpineLeft.PsoasMinor.*.Fout";
        //          #endif
        //        };

        AnySearchFun IliacusForceList =  {
          #if ((LEFT_LEG_TD_SIMPLE_MUSCLES) + (LEFT_LEG_TD_MUS_3E)) == 0
          #else
          Search = "......Left.Leg.Mus.Iliac*.Fout";
          #endif
        };

        AnySearchFun RectusFemorisForceList =  {
          #if ((LEFT_LEG_TD_SIMPLE_MUSCLES) + (LEFT_LEG_TD_MUS_3E)) == 0
          #else
          Search = "......Left.Leg.Mus.RectusF*.Fout";
          #endif
        };

        AnySearchFun PectineusForceList =  {
          #if ((LEFT_LEG_TD_SIMPLE_MUSCLES) + (LEFT_LEG_TD_MUS_3E)) == 0
          #else
          Search = "......Left.Leg.Mus.Pect*.Fout";
          #endif
        };

        AnySearchFun GracilisForceList =  {
          #if ((LEFT_LEG_TD_SIMPLE_MUSCLES) + (LEFT_LEG_TD_MUS_3E)) == 0
          #else
          Search = "......Left.Leg.Mus.Gracili*.Fout";
          #endif
        };

        AnySearchFun AdductorLongusForceList =  {
          #if ((LEFT_LEG_TD_SIMPLE_MUSCLES) + (LEFT_LEG_TD_MUS_3E)) == 0
          #else
          Search = "......Left.Leg.Mus.AdductorLongus*.Fout";
          #endif
        };

        AnySearchFun AdductorBrevisForceList =  {
          #if ((LEFT_LEG_TD_SIMPLE_MUSCLES) + (LEFT_LEG_TD_MUS_3E)) == 0
          #else
          Search = "......Left.Leg.Mus.AdductorBr*.Fout";
          #endif
        };


        AnySearchFun AdductorMagnusForceList =  {
          #if ((LEFT_LEG_TD_SIMPLE_MUSCLES) + (LEFT_LEG_TD_MUS_3E)) == 0
          #else
          Search = "......Left.Leg.Mus.AdductorMag*.Fout";
          #endif
        };

        //                 AnySearchFun AdductorMinimusForceList =  {
        //          #if ((LEFT_LEG_TD_SIMPLE_MUSCLES) + (LEFT_LEG_TD_MUS_3E)) == 0
        //          #else
        //          Search = "......Left.Leg.Mus.AdductorMin*.Fout";
        //          #endif
        //        };


        AnySearchFun ObturatorExtForceList =  {
          #if ((LEFT_LEG_TD_SIMPLE_MUSCLES) + (LEFT_LEG_TD_MUS_3E)) == 0
          #else
          Search = "......Left.Leg.Mus.ObturatorExt*.Fout";
          #endif
        };


        AnySearchFun SemimembranosusForceList =  {
          #if ((LEFT_LEG_TD_SIMPLE_MUSCLES) + (LEFT_LEG_TD_MUS_3E)) == 0
          #else
          Search = "......Left.Leg.Mus.Semimembr*.Fout";
          #endif
        };

        AnySearchFun SemimemtendinosusForceList =  {
          #if ((LEFT_LEG_TD_SIMPLE_MUSCLES) + (LEFT_LEG_TD_MUS_3E)) == 0
          #else
          Search = "......Left.Leg.Mus.Semitend*.Fout";
          #endif
        };

        AnySearchFun BicepsFemorisCaputBreveForceList =  {
          #if ((LEFT_LEG_TD_SIMPLE_MUSCLES) + (LEFT_LEG_TD_MUS_3E)) == 0
          #else
          Search = "......Left.Leg.Mus.BicepsFemorisCaputBreve*.Fout";
          #endif
        };


        AnySearchFun BicepsFemorisCaputLongForceList =  {
          #if ((LEFT_LEG_TD_SIMPLE_MUSCLES) + (LEFT_LEG_TD_MUS_3E)) == 0
          #else
          Search = "......Left.Leg.Mus.BicepsFemorisCaputL*.Fout";
          #endif
        };


        AnySearchFun GastrocForceList =  {
          #if ((LEFT_LEG_TD_SIMPLE_MUSCLES) + (LEFT_LEG_TD_MUS_3E)) == 0
          #else
          Search = "......Left.Leg.Mus.Gastroc*.Fout";
          #endif
        };


//*****
        AnyVar GluteusMaxForce = sum(GluteusMaxForceList());
        AnyVar GluteusMedForce = sum(GlutMedForceList());
        AnyVar GluteusMinForce = sum(GlutMinForceList());
        AnyVar SartoriusForce = sum(SartoriusForceList());
        AnyVar TensorFasciaeForce = sum(TensorFasciaeForceList());
        AnyVar PsoasMajorForce = sum(PsoasMajorForceList());
        //        AnyVar PsoasMinorForce = sum(PsoasMinorForceList());
        AnyVar IliacusForce = sum(IliacusForceList());
        AnyVar RectusFemorisForce = sum(RectusFemorisForceList());
        AnyVar PectineusForce = sum(PectineusForceList());
        AnyVar GracilisForce = sum(GracilisForceList());
        AnyVar AdductorLongusForce = sum(AdductorLongusForceList());
        AnyVar AdductorBrevisForce = sum(AdductorBrevisForceList());
        AnyVar AdductorMagnusForce = sum(AdductorMagnusForceList());
        //        AnyVar AdductorMinimusForce = sum(AdductorMinimusForceList());
        AnyVar ObturatorExtForce = sum(ObturatorExtForceList());
        AnyVar SemimembranosusForce = sum(SemimembranosusForceList());
        AnyVar SemitendinosusForce = sum(SemimemtendinosusForceList());
        AnyVar BicepsFemorisCaputBreveForce = sum(BicepsFemorisCaputBreveForceList());
        AnyVar BicepsFemorisCaputLongForce = sum(BicepsFemorisCaputLongForceList());
        AnyVar GastrocForce = sum(GastrocForceList());

      };

    }; //End Muscles


  }; //End Leg


}; //End Left
