/*
This is the root file for the leg model without muscles

The model contains the following files:
"StandardParameters.any" for overall parameters on which the model is based
"Seg.any" segments on the leg.
"Jnt.any" joint definitions for the leg.
"SegmentsTrunk.any" definition of pelvis segment.
*/

// Add all muscle nodes etc. to the pelvis segment
HipNodeRef = {
  #include "<ANYBODY_PATH_BODY>LegTD-FootGM/HipNodes.any"
};

// Collection of the joints into JntDOF which are used by the applications.
AnyKinMeasureOrg JntDOF = {
  // This is where the DOF of the leg are assembled into one single measure, this measure has the following DOF:
  // 0 Ankle flexion/extension
  // 1 Ankle abduction adduction
  // 2 Knee flextion/extension
  // 3 Hip adduction/abduction
  // 4 Hip rotation externa/internal
  // 5 Hip flexion/extension
  AnyRevoluteJoint &Ankle = .Jnt.Ankle;
  AnyRevoluteJoint &Knee = .Jnt.Knee;
  AnySphericalJoint &Hip = .Jnt.Hip;
};

/// Definition of the leg segments
AnyFolder Seg = {
  #include "Seg.any"
  #include "<ANYBODY_PATH_BODY>FootGM/Seg.any"
  #include "<ANYBODY_PATH_BODY>FootGM/PressureContactNodes.any"
  //#include "NodeForScalingExt.any"
};

//Joint reaction made using reacforces
#include "<ANYBODY_PATH_BODY>LegTD-FootGM/JointMuscles.any"
#include "<ANYBODY_PATH_BODY>FootGM/JointMuscles.any"
//#include "JointReactions.any"

/// Definition of the joints
AnyFolder Jnt = {
  #include "<ANYBODY_PATH_BODY>LegTD-FootGM/Jnt.any"
  #include "<ANYBODY_PATH_BODY>FootGM/Jnt.any"
  //#include "JointMuscles.any" joint reactions made as artificial muscles
};


/// Summation of masses in the leg
AnyFolder MassSummation={
  AnyVar Mass=.Seg.Thigh.Mass+.Seg.Shank.Mass+.Seg.Foot.Mass;
};


#ifdef DONT_USE_INITIAL_POSITION_FROM_MANNEQUIN
#else
#include "InitialPositions.any"
#include "<ANYBODY_PATH_BODY>FootGM/InitialPositions.any"
#endif

InterfaceFolder ={
  #include "<ANYBODY_PATH_BODY>LegTD-FootGM/Interface.any"
  #include "<ANYBODY_PATH_BODY>FootGM/Interface.any"
};

MannequinValuesFolder ={
  #include "<ANYBODY_PATH_BODY>LegTD-FootGM/MannequinValuesFromModel.any"
};
