// Definitions of muscles in the right lower extremity

// Muscles and muscle-parts added, based on the Klein Horsman dataset. Karin Gorter, 9-2007

// Mark de Zee

// Sartorius, gracilis added to "hamstrings" biarticular
// muscles 26-6-02. GMax split into three, tensor fasciae
// latae added 5-9-02
// Mark Thompson

// -------------------------------------------------------
// This is an interface reference to make sure that the
// include file MusDrawSettings.any always can be left
// unchanged and not affected by different directory
// levels.
// -------------------------------------------------------

AnyFolder &Ref = .MusDrawRef;


AnyViaPointMuscle SoleusMedialis1 = {
  AnyMuscleModel &MusMdl = ..MusPar.SoleusMedialis1Par;
  AnyRefNode &Org = ..Seg.Shank.SoleusMedialis1Node;
  AnyRefNode &Ins = ..Seg.Calcaneus.SoleusMedialis1Node;
  AnyDrawMuscle DrwMus = {#include "../DrawSettings/MusDrawSettings.any"
  };
};

AnyViaPointMuscle SoleusMedialis2 = {
  AnyMuscleModel &MusMdl = ..MusPar.SoleusMedialis2Par;
  AnyRefNode &Org = ..Seg.Shank.SoleusMedialis2Node;
  AnyRefNode &Ins = ..Seg.Calcaneus.SoleusMedialis2Node;
  AnyDrawMuscle DrwMus = {#include "../DrawSettings/MusDrawSettings.any"
  };
};

AnyViaPointMuscle SoleusMedialis3 = {
  AnyMuscleModel &MusMdl = ..MusPar.SoleusMedialis3Par;
  AnyRefNode &Org = ..Seg.Shank.SoleusMedialis3Node;
  AnyRefNode &Ins = ..Seg.Calcaneus.SoleusMedialis3Node;
  AnyDrawMuscle DrwMus = {#include "../DrawSettings/MusDrawSettings.any"
  };
};

AnyViaPointMuscle SoleusLateralis1 = {
  AnyMuscleModel &MusMdl = ..MusPar.SoleusLateralis1Par;
  AnyRefNode &Org = ..Seg.Shank.SoleusLateralis1Node;
  AnyRefNode &Ins = ..Seg.Calcaneus.SoleusLateralis1Node;
  AnyDrawMuscle DrwMus = {#include "../DrawSettings/MusDrawSettings.any"
  };
};

AnyViaPointMuscle SoleusLateralis2 = {
  AnyMuscleModel &MusMdl = ..MusPar.SoleusLateralis2Par;
  AnyRefNode &Org = ..Seg.Shank.SoleusLateralis2Node;
  AnyRefNode &Ins = ..Seg.Calcaneus.SoleusLateralis2Node;
  AnyDrawMuscle DrwMus = {#include "../DrawSettings/MusDrawSettings.any"
  };
};

AnyViaPointMuscle SoleusLateralis3 = {
  AnyMuscleModel &MusMdl = ..MusPar.SoleusLateralis3Par;
  AnyRefNode &Org = ..Seg.Shank.SoleusLateralis3Node;
  AnyRefNode &Ins = ..Seg.Calcaneus.SoleusLateralis3Node;
  AnyDrawMuscle DrwMus = {#include "../DrawSettings/MusDrawSettings.any"
  };
};

AnyShortestPathMuscle GastrocnemiusLateralis1 = {
  AnyMuscleModel &MusMdl = ..MusPar.GastrocnemiusLateralis1Par;
  AnyRefNode &Org = ..Seg.Thigh.GastrocnemiusLateralis1Node;
  AnyRefNode &Via1 = ..Seg.Shank.GastrocnemiusLateralis1ViaNode;
//  AnySurface &srf = ..Seg.Thigh.CylCenter.WrapSurf;
  AnySurface &srf = ..Seg.Thigh.GastroWrapSurf.cyl;
  AnyRefNode &Ins = ..Seg.Calcaneus.GastrocnemiusLateralis1Node;
  SPLine.StringMesh = 45;
  AnyDrawMuscle DrwMus = {
   #include "../DrawSettings/MusDrawSettings.any"
  };
};

AnyShortestPathMuscle GastrocnemiusMedialis1 = {
  AnyMuscleModel &MusMdl = ..MusPar.GastrocnemiusMedialis1Par;
  AnyRefNode &Org = ..Seg.Thigh.GastrocnemiusMedialis1Node;
  AnyRefNode &Via1 = ..Seg.Shank.GastrocnemiusMedialis1ViaNode;
  //  AnySurface &srf = ..Seg.Thigh.CylCenter.WrapSurf;
  AnySurface &srf = ..Seg.Thigh.GastroWrapSurf.cyl;
  AnyRefNode &Ins = ..Seg.Calcaneus.GastrocnemiusMedialis1Node;
  SPLine.StringMesh = 45;
  AnyDrawMuscle DrwMus = {
   #include "../DrawSettings/MusDrawSettings.any"
  };
};

AnyViaPointMuscle FlexorDigitorumLongus1 = {
  AnyMuscleModel &MusMdl = ..MusPar.FlexorDigitorumLongus1Par;
  AnyRefNode &Org = ..Seg.Shank.FlexorDigitorumLongus1Node;
  AnyRefNode &Via1 = ..Seg.Shank.FlexorDigitorumLongusViaNode1;
  AnyRefNode &Via2 = ..Seg.Shank.FlexorDigitorumLongusViaNode2;
 // AnyRefNode &Via3 = ..Seg.Shank.FlexorDigitorumLongusViaNode3;
  //AnyRefNode &Via4 = ..Seg.Shank.FlexorDigitorumLongusViaNode4;
  AnyRefNode &Via5 = ..Seg.Shank.FlexorDigitorumLongusViaNode5;
  AnyRefNode &Via6 = ..Seg.Shank.FlexorDigitorumLongusViaNode6;
  AnyRefNode &Via7 = ..Seg.Calcaneus.FlexorDigitorumLongusViaNode7;
  AnyRefNode &Via8 = ..Seg.FDLDummySeg.FlexorDigitorumLongusViaNode8;
  AnyDrawMuscle DrwMus = {
#include "../DrawSettings/MusDrawSettings.any"};

};


AnyViaPointMuscle FlexorDigitorumLongus2 = {
  AnyMuscleModel &MusMdl = ..MusPar.FlexorDigitorumLongus2Par;
  AnyRefNode &Org = ..Seg.Shank.FlexorDigitorumLongus2Node;
  AnyRefNode &Via1 = ..Seg.Shank.FlexorDigitorumLongusViaNode1;
  AnyRefNode &Via2 = ..Seg.Shank.FlexorDigitorumLongusViaNode2;
 // AnyRefNode &Via3 = ..Seg.Shank.FlexorDigitorumLongusViaNode3;
 // AnyRefNode &Via4 = ..Seg.Shank.FlexorDigitorumLongusViaNode4;
  AnyRefNode &Via5 = ..Seg.Shank.FlexorDigitorumLongusViaNode5;
  AnyRefNode &Via6 = ..Seg.Shank.FlexorDigitorumLongusViaNode6;
  AnyRefNode &Via7 = ..Seg.Calcaneus.FlexorDigitorumLongusViaNode7;
  AnyRefNode &Via8 = ..Seg.FDLDummySeg.FlexorDigitorumLongusViaNode8;
  AnyDrawMuscle DrwMus = {
   #include "../DrawSettings/MusDrawSettings.any"
  };
};

AnyViaPointMuscle FlexorDigitorumLongus3 = {
  AnyMuscleModel &MusMdl = ..MusPar.FlexorDigitorumLongus3Par;
  AnyRefNode &Org = ..Seg.Shank.FlexorDigitorumLongus3Node;
  AnyRefNode &Via1 = ..Seg.Shank.FlexorDigitorumLongusViaNode1;
  AnyRefNode &Via2 = ..Seg.Shank.FlexorDigitorumLongusViaNode2;
  //AnyRefNode &Via3 = ..Seg.Shank.FlexorDigitorumLongusViaNode3;
  //AnyRefNode &Via4 = ..Seg.Shank.FlexorDigitorumLongusViaNode4;
  AnyRefNode &Via5 = ..Seg.Shank.FlexorDigitorumLongusViaNode5;
  AnyRefNode &Via6 = ..Seg.Shank.FlexorDigitorumLongusViaNode6;
  AnyRefNode &Via7 = ..Seg.Calcaneus.FlexorDigitorumLongusViaNode7;
  AnyRefNode &Via8 = ..Seg.FDLDummySeg.FlexorDigitorumLongusViaNode8;
  AnyDrawMuscle DrwMus = {
   #include "../DrawSettings/MusDrawSettings.any"
  };
};


AnyViaPointMuscle FlexorDigitorumLongusToe2Tendon = {
  AnyMuscleModel MusMdl = {F0 = 2000;};
  //AnyRefNode &Via8 = ..Seg.FDLDummySeg.FlexorDigitorumLongusViaNode8;
  AnyRefNode &ViaLB = ..Seg.FDLDummySeg.LB2_Org;
  AnyRefNode &Via9 = ..Seg.Metatarsal2.FlexorDigitorumLongusViaNode9;
  AnyRefNode &Via10 = ..Seg.ProximalPhalange2.FlexorDigitorumLongusViaNode10;
  AnyRefNode &Via11 = ..Seg.MiddlePhalange2.FlexorDigitorumLongusViaNode11;
  AnyRefNode &Ins = ..Seg.DistalPhalange2.FlexorDigitorumLongusNode;
  AnyDrawMuscle DrwMus = {
    #include "../DrawSettings/MusDrawSettings.any"
  };
};

AnyViaPointMuscle FlexorDigitorumLongusToe3Tendon = {
  AnyMuscleModel MusMdl = {F0 = 2000;};
  //AnyRefNode &Via8 = ..Seg.FDLDummySeg.FlexorDigitorumLongusViaNode8;
  AnyRefNode &ViaLB = ..Seg.FDLDummySeg.LB3_Org;
  AnyRefNode &Via12 = ..Seg.Metatarsal3.FlexorDigitorumLongusViaNode12;
  AnyRefNode &Via13 = ..Seg.ProximalPhalange3.FlexorDigitorumLongusViaNode13;
  AnyRefNode &Via14 = ..Seg.MiddlePhalange3.FlexorDigitorumLongusViaNode14;
  AnyRefNode &Ins = ..Seg.DistalPhalange3.FlexorDigitorumLongusNode;
  AnyDrawMuscle DrwMus = {
    #include "../DrawSettings/MusDrawSettings.any"
  };
};

AnyViaPointMuscle FlexorDigitorumLongusToe4Tendon = {
  AnyMuscleModel MusMdl = {F0 = 2000;};
  //AnyRefNode &Via8 = ..Seg.FDLDummySeg.FlexorDigitorumLongusViaNode8;
  AnyRefNode &ViaLB = ..Seg.FDLDummySeg.LB4_Org;
  AnyRefNode &Via15 = ..Seg.Metatarsal4.FlexorDigitorumLongusViaNode15;
  AnyRefNode &Via16 = ..Seg.ProximalPhalange4.FlexorDigitorumLongusViaNode16;
  AnyRefNode &Via17 = ..Seg.MiddlePhalange4.FlexorDigitorumLongusViaNode17;
  AnyRefNode &Ins = ..Seg.DistalPhalange4.FlexorDigitorumLongusNode;
  AnyDrawMuscle DrwMus = {
    #include "../DrawSettings/MusDrawSettings.any"
  };
};

AnyViaPointMuscle FlexorDigitorumLongusToe5Tendon = {
  AnyMuscleModel MusMdl = {F0 = 2000;};
  //AnyRefNode &Via8 = ..Seg.FDLDummySeg.FlexorDigitorumLongusViaNode8;
  AnyRefNode &ViaLB = ..Seg.FDLDummySeg.LB5_Org;
  AnyRefNode &Via18 = ..Seg.Metatarsal5.FlexorDigitorumLongusViaNode18;
  AnyRefNode &Via19 = ..Seg.ProximalPhalange5.FlexorDigitorumLongusViaNode19;
  AnyRefNode &Via20 = ..Seg.MiddlePhalange5.FlexorDigitorumLongusViaNode20;
  AnyRefNode &Ins = ..Seg.DistalPhalange5.FlexorDigitorumLongusNode;
  AnyDrawMuscle DrwMus = {
    #include "../DrawSettings/MusDrawSettings.any"
  };
};


//AnyMuscleActivityConstraint FlexorDigitorumLongusInterTendonLink =
//{
//  AnyMuscle &muscle0 = .FlexorDigitorumLongusToe2Tendon;
//  AnyMuscle &muscle1 = .FlexorDigitorumLongusToe3Tendon;
//  AnyMuscle &muscle2 = .FlexorDigitorumLongusToe4Tendon;
//  AnyMuscle &muscle3 = .FlexorDigitorumLongusToe5Tendon;
//  nCon = 3;
//  Coef = {{-1,1,0,0},{-1,0,1,0},{-1,0,0,1}};
//  Const = {0,0,0};
//};


AnyViaPointMuscle FlexorHallucisLongus1 = {
  AnyMuscleModel &MusMdl = ..MusPar.FlexorHallucisLongus1Par;
  AnyRefNode &Org = ..Seg.Shank.FlexorHallucisLongus1Node;
  AnyRefNode &Via1 = ..Seg.Shank.FlexorHallucisLongusViaNode1;
  //AnyRefNode &Via2 = ..Seg.Shank.FlexorHallucisLongusViaNode2;
  //AnyRefNode &Via3 = ..Seg.Shank.FlexorHallucisLongusViaNode3;
  //AnyRefNode &Via4 = ..Seg.Shank.FlexorHallucisLongusViaNode4;
  AnyRefNode &Via5 = ..Seg.Shank.FlexorHallucisLongusViaNode5;
  AnyRefNode &Via6 = ..Seg.Shank.FlexorHallucisLongusViaNode6;
  AnyRefNode &Via7 = ..Seg.Calcaneus.FlexorHallucisLongusViaNode7;
  AnyRefNode &Via8 = ..Seg.Calcaneus.FlexorHallucisLongusViaNode8;
  AnyRefNode &Via9 = ..Seg.Metatarsal1.FlexorHallucisLongusViaNode9;
  AnyRefNode &Via10 = ..Seg.ProximalPhalange1.FlexorHallucisLongusViaNode10;
  AnyRefNode &Ins = ..Seg.DistalPhalange1.FlexorHallucisLongus1Node;
  AnyDrawMuscle DrwMus = { #include "../DrawSettings/MusDrawSettings.any"};
};

AnyViaPointMuscle FlexorHallucisLongus2 = {
  AnyMuscleModel &MusMdl = ..MusPar.FlexorHallucisLongus2Par;
  AnyRefNode &Org = ..Seg.Shank.FlexorHallucisLongus2Node;
  AnyRefNode &Via1 = ..Seg.Shank.FlexorHallucisLongusViaNode1;
  //AnyRefNode &Via2 = ..Seg.Shank.FlexorHallucisLongusViaNode2;
  //AnyRefNode &Via3 = ..Seg.Shank.FlexorHallucisLongusViaNode3;
  //AnyRefNode &Via4 = ..Seg.Shank.FlexorHallucisLongusViaNode4;
  AnyRefNode &Via5 = ..Seg.Shank.FlexorHallucisLongusViaNode5;
  AnyRefNode &Via6 = ..Seg.Shank.FlexorHallucisLongusViaNode6;
  AnyRefNode &Via7 = ..Seg.Calcaneus.FlexorHallucisLongusViaNode7;
  AnyRefNode &Via8 = ..Seg.Calcaneus.FlexorHallucisLongusViaNode8;
  AnyRefNode &Via9 = ..Seg.Metatarsal1.FlexorHallucisLongusViaNode9;
  AnyRefNode &Via10 = ..Seg.ProximalPhalange1.FlexorHallucisLongusViaNode10;
  AnyRefNode &Ins = ..Seg.DistalPhalange1.FlexorHallucisLongus2Node;
  AnyDrawMuscle DrwMus = {#include "../DrawSettings/MusDrawSettings.any"};
};

AnyViaPointMuscle FlexorHallucisLongus3 = {
  AnyMuscleModel &MusMdl = ..MusPar.FlexorHallucisLongus3Par;
  AnyRefNode &Org = ..Seg.Shank.FlexorHallucisLongus3Node;
  AnyRefNode &Via1 = ..Seg.Shank.FlexorHallucisLongusViaNode1;
 // AnyRefNode &Via2 = ..Seg.Shank.FlexorHallucisLongusViaNode2;
 // AnyRefNode &Via3 = ..Seg.Shank.FlexorHallucisLongusViaNode3;
  //AnyRefNode &Via4 = ..Seg.Shank.FlexorHallucisLongusViaNode4;
  AnyRefNode &Via5 = ..Seg.Shank.FlexorHallucisLongusViaNode5;
  AnyRefNode &Via6 = ..Seg.Shank.FlexorHallucisLongusViaNode6;
  AnyRefNode &Via7 = ..Seg.Calcaneus.FlexorHallucisLongusViaNode7;
  AnyRefNode &Via8 = ..Seg.Calcaneus.FlexorHallucisLongusViaNode8;
  AnyRefNode &Via9 = ..Seg.Metatarsal1.FlexorHallucisLongusViaNode9;
  AnyRefNode &Via10 = ..Seg.ProximalPhalange1.FlexorHallucisLongusViaNode10;
  AnyRefNode &Ins = ..Seg.DistalPhalange1.FlexorHallucisLongus3Node;
  AnyDrawMuscle DrwMus = {#include "../DrawSettings/MusDrawSettings.any"};
};


AnyViaPointMuscle TibialisPosteriorLateralis1 = {
  AnyMuscleModel &MusMdl = ..MusPar.TibialisPosteriorLateralis1Par;
  AnyRefNode &Org = ..Seg.Shank.TibialisPosteriorLateralis1Node;
  AnyRefNode &Via1 = ..Seg.Shank.TibialisPosteriorLateralisViaNode1;
  AnyRefNode &Via2 = ..Seg.Shank.TibialisPosteriorLateralisViaNode2;
  AnyRefNode &Via3 = ..Seg.Shank.TibialisPosteriorLateralisViaNode3;
  AnyRefNode &Via4 = ..Seg.Shank.TibialisPosteriorLateralisViaNode4;
  AnyRefNode &Via5 = ..Seg.Shank.TibialisPosteriorLateralisViaNode5;
  AnyRefNode &Via6 = ..Seg.Shank.TibialisPosteriorLateralisViaNode6;
  AnyRefNode &Via7 = ..Seg.Shank.TibialisPosteriorLateralisViaNode7;
  AnyRefNode &Via8 = ..Seg.Calcaneus.TibialisPosteriorLateralisViaNode8;
  AnyDrawMuscle DrwMus = {#include "../DrawSettings/MusDrawSettings.any"
  };
};

AnyViaPointMuscle TibialisPosteriorLateralis2 = {
  AnyMuscleModel &MusMdl = ..MusPar.TibialisPosteriorLateralis2Par;
  AnyRefNode &Org = ..Seg.Shank.TibialisPosteriorLateralis2Node;
  AnyRefNode &Via1 = ..Seg.Shank.TibialisPosteriorLateralisViaNode1;
  AnyRefNode &Via2 = ..Seg.Shank.TibialisPosteriorLateralisViaNode2;
  AnyRefNode &Via3 = ..Seg.Shank.TibialisPosteriorLateralisViaNode3;
  AnyRefNode &Via4 = ..Seg.Shank.TibialisPosteriorLateralisViaNode4;
  AnyRefNode &Via5 = ..Seg.Shank.TibialisPosteriorLateralisViaNode5;
  AnyRefNode &Via6 = ..Seg.Shank.TibialisPosteriorLateralisViaNode6;
  AnyRefNode &Via7 = ..Seg.Shank.TibialisPosteriorLateralisViaNode7;
  AnyRefNode &Via8 = ..Seg.Calcaneus.TibialisPosteriorLateralisViaNode8;
  AnyDrawMuscle DrwMus = {#include "../DrawSettings/MusDrawSettings.any"
  };
};

AnyViaPointMuscle TibialisPosteriorLateralis3 = {
  AnyMuscleModel &MusMdl = ..MusPar.TibialisPosteriorLateralis3Par;
  AnyRefNode &Org = ..Seg.Shank.TibialisPosteriorLateralis3Node;
  AnyRefNode &Via1 = ..Seg.Shank.TibialisPosteriorLateralisViaNode1;
  AnyRefNode &Via2 = ..Seg.Shank.TibialisPosteriorLateralisViaNode2;
  AnyRefNode &Via3 = ..Seg.Shank.TibialisPosteriorLateralisViaNode3;
  AnyRefNode &Via4 = ..Seg.Shank.TibialisPosteriorLateralisViaNode4;
  AnyRefNode &Via5 = ..Seg.Shank.TibialisPosteriorLateralisViaNode5;
  AnyRefNode &Via6 = ..Seg.Shank.TibialisPosteriorLateralisViaNode6;
  AnyRefNode &Via7 = ..Seg.Shank.TibialisPosteriorLateralisViaNode7;
  AnyRefNode &Via8 = ..Seg.Calcaneus.TibialisPosteriorLateralisViaNode8;
  AnyDrawMuscle DrwMus = {#include "../DrawSettings/MusDrawSettings.any"
  };
};

AnyViaPointMuscle TibialisPosteriorMedialis1 = {
  AnyMuscleModel &MusMdl = ..MusPar.TibialisPosteriorMedialis1Par;
  AnyRefNode &Org = ..Seg.Shank.TibialisPosteriorMedialis1Node;
  AnyRefNode &Via1 = ..Seg.Shank.TibialisPosteriorMedialisViaNode1;
  AnyRefNode &Via2 = ..Seg.Shank.TibialisPosteriorMedialisViaNode2;
  AnyRefNode &Via3 = ..Seg.Shank.TibialisPosteriorMedialisViaNode3;
  AnyRefNode &Via4 = ..Seg.Shank.TibialisPosteriorMedialisViaNode4;
  AnyRefNode &Via5 = ..Seg.Shank.TibialisPosteriorMedialisViaNode5;
  AnyRefNode &Via6 = ..Seg.Shank.TibialisPosteriorMedialisViaNode6;
  AnyRefNode &Via7 = ..Seg.Shank.TibialisPosteriorMedialisViaNode7;
  AnyRefNode &Via8 = ..Seg.Shank.TibialisPosteriorMedialisViaNode8;
  AnyRefNode &Via9 = ..Seg.Calcaneus.TibialisPosteriorMedialisViaNode9;
  AnyDrawMuscle DrwMus = {#include "../DrawSettings/MusDrawSettings.any"
  };
};

AnyViaPointMuscle TibialisPosteriorMedialis2 = {
  AnyMuscleModel &MusMdl = ..MusPar.TibialisPosteriorMedialis2Par;
  AnyRefNode &Org = ..Seg.Shank.TibialisPosteriorMedialis2Node;
  AnyRefNode &Via1 = ..Seg.Shank.TibialisPosteriorMedialisViaNode1;
  AnyRefNode &Via2 = ..Seg.Shank.TibialisPosteriorMedialisViaNode2;
  AnyRefNode &Via3 = ..Seg.Shank.TibialisPosteriorMedialisViaNode3;
  AnyRefNode &Via4 = ..Seg.Shank.TibialisPosteriorMedialisViaNode4;
  AnyRefNode &Via5 = ..Seg.Shank.TibialisPosteriorMedialisViaNode5;
  AnyRefNode &Via6 = ..Seg.Shank.TibialisPosteriorMedialisViaNode6;
  AnyRefNode &Via7 = ..Seg.Shank.TibialisPosteriorMedialisViaNode7;
  AnyRefNode &Via8 = ..Seg.Shank.TibialisPosteriorMedialisViaNode8;
  AnyRefNode &Via9 = ..Seg.Calcaneus.TibialisPosteriorMedialisViaNode9;
  AnyDrawMuscle DrwMus = {#include "../DrawSettings/MusDrawSettings.any"
  };
};

AnyViaPointMuscle TibialisPosteriorMedialis3 = {
  AnyMuscleModel &MusMdl = ..MusPar.TibialisPosteriorMedialis3Par;
  AnyRefNode &Org = ..Seg.Shank.TibialisPosteriorMedialis3Node;
  AnyRefNode &Via1 = ..Seg.Shank.TibialisPosteriorMedialisViaNode1;
  AnyRefNode &Via2 = ..Seg.Shank.TibialisPosteriorMedialisViaNode2;
  AnyRefNode &Via3 = ..Seg.Shank.TibialisPosteriorMedialisViaNode3;
  AnyRefNode &Via4 = ..Seg.Shank.TibialisPosteriorMedialisViaNode4;
  AnyRefNode &Via5 = ..Seg.Shank.TibialisPosteriorMedialisViaNode5;
  AnyRefNode &Via6 = ..Seg.Shank.TibialisPosteriorMedialisViaNode6;
  AnyRefNode &Via7 = ..Seg.Shank.TibialisPosteriorMedialisViaNode7;
  AnyRefNode &Via8 = ..Seg.Shank.TibialisPosteriorMedialisViaNode8;
  AnyRefNode &Via9 = ..Seg.Calcaneus.TibialisPosteriorMedialisViaNode9;
  AnyDrawMuscle DrwMus = {#include "../DrawSettings/MusDrawSettings.any"
  };
};


AnyViaPointMuscle TibialisPosteriorNavicularTendon = {
  AnyMuscleModel MusMdl = {F0 = 2000;};
  AnyRefNode &Via9 = ..Seg.Calcaneus.TibialisPosteriorMedialisViaNode9;
  AnyRefNode &Via10 = ..Seg.Calcaneus.TibialisPosteriorViaNode10;
  AnyRefNode &Ins = ..Seg.Navicular.TibialisPosteriorNode;
  AnyDrawMuscle DrwMus = {
    #include "../DrawSettings/MusDrawSettings.any"
  };
};

AnyViaPointMuscle TibialisPosteriorMedCuneiTendon = {
  AnyMuscleModel MusMdl = {F0 = 2000;};
  AnyRefNode &Via9 = ..Seg.Calcaneus.TibialisPosteriorMedialisViaNode9;
  AnyRefNode &Via10 = ..Seg.Calcaneus.TibialisPosteriorViaNode10;
//  AnyRefNode &Via11 = ..Seg.Navicular.TibialisPosteriorViaNode11;
  AnyRefNode &Ins = ..Seg.MedialCuneiform.TibialisPosteriorNode;
  AnyDrawMuscle DrwMus = {
    #include "../DrawSettings/MusDrawSettings.any"
  };
};

AnyViaPointMuscle TibialisPosteriorIntCuneiTendon = {
  AnyMuscleModel MusMdl = {F0 = 2000;};
  AnyRefNode &Via9 = ..Seg.Calcaneus.TibialisPosteriorMedialisViaNode9;
  AnyRefNode &Via10 = ..Seg.Calcaneus.TibialisPosteriorViaNode10;
//  AnyRefNode &Via11 = ..Seg.Navicular.TibialisPosteriorViaNode11;
  AnyRefNode &Ins = ..Seg.IntermediateCuneiform.TibialisPosteriorNode;
  AnyDrawMuscle DrwMus = {
    #include "../DrawSettings/MusDrawSettings.any"
  };
};

AnyViaPointMuscle TibialisPosteriorLatCuneiTendon = {
  AnyMuscleModel MusMdl = {F0 = 2000;};
  AnyRefNode &Via9 = ..Seg.Calcaneus.TibialisPosteriorMedialisViaNode9;
  AnyRefNode &Via10 = ..Seg.Calcaneus.TibialisPosteriorViaNode10;
//  AnyRefNode &Via11 = ..Seg.Navicular.TibialisPosteriorViaNode11;
  AnyRefNode &Ins = ..Seg.LateralCuneiform.TibialisPosteriorNode;
  AnyDrawMuscle DrwMus = {
    #include "../DrawSettings/MusDrawSettings.any"
  };
};

AnyViaPointMuscle TibialisPosteriorCuboidTendon = {
  AnyMuscleModel MusMdl = {F0 = 2000;};
  AnyRefNode &Via9 = ..Seg.Calcaneus.TibialisPosteriorMedialisViaNode9;
  AnyRefNode &Via10 = ..Seg.Calcaneus.TibialisPosteriorViaNode10;
//  AnyRefNode &Via11 = ..Seg.Navicular.TibialisPosteriorViaNode11;
  AnyRefNode &Ins = ..Seg.Cuboid.TibialisPosteriorNode;
  AnyDrawMuscle DrwMus = {
    #include "../DrawSettings/MusDrawSettings.any"
  };
};

AnyViaPointMuscle TibialisPosteriorMt2Tendon = {
  AnyMuscleModel MusMdl = {F0 = 2000;};
  AnyRefNode &Via9 = ..Seg.Calcaneus.TibialisPosteriorMedialisViaNode9;
  AnyRefNode &Via10 = ..Seg.Calcaneus.TibialisPosteriorViaNode10;
//  AnyRefNode &Via11 = ..Seg.Navicular.TibialisPosteriorViaNode11;
  AnyRefNode &Ins = ..Seg.Metatarsal2.TibialisPosteriorNode;
  AnyDrawMuscle DrwMus = {
    #include "../DrawSettings/MusDrawSettings.any"
  };
};

AnyViaPointMuscle TibialisPosteriorMt3Tendon = {
  AnyMuscleModel MusMdl = {F0 = 2000;};
  AnyRefNode &Via9 = ..Seg.Calcaneus.TibialisPosteriorMedialisViaNode9;
  AnyRefNode &Via10 = ..Seg.Calcaneus.TibialisPosteriorViaNode10;
//  AnyRefNode &Via11 = ..Seg.Navicular.TibialisPosteriorViaNode11;
  AnyRefNode &Ins = ..Seg.Metatarsal3.TibialisPosteriorNode;
  AnyDrawMuscle DrwMus = {
    #include "../DrawSettings/MusDrawSettings.any"
  };
};

AnyViaPointMuscle TibialisPosteriorMt4Tendon = {
  AnyMuscleModel MusMdl = {F0 = 2000;};
  AnyRefNode &Via9 = ..Seg.Calcaneus.TibialisPosteriorMedialisViaNode9;
  AnyRefNode &Via10 = ..Seg.Calcaneus.TibialisPosteriorViaNode10;
//  AnyRefNode &Via11 = ..Seg.Navicular.TibialisPosteriorViaNode11;
  AnyRefNode &Ins = ..Seg.Metatarsal4.TibialisPosteriorNode;
  AnyDrawMuscle DrwMus = {
    #include "../DrawSettings/MusDrawSettings.any"
  };
};

//To be added if usefull (present 64%)
//AnyViaPointMuscle TibialisPosteriorMt5Tendon = {
//  AnyMuscleModel MusMdl = {F0 = 2000;};
//  AnyRefNode &Via9 = ..Seg.Calcaneus.TibialisPosteriorMedialisViaNode9;
//  AnyRefNode &Via10 = ..Seg.Calcaneus.TibialisPosteriorViaNode10;
//  AnyRefNode &Via11 = ..Seg.Navicular.TibialisPosteriorViaNode11;
//  AnyRefNode &Ins = ..Seg.Metatarsal5.TibialisPosteriorNode;
//  AnyDrawMuscle DrwMus = {
//    #include "../DrawSettings/MusDrawSettings.any"
//  };
//};


//AnyMuscleActivityConstraint TibialisPosteriorInterTendonLink =
//{
//  AnyMuscle &muscle0 = .TibialisPosteriorNavicularTendon;
//  AnyMuscle &muscle1 = .TibialisPosteriorMedCuneiTendon;
//  AnyMuscle &muscle2 = .TibialisPosteriorIntCuneiTendon;
//  AnyMuscle &muscle3 = .TibialisPosteriorLatCuneiTendon;
//  AnyMuscle &muscle4 = .TibialisPosteriorCuboidTendon;
//  AnyMuscle &muscle5 = .TibialisPosteriorMt2Tendon;
//  AnyMuscle &muscle6 = .TibialisPosteriorMt3Tendon;
//  AnyMuscle &muscle7 = .TibialisPosteriorMt4Tendon;
//  nCon = 7;
//  Coef = {{-1,1,0,0,0,0,0,0},{-1,0,1,0,0,0,0,0},{-1,0,0,1,0,0,0,0},{-1,0,0,0,1,0,0,0},{-1,0,0,0,0,1,0,0},{-1,0,0,0,0,0,1,0},{-1,0,0,0,0,0,0,1}};
//  Const = {0,0,0,0,0,0,0};
//};


//AnyMuscleActivityConstraint TibialisPosteriorMuscleTendonLink =
//{
//  AnyMuscle &muscle0 = .TibialisPosteriorNavicularTendon;
//  AnyMuscle &muscle1 = .TibialisPosteriorMedCuneiTendon;
//  AnyMuscle &muscle2 = .TibialisPosteriorIntCuneiTendon;
//  AnyMuscle &muscle3 = .TibialisPosteriorLatCuneiTendon;
//  AnyMuscle &muscle4 = .TibialisPosteriorCuboidTendon;
//  AnyMuscle &muscle5 = .TibialisPosteriorMt2Tendon;
//  AnyMuscle &muscle6 = .TibialisPosteriorMt3Tendon;
//  AnyMuscle &muscle7 = .TibialisPosteriorMt4Tendon;
//  AnyMuscle &muscle8 = .TibialisPosteriorLateralis1;
//  AnyMuscle &muscle9 = .TibialisPosteriorLateralis2;
//  AnyMuscle &muscle10 = .TibialisPosteriorLateralis3;
//  AnyMuscle &muscle11 = .TibialisPosteriorMedialis1;
//  AnyMuscle &muscle12 = .TibialisPosteriorMedialis2;
//  AnyMuscle &muscle13 = .TibialisPosteriorMedialis3;
//  nCon = 1;
//  Coef = {{-muscle0.MusMdl.F0,
//           -muscle1.MusMdl.F0,
//           -muscle2.MusMdl.F0,
//           -muscle3.MusMdl.F0,
//           -muscle4.MusMdl.F0,
//           -muscle5.MusMdl.F0,
//           -muscle6.MusMdl.F0,
//           -muscle7.MusMdl.F0,
//            muscle8.MusMdl.F0,
//            muscle9.MusMdl.F0,
//            muscle10.MusMdl.F0,
//            muscle11.MusMdl.F0,
//            muscle12.MusMdl.F0,
//            muscle13.MusMdl.F0
//         }};
//  Const = {0};
//};


AnyMuscleActivityConstraint TibialisPosteriorMuscleTendonLink1 =
{
  AnyMuscle &muscle0 = .TibialisPosteriorNavicularTendon;
  AnyMuscle &muscle1 = .TibialisPosteriorMedCuneiTendon;
  AnyMuscle &muscle2 = .TibialisPosteriorIntCuneiTendon;
  AnyMuscle &muscle3 = .TibialisPosteriorLatCuneiTendon;
  AnyMuscle &muscle4 = .TibialisPosteriorCuboidTendon;
  AnyMuscle &muscle5 = .TibialisPosteriorMt2Tendon;
  AnyMuscle &muscle6 = .TibialisPosteriorMt3Tendon;
  AnyMuscle &muscle7 = .TibialisPosteriorMt4Tendon;
  AnyMuscle &muscle8 = .TibialisPosteriorLateralis1;
  AnyMuscle &muscle9 = .TibialisPosteriorLateralis2;
  AnyMuscle &muscle10 = .TibialisPosteriorLateralis3;
  AnyMuscle &muscle11 = .TibialisPosteriorMedialis1;
  AnyMuscle &muscle12 = .TibialisPosteriorMedialis2;
  AnyMuscle &muscle13 = .TibialisPosteriorMedialis3;
  nCon = 1;
  CType = NonNegative;
  Coef = {{-muscle0.MusMdl.F0,
           -muscle1.MusMdl.F0,
           -muscle2.MusMdl.F0,
           -muscle3.MusMdl.F0,
           -muscle4.MusMdl.F0,
           -muscle5.MusMdl.F0,
           -muscle6.MusMdl.F0,
           -muscle7.MusMdl.F0,
            muscle8.MusMdl.F0,
            muscle9.MusMdl.F0,
            muscle10.MusMdl.F0,
            muscle11.MusMdl.F0,
            muscle12.MusMdl.F0,
            muscle13.MusMdl.F0
         }};
  Const = {0};
};


AnyMuscleActivityConstraint TibialisPosteriorMuscleTendonLink2 =
{
  AnyMuscle &muscle0 = .TibialisPosteriorNavicularTendon;
  AnyMuscle &muscle1 = .TibialisPosteriorMedCuneiTendon;
  AnyMuscle &muscle2 = .TibialisPosteriorIntCuneiTendon;
  AnyMuscle &muscle3 = .TibialisPosteriorLatCuneiTendon;
  AnyMuscle &muscle4 = .TibialisPosteriorCuboidTendon;
  AnyMuscle &muscle5 = .TibialisPosteriorMt2Tendon;
  AnyMuscle &muscle6 = .TibialisPosteriorMt3Tendon;
  AnyMuscle &muscle7 = .TibialisPosteriorMt4Tendon;
  AnyMuscle &muscle8 = .TibialisPosteriorLateralis1;
  AnyMuscle &muscle9 = .TibialisPosteriorLateralis2;
  AnyMuscle &muscle10 = .TibialisPosteriorLateralis3;
  AnyMuscle &muscle11 = .TibialisPosteriorMedialis1;
  AnyMuscle &muscle12 = .TibialisPosteriorMedialis2;
  AnyMuscle &muscle13 = .TibialisPosteriorMedialis3;
  nCon = 1;
  CType = NonPositive;
  Coef = {{-muscle0.MusMdl.F0,
           -muscle1.MusMdl.F0,
           -muscle2.MusMdl.F0,
           -muscle3.MusMdl.F0,
           -muscle4.MusMdl.F0,
           -muscle5.MusMdl.F0,
           -muscle6.MusMdl.F0,
           -muscle7.MusMdl.F0,
            muscle8.MusMdl.F0,
            muscle9.MusMdl.F0,
            muscle10.MusMdl.F0,
            muscle11.MusMdl.F0,
            muscle12.MusMdl.F0,
            muscle13.MusMdl.F0
         }};
  Const = -0.2*{.TibialisPosteriorLateralis1.MusMdl.F0 + .TibialisPosteriorLateralis2.MusMdl.F0 + .TibialisPosteriorLateralis3.MusMdl.F0
  +.TibialisPosteriorMedialis1.MusMdl.F0 + .TibialisPosteriorMedialis2.MusMdl.F0 + .TibialisPosteriorMedialis3.MusMdl.F0};
};


AnyMuscleActivityConstraint TibialisPosteriorMuscleTendonLink3 =
{
  AnyMuscle &muscle0 = .TibialisPosteriorNavicularTendon;
  AnyMuscle &muscle1 = .TibialisPosteriorMedCuneiTendon;
  nCon = 1;
  CType = NonNegative;
  Coef = {{-muscle0.MusMdl.F0,
           -muscle1.MusMdl.F0
         }};
  Const = 0.65*{.TibialisPosteriorLateralis1.MusMdl.F0 + .TibialisPosteriorLateralis2.MusMdl.F0 + .TibialisPosteriorLateralis3.MusMdl.F0
  +.TibialisPosteriorMedialis1.MusMdl.F0 + .TibialisPosteriorMedialis2.MusMdl.F0 + .TibialisPosteriorMedialis3.MusMdl.F0};
};


AnyMuscleActivityConstraint TibialisPosteriorMuscleTendonLink4 =
{
  AnyMuscle &muscle0 = .TibialisPosteriorIntCuneiTendon;
  AnyMuscle &muscle1 = .TibialisPosteriorLatCuneiTendon;
  AnyMuscle &muscle2 = .TibialisPosteriorCuboidTendon;
  AnyMuscle &muscle3 = .TibialisPosteriorMt2Tendon;
  AnyMuscle &muscle4 = .TibialisPosteriorMt3Tendon;
  AnyMuscle &muscle5 = .TibialisPosteriorMt4Tendon;
  nCon = 1;
  CType = NonNegative;
  Coef = {{-muscle0.MusMdl.F0,
           -muscle1.MusMdl.F0,
           -muscle2.MusMdl.F0,
           -muscle3.MusMdl.F0,
           -muscle4.MusMdl.F0,
           -muscle5.MusMdl.F0
         }};
  Const = 0.15*{.TibialisPosteriorLateralis1.MusMdl.F0 + .TibialisPosteriorLateralis2.MusMdl.F0 + .TibialisPosteriorLateralis3.MusMdl.F0
  +.TibialisPosteriorMedialis1.MusMdl.F0 + .TibialisPosteriorMedialis2.MusMdl.F0 + .TibialisPosteriorMedialis3.MusMdl.F0};
};


AnyViaPointMuscle TibialisAnterior1 = {
  AnyMuscleModel &MusMdl = ..MusPar.TibialisAnterior1Par;
  AnyRefNode &Org = ..Seg.Shank.TibialisAnterior1Node;
  AnyRefNode &Via1 = ..Seg.Shank.TibialisAnteriorViaNode1;
  AnyRefNode &Via2 = ..Seg.Navicular.TibialisAnteriorViaNode2;
  AnyDrawMuscle DrwMus = {#include "../DrawSettings/MusDrawSettings.any"
  };
};

AnyViaPointMuscle TibialisAnterior2 = {
  AnyMuscleModel &MusMdl = ..MusPar.TibialisAnterior2Par;
  AnyRefNode &Org = ..Seg.Shank.TibialisAnterior2Node;
  AnyRefNode &Via1 = ..Seg.Shank.TibialisAnteriorViaNode1;
  AnyRefNode &Via2 = ..Seg.Navicular.TibialisAnteriorViaNode2;
  AnyDrawMuscle DrwMus = {#include "../DrawSettings/MusDrawSettings.any"
  };
};

AnyViaPointMuscle TibialisAnterior3 = {
  AnyMuscleModel &MusMdl = ..MusPar.TibialisAnterior3Par;
  AnyRefNode &Org = ..Seg.Shank.TibialisAnterior3Node;
  AnyRefNode &Via1 = ..Seg.Shank.TibialisAnteriorViaNode1;
  AnyRefNode &Via2 = ..Seg.Navicular.TibialisAnteriorViaNode2;
  AnyDrawMuscle DrwMus = {#include "../DrawSettings/MusDrawSettings.any"
  };
};


AnyViaPointMuscle TibialisAnteriorMedCuneiTendon = {
  AnyMuscleModel MusMdl = {F0 = 2000;};
  AnyRefNode &Via2 = ..Seg.Navicular.TibialisAnteriorViaNode2;
  AnyRefNode &Via3 = ..Seg.MedialCuneiform.TibialisAnteriorViaNode3;
  AnyRefNode &Ins = ..Seg.MedialCuneiform.TibialisAnteriorNode;
  AnyDrawMuscle DrwMus = {
    #include "../DrawSettings/MusDrawSettings.any"
  };
};

AnyViaPointMuscle TibialisAnteriorMt1Tendon = {
  AnyMuscleModel MusMdl = {F0 = 2000;};
  AnyRefNode &Via2 = ..Seg.Navicular.TibialisAnteriorViaNode2;
  AnyRefNode &Via3 = ..Seg.MedialCuneiform.TibialisAnteriorViaNode3;
  AnyRefNode &Ins = ..Seg.Metatarsal1.TibialisAnteriorNode;
  AnyDrawMuscle DrwMus = {
    #include "../DrawSettings/MusDrawSettings.any"
  };
};


AnyMuscleActivityConstraint TibialisAnteriorInterTendonLink =
{
  AnyMuscle &muscle0 = .TibialisAnteriorMedCuneiTendon;
  AnyMuscle &muscle1 = .TibialisAnteriorMt1Tendon;
  nCon = 1;
  Coef = {{-1,1}};
  Const = {0};
};


AnyMuscleActivityConstraint TibialisAnteriorMuscleTendonLink =
{
  AnyMuscle &muscle0 = .TibialisAnteriorMedCuneiTendon;
  AnyMuscle &muscle1 = .TibialisAnteriorMt1Tendon;
  AnyMuscle &muscle2 = .TibialisAnterior1;
  AnyMuscle &muscle3 = .TibialisAnterior2;
  AnyMuscle &muscle4 = .TibialisAnterior3;
  nCon = 1;
  Coef = {{
      -muscle0.MusMdl.F0,
      -muscle1.MusMdl.F0,
      muscle2.MusMdl.F0,
      muscle3.MusMdl.F0,
      muscle4.MusMdl.F0
    }};
  Const = {0};
};


AnyViaPointMuscle PeroneusBrevis1 = {
  AnyMuscleModel &MusMdl = ..MusPar.PeroneusBrevis1Par;
  AnyRefNode &Org = ..Seg.Shank.PeroneusBrevis1Node;
  AnyRefNode &Via1 = ..Seg.Shank.PeroneusBrevisViaNode1;
  AnyRefNode &Via2 = ..Seg.Shank.PeroneusBrevisViaNode2;
  AnyRefNode &Via3 = ..Seg.Calcaneus.PeroneusBrevisViaNode3;
  AnyRefNode &Via4 = ..Seg.Calcaneus.PeroneusBrevisViaNode4;
  AnyRefNode &Ins = ..Seg.Metatarsal5.PeroneusBrevis1Node;
  AnyDrawMuscle DrwMus = {#include "../DrawSettings/MusDrawSettings.any"
  };
};

AnyViaPointMuscle PeroneusBrevis2 = {
  AnyMuscleModel &MusMdl = ..MusPar.PeroneusBrevis2Par;
  AnyRefNode &Org = ..Seg.Shank.PeroneusBrevis2Node;
  AnyRefNode &Via1 = ..Seg.Shank.PeroneusBrevisViaNode1;
  AnyRefNode &Via2 = ..Seg.Shank.PeroneusBrevisViaNode2;
  AnyRefNode &Via3 = ..Seg.Calcaneus.PeroneusBrevisViaNode3;
  AnyRefNode &Via4 = ..Seg.Calcaneus.PeroneusBrevisViaNode4;
  AnyRefNode &Ins = ..Seg.Metatarsal5.PeroneusBrevis2Node;
    AnyDrawMuscle DrwMus = {#include "../DrawSettings/MusDrawSettings.any"
  };
};

AnyViaPointMuscle PeroneusBrevis3 = {
  AnyMuscleModel &MusMdl = ..MusPar.PeroneusBrevis3Par;
  AnyRefNode &Org = ..Seg.Shank.PeroneusBrevis3Node;
  AnyRefNode &Via1 = ..Seg.Shank.PeroneusBrevisViaNode1;
  AnyRefNode &Via2 = ..Seg.Shank.PeroneusBrevisViaNode2;
  AnyRefNode &Via3 = ..Seg.Calcaneus.PeroneusBrevisViaNode3;
  AnyRefNode &Via4 = ..Seg.Calcaneus.PeroneusBrevisViaNode4;
  AnyRefNode &Ins = ..Seg.Metatarsal5.PeroneusBrevis3Node;
    AnyDrawMuscle DrwMus = {#include "../DrawSettings/MusDrawSettings.any"
  };
};

AnyViaPointMuscle PeroneusLongus1 = {
  AnyMuscleModel &MusMdl = ..MusPar.PeroneusLongus1Par;
  AnyRefNode &Org = ..Seg.Shank.PeroneusLongus1Node;
  AnyRefNode &Via1 = ..Seg.Shank.PeroneusLongusViaNode1;
  AnyRefNode &Via2 = ..Seg.Shank.PeroneusLongusViaNode2;
  AnyRefNode &Via3 = ..Seg.Calcaneus.PeroneusLongusViaNode3;
  AnyRefNode &Via4 = ..Seg.Calcaneus.PeroneusLongusViaNode4;
  AnyRefNode &Via5 = ..Seg.Cuboid.PeroneusLongusViaNode5;
  AnyRefNode &Via6 = ..Seg.Cuboid.PeroneusLongusViaNode6;
    AnyDrawMuscle DrwMus = { #include "../DrawSettings/MusDrawSettings.any"
  };
};

AnyViaPointMuscle PeroneusLongus2 = {
  AnyMuscleModel &MusMdl = ..MusPar.PeroneusLongus2Par;
  AnyRefNode &Org = ..Seg.Shank.PeroneusLongus2Node;
  AnyRefNode &Via1 = ..Seg.Shank.PeroneusLongusViaNode1;
  AnyRefNode &Via2 = ..Seg.Shank.PeroneusLongusViaNode2;
  AnyRefNode &Via3 = ..Seg.Calcaneus.PeroneusLongusViaNode3;
  AnyRefNode &Via4 = ..Seg.Calcaneus.PeroneusLongusViaNode4;
  AnyRefNode &Via5 = ..Seg.Cuboid.PeroneusLongusViaNode5;
  AnyRefNode &Via6 = ..Seg.Cuboid.PeroneusLongusViaNode6;
    AnyDrawMuscle DrwMus = {#include "../DrawSettings/MusDrawSettings.any"
  };
};

AnyViaPointMuscle PeroneusLongus3 = {
  AnyMuscleModel &MusMdl = ..MusPar.PeroneusLongus3Par;
  AnyRefNode &Org = ..Seg.Shank.PeroneusLongus3Node;
  AnyRefNode &Via1 = ..Seg.Shank.PeroneusLongusViaNode1;
  AnyRefNode &Via2 = ..Seg.Shank.PeroneusLongusViaNode2;
  AnyRefNode &Via3 = ..Seg.Calcaneus.PeroneusLongusViaNode3;
  AnyRefNode &Via4 = ..Seg.Calcaneus.PeroneusLongusViaNode4;
  AnyRefNode &Via5 = ..Seg.Cuboid.PeroneusLongusViaNode5;
  AnyRefNode &Via6 = ..Seg.Cuboid.PeroneusLongusViaNode6;
    AnyDrawMuscle DrwMus = {#include "../DrawSettings/MusDrawSettings.any"
  };
};


AnyViaPointMuscle PeroneusLongusMedCuneiTendon = {
  AnyMuscleModel MusMdl = {F0 = 2000;};
  AnyRefNode &Via2 = ..Seg.Cuboid.PeroneusLongusViaNode6;
  AnyRefNode &Via3 = ..Seg.Cuboid.PeroneusLongusViaNode7;
  AnyRefNode &Ins = ..Seg.MedialCuneiform.PeroneusLongusNode;
  AnyDrawMuscle DrwMus = {
    #include "../DrawSettings/MusDrawSettings.any"
  };
};


AnyViaPointMuscle PeroneusLongusMt1Tendon = {
  AnyMuscleModel MusMdl = {F0 = 2000;};
  AnyRefNode &Via2 = ..Seg.Cuboid.PeroneusLongusViaNode6;
  AnyRefNode &Via3 = ..Seg.Cuboid.PeroneusLongusViaNode7;
  AnyRefNode &Ins = ..Seg.Metatarsal1.PeroneusLongusNode;
  AnyDrawMuscle DrwMus = {
    #include "../DrawSettings/MusDrawSettings.any"
  };
};


AnyMuscleActivityConstraint PeroneusLongusInterTendonLink =
{
  AnyMuscle &muscle0 = .PeroneusLongusMedCuneiTendon;
  AnyMuscle &muscle1 = .PeroneusLongusMt1Tendon;
  nCon = 1;
  Coef = {{-1,1}};
  Const = {0};
};


AnyMuscleActivityConstraint PeroneusLongusMuscleTendonLink =
{
  AnyMuscle &muscle0 = .PeroneusLongusMedCuneiTendon;
  AnyMuscle &muscle1 = .PeroneusLongusMt1Tendon;
  AnyMuscle &muscle2 = .PeroneusLongus1;
  AnyMuscle &muscle3 = .PeroneusLongus2;
  AnyMuscle &muscle4 = .PeroneusLongus3;
  nCon = 1;
  Coef = {{-muscle0.MusMdl.F0,
      -muscle1.MusMdl.F0,
      muscle2.MusMdl.F0,
      muscle3.MusMdl.F0,
      muscle4.MusMdl.F0
    }};
  Const = {0};
};


AnyViaPointMuscle PeroneusTertius1 = {
  AnyMuscleModel &MusMdl = ..MusPar.PeroneusTertius1Par;
  AnyRefNode &Org = ..Seg.Shank.PeroneusTertius1Node;
  AnyRefNode &Via1 = ..Seg.Shank.PeroneusTertiusViaNode1;
  AnyRefNode &Via2 = ..Seg.Shank.PeroneusTertiusViaNode2;
  AnyRefNode &Via3 = ..Seg.Calcaneus.PeroneusTertiusViaNode3;
//  AnyRefNode &Via3 = ..Seg.Cuboid.PeroneusTertiusViaNode3;
  AnyRefNode &Ins = ..Seg.Metatarsal5.PeroneusTertius1Node;
    AnyDrawMuscle DrwMus = {#include "../DrawSettings/MusDrawSettings.any"
  };
};

AnyViaPointMuscle PeroneusTertius2 = {
  AnyMuscleModel &MusMdl = ..MusPar.PeroneusTertius2Par;
  AnyRefNode &Org = ..Seg.Shank.PeroneusTertius2Node;
  AnyRefNode &Via1 = ..Seg.Shank.PeroneusTertiusViaNode1;
  AnyRefNode &Via2 = ..Seg.Shank.PeroneusTertiusViaNode2;
  AnyRefNode &Via3 = ..Seg.Calcaneus.PeroneusTertiusViaNode3;
//  AnyRefNode &Via3 = ..Seg.Cuboid.PeroneusTertiusViaNode3;
  AnyRefNode &Ins = ..Seg.Metatarsal5.PeroneusTertius2Node;
    AnyDrawMuscle DrwMus = {#include "../DrawSettings/MusDrawSettings.any"
  };
};

AnyViaPointMuscle PeroneusTertius3 = {
  AnyMuscleModel &MusMdl = ..MusPar.PeroneusTertius3Par;
  AnyRefNode &Org = ..Seg.Shank.PeroneusTertius3Node;
  AnyRefNode &Via1 = ..Seg.Shank.PeroneusTertiusViaNode1;
  AnyRefNode &Via2 = ..Seg.Shank.PeroneusTertiusViaNode2;
  AnyRefNode &Via3 = ..Seg.Calcaneus.PeroneusTertiusViaNode3;
//  AnyRefNode &Via3 = ..Seg.Cuboid.PeroneusTertiusViaNode3;
  AnyRefNode &Ins = ..Seg.Metatarsal5.PeroneusTertius3Node;
    AnyDrawMuscle DrwMus = {#include "../DrawSettings/MusDrawSettings.any"
  };
};


AnyViaPointMuscle ExtensorDigitorumLongus1 = {
  AnyMuscleModel &MusMdl = ..MusPar.ExtensorDigitorumLongus1Par;
  AnyRefNode &Org = ..Seg.Shank.ExtensorDigitorumLongus1Node;
  AnyRefNode &Via1 = ..Seg.Shank.ExtensorDigitorumLongusViaNode1;
  AnyRefNode &Via2 = ..Seg.Shank.ExtensorDigitorumLongusViaNode2;
  AnyRefNode &Via3 = ..Seg.Shank.ExtensorDigitorumLongusViaNode3;
  AnyRefNode &Via4 = ..Seg.Shank.ExtensorDigitorumLongusViaNode4;
  AnyRefNode &Via5 = ..Seg.Calcaneus.ExtensorDigitorumLongusViaNode5;
//  AnyRefNode &Via5 = ..Seg.Navicular.ExtensorDigitorumLongusViaNode5;
    AnyDrawMuscle DrwMus = {#include "../DrawSettings/MusDrawSettings.any"
  };
};

AnyViaPointMuscle ExtensorDigitorumLongus2 = {
  AnyMuscleModel &MusMdl = ..MusPar.ExtensorDigitorumLongus2Par;
  AnyRefNode &Org = ..Seg.Shank.ExtensorDigitorumLongus2Node;
  AnyRefNode &Via1 = ..Seg.Shank.ExtensorDigitorumLongusViaNode1;
  AnyRefNode &Via2 = ..Seg.Shank.ExtensorDigitorumLongusViaNode2;
  AnyRefNode &Via3 = ..Seg.Shank.ExtensorDigitorumLongusViaNode3;
  AnyRefNode &Via4 = ..Seg.Shank.ExtensorDigitorumLongusViaNode4;
  AnyRefNode &Via5 = ..Seg.Calcaneus.ExtensorDigitorumLongusViaNode5;
//  AnyRefNode &Via5 = ..Seg.Navicular.ExtensorDigitorumLongusViaNode5;
    AnyDrawMuscle DrwMus = {#include "../DrawSettings/MusDrawSettings.any"
  };
};

AnyViaPointMuscle ExtensorDigitorumLongus3 = {
  AnyMuscleModel &MusMdl = ..MusPar.ExtensorDigitorumLongus3Par;
  AnyRefNode &Org = ..Seg.Shank.ExtensorDigitorumLongus3Node;
  AnyRefNode &Via1 = ..Seg.Shank.ExtensorDigitorumLongusViaNode1;
  AnyRefNode &Via2 = ..Seg.Shank.ExtensorDigitorumLongusViaNode2;
  AnyRefNode &Via3 = ..Seg.Shank.ExtensorDigitorumLongusViaNode3;
  AnyRefNode &Via4 = ..Seg.Shank.ExtensorDigitorumLongusViaNode4;
  AnyRefNode &Via5 = ..Seg.Calcaneus.ExtensorDigitorumLongusViaNode5;
//  AnyRefNode &Via5 = ..Seg.Navicular.ExtensorDigitorumLongusViaNode5;
    AnyDrawMuscle DrwMus = {#include "../DrawSettings/MusDrawSettings.any"
  };
};


AnyViaPointMuscle ExtensorDigitorumLongusToe2Tendon = {
  AnyMuscleModel MusMdl = {F0 = 2000;};
  AnyRefNode &Via5 = ..Seg.Calcaneus.ExtensorDigitorumLongusViaNode5;
  AnyRefNode &Via5Bis = ..Seg.Calcaneus.ExtensorDigitorumLongusViaNode5Bis;
//  AnyRefNode &Via5 = ..Seg.Navicular.ExtensorDigitorumLongusViaNode5;
//  AnyRefNode &Via5Bis = ..Seg.Navicular.ExtensorDigitorumLongusViaNode5Bis;
  AnyRefNode &Via6Bis = ..Seg.Metatarsal2.ExtensorDigitorumLongusViaNode6Bis;
  AnyRefNode &Via6 = ..Seg.Metatarsal2.ExtensorDigitorumLongusViaNode6;
  AnyDrawMuscle DrwMus = {
    #include "../DrawSettings/MusDrawSettings.any"
  };
};

AnyViaPointMuscle ExtensorDigitorumLongusToe2TendonPart1 = {
  AnyMuscleModel MusMdl = {F0 = 2000;};
  AnyRefNode &Via6 = ..Seg.Metatarsal2.ExtensorDigitorumLongusViaNode6;
  AnyRefNode &Via7 = ..Seg.ProximalPhalange2.ExtensorDigitorumLongusViaNode7;
  AnyRefNode &Via8 = ..Seg.MiddlePhalange2.ExtensorDigitorumLongusViaNode8;
  AnyRefNode &Ins = ..Seg.DistalPhalange2.ExtensorDigitorumLongusNode;
  AnyDrawMuscle DrwMus = {
    #include "../DrawSettings/MusDrawSettings.any"
  };
};

AnyViaPointMuscle ExtensorDigitorumLongusToe2TendonPart2 = {
  AnyMuscleModel MusMdl = {F0 = 2000;};
  AnyRefNode &Via6 = ..Seg.Metatarsal2.ExtensorDigitorumLongusViaNode6;
  AnyRefNode &Via7 = ..Seg.ProximalPhalange2.ExtensorDigitorumLongusViaNode7;
  AnyRefNode &Ins = ..Seg.MiddlePhalange2.ExtensorDigitorumLongusNode;
  AnyDrawMuscle DrwMus = {
    #include "../DrawSettings/MusDrawSettings.any"
  };
};

AnyViaPointMuscle ExtensorDigitorumLongusToe2TendonPart3 = {
  AnyMuscleModel MusMdl = {F0 = 2000;};
  AnyRefNode &Via6 = ..Seg.Metatarsal2.ExtensorDigitorumLongusViaNode6;
  AnyRefNode &Ins = ..Seg.ProximalPhalange2.DI2_Ins;
  AnyDrawMuscle DrwMus = {
    #include "../DrawSettings/MusDrawSettings.any"
  };
};

AnyViaPointMuscle ExtensorDigitorumLongusToe2TendonPart4 = {
  AnyMuscleModel MusMdl = {F0 = 2000;};
  AnyRefNode &Via6 = ..Seg.Metatarsal2.ExtensorDigitorumLongusViaNode6;
  AnyRefNode &Ins = ..Seg.ProximalPhalange2.DI1_Ins;
  AnyDrawMuscle DrwMus = {
    #include "../DrawSettings/MusDrawSettings.any"
  };
};

AnyViaPointMuscle ExtensorDigitorumLongusToe3Tendon = {
  AnyMuscleModel MusMdl = {F0 = 2000;};
  AnyRefNode &Via5 = ..Seg.Calcaneus.ExtensorDigitorumLongusViaNode5;
  AnyRefNode &Via5Bis = ..Seg.Calcaneus.ExtensorDigitorumLongusViaNode5Bis;
//  AnyRefNode &Via5 = ..Seg.Navicular.ExtensorDigitorumLongusViaNode5;
//  AnyRefNode &Via5Bis = ..Seg.Navicular.ExtensorDigitorumLongusViaNode5Bis;
  AnyRefNode &Via9Bis = ..Seg.Metatarsal3.ExtensorDigitorumLongusViaNode9Bis;
  AnyRefNode &Via9 = ..Seg.Metatarsal3.ExtensorDigitorumLongusViaNode9;
  AnyDrawMuscle DrwMus = {
    #include "../DrawSettings/MusDrawSettings.any"
  };
};

AnyViaPointMuscle ExtensorDigitorumLongusToe3TendonPart1 = {
  AnyMuscleModel MusMdl = {F0 = 2000;};
  AnyRefNode &Via9 = ..Seg.Metatarsal3.ExtensorDigitorumLongusViaNode9;
  AnyRefNode &Via10 = ..Seg.ProximalPhalange3.ExtensorDigitorumLongusViaNode10;
  AnyRefNode &Via11 = ..Seg.MiddlePhalange3.ExtensorDigitorumLongusViaNode11;
  AnyRefNode &Ins = ..Seg.DistalPhalange3.ExtensorDigitorumLongusNode;
  AnyDrawMuscle DrwMus = {
    #include "../DrawSettings/MusDrawSettings.any"
  };
};

AnyViaPointMuscle ExtensorDigitorumLongusToe3TendonPart2 = {
  AnyMuscleModel MusMdl = {F0 = 2000;};
  AnyRefNode &Via9 = ..Seg.Metatarsal3.ExtensorDigitorumLongusViaNode9;
  AnyRefNode &Via10 = ..Seg.ProximalPhalange3.ExtensorDigitorumLongusViaNode10;
  AnyRefNode &Ins = ..Seg.MiddlePhalange3.ExtensorDigitorumLongusNode;
  AnyDrawMuscle DrwMus = {
    #include "../DrawSettings/MusDrawSettings.any"
  };
};

AnyViaPointMuscle ExtensorDigitorumLongusToe3TendonPart3 = {
  AnyMuscleModel MusMdl = {F0 = 2000;};
  AnyRefNode &Via9 = ..Seg.Metatarsal3.ExtensorDigitorumLongusViaNode9;
  AnyRefNode &Ins = ..Seg.ProximalPhalange3.DI3_Ins;
  AnyDrawMuscle DrwMus = {
    #include "../DrawSettings/MusDrawSettings.any"
  };
};

AnyViaPointMuscle ExtensorDigitorumLongusToe3TendonPart4 = {
  AnyMuscleModel MusMdl = {F0 = 2000;};
  AnyRefNode &Via9 = ..Seg.Metatarsal3.ExtensorDigitorumLongusViaNode9;
  AnyRefNode &Ins = ..Seg.ProximalPhalange3.PI1_Ins;
  AnyDrawMuscle DrwMus = {
    #include "../DrawSettings/MusDrawSettings.any"
  };
};

AnyViaPointMuscle ExtensorDigitorumLongusToe4Tendon = {
  AnyMuscleModel MusMdl = {F0 = 2000;};
  AnyRefNode &Via5 = ..Seg.Calcaneus.ExtensorDigitorumLongusViaNode5;
  AnyRefNode &Via5Bis = ..Seg.Calcaneus.ExtensorDigitorumLongusViaNode5Bis;
//  AnyRefNode &Via5 = ..Seg.Navicular.ExtensorDigitorumLongusViaNode5;
//  AnyRefNode &Via5Bis = ..Seg.Navicular.ExtensorDigitorumLongusViaNode5Bis;
  AnyRefNode &Via12Bis = ..Seg.Metatarsal4.ExtensorDigitorumLongusViaNode12Bis;
  AnyRefNode &Via12 = ..Seg.Metatarsal4.ExtensorDigitorumLongusViaNode12;
  AnyDrawMuscle DrwMus = {
    #include "../DrawSettings/MusDrawSettings.any"
  };
};

AnyViaPointMuscle ExtensorDigitorumLongusToe4TendonPart1 = {
  AnyMuscleModel MusMdl = {F0 = 2000;};
  AnyRefNode &Via12 = ..Seg.Metatarsal4.ExtensorDigitorumLongusViaNode12;
  AnyRefNode &Via13 = ..Seg.ProximalPhalange4.ExtensorDigitorumLongusViaNode13;
  AnyRefNode &Via14 = ..Seg.MiddlePhalange4.ExtensorDigitorumLongusViaNode14;
  AnyRefNode &Ins = ..Seg.DistalPhalange4.ExtensorDigitorumLongusNode;
  AnyDrawMuscle DrwMus = {
    #include "../DrawSettings/MusDrawSettings.any"
  };
};

AnyViaPointMuscle ExtensorDigitorumLongusToe4TendonPart2 = {
  AnyMuscleModel MusMdl = {F0 = 2000;};
  AnyRefNode &Via12 = ..Seg.Metatarsal4.ExtensorDigitorumLongusViaNode12;
  AnyRefNode &Via13 = ..Seg.ProximalPhalange4.ExtensorDigitorumLongusViaNode13;
  AnyRefNode &Ins = ..Seg.MiddlePhalange4.ExtensorDigitorumLongusNode;
  AnyDrawMuscle DrwMus = {
    #include "../DrawSettings/MusDrawSettings.any"
  };
};

AnyViaPointMuscle ExtensorDigitorumLongusToe4TendonPart3 = {
  AnyMuscleModel MusMdl = {F0 = 2000;};
  AnyRefNode &Via12 = ..Seg.Metatarsal4.ExtensorDigitorumLongusViaNode12;
  AnyRefNode &Ins = ..Seg.ProximalPhalange4.DI4_Ins;
  AnyDrawMuscle DrwMus = {
    #include "../DrawSettings/MusDrawSettings.any"
  };
};

AnyViaPointMuscle ExtensorDigitorumLongusToe4TendonPart4 = {
  AnyMuscleModel MusMdl = {F0 = 2000;};
  AnyRefNode &Via12 = ..Seg.Metatarsal4.ExtensorDigitorumLongusViaNode12;
  AnyRefNode &Ins = ..Seg.ProximalPhalange4.PI2_Ins;
  AnyDrawMuscle DrwMus = {
    #include "../DrawSettings/MusDrawSettings.any"
  };
};

AnyViaPointMuscle ExtensorDigitorumLongusToe5Tendon = {
  AnyMuscleModel MusMdl = {F0 = 2000;};
  AnyRefNode &Via5 = ..Seg.Calcaneus.ExtensorDigitorumLongusViaNode5;
  AnyRefNode &Via5Bis = ..Seg.Calcaneus.ExtensorDigitorumLongusViaNode5Bis;
//  AnyRefNode &Via5 = ..Seg.Navicular.ExtensorDigitorumLongusViaNode5;
//  AnyRefNode &Via5Bis = ..Seg.Navicular.ExtensorDigitorumLongusViaNode5Bis;
  AnyRefNode &Via15 = ..Seg.Metatarsal5.ExtensorDigitorumLongusViaNode15;
  AnyDrawMuscle DrwMus = {
    #include "../DrawSettings/MusDrawSettings.any"
  };
};

AnyViaPointMuscle ExtensorDigitorumLongusToe5TendonPart1 = {
  AnyMuscleModel MusMdl = {F0 = 2000;};
  AnyRefNode &Via15 = ..Seg.Metatarsal5.ExtensorDigitorumLongusViaNode15;
  AnyRefNode &Via16 = ..Seg.ProximalPhalange5.ExtensorDigitorumLongusViaNode16;
  AnyRefNode &Via17 = ..Seg.MiddlePhalange5.ExtensorDigitorumLongusViaNode17;
  AnyRefNode &Ins = ..Seg.DistalPhalange5.ExtensorDigitorumLongusNode;
  AnyDrawMuscle DrwMus = {
    #include "../DrawSettings/MusDrawSettings.any"
  };
};

AnyViaPointMuscle ExtensorDigitorumLongusToe5TendonPart2 = {
  AnyMuscleModel MusMdl = {F0 = 2000;};
  AnyRefNode &Via15 = ..Seg.Metatarsal5.ExtensorDigitorumLongusViaNode15;
  AnyRefNode &Via16 = ..Seg.ProximalPhalange5.ExtensorDigitorumLongusViaNode16;
  AnyRefNode &Ins = ..Seg.MiddlePhalange5.ExtensorDigitorumLongusNode;
  AnyDrawMuscle DrwMus = {
    #include "../DrawSettings/MusDrawSettings.any"
  };
};

AnyViaPointMuscle ExtensorDigitorumLongusToe5TendonPart3 = {
  AnyMuscleModel MusMdl = {F0 = 2000;};
  AnyRefNode &Via15 = ..Seg.Metatarsal5.ExtensorDigitorumLongusViaNode15;
  AnyRefNode &Ins = ..Seg.ProximalPhalange5.ABDM_Ins;
  AnyDrawMuscle DrwMus = {
    #include "../DrawSettings/MusDrawSettings.any"
  };
};

AnyViaPointMuscle ExtensorDigitorumLongusToe5TendonPart4 = {
  AnyMuscleModel MusMdl = {F0 = 2000;};
  AnyRefNode &Via15 = ..Seg.Metatarsal5.ExtensorDigitorumLongusViaNode15;
  AnyRefNode &Ins = ..Seg.ProximalPhalange5.PI3_Ins;
  AnyDrawMuscle DrwMus = {
    #include "../DrawSettings/MusDrawSettings.any"
  };
};


//AnyMuscleActivityConstraint ExtensorDigitorumLongusInterTendonLink =
//{
//  AnyMuscle &muscle0 = .ExtensorDigitorumLongusToe2Tendon;
//  AnyMuscle &muscle1 = .ExtensorDigitorumLongusToe3Tendon;
//  AnyMuscle &muscle2 = .ExtensorDigitorumLongusToe4Tendon;
//  AnyMuscle &muscle3 = .ExtensorDigitorumLongusToe5Tendon;
//  nCon = 3;
//  Coef = {{-1,1,0,0},{-1,0,1,0},{-1,0,0,1}};
//  Const = {0,0,0};
//};


AnyMuscleActivityConstraint ExtensorDigitorumLongusMuscleTendonLink =
{
  AnyMuscle &muscle0 = .ExtensorDigitorumLongusToe2Tendon;
  AnyMuscle &muscle1 = .ExtensorDigitorumLongusToe3Tendon;
  AnyMuscle &muscle2 = .ExtensorDigitorumLongusToe4Tendon;
  AnyMuscle &muscle3 = .ExtensorDigitorumLongusToe5Tendon;
  AnyMuscle &muscle4 = .ExtensorDigitorumLongus1;
  AnyMuscle &muscle5 = .ExtensorDigitorumLongus2;
  AnyMuscle &muscle6 = .ExtensorDigitorumLongus3;
  nCon = 1;
  Coef = {{-muscle0.MusMdl.F0,
      -muscle1.MusMdl.F0,
      -muscle2.MusMdl.F0,
      -muscle3.MusMdl.F0,
      muscle4.MusMdl.F0,
      muscle5.MusMdl.F0,
      muscle6.MusMdl.F0
    }};
  Const = {0};
};


AnyFolder ExtensorDigitorumLongusToe2TendonLink = {

  AnyKinLinear Toe2TendonPart1Lin =
  {
    AnyRefNode &ref1 = ...Seg.Metatarsal2.ExtensorDigitorumLongusViaNode6;
    AnyRefNode &ref2 = ...Seg.ProximalPhalange2.ExtensorDigitorumLongusViaNode7;
  };

  AnyKinLinear Toe2TendonPart2Lin =
  {
    AnyRefNode &ref1 = ...Seg.Metatarsal2.ExtensorDigitorumLongusViaNode6;
    AnyRefNode &ref2 = ...Seg.ProximalPhalange2.ExtensorDigitorumLongusViaNode7;
  };

  AnyKinLinear Toe2TendonPart3Lin =
  {
    AnyRefNode &ref1 = ...Seg.Metatarsal2.ExtensorDigitorumLongusViaNode6;
    AnyRefNode &ref2 = ...Seg.ProximalPhalange2.DI2_Ins;
  };

  AnyKinLinear Toe2TendonPart4Lin =
  {
    AnyRefNode &ref1 = ...Seg.Metatarsal2.ExtensorDigitorumLongusViaNode6;
    AnyRefNode &ref2 = ...Seg.ProximalPhalange2.DI1_Ins;
  };


  AnyVar Toe2TendonPart1LinNorm = vnorm(Toe2TendonPart1Lin.Pos);
  AnyVar Toe2TendonPart1LinNormCond = iffun(Toe2TendonPart1LinNorm, Toe2TendonPart1LinNorm, 1.0);
  AnyVec3 Toe2TendonPart1UnityVec = Toe2TendonPart1Lin.Pos/Toe2TendonPart1LinNormCond;

  AnyVar Toe2TendonPart2LinNorm = vnorm(Toe2TendonPart2Lin.Pos);
  AnyVar Toe2TendonPart2LinNormCond = iffun(Toe2TendonPart2LinNorm, Toe2TendonPart2LinNorm, 1.0);
  AnyVec3 Toe2TendonPart2UnityVec = Toe2TendonPart2Lin.Pos/Toe2TendonPart2LinNormCond;

  AnyVar Toe2TendonPart3LinNorm = vnorm(Toe2TendonPart3Lin.Pos);
  AnyVar Toe2TendonPart3LinNormCond = iffun(Toe2TendonPart3LinNorm, Toe2TendonPart3LinNorm, 1.0);
  AnyVec3 Toe2TendonPart3UnityVec = Toe2TendonPart3Lin.Pos/Toe2TendonPart3LinNormCond;

  AnyVar Toe2TendonPart4LinNorm = vnorm(Toe2TendonPart4Lin.Pos);
  AnyVar Toe2TendonPart4LinNormCond = iffun(Toe2TendonPart4LinNorm, Toe2TendonPart4LinNorm, 1.0);
  AnyVec3 Toe2TendonPart4UnityVec = Toe2TendonPart4Lin.Pos/Toe2TendonPart4LinNormCond;


  //This calculation of the resultant direction asumes that the force of each tendon is equal
  AnyVar TendonResultantNorm = vnorm(Toe2TendonPart1UnityVec + Toe2TendonPart2UnityVec + Toe2TendonPart3UnityVec + Toe2TendonPart4UnityVec);
  AnyVar TendonResultantNormCond = iffun(TendonResultantNorm, TendonResultantNorm, 1.0);
  AnyVec3 TendonResultantUnityVec = (Toe2TendonPart1UnityVec + Toe2TendonPart2UnityVec + Toe2TendonPart3UnityVec + Toe2TendonPart4UnityVec)/TendonResultantNormCond;


  AnyVar SinPart1 = vnorm(cross(TendonResultantUnityVec, Toe2TendonPart1UnityVec)); //This is equal to the sinus of the angle between the two vectors because there are unity vectors
  AnyVar AnglePart1 = asin(SinPart1);

  AnyVar SinPart2 = vnorm(cross(TendonResultantUnityVec, Toe2TendonPart2UnityVec)); //This is equal to the sinus of the angle between the two vectors because there are unity vectors
  AnyVar AnglePart2 = asin(SinPart2);

  AnyVar SinPart3 = vnorm(cross(TendonResultantUnityVec, Toe2TendonPart3UnityVec)); //This is equal to the sinus of the angle between the two vectors because there are unity vectors
  AnyVar AnglePart3 = asin(SinPart3);

  AnyVar SinPart4 = vnorm(cross(TendonResultantUnityVec, Toe2TendonPart4UnityVec)); //This is equal to the sinus of the angle between the two vectors because there are unity vectors
  AnyVar AnglePart4 = asin(SinPart4);


  AnyMuscleActivityConstraint ExtensorDigitorumLongusToe2TendonLinkOld =
  {
    AnyMuscle &muscle0 = ..ExtensorDigitorumLongusToe2TendonPart1;
    AnyMuscle &muscle1 = ..ExtensorDigitorumLongusToe2TendonPart2;
    AnyMuscle &muscle2 = ..ExtensorDigitorumLongusToe2TendonPart3;
    AnyMuscle &muscle3 = ..ExtensorDigitorumLongusToe2TendonPart4;
    AnyMuscle &muscle4 = ..ExtensorDigitorumLongusToe2Tendon;
    AnyMuscle &muscle5 = ..ExtensorDigitoriumBrevis2;
    nCon = 1;
    Coef = {{-muscle0.MusMdl.F0*abs(cos(.AnglePart1)),
        -muscle1.MusMdl.F0*abs(cos(.AnglePart2)),
        -muscle2.MusMdl.F0*abs(cos(.AnglePart3)),
        -muscle3.MusMdl.F0*abs(cos(.AnglePart4)),
        muscle4.MusMdl.F0,
        muscle5.MusMdl.F0
      }};
    Const = {0};
  };

  //**Check, if it works ok the two norms will be equal.**
//  AnyForceMomentMeasure Check1 =
//  {
//    AnyMuscle &muscle4 = ..ExtensorDigitorumLongusToe2Tendon;
//    AnyMuscle &muscle5 = ..ExtensorDigitoriumBrevis2;
//    AnyRefNode &ref2 = ...Seg.Metatarsal2.ExtensorDigitorumLongusViaNode6;
//    AnyVar Norm = vnorm(F);
//  };
//
//  AnyForceMomentMeasure Check2 =
//  {
//    AnyMuscle &muscle0 = ..ExtensorDigitorumLongusToe2TendonPart1;
//    AnyMuscle &muscle1 = ..ExtensorDigitorumLongusToe2TendonPart2;
//    AnyMuscle &muscle2 = ..ExtensorDigitorumLongusToe2TendonPart3;
//    AnyMuscle &muscle3 = ..ExtensorDigitorumLongusToe2TendonPart4;
//    AnyRefNode &ref2 = ...Seg.Metatarsal2.ExtensorDigitorumLongusViaNode6;
//    AnyVar Norm = vnorm(F);
//  };

};


AnyMuscleActivityConstraint ExtensorDigitorumLongusToe2TendonLink2 =
{
  AnyMuscle &muscle0 = .ExtensorDigitorumLongusToe2TendonPart3;
  AnyMuscle &muscle1 = .ExtensorDigitorumLongusToe2TendonPart4;
  AnyMuscle &muscle2 = .ExtensorDigitorumLongusToe2TendonPart1;
  AnyMuscle &muscle3 = .ExtensorDigitorumLongusToe2TendonPart2;
  nCon = 3;
  Coef = {{-1,1,0,0},{-1,0,1,0},{-1,0,0,1}};
  Const = {0,0,0};
};


AnyFolder ExtensorDigitorumLongusToe3TendonLink = {

  AnyKinLinear Toe3TendonPart1Lin =
  {
    AnyRefNode &ref1 = ...Seg.Metatarsal3.ExtensorDigitorumLongusViaNode9;
    AnyRefNode &ref2 = ...Seg.ProximalPhalange3.ExtensorDigitorumLongusViaNode10;
  };

  AnyKinLinear Toe3TendonPart2Lin =
  {
    AnyRefNode &ref1 = ...Seg.Metatarsal3.ExtensorDigitorumLongusViaNode9;
    AnyRefNode &ref2 = ...Seg.ProximalPhalange3.ExtensorDigitorumLongusViaNode10;
  };

  AnyKinLinear Toe3TendonPart3Lin =
  {
    AnyRefNode &ref1 = ...Seg.Metatarsal3.ExtensorDigitorumLongusViaNode9;
    AnyRefNode &ref2 = ...Seg.ProximalPhalange3.DI3_Ins;
  };

  AnyKinLinear Toe3TendonPart4Lin =
  {
    AnyRefNode &ref1 = ...Seg.Metatarsal3.ExtensorDigitorumLongusViaNode9;
    AnyRefNode &ref2 = ...Seg.ProximalPhalange3.PI1_Ins;
  };


  AnyVar Toe3TendonPart1LinNorm = vnorm(Toe3TendonPart1Lin.Pos);
  AnyVar Toe3TendonPart1LinNormCond = iffun(Toe3TendonPart1LinNorm, Toe3TendonPart1LinNorm, 1.0);
  AnyVec3 Toe3TendonPart1UnityVec = Toe3TendonPart1Lin.Pos/Toe3TendonPart1LinNormCond;

  AnyVar Toe3TendonPart2LinNorm = vnorm(Toe3TendonPart2Lin.Pos);
  AnyVar Toe3TendonPart2LinNormCond = iffun(Toe3TendonPart2LinNorm, Toe3TendonPart2LinNorm, 1.0);
  AnyVec3 Toe3TendonPart2UnityVec = Toe3TendonPart2Lin.Pos/Toe3TendonPart2LinNormCond;

  AnyVar Toe3TendonPart3LinNorm = vnorm(Toe3TendonPart3Lin.Pos);
  AnyVar Toe3TendonPart3LinNormCond = iffun(Toe3TendonPart3LinNorm, Toe3TendonPart3LinNorm, 1.0);
  AnyVec3 Toe3TendonPart3UnityVec = Toe3TendonPart3Lin.Pos/Toe3TendonPart3LinNormCond;

  AnyVar Toe3TendonPart4LinNorm = vnorm(Toe3TendonPart4Lin.Pos);
  AnyVar Toe3TendonPart4LinNormCond = iffun(Toe3TendonPart4LinNorm, Toe3TendonPart4LinNorm, 1.0);
  AnyVec3 Toe3TendonPart4UnityVec = Toe3TendonPart4Lin.Pos/Toe3TendonPart4LinNormCond;


  //This calculation of the resultant direction asumes that the force of each tendon is equal
  AnyVar TendonResultantNorm = vnorm(Toe3TendonPart1UnityVec + Toe3TendonPart2UnityVec + Toe3TendonPart3UnityVec + Toe3TendonPart4UnityVec);
  AnyVar TendonResultantNormCond = iffun(TendonResultantNorm, TendonResultantNorm, 1.0);
  AnyVec3 TendonResultantUnityVec = (Toe3TendonPart1UnityVec + Toe3TendonPart2UnityVec + Toe3TendonPart3UnityVec + Toe3TendonPart4UnityVec)/TendonResultantNormCond;


  AnyVar SinPart1 = vnorm(cross(TendonResultantUnityVec, Toe3TendonPart1UnityVec)); //This is equal to the sinus of the angle between the two vectors because there are unity vectors
  AnyVar AnglePart1 = asin(SinPart1);

  AnyVar SinPart2 = vnorm(cross(TendonResultantUnityVec, Toe3TendonPart2UnityVec)); //This is equal to the sinus of the angle between the two vectors because there are unity vectors
  AnyVar AnglePart2 = asin(SinPart2);

  AnyVar SinPart3 = vnorm(cross(TendonResultantUnityVec, Toe3TendonPart3UnityVec)); //This is equal to the sinus of the angle between the two vectors because there are unity vectors
  AnyVar AnglePart3 = asin(SinPart3);

  AnyVar SinPart4 = vnorm(cross(TendonResultantUnityVec, Toe3TendonPart4UnityVec)); //This is equal to the sinus of the angle between the two vectors because there are unity vectors
  AnyVar AnglePart4 = asin(SinPart4);


  AnyMuscleActivityConstraint ExtensorDigitorumLongusToe3TendonLink =
  {
    AnyMuscle &muscle0 = ..ExtensorDigitorumLongusToe3TendonPart1;
    AnyMuscle &muscle1 = ..ExtensorDigitorumLongusToe3TendonPart2;
    AnyMuscle &muscle2 = ..ExtensorDigitorumLongusToe3TendonPart3;
    AnyMuscle &muscle3 = ..ExtensorDigitorumLongusToe3TendonPart4;
    AnyMuscle &muscle4 = ..ExtensorDigitorumLongusToe3Tendon;
    AnyMuscle &muscle5 = ..ExtensorDigitoriumBrevis3;
    nCon = 1;
    Coef = {{-muscle0.MusMdl.F0*abs(cos(.AnglePart1)),
        -muscle1.MusMdl.F0*abs(cos(.AnglePart2)),
        -muscle2.MusMdl.F0*abs(cos(.AnglePart3)),
        -muscle3.MusMdl.F0*abs(cos(.AnglePart4)),
        muscle4.MusMdl.F0,
        muscle5.MusMdl.F0
      }};
    Const = {0};
  };

  //**Check, if it works ok the two norms will be equal.**
//  AnyForceMomentMeasure Check1 =
//  {
//    AnyMuscle &muscle4 = ..ExtensorDigitorumLongusToe3Tendon;
//    AnyMuscle &muscle5 = ..ExtensorDigitoriumBrevis3;
//    AnyRefNode &ref2 = ...Seg.Metatarsal3.ExtensorDigitorumLongusViaNode9;
//    AnyVar Norm = vnorm(F);
//  };
//
//  AnyForceMomentMeasure Check2 =
//  {
//    AnyMuscle &muscle0 = ..ExtensorDigitorumLongusToe3TendonPart1;
//    AnyMuscle &muscle1 = ..ExtensorDigitorumLongusToe3TendonPart2;
//    AnyMuscle &muscle2 = ..ExtensorDigitorumLongusToe3TendonPart3;
//    AnyMuscle &muscle3 = ..ExtensorDigitorumLongusToe3TendonPart4;
//    AnyRefNode &ref2 = ...Seg.Metatarsal3.ExtensorDigitorumLongusViaNode9;
//    AnyVar Norm = vnorm(F);
//  };

};

AnyMuscleActivityConstraint ExtensorDigitorumLongusToe3TendonLink2 =
{
  AnyMuscle &muscle0 = .ExtensorDigitorumLongusToe3TendonPart3;
  AnyMuscle &muscle1 = .ExtensorDigitorumLongusToe3TendonPart4;
  AnyMuscle &muscle2 = .ExtensorDigitorumLongusToe3TendonPart1;
  AnyMuscle &muscle3 = .ExtensorDigitorumLongusToe3TendonPart2;
  nCon = 3;
  Coef = {{-1,1,0,0},{-1,0,1,0},{-1,0,0,1}};
  Const = {0,0,0};
};


AnyFolder ExtensorDigitorumLongusToe4TendonLink = {

  AnyKinLinear Toe4TendonPart1Lin =
  {
    AnyRefNode &ref1 = ...Seg.Metatarsal4.ExtensorDigitorumLongusViaNode12;
    AnyRefNode &ref2 = ...Seg.ProximalPhalange4.ExtensorDigitorumLongusViaNode13;
  };

  AnyKinLinear Toe4TendonPart2Lin =
  {
    AnyRefNode &ref1 = ...Seg.Metatarsal4.ExtensorDigitorumLongusViaNode12;
    AnyRefNode &ref2 = ...Seg.ProximalPhalange4.ExtensorDigitorumLongusViaNode13;
  };

  AnyKinLinear Toe4TendonPart3Lin =
  {
    AnyRefNode &ref1 = ...Seg.Metatarsal4.ExtensorDigitorumLongusViaNode12;
    AnyRefNode &ref2 = ...Seg.ProximalPhalange4.DI4_Ins;
  };

  AnyKinLinear Toe4TendonPart4Lin =
  {
    AnyRefNode &ref1 = ...Seg.Metatarsal4.ExtensorDigitorumLongusViaNode12;
    AnyRefNode &ref2 = ...Seg.ProximalPhalange4.PI2_Ins;
  };


  AnyVar Toe4TendonPart1LinNorm = vnorm(Toe4TendonPart1Lin.Pos);
  AnyVar Toe4TendonPart1LinNormCond = iffun(Toe4TendonPart1LinNorm, Toe4TendonPart1LinNorm, 1.0);
  AnyVec3 Toe4TendonPart1UnityVec = Toe4TendonPart1Lin.Pos/Toe4TendonPart1LinNormCond;

  AnyVar Toe4TendonPart2LinNorm = vnorm(Toe4TendonPart2Lin.Pos);
  AnyVar Toe4TendonPart2LinNormCond = iffun(Toe4TendonPart2LinNorm, Toe4TendonPart2LinNorm, 1.0);
  AnyVec3 Toe4TendonPart2UnityVec = Toe4TendonPart2Lin.Pos/Toe4TendonPart2LinNormCond;

  AnyVar Toe4TendonPart3LinNorm = vnorm(Toe4TendonPart3Lin.Pos);
  AnyVar Toe4TendonPart3LinNormCond = iffun(Toe4TendonPart3LinNorm, Toe4TendonPart3LinNorm, 1.0);
  AnyVec3 Toe4TendonPart3UnityVec = Toe4TendonPart3Lin.Pos/Toe4TendonPart3LinNormCond;

  AnyVar Toe4TendonPart4LinNorm = vnorm(Toe4TendonPart4Lin.Pos);
  AnyVar Toe4TendonPart4LinNormCond = iffun(Toe4TendonPart4LinNorm, Toe4TendonPart4LinNorm, 1.0);
  AnyVec3 Toe4TendonPart4UnityVec = Toe4TendonPart4Lin.Pos/Toe4TendonPart4LinNormCond;


  //This calculation of the resultant direction asumes that the force of each tendon is equal
  AnyVar TendonResultantNorm = vnorm(Toe4TendonPart1UnityVec + Toe4TendonPart2UnityVec + Toe4TendonPart3UnityVec + Toe4TendonPart4UnityVec);
  AnyVar TendonResultantNormCond = iffun(TendonResultantNorm, TendonResultantNorm, 1.0);
  AnyVec3 TendonResultantUnityVec = (Toe4TendonPart1UnityVec + Toe4TendonPart2UnityVec + Toe4TendonPart3UnityVec + Toe4TendonPart4UnityVec)/TendonResultantNormCond;


  AnyVar SinPart1 = vnorm(cross(TendonResultantUnityVec, Toe4TendonPart1UnityVec)); //This is equal to the sinus of the angle between the two vectors because there are unity vectors
  AnyVar AnglePart1 = asin(SinPart1);

  AnyVar SinPart2 = vnorm(cross(TendonResultantUnityVec, Toe4TendonPart2UnityVec)); //This is equal to the sinus of the angle between the two vectors because there are unity vectors
  AnyVar AnglePart2 = asin(SinPart2);

  AnyVar SinPart3 = vnorm(cross(TendonResultantUnityVec, Toe4TendonPart3UnityVec)); //This is equal to the sinus of the angle between the two vectors because there are unity vectors
  AnyVar AnglePart3 = asin(SinPart3);

  AnyVar SinPart4 = vnorm(cross(TendonResultantUnityVec, Toe4TendonPart4UnityVec)); //This is equal to the sinus of the angle between the two vectors because there are unity vectors
  AnyVar AnglePart4 = asin(SinPart4);


  AnyMuscleActivityConstraint ExtensorDigitorumLongusToe4TendonLink =
  {
    AnyMuscle &muscle0 = ..ExtensorDigitorumLongusToe4TendonPart1;
    AnyMuscle &muscle1 = ..ExtensorDigitorumLongusToe4TendonPart2;
    AnyMuscle &muscle2 = ..ExtensorDigitorumLongusToe4TendonPart3;
    AnyMuscle &muscle3 = ..ExtensorDigitorumLongusToe4TendonPart4;
    AnyMuscle &muscle4 = ..ExtensorDigitorumLongusToe4Tendon;
    AnyMuscle &muscle5 = ..ExtensorDigitoriumBrevis4;
    nCon = 1;
    Coef = {{-muscle0.MusMdl.F0*abs(cos(.AnglePart1)),
        -muscle1.MusMdl.F0*abs(cos(.AnglePart2)),
        -muscle2.MusMdl.F0*abs(cos(.AnglePart3)),
        -muscle3.MusMdl.F0*abs(cos(.AnglePart4)),
        muscle4.MusMdl.F0,
        muscle5.MusMdl.F0
      }};
    Const = {0};
  };

  //**Check, if it works ok the two norms will be equal.**
//  AnyForceMomentMeasure Check1 =
//  {
//    AnyMuscle &muscle4 = ..ExtensorDigitorumLongusToe4Tendon;
//    AnyMuscle &muscle5 = ..ExtensorDigitoriumBrevis4;
//    AnyRefNode &ref2 = ...Seg.Metatarsal4.ExtensorDigitorumLongusViaNode12;
//    AnyVar Norm = vnorm(F);
//  };
//
//  AnyForceMomentMeasure Check2 =
//  {
//    AnyMuscle &muscle0 = ..ExtensorDigitorumLongusToe4TendonPart1;
//    AnyMuscle &muscle1 = ..ExtensorDigitorumLongusToe4TendonPart2;
//    AnyMuscle &muscle2 = ..ExtensorDigitorumLongusToe4TendonPart3;
//    AnyMuscle &muscle3 = ..ExtensorDigitorumLongusToe4TendonPart4;
//    AnyRefNode &ref2 = ...Seg.Metatarsal4.ExtensorDigitorumLongusViaNode12;
//    AnyVar Norm = vnorm(F);
//  };

};


AnyMuscleActivityConstraint ExtensorDigitorumLongusToe4TendonLink2 =
{
  AnyMuscle &muscle0 = .ExtensorDigitorumLongusToe4TendonPart3;
  AnyMuscle &muscle1 = .ExtensorDigitorumLongusToe4TendonPart4;
  AnyMuscle &muscle2 = .ExtensorDigitorumLongusToe4TendonPart1;
  AnyMuscle &muscle3 = .ExtensorDigitorumLongusToe4TendonPart2;
  nCon = 3;
  Coef = {{-1,1,0,0},{-1,0,1,0},{-1,0,0,1}};
  Const = {0,0,0};
};


AnyFolder ExtensorDigitorumLongusToe5TendonLink = {

  AnyKinLinear Toe5TendonPart1Lin =
  {
    AnyRefNode &ref1 = ...Seg.Metatarsal5.ExtensorDigitorumLongusViaNode15;
    AnyRefNode &ref2 = ...Seg.ProximalPhalange5.ExtensorDigitorumLongusViaNode16;
  };

  AnyKinLinear Toe5TendonPart2Lin =
  {
    AnyRefNode &ref1 = ...Seg.Metatarsal5.ExtensorDigitorumLongusViaNode15;
    AnyRefNode &ref2 = ...Seg.ProximalPhalange5.ExtensorDigitorumLongusViaNode16;
  };

  AnyKinLinear Toe5TendonPart3Lin =
  {
    AnyRefNode &ref1 = ...Seg.Metatarsal5.ExtensorDigitorumLongusViaNode15;
    AnyRefNode &ref2 = ...Seg.ProximalPhalange5.ABDM_Ins;
  };

  AnyKinLinear Toe5TendonPart4Lin =
  {
    AnyRefNode &ref1 = ...Seg.Metatarsal5.ExtensorDigitorumLongusViaNode15;
    AnyRefNode &ref2 = ...Seg.ProximalPhalange5.PI3_Ins;
  };


  AnyVar Toe5TendonPart1LinNorm = vnorm(Toe5TendonPart1Lin.Pos);
  AnyVar Toe5TendonPart1LinNormCond = iffun(Toe5TendonPart1LinNorm, Toe5TendonPart1LinNorm, 1.0);
  AnyVec3 Toe5TendonPart1UnityVec = Toe5TendonPart1Lin.Pos/Toe5TendonPart1LinNormCond;

  AnyVar Toe5TendonPart2LinNorm = vnorm(Toe5TendonPart2Lin.Pos);
  AnyVar Toe5TendonPart2LinNormCond = iffun(Toe5TendonPart2LinNorm, Toe5TendonPart2LinNorm, 1.0);
  AnyVec3 Toe5TendonPart2UnityVec = Toe5TendonPart2Lin.Pos/Toe5TendonPart2LinNormCond;

  AnyVar Toe5TendonPart3LinNorm = vnorm(Toe5TendonPart3Lin.Pos);
  AnyVar Toe5TendonPart3LinNormCond = iffun(Toe5TendonPart3LinNorm, Toe5TendonPart3LinNorm, 1.0);
  AnyVec3 Toe5TendonPart3UnityVec = Toe5TendonPart3Lin.Pos/Toe5TendonPart3LinNormCond;

  AnyVar Toe5TendonPart4LinNorm = vnorm(Toe5TendonPart4Lin.Pos);
  AnyVar Toe5TendonPart4LinNormCond = iffun(Toe5TendonPart4LinNorm, Toe5TendonPart4LinNorm, 1.0);
  AnyVec3 Toe5TendonPart4UnityVec = Toe5TendonPart4Lin.Pos/Toe5TendonPart4LinNormCond;


  //This calculation of the resultant direction asumes that the force of each tendon is equal
  AnyVar TendonResultantNorm = vnorm(Toe5TendonPart1UnityVec + Toe5TendonPart2UnityVec + Toe5TendonPart3UnityVec + Toe5TendonPart4UnityVec);
  AnyVar TendonResultantNormCond = iffun(TendonResultantNorm, TendonResultantNorm, 1.0);
  AnyVec3 TendonResultantUnityVec = (Toe5TendonPart1UnityVec + Toe5TendonPart2UnityVec + Toe5TendonPart3UnityVec + Toe5TendonPart4UnityVec)/TendonResultantNormCond;


  AnyVar SinPart1 = vnorm(cross(TendonResultantUnityVec, Toe5TendonPart1UnityVec)); //This is equal to the sinus of the angle between the two vectors because there are unity vectors
  AnyVar AnglePart1 = asin(SinPart1);

  AnyVar SinPart2 = vnorm(cross(TendonResultantUnityVec, Toe5TendonPart2UnityVec)); //This is equal to the sinus of the angle between the two vectors because there are unity vectors
  AnyVar AnglePart2 = asin(SinPart2);

  AnyVar SinPart3 = vnorm(cross(TendonResultantUnityVec, Toe5TendonPart3UnityVec)); //This is equal to the sinus of the angle between the two vectors because there are unity vectors
  AnyVar AnglePart3 = asin(SinPart3);

  AnyVar SinPart4 = vnorm(cross(TendonResultantUnityVec, Toe5TendonPart4UnityVec)); //This is equal to the sinus of the angle between the two vectors because there are unity vectors
  AnyVar AnglePart4 = asin(SinPart4);


  AnyMuscleActivityConstraint ExtensorDigitorumLongusToe5TendonLink =
  {
    AnyMuscle &muscle0 = ..ExtensorDigitorumLongusToe5TendonPart1;
    AnyMuscle &muscle1 = ..ExtensorDigitorumLongusToe5TendonPart2;
    AnyMuscle &muscle2 = ..ExtensorDigitorumLongusToe5TendonPart3;
    AnyMuscle &muscle3 = ..ExtensorDigitorumLongusToe5TendonPart4;
    AnyMuscle &muscle4 = ..ExtensorDigitorumLongusToe5Tendon;
    nCon = 1;
    Coef = {{-muscle0.MusMdl.F0*abs(cos(.AnglePart1)),
        -muscle1.MusMdl.F0*abs(cos(.AnglePart2)),
        -muscle2.MusMdl.F0*abs(cos(.AnglePart3)),
        -muscle3.MusMdl.F0*abs(cos(.AnglePart4)),
        muscle4.MusMdl.F0
      }};
    Const = {0};
  };

  //**Check, if it works ok the two norms will be equal.**
//  AnyForceMomentMeasure Check1 =
//  {
//    AnyMuscle &muscle4 = ..ExtensorDigitorumLongusToe5Tendon;
//    AnyRefNode &ref2 = ...Seg.Metatarsal5.ExtensorDigitorumLongusViaNode15;
//    AnyVar Norm = vnorm(F);
//  };
//
//  AnyForceMomentMeasure Check2 =
//  {
//    AnyMuscle &muscle0 = ..ExtensorDigitorumLongusToe5TendonPart1;
//    AnyMuscle &muscle1 = ..ExtensorDigitorumLongusToe5TendonPart2;
//    AnyMuscle &muscle2 = ..ExtensorDigitorumLongusToe5TendonPart3;
//    AnyMuscle &muscle3 = ..ExtensorDigitorumLongusToe5TendonPart4;
//    AnyRefNode &ref2 = ...Seg.Metatarsal5.ExtensorDigitorumLongusViaNode15;
//    AnyVar Norm = vnorm(F);
//  };

};


AnyMuscleActivityConstraint ExtensorDigitorumLongusToe5TendonLink2 =
{
  AnyMuscle &muscle0 = .ExtensorDigitorumLongusToe5TendonPart3;
  AnyMuscle &muscle1 = .ExtensorDigitorumLongusToe5TendonPart4;
  AnyMuscle &muscle2 = .ExtensorDigitorumLongusToe5TendonPart1;
  AnyMuscle &muscle3 = .ExtensorDigitorumLongusToe5TendonPart2;
  nCon = 3;
  Coef = {{-1,1,0,0},{-1,0,1,0},{-1,0,0,1}};
  Const = {0,0,0};
};


AnyViaPointMuscle ExtensorHallucisLongus1 = {
  AnyMuscleModel &MusMdl = ..MusPar.ExtensorHallucisLongus1Par;
  AnyRefNode &Org = ..Seg.Shank.ExtensorHallucisLongus1Node;
  AnyRefNode &Via1 = ..Seg.Shank.ExtensorHallucisLongusViaNode1;
  AnyRefNode &Via2 = ..Seg.Shank.ExtensorHallucisLongusViaNode2;
//  AnyRefNode &Via3 = ..Seg.Shank.ExtensorHallucisLongusViaNode3;
//  AnyRefNode &Via4 = ..Seg.Shank.ExtensorHallucisLongusViaNode4;
//  AnyRefNode &Via5 = ..Seg.Shank.ExtensorHallucisLongusViaNode5;
  AnyRefNode &Via6 = ..Seg.Shank.ExtensorHallucisLongusViaNode6;
  AnyRefNode &Via7 = ..Seg.Calcaneus.ExtensorHallucisLongusViaNode7;
//  AnyRefNode &Via7 = ..Seg.Navicular.ExtensorHallucisLongusViaNode7;
  AnyRefNode &Via8 = ..Seg.MedialCuneiform.ExtensorHallucisLongusViaNode8;
  AnyRefNode &Via9 = ..Seg.Metatarsal1.ExtensorHallucisLongusViaNode9;
//  AnyRefNode &Via10 = ..Seg.ProximalPhalange1.ExtensorHallucisLongusViaNode10;
//  AnyRefNode &Ins = ..Seg.DistalPhalange1.ExtensorHallucisLongus1Node;
    AnyDrawMuscle DrwMus = {#include "../DrawSettings/MusDrawSettings.any"
  };
};

AnyViaPointMuscle ExtensorHallucisLongus2 = {
  AnyMuscleModel &MusMdl = ..MusPar.ExtensorHallucisLongus2Par;
  AnyRefNode &Org = ..Seg.Shank.ExtensorHallucisLongus2Node;
  AnyRefNode &Via1 = ..Seg.Shank.ExtensorHallucisLongusViaNode1;
  AnyRefNode &Via2 = ..Seg.Shank.ExtensorHallucisLongusViaNode2;
  //AnyRefNode &Via3 = ..Seg.Shank.ExtensorHallucisLongusViaNode3;
  //AnyRefNode &Via4 = ..Seg.Shank.ExtensorHallucisLongusViaNode4;
  //AnyRefNode &Via5 = ..Seg.Shank.ExtensorHallucisLongusViaNode5;
  AnyRefNode &Via6 = ..Seg.Shank.ExtensorHallucisLongusViaNode6;
  AnyRefNode &Via7 = ..Seg.Calcaneus.ExtensorHallucisLongusViaNode7;
//  AnyRefNode &Via7 = ..Seg.Navicular.ExtensorHallucisLongusViaNode7;
  AnyRefNode &Via8 = ..Seg.MedialCuneiform.ExtensorHallucisLongusViaNode8;
  AnyRefNode &Via9 = ..Seg.Metatarsal1.ExtensorHallucisLongusViaNode9;
//  AnyRefNode &Via10 = ..Seg.ProximalPhalange1.ExtensorHallucisLongusViaNode10;
//  AnyRefNode &Ins = ..Seg.DistalPhalange1.ExtensorHallucisLongus2Node;
    AnyDrawMuscle DrwMus = {#include "../DrawSettings/MusDrawSettings.any"
  };
};

AnyViaPointMuscle ExtensorHallucisLongus3 = {
  AnyMuscleModel &MusMdl = ..MusPar.ExtensorHallucisLongus3Par;
  AnyRefNode &Org = ..Seg.Shank.ExtensorHallucisLongus3Node;
  AnyRefNode &Via1 = ..Seg.Shank.ExtensorHallucisLongusViaNode1;
  AnyRefNode &Via2 = ..Seg.Shank.ExtensorHallucisLongusViaNode2;
 // AnyRefNode &Via3 = ..Seg.Shank.ExtensorHallucisLongusViaNode3;
 // AnyRefNode &Via4 = ..Seg.Shank.ExtensorHallucisLongusViaNode4;
 // AnyRefNode &Via5 = ..Seg.Shank.ExtensorHallucisLongusViaNode5;
  AnyRefNode &Via6 = ..Seg.Shank.ExtensorHallucisLongusViaNode6;
  AnyRefNode &Via7 = ..Seg.Calcaneus.ExtensorHallucisLongusViaNode7;
//  AnyRefNode &Via7 = ..Seg.Navicular.ExtensorHallucisLongusViaNode7;
  AnyRefNode &Via8 = ..Seg.MedialCuneiform.ExtensorHallucisLongusViaNode8;
  AnyRefNode &Via9 = ..Seg.Metatarsal1.ExtensorHallucisLongusViaNode9;
//  AnyRefNode &Via10 = ..Seg.ProximalPhalange1.ExtensorHallucisLongusViaNode10;
//  AnyRefNode &Ins = ..Seg.DistalPhalange1.ExtensorHallucisLongus3Node;
    AnyDrawMuscle DrwMus = {#include "../DrawSettings/MusDrawSettings.any"
  };
};


AnyViaPointMuscle ExtensorHallucisLongusTendonPart1 = {
  AnyMuscleModel MusMdl = {F0 = 2000;};
  AnyRefNode &Via9 = ..Seg.Metatarsal1.ExtensorHallucisLongusViaNode9;
  AnyRefNode &Via10 = ..Seg.ProximalPhalange1.ExtensorHallucisLongusViaNode10;
  AnyRefNode &Ins = ..Seg.DistalPhalange1.ExtensorHallucisLongus1Node;
  AnyDrawMuscle DrwMus = {
    #include "../DrawSettings/MusDrawSettings.any"
  };
};

AnyViaPointMuscle ExtensorHallucisLongusTendonPart2 = {
  AnyMuscleModel MusMdl = {F0 = 2000;};
  AnyRefNode &Via9 = ..Seg.Metatarsal1.ExtensorHallucisLongusViaNode9;
  AnyRefNode &Ins = ..Seg.ProximalPhalange1.ADHT_Ins;
  AnyDrawMuscle DrwMus = {
    #include "../DrawSettings/MusDrawSettings.any"
  };
};

AnyViaPointMuscle ExtensorHallucisLongusTendonPart3 = {
  AnyMuscleModel MusMdl = {F0 = 2000;};
  AnyRefNode &Via9 = ..Seg.Metatarsal1.ExtensorHallucisLongusViaNode9;
  AnyRefNode &Ins = ..Seg.ProximalPhalange1.ABDH_Ins;
  AnyDrawMuscle DrwMus = {
    #include "../DrawSettings/MusDrawSettings.any"
  };
};


AnyFolder ExtensorHallucisLongusMuscleTendonLink = {

  AnyKinLinear Toe1TendonPart1Lin =
  {
    AnyRefNode &ref1 = ...Seg.Metatarsal1.ExtensorHallucisLongusViaNode9;
    AnyRefNode &ref2 = ...Seg.ProximalPhalange1.ExtensorHallucisLongusViaNode10;
  };

  AnyKinLinear Toe1TendonPart2Lin =
  {
    AnyRefNode &ref1 = ...Seg.Metatarsal1.ExtensorHallucisLongusViaNode9;
    AnyRefNode &ref2 = ...Seg.ProximalPhalange1.ADHT_Ins;
  };

  AnyKinLinear Toe1TendonPart3Lin =
  {
    AnyRefNode &ref1 = ...Seg.Metatarsal1.ExtensorHallucisLongusViaNode9;
    AnyRefNode &ref2 = ...Seg.ProximalPhalange1.ABDH_Ins;
  };


  AnyVar Toe1TendonPart1LinNorm = vnorm(Toe1TendonPart1Lin.Pos);
  AnyVar Toe1TendonPart1LinNormCond = iffun(Toe1TendonPart1LinNorm, Toe1TendonPart1LinNorm, 1.0);
  AnyVec3 Toe1TendonPart1UnityVec = Toe1TendonPart1Lin.Pos/Toe1TendonPart1LinNormCond;

  AnyVar Toe1TendonPart2LinNorm = vnorm(Toe1TendonPart2Lin.Pos);
  AnyVar Toe1TendonPart2LinNormCond = iffun(Toe1TendonPart2LinNorm, Toe1TendonPart2LinNorm, 1.0);
  AnyVec3 Toe1TendonPart2UnityVec = Toe1TendonPart2Lin.Pos/Toe1TendonPart2LinNormCond;

  AnyVar Toe1TendonPart3LinNorm = vnorm(Toe1TendonPart3Lin.Pos);
  AnyVar Toe1TendonPart3LinNormCond = iffun(Toe1TendonPart3LinNorm, Toe1TendonPart3LinNorm, 1.0);
  AnyVec3 Toe1TendonPart3UnityVec = Toe1TendonPart3Lin.Pos/Toe1TendonPart3LinNormCond;


  //This calculation of the resultant direction asumes that the force of each tendon is equal
  AnyVar TendonResultantNorm = vnorm(Toe1TendonPart1UnityVec + Toe1TendonPart2UnityVec + Toe1TendonPart3UnityVec);
  AnyVar TendonResultantNormCond = iffun(TendonResultantNorm, TendonResultantNorm, 1.0);
  AnyVec3 TendonResultantUnityVec = (Toe1TendonPart1UnityVec + Toe1TendonPart2UnityVec + Toe1TendonPart3UnityVec)/TendonResultantNormCond;


  AnyVar SinPart1 = vnorm(cross(TendonResultantUnityVec, Toe1TendonPart1UnityVec)); //This is equal to the sinus of the angle between the two vectors because there are unity vectors
  AnyVar AnglePart1 = asin(SinPart1);

  AnyVar SinPart2 = vnorm(cross(TendonResultantUnityVec, Toe1TendonPart2UnityVec)); //This is equal to the sinus of the angle between the two vectors because there are unity vectors
  AnyVar AnglePart2 = asin(SinPart2);

  AnyVar SinPart3 = vnorm(cross(TendonResultantUnityVec, Toe1TendonPart3UnityVec)); //This is equal to the sinus of the angle between the two vectors because there are unity vectors
  AnyVar AnglePart3 = asin(SinPart3);


  AnyMuscleActivityConstraint ExtensorDigitorumLongusToe5TendonLink =
  {
    AnyMuscle &muscle0 = ..ExtensorHallucisLongusTendonPart1;
    AnyMuscle &muscle1 = ..ExtensorHallucisLongusTendonPart2;
    AnyMuscle &muscle2 = ..ExtensorHallucisLongusTendonPart3;
    AnyMuscle &muscle3 = ..ExtensorHallucisLongus1;
    AnyMuscle &muscle4 = ..ExtensorHallucisLongus2;
    AnyMuscle &muscle5 = ..ExtensorHallucisLongus3;
    nCon = 1;
    Coef = {{-muscle0.MusMdl.F0*abs(cos(.AnglePart1)),
        -muscle1.MusMdl.F0*abs(cos(.AnglePart2)),
        -muscle2.MusMdl.F0*abs(cos(.AnglePart3)),
        muscle3.MusMdl.F0,
        muscle4.MusMdl.F0,
        muscle5.MusMdl.F0
      }};
    Const = {0};
  };

  //**Check, if it works ok the two norms will be equal.**
//  AnyForceMomentMeasure Check1 =
//  {
//    AnyMuscle &muscle3 = ..ExtensorHallucisLongus1;
//    AnyMuscle &muscle4 = ..ExtensorHallucisLongus2;
//    AnyMuscle &muscle5 = ..ExtensorHallucisLongus3;
//    AnyRefNode &ref2 = ...Seg.Metatarsal1.ExtensorHallucisLongusViaNode9;
//    AnyVar Norm = vnorm(F);
//  };
//
//  AnyForceMomentMeasure Check2 =
//  {
//    AnyMuscle &muscle0 = ..ExtensorHallucisLongusTendonPart1;
//    AnyMuscle &muscle1 = ..ExtensorHallucisLongusTendonPart2;
//    AnyMuscle &muscle2 = ..ExtensorHallucisLongusTendonPart3;
//    AnyRefNode &ref2 = ...Seg.Metatarsal1.ExtensorHallucisLongusViaNode9;
//    AnyVar Norm = vnorm(F);
//  };

};


AnyMuscleActivityConstraint ExtensorHallucisLongusInterTendonLink =
{
  AnyMuscle &muscle0 = .ExtensorHallucisLongusTendonPart2;
  AnyMuscle &muscle1 = .ExtensorHallucisLongusTendonPart3;
  AnyMuscle &muscle2 = .ExtensorHallucisLongusTendonPart1;
  nCon = 2;
  Coef = {{-1,1,0},{-1,0,1}};
  Const = {0,0};
};


// Start Quadriceps
// Note that all Vastus muscles have their insertion on the patella. The patella has
// been defined as a segment in the file seg.any.
// The Rectus Femoris has its origin on the Pelvis and its insertion on the patella.
// Also the Pelvis has been defined in the seg.any file.

//AnyViaPointMuscle VastusLateralisInferior1 = {
//  AnyMuscleModel &MusMdl = ..MusPar.VastusLateralisInferior1Par;
//  AnyRefNode &Org = ..Seg.Thigh.VastusLateralisInferior1Node;
//  AnyRefNode &Ins = ..Seg.Patella.VastusLateralisInferior1Node;
//    AnyDrawMuscle DrwMus = {#include "../DrawSettings/MusDrawSettings.any"
//  };
//};


AnyShortestPathMuscle VastusLateralisInferior1 = {
  AnyMuscleModel &MusMdl = ..MusPar.VastusLateralisInferior1Par;
  AnyRefNode &Org = ..Seg.Thigh.VastusLateralisInferior1Node;
  AnySurface &srf = ..Seg.Thigh.RectusVastiiWrapSurf.cyl;
  AnyRefNode &Ins = ..Seg.Patella.VastusLateralisInferior1Node;
  SPLine.StringMesh = 45;
    AnyDrawMuscle DrwMus = {#include "../DrawSettings/MusDrawSettings.any"
  };
};

//AnyViaPointMuscle VastusLateralisInferior2 = {
//  AnyMuscleModel &MusMdl = ..MusPar.VastusLateralisInferior2Par;
//  AnyRefNode &Org = ..Seg.Thigh.VastusLateralisInferior2Node;
//  AnyRefNode &Ins = ..Seg.Patella.VastusLateralisInferior2Node;
//    AnyDrawMuscle DrwMus = {#include "../DrawSettings/MusDrawSettings.any"
//  };
//};

AnyShortestPathMuscle VastusLateralisInferior2 = {
  AnyMuscleModel &MusMdl = ..MusPar.VastusLateralisInferior2Par;
  AnyRefNode &Org = ..Seg.Thigh.VastusLateralisInferior2Node;
  AnySurface &srf = ..Seg.Thigh.RectusVastiiWrapSurf.cyl;
  AnyRefNode &Ins = ..Seg.Patella.VastusLateralisInferior2Node;
  SPLine.StringMesh = 45;
    AnyDrawMuscle DrwMus = {#include "../DrawSettings/MusDrawSettings.any"
  };
};


//AnyViaPointMuscle VastusLateralisInferior3 = {
//  AnyMuscleModel &MusMdl = ..MusPar.VastusLateralisInferior3Par;
//  AnyRefNode &Org = ..Seg.Thigh.VastusLateralisInferior3Node;
//  AnyRefNode &Ins = ..Seg.Patella.VastusLateralisInferior3Node;
//    AnyDrawMuscle DrwMus = {#include "../DrawSettings/MusDrawSettings.any"
//  };
//};

AnyShortestPathMuscle VastusLateralisInferior3 = {
  AnyMuscleModel &MusMdl = ..MusPar.VastusLateralisInferior3Par;
  AnyRefNode &Org = ..Seg.Thigh.VastusLateralisInferior3Node;
  AnySurface &srf = ..Seg.Thigh.RectusVastiiWrapSurf.cyl;
  AnyRefNode &Ins = ..Seg.Patella.VastusLateralisInferior3Node;
  SPLine.StringMesh = 45;
    AnyDrawMuscle DrwMus = {#include "../DrawSettings/MusDrawSettings.any"
  };
};


//AnyViaPointMuscle VastusLateralisInferior4 = {
//  AnyMuscleModel &MusMdl = ..MusPar.VastusLateralisInferior4Par;
//  AnyRefNode &Org = ..Seg.Thigh.VastusLateralisInferior4Node;
//  AnyRefNode &Ins = ..Seg.Patella.VastusLateralisInferior4Node;
//    AnyDrawMuscle DrwMus = {#include "../DrawSettings/MusDrawSettings.any"
//  };
//};

AnyShortestPathMuscle VastusLateralisInferior4 = {
  AnyMuscleModel &MusMdl = ..MusPar.VastusLateralisInferior4Par;
  AnyRefNode &Org = ..Seg.Thigh.VastusLateralisInferior4Node;
  AnySurface &srf = ..Seg.Thigh.RectusVastiiWrapSurf.cyl;
  AnyRefNode &Ins = ..Seg.Patella.VastusLateralisInferior4Node;
  SPLine.StringMesh = 45;
    AnyDrawMuscle DrwMus = {#include "../DrawSettings/MusDrawSettings.any"
  };
};


//AnyViaPointMuscle VastusLateralisInferior5 = {
//  AnyMuscleModel &MusMdl = ..MusPar.VastusLateralisInferior5Par;
//  AnyRefNode &Org = ..Seg.Thigh.VastusLateralisInferior5Node;
//  AnyRefNode &Ins = ..Seg.Patella.VastusLateralisInferior5Node;
//    AnyDrawMuscle DrwMus = {#include "../DrawSettings/MusDrawSettings.any"
//  };
//};

AnyShortestPathMuscle VastusLateralisInferior5 = {
  AnyMuscleModel &MusMdl = ..MusPar.VastusLateralisInferior5Par;
  AnyRefNode &Org = ..Seg.Thigh.VastusLateralisInferior5Node;
  AnySurface &srf = ..Seg.Thigh.RectusVastiiWrapSurf.cyl;
  AnyRefNode &Ins = ..Seg.Patella.VastusLateralisInferior5Node;
  SPLine.StringMesh = 45;
    AnyDrawMuscle DrwMus = {#include "../DrawSettings/MusDrawSettings.any"
  };
};


//AnyViaPointMuscle VastusLateralisInferior6 = {
//  AnyMuscleModel &MusMdl = ..MusPar.VastusLateralisInferior6Par;
//  AnyRefNode &Org = ..Seg.Thigh.VastusLateralisInferior6Node;
//  AnyRefNode &Ins = ..Seg.Patella.VastusLateralisInferior6Node;
//    AnyDrawMuscle DrwMus = {#include "../DrawSettings/MusDrawSettings.any"
//  };
//};

AnyShortestPathMuscle VastusLateralisInferior6 = {
  AnyMuscleModel &MusMdl = ..MusPar.VastusLateralisInferior6Par;
  AnyRefNode &Org = ..Seg.Thigh.VastusLateralisInferior6Node;
  AnySurface &srf = ..Seg.Thigh.RectusVastiiWrapSurf.cyl;
  AnyRefNode &Ins = ..Seg.Patella.VastusLateralisInferior6Node;
  SPLine.StringMesh = 45;
    AnyDrawMuscle DrwMus = {#include "../DrawSettings/MusDrawSettings.any"
  };
};


//AnyViaPointMuscle VastusLateralisSuperior1 = {
//  AnyMuscleModel &MusMdl = ..MusPar.VastusLateralisSuperior1Par;
//  AnyRefNode &Org = ..Seg.Thigh.VastusLateralisSuperior1Node;
//  AnyRefNode &Ins = ..Seg.Patella.VastusLateralisSuperior1Node;
//    AnyDrawMuscle DrwMus = {#include "../DrawSettings/MusDrawSettings.any"
//  };
//};

AnyShortestPathMuscle VastusLateralisSuperior1 = {
  AnyMuscleModel &MusMdl = ..MusPar.VastusLateralisSuperior1Par;
  AnyRefNode &Org = ..Seg.Thigh.VastusLateralisSuperior1Node;
  AnySurface &srf = ..Seg.Thigh.RectusVastiiWrapSurf.cyl;
  AnyRefNode &Ins = ..Seg.Patella.VastusLateralisSuperior1Node;
  SPLine.StringMesh = 45;
    AnyDrawMuscle DrwMus = {#include "../DrawSettings/MusDrawSettings.any"
  };
};


//AnyViaPointMuscle VastusLateralisSuperior2 = {
//  AnyMuscleModel &MusMdl = ..MusPar.VastusLateralisSuperior2Par;
//  AnyRefNode &Org = ..Seg.Thigh.VastusLateralisSuperior2Node;
//  AnyRefNode &Ins = ..Seg.Patella.VastusLateralisSuperior2Node;
//    AnyDrawMuscle DrwMus = {#include "../DrawSettings/MusDrawSettings.any"
//  };
//};

AnyShortestPathMuscle VastusLateralisSuperior2 = {
  AnyMuscleModel &MusMdl = ..MusPar.VastusLateralisSuperior2Par;
  AnyRefNode &Org = ..Seg.Thigh.VastusLateralisSuperior2Node;
  AnySurface &srf = ..Seg.Thigh.RectusVastiiWrapSurf.cyl;
  AnyRefNode &Ins = ..Seg.Patella.VastusLateralisSuperior2Node;
  SPLine.StringMesh = 45;
    AnyDrawMuscle DrwMus = {#include "../DrawSettings/MusDrawSettings.any"
  };
};


//AnyViaPointMuscle VastusMedialisInferior1 = {
//  AnyMuscleModel &MusMdl = ..MusPar.VastusMedialisInferior1Par;
//  AnyRefNode &Org = ..Seg.Thigh.VastusMedialisInferior1Node;
//  AnyRefNode &Ins = ..Seg.Patella.VastusMedialisInferior1Node;
//    AnyDrawMuscle DrwMus = {#include "../DrawSettings/MusDrawSettings.any"
//  };
//};

AnyShortestPathMuscle VastusMedialisInferior1 = {
  AnyMuscleModel &MusMdl = ..MusPar.VastusMedialisInferior1Par;
  AnyRefNode &Org = ..Seg.Thigh.VastusMedialisInferior1Node;
  AnySurface &srf = ..Seg.Thigh.RectusVastiiWrapSurf.cyl;
  AnyRefNode &Ins = ..Seg.Patella.VastusMedialisInferior1Node;
SPLine.StringMesh = 45;
    AnyDrawMuscle DrwMus = {#include "../DrawSettings/MusDrawSettings.any"
  };
};


//AnyViaPointMuscle VastusMedialisInferior2 = {
//  AnyMuscleModel &MusMdl = ..MusPar.VastusMedialisInferior2Par;
//  AnyRefNode &Org = ..Seg.Thigh.VastusMedialisInferior2Node;
//  AnyRefNode &Ins = ..Seg.Patella.VastusMedialisInferior2Node;
//    AnyDrawMuscle DrwMus = {#include "../DrawSettings/MusDrawSettings.any"
//  };
//};

AnyShortestPathMuscle VastusMedialisInferior2 = {
  AnyMuscleModel &MusMdl = ..MusPar.VastusMedialisInferior2Par;
  AnyRefNode &Org = ..Seg.Thigh.VastusMedialisInferior2Node;
  AnySurface &srf = ..Seg.Thigh.RectusVastiiWrapSurf.cyl;
  AnyRefNode &Ins = ..Seg.Patella.VastusMedialisInferior2Node;
  SPLine.StringMesh = 45;
    AnyDrawMuscle DrwMus = {#include "../DrawSettings/MusDrawSettings.any"
  };
};


//AnyViaPointMuscle VastusMedialisMid1 = {
//  AnyMuscleModel &MusMdl = ..MusPar.VastusMedialisMid1Par;
//  AnyRefNode &Org = ..Seg.Thigh.VastusMedialisMid1Node;
//  AnyRefNode &Ins = ..Seg.Patella.VastusMedialisMid1Node;
//    AnyDrawMuscle DrwMus = {#include "../DrawSettings/MusDrawSettings.any"
//  };
//};

AnyShortestPathMuscle VastusMedialisMid1 = {
  AnyMuscleModel &MusMdl = ..MusPar.VastusMedialisMid1Par;
  AnyRefNode &Org = ..Seg.Thigh.VastusMedialisMid1Node;
  AnySurface &srf = ..Seg.Thigh.RectusVastiiWrapSurf.cyl;
  AnyRefNode &Ins = ..Seg.Patella.VastusMedialisMid1Node;
  SPLine.StringMesh = 45;
    AnyDrawMuscle DrwMus = {#include "../DrawSettings/MusDrawSettings.any"
  };
};


//AnyViaPointMuscle VastusMedialisMid2 = {
//  AnyMuscleModel &MusMdl = ..MusPar.VastusMedialisMid2Par;
//  AnyRefNode &Org = ..Seg.Thigh.VastusMedialisMid2Node;
//  AnyRefNode &Ins = ..Seg.Patella.VastusMedialisMid2Node;
//    AnyDrawMuscle DrwMus = {#include "../DrawSettings/MusDrawSettings.any"
//  };
//};

AnyShortestPathMuscle VastusMedialisMid2 = {
  AnyMuscleModel &MusMdl = ..MusPar.VastusMedialisMid2Par;
  AnyRefNode &Org = ..Seg.Thigh.VastusMedialisMid2Node;
  AnySurface &srf = ..Seg.Thigh.RectusVastiiWrapSurf.cyl;
  AnyRefNode &Ins = ..Seg.Patella.VastusMedialisMid2Node;
  SPLine.StringMesh = 45;
  AnyDrawMuscle DrwMus = {#include "../DrawSettings/MusDrawSettings.any"};
};

//AnyViaPointMuscle VastusMedialisSuperior1 = {
//  AnyMuscleModel &MusMdl = ..MusPar.VastusMedialisSuperior1Par;
//  AnyRefNode &Org = ..Seg.Thigh.VastusMedialisSuperior1Node;
//  AnyRefNode &Ins = ..Seg.Patella.VastusMedialisSuperior1Node;
//    AnyDrawMuscle DrwMus = {#include "../DrawSettings/MusDrawSettings.any"
//  };
//};

AnyShortestPathMuscle VastusMedialisSuperior1 = {
  AnyMuscleModel &MusMdl = ..MusPar.VastusMedialisSuperior1Par;
  AnyRefNode &Org = ..Seg.Thigh.VastusMedialisSuperior1Node;
  AnySurface &srf = ..Seg.Thigh.RectusVastiiWrapSurf.cyl;
  AnyRefNode &Ins = ..Seg.Patella.VastusMedialisSuperior1Node;
  SPLine.StringMesh = 45;
    AnyDrawMuscle DrwMus = {#include "../DrawSettings/MusDrawSettings.any"
  };
};


//AnyViaPointMuscle VastusMedialisSuperior2 = {
//  AnyMuscleModel &MusMdl = ..MusPar.VastusMedialisSuperior2Par;
//  AnyRefNode &Org = ..Seg.Thigh.VastusMedialisSuperior2Node;
//  AnyRefNode &Ins = ..Seg.Patella.VastusMedialisSuperior2Node;
//    AnyDrawMuscle DrwMus = {#include "../DrawSettings/MusDrawSettings.any"
//  };
//};

AnyShortestPathMuscle VastusMedialisSuperior2 = {
  AnyMuscleModel &MusMdl = ..MusPar.VastusMedialisSuperior2Par;
  AnyRefNode &Org = ..Seg.Thigh.VastusMedialisSuperior2Node;
  AnySurface &srf = ..Seg.Thigh.RectusVastiiWrapSurf.cyl;
  AnyRefNode &Ins = ..Seg.Patella.VastusMedialisSuperior2Node;
  SPLine.StringMesh = 45;
    AnyDrawMuscle DrwMus = {#include "../DrawSettings/MusDrawSettings.any"
  };
};

//AnyViaPointMuscle VastusMedialisSuperior3 = {
//  AnyMuscleModel &MusMdl = ..MusPar.VastusMedialisSuperior3Par;
//  AnyRefNode &Org = ..Seg.Thigh.VastusMedialisSuperior3Node;
//  AnyRefNode &Ins = ..Seg.Patella.VastusMedialisSuperior3Node;
//    AnyDrawMuscle DrwMus = {#include "../DrawSettings/MusDrawSettings.any"
//  };
//};

AnyShortestPathMuscle VastusMedialisSuperior3 = {
  AnyMuscleModel &MusMdl = ..MusPar.VastusMedialisSuperior3Par;
  AnyRefNode &Org = ..Seg.Thigh.VastusMedialisSuperior3Node;
  AnySurface &srf = ..Seg.Thigh.RectusVastiiWrapSurf.cyl;
  AnyRefNode &Ins = ..Seg.Patella.VastusMedialisSuperior3Node;
  SPLine.StringMesh = 45;
    AnyDrawMuscle DrwMus = {#include "../DrawSettings/MusDrawSettings.any"
  };
};


//AnyViaPointMuscle VastusMedialisSuperior4 = {
//  AnyMuscleModel &MusMdl = ..MusPar.VastusMedialisSuperior4Par;
//  AnyRefNode &Org = ..Seg.Thigh.VastusMedialisSuperior4Node;
//  AnyRefNode &Ins = ..Seg.Patella.VastusMedialisSuperior4Node;
//    AnyDrawMuscle DrwMus = {#include "../DrawSettings/MusDrawSettings.any"
//  };
//};

AnyShortestPathMuscle VastusMedialisSuperior4 = {
  AnyMuscleModel &MusMdl = ..MusPar.VastusMedialisSuperior4Par;
  AnyRefNode &Org = ..Seg.Thigh.VastusMedialisSuperior4Node;
  AnySurface &srf = ..Seg.Thigh.RectusVastiiWrapSurf.cyl;
  AnyRefNode &Ins = ..Seg.Patella.VastusMedialisSuperior4Node;
  SPLine.StringMesh = 45;
    AnyDrawMuscle DrwMus = {#include "../DrawSettings/MusDrawSettings.any"
  };
};


//AnyViaPointMuscle VastusMedialisSuperior5 = {
//  AnyMuscleModel &MusMdl = ..MusPar.VastusMedialisSuperior5Par;
//  AnyRefNode &Org = ..Seg.Thigh.VastusMedialisSuperior5Node;
//  AnyRefNode &Ins = ..Seg.Patella.VastusMedialisSuperior5Node;
//    AnyDrawMuscle DrwMus = {#include "../DrawSettings/MusDrawSettings.any"
//  };
//};

AnyShortestPathMuscle VastusMedialisSuperior5 = {
  AnyMuscleModel &MusMdl = ..MusPar.VastusMedialisSuperior5Par;
  AnyRefNode &Org = ..Seg.Thigh.VastusMedialisSuperior5Node;
  AnySurface &srf = ..Seg.Thigh.RectusVastiiWrapSurf.cyl;
  AnyRefNode &Ins = ..Seg.Patella.VastusMedialisSuperior5Node;
  SPLine.StringMesh = 45;
    AnyDrawMuscle DrwMus = {#include "../DrawSettings/MusDrawSettings.any"
  };
};


//AnyViaPointMuscle VastusMedialisSuperior6 = {
//  AnyMuscleModel &MusMdl = ..MusPar.VastusMedialisSuperior6Par;
//  AnyRefNode &Org = ..Seg.Thigh.VastusMedialisSuperior6Node;
//  AnyRefNode &Ins = ..Seg.Patella.VastusMedialisSuperior6Node;
//    AnyDrawMuscle DrwMus = {#include "../DrawSettings/MusDrawSettings.any"
//  };
//};

AnyShortestPathMuscle VastusMedialisSuperior6 = {
  AnyMuscleModel &MusMdl = ..MusPar.VastusMedialisSuperior6Par;
  AnyRefNode &Org = ..Seg.Thigh.VastusMedialisSuperior6Node;
  AnySurface &srf = ..Seg.Thigh.RectusVastiiWrapSurf.cyl;
  AnyRefNode &Ins = ..Seg.Patella.VastusMedialisSuperior6Node;
  SPLine.StringMesh = 45;
    AnyDrawMuscle DrwMus = {#include "../DrawSettings/MusDrawSettings.any"
  };
};


//AnyViaPointMuscle VastusIntermedius1 = {
//  AnyMuscleModel &MusMdl = ..MusPar.VastusIntermedius1Par;
//  AnyRefNode &Org = ..Seg.Thigh.VastusIntermedius1Node;
//  AnyRefNode &Ins = ..Seg.Patella.VastusIntermedius1Node;
//    AnyDrawMuscle DrwMus = {#include "../DrawSettings/MusDrawSettings.any"
//  };
//};


//AnyViaPointMuscle VastusIntermedius2 = {
//  AnyMuscleModel &MusMdl = ..MusPar.VastusIntermedius2Par;
//  AnyRefNode &Org = ..Seg.Thigh.VastusIntermedius2Node;
//  AnyRefNode &Ins = ..Seg.Patella.VastusIntermedius2Node;
//    AnyDrawMuscle DrwMus = {#include "../DrawSettings/MusDrawSettings.any"
//  };
//};

//AnyViaPointMuscle VastusIntermedius3 = {
//  AnyMuscleModel &MusMdl = ..MusPar.VastusIntermedius3Par;
//  AnyRefNode &Org = ..Seg.Thigh.VastusIntermedius3Node;
//  AnyRefNode &Ins = ..Seg.Patella.VastusIntermedius3Node;
//    AnyDrawMuscle DrwMus = {#include "../DrawSettings/MusDrawSettings.any"
//  };
//};
//
//AnyViaPointMuscle VastusIntermedius4 = {
//  AnyMuscleModel &MusMdl = ..MusPar.VastusIntermedius4Par;
//  AnyRefNode &Org = ..Seg.Thigh.VastusIntermedius4Node;
//  AnyRefNode &Ins = ..Seg.Patella.VastusIntermedius4Node;
//    AnyDrawMuscle DrwMus = {#include "../DrawSettings/MusDrawSettings.any"
//  };
//};
//
//AnyViaPointMuscle VastusIntermedius5 = {
//  AnyMuscleModel &MusMdl = ..MusPar.VastusIntermedius5Par;
//  AnyRefNode &Org = ..Seg.Thigh.VastusIntermedius5Node;
//  AnyRefNode &Ins = ..Seg.Patella.VastusIntermedius5Node;
//    AnyDrawMuscle DrwMus = {#include "../DrawSettings/MusDrawSettings.any"
//  };
//};
//
//AnyViaPointMuscle VastusIntermedius6 = {
//  AnyMuscleModel &MusMdl = ..MusPar.VastusIntermedius6Par;
//  AnyRefNode &Org = ..Seg.Thigh.VastusIntermedius6Node;
//  AnyRefNode &Ins = ..Seg.Patella.VastusIntermedius6Node;
//    AnyDrawMuscle DrwMus = {#include "../DrawSettings/MusDrawSettings.any"
//  };
//};


AnyShortestPathMuscle VastusIntermedius1 = {
  AnyMuscleModel &MusMdl = ..MusPar.VastusIntermedius1Par;
  AnyRefNode &Org = ..Seg.Thigh.VastusIntermedius1Node;
 AnySurface &srf = ..Seg.Thigh.RectusVastiiWrapSurf.cyl;
  AnyRefNode &Ins = ..Seg.Patella.VastusIntermedius1Node;
  SPLine.StringMesh = 45;
    AnyDrawMuscle DrwMus = {#include "../DrawSettings/MusDrawSettings.any"
  };
};

AnyShortestPathMuscle VastusIntermedius2 = {
  AnyMuscleModel &MusMdl = ..MusPar.VastusIntermedius2Par;
  AnyRefNode &Org = ..Seg.Thigh.VastusIntermedius2Node;
  AnySurface &srf = ..Seg.Thigh.RectusVastiiWrapSurf.cyl;
  AnyRefNode &Ins = ..Seg.Patella.VastusIntermedius2Node;
  SPLine.StringMesh = 45;
    AnyDrawMuscle DrwMus = {#include "../DrawSettings/MusDrawSettings.any"
  };
};


AnyShortestPathMuscle VastusIntermedius3 = {
  AnyMuscleModel &MusMdl = ..MusPar.VastusIntermedius3Par;
  AnyRefNode &Org = ..Seg.Thigh.VastusIntermedius3Node;
  AnySurface &srf = ..Seg.Thigh.RectusVastiiWrapSurf.cyl;
  AnyRefNode &Ins = ..Seg.Patella.VastusIntermedius3Node;
  SPLine.StringMesh = 45;
    AnyDrawMuscle DrwMus = {#include "../DrawSettings/MusDrawSettings.any"
  };
};

AnyShortestPathMuscle VastusIntermedius4 = {
  AnyMuscleModel &MusMdl = ..MusPar.VastusIntermedius4Par;
  AnyRefNode &Org = ..Seg.Thigh.VastusIntermedius4Node;
  AnySurface &srf = ..Seg.Thigh.RectusVastiiWrapSurf.cyl;
  AnyRefNode &Ins = ..Seg.Patella.VastusIntermedius4Node;
  SPLine.StringMesh = 45;
    AnyDrawMuscle DrwMus = {#include "../DrawSettings/MusDrawSettings.any"
  };
};

AnyShortestPathMuscle VastusIntermedius5 = {
  AnyMuscleModel &MusMdl = ..MusPar.VastusIntermedius5Par;
  AnyRefNode &Org = ..Seg.Thigh.VastusIntermedius5Node;
AnySurface &srf = ..Seg.Thigh.RectusVastiiWrapSurf.cyl;
  AnyRefNode &Ins = ..Seg.Patella.VastusIntermedius5Node;
  SPLine.StringMesh = 45;
    AnyDrawMuscle DrwMus = {#include "../DrawSettings/MusDrawSettings.any"
  };
};

AnyShortestPathMuscle VastusIntermedius6 = {
  AnyMuscleModel &MusMdl = ..MusPar.VastusIntermedius6Par;
  AnyRefNode &Org = ..Seg.Thigh.VastusIntermedius6Node;
AnySurface &srf = ..Seg.Thigh.RectusVastiiWrapSurf.cyl;
  AnyRefNode &Ins = ..Seg.Patella.VastusIntermedius6Node;
  SPLine.StringMesh = 45;
    AnyDrawMuscle DrwMus = {#include "../DrawSettings/MusDrawSettings.any"
  };
};


//AnyViaPointMuscle RectusFemoris1 = {
//  AnyMuscleModel &MusMdl = ..MusPar.RectusFemoris1Par;
//  AnyRefNode &Org = ..HipNodeRef.LegAttachmentNodes.RectusFemoris1Node;
//  AnyRefNode &Ins = ..Seg.Patella.RectusFemoris1Node;
//    AnyDrawMuscle DrwMus = {#include "../DrawSettings/MusDrawSettings.any"
//  };
//};
//
//AnyViaPointMuscle RectusFemoris2 = {
//  AnyMuscleModel &MusMdl = ..MusPar.RectusFemoris2Par;
//  AnyRefNode &Org = ..HipNodeRef.LegAttachmentNodes.RectusFemoris2Node;
//  AnyRefNode &Ins = ..Seg.Patella.RectusFemoris2Node;
//    AnyDrawMuscle DrwMus = {#include "../DrawSettings/MusDrawSettings.any"
//  };
//};

AnyShortestPathMuscle RectusFemoris1 = {
  AnyMuscleModel &MusMdl = ..MusPar.RectusFemoris1Par;
  AnyRefNode &Org = ..HipNodeRef.LegAttachmentNodes.RectusFemoris1Node;
  AnyRefNode &Ins = ..Seg.Patella.RectusFemoris1Node;
  AnySurface &srf = ..Seg.Thigh.RectusVastiiWrapSurf.cyl;
  SPLine.StringMesh = 45;

    AnyDrawMuscle DrwMus = {#include "../DrawSettings/MusDrawSettings.any"
  };
};

AnyShortestPathMuscle RectusFemoris2 = {
  AnyMuscleModel &MusMdl = ..MusPar.RectusFemoris2Par;
  AnyRefNode &Org = ..HipNodeRef.LegAttachmentNodes.RectusFemoris2Node;
  AnyRefNode &Ins = ..Seg.Patella.RectusFemoris2Node;
  AnySurface &srf = ..Seg.Thigh.RectusVastiiWrapSurf.cyl;
  SPLine.StringMesh = 45;

    AnyDrawMuscle DrwMus = {#include "../DrawSettings/MusDrawSettings.any"
  };
};

// End Quadriceps.

// Start of Hamstrings

AnyViaPointMuscle Semitendinosus1 = {
  AnyMuscleModel &MusMdl = ..MusPar.Semitendinosus1Par;
  AnyRefNode &Org = ..HipNodeRef.LegAttachmentNodes.Semitendinosus1Node;
  AnyRefNode &Via1 = ..Seg.Shank.SemitendinosusViaNode1;
  AnyRefNode &Via2 = ..Seg.Shank.SemitendinosusViaNode2;
  AnyRefNode &Via3 = ..Seg.Shank.SemitendinosusViaNode3;
  AnyRefNode &Via4 = ..Seg.Shank.SemitendinosusViaNode4;
  AnyRefNode &Via5 = ..Seg.Shank.SemitendinosusViaNode5;
  AnyRefNode &Via6 = ..Seg.Shank.SemitendinosusViaNode6;
  AnyRefNode &Via7 = ..Seg.Shank.SemitendinosusViaNode7;
  AnyRefNode &Ins = ..Seg.Shank.Semitendinosus1Node;
    AnyDrawMuscle DrwMus = {#include "../DrawSettings/MusDrawSettings.any"
  };
};

AnyViaPointMuscle Semimembranosus1 = {
  AnyMuscleModel &MusMdl = ..MusPar.Semimembranosus1Par;
  AnyRefNode &Org = ..HipNodeRef.LegAttachmentNodes.Semimembranosus1Node;
  AnyRefNode &Ins = ..Seg.Shank.Semimembranosus1Node;
  AnyDrawMuscle DrwMus = {
   #include "../DrawSettings/MusDrawSettings.any"
};
};

AnyViaPointMuscle BicepsFemorisCaputLongum1 = {
  AnyMuscleModel &MusMdl = ..MusPar.BicepsFemorisCaputLongum1Par;
  AnyRefNode &Org = ..HipNodeRef.LegAttachmentNodes.BicepsFemorisCaputLongum1Node;
  AnyRefNode &Ins = ..Seg.Shank.BicepsFemorisCaputLongum1Node;
    AnyDrawMuscle DrwMus = {
      #include "../DrawSettings/MusDrawSettings.any"
  };
};

AnyViaPointMuscle BicepsFemorisCaputBreve1 = {
  AnyMuscleModel &MusMdl = ..MusPar.BicepsFemorisCaputBreve1Par;
  AnyRefNode &Org = ..Seg.Thigh.BicepsFemorisCaputBreve1Node;
  AnyRefNode &Ins = ..Seg.Shank.BicepsFemorisCaputBreve1Node;
    AnyDrawMuscle DrwMus = {#include "../DrawSettings/MusDrawSettings.any"
  };
};

AnyViaPointMuscle BicepsFemorisCaputBreve2 = {
  AnyMuscleModel &MusMdl = ..MusPar.BicepsFemorisCaputBreve2Par;
  AnyRefNode &Org = ..Seg.Thigh.BicepsFemorisCaputBreve2Node;
  AnyRefNode &Ins = ..Seg.Shank.BicepsFemorisCaputBreve2Node;
    AnyDrawMuscle DrwMus = {#include "../DrawSettings/MusDrawSettings.any"
  };
};

AnyViaPointMuscle BicepsFemorisCaputBreve3 = {
  AnyMuscleModel &MusMdl = ..MusPar.BicepsFemorisCaputBreve3Par;
  AnyRefNode &Org = ..Seg.Thigh.BicepsFemorisCaputBreve3Node;
  AnyRefNode &Ins = ..Seg.Shank.BicepsFemorisCaputBreve3Node;
    AnyDrawMuscle DrwMus = {#include "../DrawSettings/MusDrawSettings.any"
  };
};

// End of Hamstrings


// Start hip muscles

AnyViaPointMuscle SartoriusProximal1 = {
  AnyMuscleModel &MusMdl = ..MusPar.SartoriusProximal1Par;
  AnyRefNode &Org = ..HipNodeRef.LegAttachmentNodes.SartoriusProximal1Node;
  AnyRefNode &Via1 = ..Seg.Thigh.SartoriusProximalViaNode1;
  AnyRefNode &Via2 = ..Seg.Thigh.SartoriusProximalViaNode2;
  AnyRefNode &Via3 = ..Seg.Thigh.SartoriusProximalViaNode3;
  AnyRefNode &Via4 = ..Seg.Thigh.SartoriusProximalViaNode4;
  AnyRefNode &Via5 = ..Seg.Thigh.SartoriusProximalViaNode5;
  AnyRefNode &Via6 = ..Seg.Thigh.SartoriusProximalViaNode6;
  AnyRefNode &Via7 = ..Seg.Thigh.SartoriusProximalViaNode7;
  AnyRefNode &Via8 = ..Seg.Thigh.SartoriusProximalViaNode8;
  AnyRefNode &Via9 = ..Seg.Thigh.SartoriusProximalViaNode9;
  AnyRefNode &Via10 = ..Seg.Thigh.SartoriusProximalViaNode10;
  AnyRefNode &Via11 = ..Seg.Thigh.SartoriusProximalViaNode11;
  AnyRefNode &Via12 = ..Seg.Thigh.SartoriusProximalViaNode12;
  AnyRefNode &Via13 = ..Seg.Thigh.SartoriusProximalViaNode13;
  AnyRefNode &Ins = ..Seg.Shank.SartoriusProximal1Node;
    AnyDrawMuscle DrwMus = {
      #include "../DrawSettings/MusDrawSettings.any"
  };
};

AnyViaPointMuscle SartoriusDistal1 = {
  AnyMuscleModel &MusMdl = ..MusPar.SartoriusDistal1Par;
  AnyRefNode &Org = ..HipNodeRef.LegAttachmentNodes.SartoriusDistal1Node;
  AnyRefNode &Via1 = ..Seg.Thigh.SartoriusDistalViaNode1;
  AnyRefNode &Ins = ..Seg.Shank.SartoriusDistal1Node;
    AnyDrawMuscle DrwMus = {
      #include "../DrawSettings/MusDrawSettings.any"
  };
};
AnyShortestPathMuscle IliacusLateralis1 = {
  AnyMuscleModel &MusMdl = ..MusPar.IliacusLateralis1Par;
  AnyRefNode &Org = ..HipNodeRef.LegAttachmentNodes.IliacusLateralis1Node;
  AnyRefNode &Via1 = ..HipNodeRef.LegAttachmentNodes.IliacusLateralisViaNode1;
//  AnySurface &srf = ..HipNodeRef.LegAttachmentNodes.pecent_ossis_pubis.Translate.cyl;
  AnySurface &srf = ..HipNodeRef.LegAttachmentNodes.IliacusWrapSurf.cyl;

  AnyRefNode &Ins = ..Seg.Thigh.IliacusLateralis1Node;
   SPLine.InitWrapPosVectors = {{0,0,0},{0.1,-0.1,0},{0,0,0}};
  SPLine.StringMesh = 45;
  AnyDrawMuscle DrwMus = {
   #include "../DrawSettings/MusDrawSettings.any"
  };
};


AnyShortestPathMuscle IliacusLateralis2 = {
  AnyMuscleModel &MusMdl = ..MusPar.IliacusLateralis2Par;
  AnyRefNode &Org = ..HipNodeRef.LegAttachmentNodes.IliacusLateralis2Node;
  AnyRefNode &Via1 = ..HipNodeRef.LegAttachmentNodes.IliacusLateralisViaNode1;
//  AnySurface &srf = ..HipNodeRef.LegAttachmentNodes.pecent_ossis_pubis.Translate.cyl;
  AnySurface &srf = ..HipNodeRef.LegAttachmentNodes.IliacusWrapSurf.cyl;
  AnyRefNode &Ins = ..Seg.Thigh.IliacusLateralis2Node;
 SPLine.InitWrapPosVectors = {{0,0,0},{0.1,-0.1,0},{0,0,0}};
SPLine.StringMesh = 45;
  AnyDrawMuscle DrwMus = {
   #include "../DrawSettings/MusDrawSettings.any"
  };
};


AnyShortestPathMuscle IliacusLateralis3 = {
  AnyMuscleModel &MusMdl = ..MusPar.IliacusLateralis3Par;
  AnyRefNode &Org = ..HipNodeRef.LegAttachmentNodes.IliacusLateralis3Node;
  AnyRefNode &Via1 = ..HipNodeRef.LegAttachmentNodes.IliacusLateralisViaNode1;
//  AnySurface &srf = ..HipNodeRef.LegAttachmentNodes.pecent_ossis_pubis.Translate.cyl;
  AnySurface &srf = ..HipNodeRef.LegAttachmentNodes.IliacusWrapSurf.cyl;
  AnyRefNode &Ins = ..Seg.Thigh.IliacusLateralis3Node;
 SPLine.InitWrapPosVectors = {{0,0,0},{0.1,-0.1,0},{0,0,0}};
 SPLine.StringMesh = 45;
  AnyDrawMuscle DrwMus = {
   #include "../DrawSettings/MusDrawSettings.any"
  };
};


AnyShortestPathMuscle IliacusMid1 = {
  AnyMuscleModel &MusMdl = ..MusPar.IliacusMid1Par;
  AnyRefNode &Org = ..HipNodeRef.LegAttachmentNodes.IliacusMid1Node;
  AnyRefNode &Via1 = ..HipNodeRef.LegAttachmentNodes.IliacusMidViaNode1;
//  AnySurface &srf = ..HipNodeRef.LegAttachmentNodes.pecent_ossis_pubis.Translate.cyl;
  AnySurface &srf = ..HipNodeRef.LegAttachmentNodes.IliacusWrapSurf.cyl;
  AnyRefNode &Ins = ..Seg.Thigh.IliacusMid1Node;
 SPLine.InitWrapPosVectors = {{0,0,0},{0.1,-0.1,0},{0,0,0}};
 SPLine.StringMesh = 45;
  AnyDrawMuscle DrwMus = {
  #include "../DrawSettings/MusDrawSettings.any"
  };
};


AnyShortestPathMuscle IliacusMid2 = {
  AnyMuscleModel &MusMdl = ..MusPar.IliacusMid2Par;
  AnyRefNode &Org = ..HipNodeRef.LegAttachmentNodes.IliacusMid2Node;
  AnyRefNode &Via1 = ..HipNodeRef.LegAttachmentNodes.IliacusMidViaNode1;
//  AnySurface &srf = ..HipNodeRef.LegAttachmentNodes.pecent_ossis_pubis.Translate.cyl;
  AnySurface &srf = ..HipNodeRef.LegAttachmentNodes.IliacusWrapSurf.cyl;
  AnyRefNode &Ins = ..Seg.Thigh.IliacusMid2Node;
SPLine.InitWrapPosVectors = {{0,0,0},{0.1,-0.1,0},{0,0,0}};
  SPLine.StringMesh = 45;
  AnyDrawMuscle DrwMus = {
    #include "../DrawSettings/MusDrawSettings.any"
  };
};


AnyShortestPathMuscle IliacusMid3 = {
  AnyMuscleModel &MusMdl = ..MusPar.IliacusMid3Par;
  AnyRefNode &Org = ..HipNodeRef.LegAttachmentNodes.IliacusMid3Node;
  AnyRefNode &Via1 = ..HipNodeRef.LegAttachmentNodes.IliacusMidViaNode1;
//  AnySurface &srf = ..HipNodeRef.LegAttachmentNodes.pecent_ossis_pubis.Translate.cyl;
  AnySurface &srf = ..HipNodeRef.LegAttachmentNodes.IliacusWrapSurf.cyl;
  AnyRefNode &Ins = ..Seg.Thigh.IliacusMid3Node;
SPLine.InitWrapPosVectors = {{0,0,0},{0.1,-0.1,0},{0,0,0}};
  SPLine.StringMesh = 45;
  AnyDrawMuscle DrwMus = {
  #include "../DrawSettings/MusDrawSettings.any"
  };
};


AnyShortestPathMuscle IliacusMedialis1 = {
  AnyMuscleModel &MusMdl = ..MusPar.IliacusMedialis1Par;
  AnyRefNode &Org = ..HipNodeRef.LegAttachmentNodes.IliacusMedialis1Node;
  AnyRefNode &Via1 = ..HipNodeRef.LegAttachmentNodes.IliacusMedialisViaNode1;
//  AnySurface &srf = ..HipNodeRef.LegAttachmentNodes.pecent_ossis_pubis.Translate.cyl;
  AnySurface &srf = ..HipNodeRef.LegAttachmentNodes.IliacusWrapSurf.cyl;
  AnyRefNode &Ins = ..Seg.Thigh.IliacusMedialis1Node;
 SPLine.InitWrapPosVectors = {{0,0,0},{0.1,-0.1,0},{0,0,0}};
 SPLine.StringMesh = 45;
  AnyDrawMuscle DrwMus = {
   #include "../DrawSettings/MusDrawSettings.any"
  };
};


AnyShortestPathMuscle IliacusMedialis2 = {
  AnyMuscleModel &MusMdl = ..MusPar.IliacusMedialis2Par;
  AnyRefNode &Org = ..HipNodeRef.LegAttachmentNodes.IliacusMedialis2Node;
  AnyRefNode &Via1 = ..HipNodeRef.LegAttachmentNodes.IliacusMedialisViaNode1;
//  AnySurface &srf = ..HipNodeRef.LegAttachmentNodes.pecent_ossis_pubis.Translate.cyl;
  AnySurface &srf = ..HipNodeRef.LegAttachmentNodes.IliacusWrapSurf.cyl;
  AnyRefNode &Ins = ..Seg.Thigh.IliacusMedialis2Node;
  SPLine.StringMesh = 45;
SPLine.InitWrapPosVectors = {{0,0,0},{0.1,-0.1,0},{0,0,0}};
  AnyDrawMuscle DrwMus = {
   #include "../DrawSettings/MusDrawSettings.any"
  };
};


AnyShortestPathMuscle IliacusMedialis3 = {
  AnyMuscleModel &MusMdl = ..MusPar.IliacusMedialis3Par;
  AnyRefNode &Org = ..HipNodeRef.LegAttachmentNodes.IliacusMedialis3Node;
  AnyRefNode &Via1 = ..HipNodeRef.LegAttachmentNodes.IliacusMedialisViaNode1;
//  AnySurface &srf = ..HipNodeRef.LegAttachmentNodes.pecent_ossis_pubis.Translate.cyl;
  AnySurface &srf = ..HipNodeRef.LegAttachmentNodes.IliacusWrapSurf.cyl;
  AnyRefNode &Ins = ..Seg.Thigh.IliacusMedialis3Node;
  SPLine.StringMesh = 45;
 SPLine.InitWrapPosVectors = {{0,0,0},{0.1,-0.1,0},{0,0,0}};
 AnyDrawMuscle DrwMus = {
   #include "../DrawSettings/MusDrawSettings.any"
  };
};

//
//AnyShortestPathMuscle PsoasMajor1 = {
//  AnyMuscleModel &MusMdl = ..MusPar.PsoasMajor1Par;
//  AnyRefNode &Ins = ..Seg.Thigh.PsoasMajor1Node;
//  AnySurface &srf = ..HipNodeRef.LegAttachmentNodes.CylCenter.WrapSurf;
//  AnySurface &srf2 = ..HipNodeRef.LegAttachmentNodes.CylCenter2.WrapSurf;
//  AnyRefNode &Via1 = ..HipNodeRef.LegAttachmentNodes.PsoasMajorViaNode1;
//  AnyRefNode &Org = ..HipNodeRef.LegAttachmentNodes.PsoasMajor1Node;
//  SPLine.InitWrapPosVectors = {{0.1,-0.2,0}};
//  SPLine.StringMesh = 45;
//  AnyDrawMuscle DrwMus = {
//   #include "../DrawSettings/MusDrawSettings.any"
//  };
//};
//
//
//
//AnyShortestPathMuscle PsoasMajor2 = {
//  AnyMuscleModel &MusMdl = ..MusPar.PsoasMajor2Par;
//  AnyRefNode &Org = ..HipNodeRef.LegAttachmentNodes.PsoasMajor2Node;
//  AnySurface &srf = ..HipNodeRef.LegAttachmentNodes.CylCenter.WrapSurf;
//  AnySurface &srf2 = ..HipNodeRef.LegAttachmentNodes.CylCenter2.WrapSurf;
//  AnyRefNode &Via1 = ..HipNodeRef.LegAttachmentNodes.PsoasMajorViaNode1;
//  AnyRefNode &Ins = ..Seg.Thigh.PsoasMajor2Node;
//  SPLine.InitWrapPosVectors = {{0.1,-0.2,0}};
//  SPLine.StringMesh = 45;
//  AnyDrawMuscle DrwMus = {
//   #include "../DrawSettings/MusDrawSettings.any"
//  };
//};
//
//
//
//AnyShortestPathMuscle PsoasMajor3 = {
//  AnyMuscleModel &MusMdl = ..MusPar.PsoasMajor3Par;
//  AnyRefNode &Org = ..HipNodeRef.LegAttachmentNodes.PsoasMajor3Node;
//  AnyRefNode &Via1 = ..HipNodeRef.LegAttachmentNodes.PsoasMajorViaNode1;
//  AnySurface &srf = ..HipNodeRef.LegAttachmentNodes.CylCenter.WrapSurf;
//  AnyRefNode &Ins = ..Seg.Thigh.PsoasMajor3Node;
//  SPLine.StringMesh = 45;
//  AnyDrawMuscle DrwMus = {
//   #include "../DrawSettings/MusDrawSettings.any"
//  };
//};
//
//
//
//AnyShortestPathMuscle PsoasMinor1 = {
//  AnyMuscleModel &MusMdl = ..MusPar.PsoasMinor1Par;
//  AnyRefNode &Org = ..HipNodeRef.LegAttachmentNodes.PsoasMinor1Node;
//  AnyRefNode &Via1 = ..HipNodeRef.LegAttachmentNodes.PsoasMinorViaNode1;
//  AnySurface &srf = ..HipNodeRef.LegAttachmentNodes.CylCenter.WrapSurf;
//  AnySurface &srf2 = ..HipNodeRef.LegAttachmentNodes.CylCenter2.WrapSurf;
//  AnyRefNode &Ins = ..Seg.Thigh.PsoasMinor1Node;
//
//  //srf={AnyDrawParamSurf drw={};};
//  //srf2={AnyDrawParamSurf drw={};};
//
//  SPLine.StringMesh = 45;
//
//  AnyDrawMuscle DrwMus = {
//   #include "../DrawSettings/MusDrawSettings.any"
//  };
//};
//

AnyViaPointMuscle GluteusMinimusAnterior1 = {
  AnyMuscleModel &MusMdl = ..MusPar.GluteusMinimusAnterior1Par;
  AnyRefNode &Org = ..HipNodeRef.LegAttachmentNodes.GluteusMinimusAnterior1Node;
  AnyRefNode &Ins = ..Seg.Thigh.GluteusMinimusAnterior1Node;
    AnyDrawMuscle DrwMus = {#include "../DrawSettings/MusDrawSettings.any"
  };
};

AnyViaPointMuscle GluteusMinimusMid1 = {
  AnyMuscleModel &MusMdl = ..MusPar.GluteusMinimusMid1Par;
  AnyRefNode &Org = ..HipNodeRef.LegAttachmentNodes.GluteusMinimusMid1Node;
  AnyRefNode &Ins = ..Seg.Thigh.GluteusMinimusMid1Node;
    AnyDrawMuscle DrwMus = {#include "../DrawSettings/MusDrawSettings.any"
  };
};

AnyViaPointMuscle GluteusMinimusPosterior1 = {
  AnyMuscleModel &MusMdl = ..MusPar.GluteusMinimusPosterior1Par;
  AnyRefNode &Org = ..HipNodeRef.LegAttachmentNodes.GluteusMinimusPosterior1Node;
  AnyRefNode &Ins = ..Seg.Thigh.GluteusMinimusPosterior1Node;
    AnyDrawMuscle DrwMus = {#include "../DrawSettings/MusDrawSettings.any"
  };
};

AnyViaPointMuscle GluteusMediusAnterior1 = {
  AnyMuscleModel &MusMdl = ..MusPar.GluteusMediusAnterior1Par;
  AnyRefNode &Org = ..HipNodeRef.LegAttachmentNodes.GluteusMediusAnterior1Node;
  AnyRefNode &Ins = ..Seg.Thigh.GluteusMediusAnterior1Node;
    AnyDrawMuscle DrwMus = {#include "../DrawSettings/MusDrawSettings.any"
  };
};

AnyViaPointMuscle GluteusMediusAnterior2 = {
  AnyMuscleModel &MusMdl = ..MusPar.GluteusMediusAnterior2Par;
  AnyRefNode &Org = ..HipNodeRef.LegAttachmentNodes.GluteusMediusAnterior2Node;
  AnyRefNode &Ins = ..Seg.Thigh.GluteusMediusAnterior2Node;
    AnyDrawMuscle DrwMus = {#include "../DrawSettings/MusDrawSettings.any"
  };
};

AnyViaPointMuscle GluteusMediusAnterior3 = {
  AnyMuscleModel &MusMdl = ..MusPar.GluteusMediusAnterior3Par;
  AnyRefNode &Org = ..HipNodeRef.LegAttachmentNodes.GluteusMediusAnterior3Node;
  AnyRefNode &Ins = ..Seg.Thigh.GluteusMediusAnterior3Node;
    AnyDrawMuscle DrwMus = {#include "../DrawSettings/MusDrawSettings.any"
  };
};

AnyViaPointMuscle GluteusMediusAnterior4 = {
  AnyMuscleModel &MusMdl = ..MusPar.GluteusMediusAnterior4Par;
  AnyRefNode &Org = ..HipNodeRef.LegAttachmentNodes.GluteusMediusAnterior4Node;
  AnyRefNode &Ins = ..Seg.Thigh.GluteusMediusAnterior4Node;
    AnyDrawMuscle DrwMus = {#include "../DrawSettings/MusDrawSettings.any"
  };
};

AnyViaPointMuscle GluteusMediusAnterior5 = {
  AnyMuscleModel &MusMdl = ..MusPar.GluteusMediusAnterior5Par;
  AnyRefNode &Org = ..HipNodeRef.LegAttachmentNodes.GluteusMediusAnterior5Node;
  AnyRefNode &Ins = ..Seg.Thigh.GluteusMediusAnterior5Node;
    AnyDrawMuscle DrwMus = {#include "../DrawSettings/MusDrawSettings.any"
  };
};

AnyViaPointMuscle GluteusMediusAnterior6 = {
  AnyMuscleModel &MusMdl = ..MusPar.GluteusMediusAnterior6Par;
  AnyRefNode &Org = ..HipNodeRef.LegAttachmentNodes.GluteusMediusAnterior6Node;
  AnyRefNode &Ins = ..Seg.Thigh.GluteusMediusAnterior6Node;
    AnyDrawMuscle DrwMus = {#include "../DrawSettings/MusDrawSettings.any"
  };
};

AnyViaPointMuscle GluteusMediusPosterior1 = {
  AnyMuscleModel &MusMdl = ..MusPar.GluteusMediusPosterior1Par;
  AnyRefNode &Org = ..HipNodeRef.LegAttachmentNodes.GluteusMediusPosterior1Node;
  AnyRefNode &Ins = ..Seg.Thigh.GluteusMediusPosterior1Node;
    AnyDrawMuscle DrwMus = {#include "../DrawSettings/MusDrawSettings.any"
  };
};

AnyViaPointMuscle GluteusMediusPosterior2 = {
  AnyMuscleModel &MusMdl = ..MusPar.GluteusMediusPosterior2Par;
  AnyRefNode &Org = ..HipNodeRef.LegAttachmentNodes.GluteusMediusPosterior2Node;
  AnyRefNode &Ins = ..Seg.Thigh.GluteusMediusPosterior2Node;
    AnyDrawMuscle DrwMus = {#include "../DrawSettings/MusDrawSettings.any"
  };
};

AnyViaPointMuscle GluteusMediusPosterior3 = {
  AnyMuscleModel &MusMdl = ..MusPar.GluteusMediusPosterior3Par;
  AnyRefNode &Org = ..HipNodeRef.LegAttachmentNodes.GluteusMediusPosterior3Node;
  AnyRefNode &Ins = ..Seg.Thigh.GluteusMediusPosterior3Node;
    AnyDrawMuscle DrwMus = {#include "../DrawSettings/MusDrawSettings.any"
  };
};

AnyViaPointMuscle GluteusMediusPosterior4 = {
  AnyMuscleModel &MusMdl = ..MusPar.GluteusMediusPosterior4Par;
  AnyRefNode &Org = ..HipNodeRef.LegAttachmentNodes.GluteusMediusPosterior4Node;
  AnyRefNode &Ins = ..Seg.Thigh.GluteusMediusPosterior4Node;
    AnyDrawMuscle DrwMus = {#include "../DrawSettings/MusDrawSettings.any"
  };
};

AnyViaPointMuscle GluteusMediusPosterior5 = {
  AnyMuscleModel &MusMdl = ..MusPar.GluteusMediusPosterior5Par;
  AnyRefNode &Org = ..HipNodeRef.LegAttachmentNodes.GluteusMediusPosterior5Node;
  AnyRefNode &Ins = ..Seg.Thigh.GluteusMediusPosterior5Node;
    AnyDrawMuscle DrwMus = {#include "../DrawSettings/MusDrawSettings.any"
  };
};

AnyViaPointMuscle GluteusMediusPosterior6 = {
  AnyMuscleModel &MusMdl = ..MusPar.GluteusMediusPosterior6Par;
  AnyRefNode &Org = ..HipNodeRef.LegAttachmentNodes.GluteusMediusPosterior6Node;
  AnyRefNode &Ins = ..Seg.Thigh.GluteusMediusPosterior6Node;
    AnyDrawMuscle DrwMus = {#include "../DrawSettings/MusDrawSettings.any"
  };
};


#ifdef GLUTEUS_MAX_WRAPPING_BETA

// changed to shortest path muscles!!!!!! AA 27,04,2012

AnyShortestPathMuscle GluteusMaximusSuperior1 = {
  AnyMuscleModel &MusMdl = ..MusPar.GluteusMaximusSuperior1Par;
  AnyRefNode &Org = ..HipNodeRef.LegAttachmentNodes.GluteusMaximusSuperior1Node;
  AnySurface &srf = ..HipNodeRef.LegAttachmentNodes.GluteusCylSuperior.cyl;
  AnyRefNode &Ins = ..Seg.Thigh.GluteusMaximusSuperior1Node;
  SPLine.StringMesh = 45;
  SPLine.InitWrapPosVectors = {{0,0,0},{-0.5, 0.5 ,0}};
  AnyDrawMuscle DrwMus = {#include "../DrawSettings/MusDrawSettings.any"
  };
};

AnyShortestPathMuscle GluteusMaximusSuperior2 = {
  AnyMuscleModel &MusMdl = ..MusPar.GluteusMaximusSuperior2Par;
  AnyRefNode &Org = ..HipNodeRef.LegAttachmentNodes.GluteusMaximusSuperior2Node;
  AnySurface &srf = ..HipNodeRef.LegAttachmentNodes.GluteusCylSuperior.cyl;
  AnyRefNode &Ins = ..Seg.Thigh.GluteusMaximusSuperior2Node;
  SPLine.StringMesh = 45;
  SPLine.InitWrapPosVectors = {{0,0,0},{-0.5, 0.5 ,0}};
  AnyDrawMuscle DrwMus = {#include "../DrawSettings/MusDrawSettings.any"
  };
};

AnyShortestPathMuscle GluteusMaximusSuperior3 = {
  AnyMuscleModel &MusMdl = ..MusPar.GluteusMaximusSuperior3Par;
  AnyRefNode &Org = ..HipNodeRef.LegAttachmentNodes.GluteusMaximusSuperior3Node;
  AnySurface &srf = ..HipNodeRef.LegAttachmentNodes.GluteusCylSuperior.cyl;
  AnyRefNode &Ins = ..Seg.Thigh.GluteusMaximusSuperior3Node;
  SPLine.StringMesh = 45;
  SPLine.InitWrapPosVectors = {{0,0,0},{-0.5, 0.5 ,0}};
  AnyDrawMuscle DrwMus = {#include "../DrawSettings/MusDrawSettings.any"
  };
};

AnyShortestPathMuscle GluteusMaximusSuperior4 = {
  AnyMuscleModel &MusMdl = ..MusPar.GluteusMaximusSuperior4Par;
  AnyRefNode &Org = ..HipNodeRef.LegAttachmentNodes.GluteusMaximusSuperior4Node;
  AnySurface &srf = ..HipNodeRef.LegAttachmentNodes.GluteusCylSuperior.cyl;
  AnyRefNode &Ins = ..Seg.Thigh.GluteusMaximusSuperior4Node;
  SPLine.StringMesh = 45;
  SPLine.InitWrapPosVectors = {{0,0,0},{-0.5, 0.5 ,0}};
  AnyDrawMuscle DrwMus = {#include "../DrawSettings/MusDrawSettings.any"
  };
};

AnyShortestPathMuscle GluteusMaximusSuperior5 = {
  AnyMuscleModel &MusMdl = ..MusPar.GluteusMaximusSuperior5Par;
  AnyRefNode &Org = ..HipNodeRef.LegAttachmentNodes.GluteusMaximusSuperior5Node;
  AnySurface &srf = ..HipNodeRef.LegAttachmentNodes.GluteusCylSuperior.cyl;
  AnyRefNode &Ins = ..Seg.Thigh.GluteusMaximusSuperior5Node;
  SPLine.StringMesh = 45;
  SPLine.InitWrapPosVectors = {{0,0,0},{-0.5, 0.5 ,0}};
  AnyDrawMuscle DrwMus = {#include "../DrawSettings/MusDrawSettings.any"
  };
};

AnyShortestPathMuscle GluteusMaximusSuperior6 = {
  AnyMuscleModel &MusMdl = ..MusPar.GluteusMaximusSuperior6Par;
  AnyRefNode &Org = ..HipNodeRef.LegAttachmentNodes.GluteusMaximusSuperior6Node;
  AnySurface &srf = ..HipNodeRef.LegAttachmentNodes.GluteusCylSuperior.cyl;
  AnyRefNode &Ins = ..Seg.Thigh.GluteusMaximusSuperior6Node;
  SPLine.StringMesh = 100;
  SPLine.InitWrapPosVectors = {{0,0,0},{-0.5, 0.5 ,0}};
  AnyDrawMuscle DrwMus = {#include "../DrawSettings/MusDrawSettings.any"};
};

AnyShortestPathMuscle GluteusMaximusInferior1 = {
  AnyMuscleModel &MusMdl = ..MusPar.GluteusMaximusInferior1Par;
  AnySurface &srf = ..HipNodeRef.LegAttachmentNodes.GluteusCylInferior.cyl;
  AnyRefNode &Org = ..HipNodeRef.LegAttachmentNodes.GluteusMaximusInferior1Node;
  AnyRefNode &Ins = ..Seg.Thigh.GluteusMaximusInferior1Node;
  SPLine.StringMesh = 45;
  SPLine.InitWrapPosVectors = {{0,0,0},{-0.5, 0.5 ,0}};
  AnyDrawMuscle DrwMus = {#include "../DrawSettings/MusDrawSettings.any"
  };
};

AnyShortestPathMuscle GluteusMaximusInferior2 = {
  AnyMuscleModel &MusMdl = ..MusPar.GluteusMaximusInferior2Par;
  AnyRefNode &Org = ..HipNodeRef.LegAttachmentNodes.GluteusMaximusInferior2Node;
  AnySurface &srf = ..HipNodeRef.LegAttachmentNodes.GluteusCylInferior.cyl;
  AnyRefNode &Ins = ..Seg.Thigh.GluteusMaximusInferior2Node;
  SPLine.StringMesh = 45;
  SPLine.InitWrapPosVectors = {{0,0,0},{-0.5, 0.5 ,0}};
  AnyDrawMuscle DrwMus = {#include "../DrawSettings/MusDrawSettings.any"
  };
};

AnyShortestPathMuscle GluteusMaximusInferior3 = {
  AnyMuscleModel &MusMdl = ..MusPar.GluteusMaximusInferior3Par;
  AnyRefNode &Org = ..HipNodeRef.LegAttachmentNodes.GluteusMaximusInferior3Node;
  AnySurface &srf = ..HipNodeRef.LegAttachmentNodes.GluteusCylInferior.cyl;
  AnyRefNode &Ins = ..Seg.Thigh.GluteusMaximusInferior3Node;
  SPLine.StringMesh = 45;
  SPLine.InitWrapPosVectors = {{0,0,0},{-0.5, 0.5 ,0}};
  AnyDrawMuscle DrwMus = {#include "../DrawSettings/MusDrawSettings.any"
  };
};

AnyShortestPathMuscle GluteusMaximusInferior4 = {
  AnyMuscleModel &MusMdl = ..MusPar.GluteusMaximusInferior4Par;
  AnySurface &srf = ..HipNodeRef.LegAttachmentNodes.GluteusCylInferior.cyl;
  AnyRefNode &Org = ..HipNodeRef.LegAttachmentNodes.GluteusMaximusInferior4Node;
  AnyRefNode &Ins = ..Seg.Thigh.GluteusMaximusInferior4Node;
  SPLine.StringMesh = 45;
  SPLine.InitWrapPosVectors = {{0,0,0},{-0.5, 0.5 ,0}};
  AnyDrawMuscle DrwMus = {#include "../DrawSettings/MusDrawSettings.any"
  };
};

AnyShortestPathMuscle GluteusMaximusInferior5 = {
  AnyMuscleModel &MusMdl = ..MusPar.GluteusMaximusInferior5Par;
  AnyRefNode &Org = ..HipNodeRef.LegAttachmentNodes.GluteusMaximusInferior5Node;
  AnySurface &srf = ..HipNodeRef.LegAttachmentNodes.GluteusCylInferior.cyl;
  AnyRefNode &Ins = ..Seg.Thigh.GluteusMaximusInferior5Node;
  SPLine.StringMesh = 45;
  SPLine.InitWrapPosVectors = {{0,0,0},{-0.5, 0.5 ,0}};
  AnyDrawMuscle DrwMus = {#include "../DrawSettings/MusDrawSettings.any"
  };
};

AnyShortestPathMuscle GluteusMaximusInferior6 = {
  AnyMuscleModel &MusMdl = ..MusPar.GluteusMaximusInferior6Par;
  AnyRefNode &Org = ..HipNodeRef.LegAttachmentNodes.GluteusMaximusInferior6Node;
  AnySurface &srf = ..HipNodeRef.LegAttachmentNodes.GluteusCylInferior.cyl;
  AnyRefNode &Ins = ..Seg.Thigh.GluteusMaximusInferior6Node;
  SPLine.StringMesh = 45;
  SPLine.InitWrapPosVectors = {{0,0,0},{-0.5, 0.5 ,0}};
  AnyDrawMuscle DrwMus = {#include "../DrawSettings/MusDrawSettings.any"
  };
};


#else

AnyViaPointMuscle GluteusMaximusSuperior1 = {
  AnyMuscleModel &MusMdl = ..MusPar.GluteusMaximusSuperior1Par;
  AnyRefNode &Org = ..HipNodeRef.LegAttachmentNodes.GluteusMaximusSuperior1Node;
  AnyRefNode &Ins = ..Seg.Thigh.GluteusMaximusSuperior1Node;
  AnyDrawMuscle DrwMus = {#include "../DrawSettings/MusDrawSettings.any"
  };
};

AnyViaPointMuscle GluteusMaximusSuperior2 = {
  AnyMuscleModel &MusMdl = ..MusPar.GluteusMaximusSuperior2Par;
  AnyRefNode &Org = ..HipNodeRef.LegAttachmentNodes.GluteusMaximusSuperior2Node;
  AnyRefNode &Ins = ..Seg.Thigh.GluteusMaximusSuperior2Node;
  AnyDrawMuscle DrwMus = {#include "../DrawSettings/MusDrawSettings.any"
  };
};

AnyViaPointMuscle GluteusMaximusSuperior3 = {
  AnyMuscleModel &MusMdl = ..MusPar.GluteusMaximusSuperior3Par;
  AnyRefNode &Org = ..HipNodeRef.LegAttachmentNodes.GluteusMaximusSuperior3Node;
  AnyRefNode &Ins = ..Seg.Thigh.GluteusMaximusSuperior3Node;
  AnyDrawMuscle DrwMus = {#include "../DrawSettings/MusDrawSettings.any"
  };
};

AnyViaPointMuscle GluteusMaximusSuperior4 = {
  AnyMuscleModel &MusMdl = ..MusPar.GluteusMaximusSuperior4Par;
  AnyRefNode &Org = ..HipNodeRef.LegAttachmentNodes.GluteusMaximusSuperior4Node;
  AnyRefNode &Ins = ..Seg.Thigh.GluteusMaximusSuperior4Node;
  AnyDrawMuscle DrwMus = {#include "../DrawSettings/MusDrawSettings.any"
  };
};

AnyViaPointMuscle GluteusMaximusSuperior5 = {
  AnyMuscleModel &MusMdl = ..MusPar.GluteusMaximusSuperior5Par;
  AnyRefNode &Org = ..HipNodeRef.LegAttachmentNodes.GluteusMaximusSuperior5Node;
  AnyRefNode &Ins = ..Seg.Thigh.GluteusMaximusSuperior5Node;
  AnyDrawMuscle DrwMus = {#include "../DrawSettings/MusDrawSettings.any"
  };
};

AnyViaPointMuscle GluteusMaximusSuperior6 = {
  AnyMuscleModel &MusMdl = ..MusPar.GluteusMaximusSuperior6Par;
  AnyRefNode &Org = ..HipNodeRef.LegAttachmentNodes.GluteusMaximusSuperior6Node;
  AnyRefNode &Ins = ..Seg.Thigh.GluteusMaximusSuperior6Node;
  AnyDrawMuscle DrwMus = {#include "../DrawSettings/MusDrawSettings.any"};

};

AnyViaPointMuscle GluteusMaximusInferior1 = {
  AnyMuscleModel &MusMdl = ..MusPar.GluteusMaximusInferior1Par;
  AnyRefNode &Org = ..HipNodeRef.LegAttachmentNodes.GluteusMaximusInferior1Node;
  AnyRefNode &Ins = ..Seg.Thigh.GluteusMaximusInferior1Node;
  AnyDrawMuscle DrwMus = {#include "../DrawSettings/MusDrawSettings.any"
  };
};

AnyViaPointMuscle GluteusMaximusInferior2 = {
  AnyMuscleModel &MusMdl = ..MusPar.GluteusMaximusInferior2Par;
  AnyRefNode &Org = ..HipNodeRef.LegAttachmentNodes.GluteusMaximusInferior2Node;
  AnyRefNode &Ins = ..Seg.Thigh.GluteusMaximusInferior2Node;
  AnyDrawMuscle DrwMus = {#include "../DrawSettings/MusDrawSettings.any"
  };
};

AnyViaPointMuscle GluteusMaximusInferior3 = {
  AnyMuscleModel &MusMdl = ..MusPar.GluteusMaximusInferior3Par;
  AnyRefNode &Org = ..HipNodeRef.LegAttachmentNodes.GluteusMaximusInferior3Node;
  AnyRefNode &Ins = ..Seg.Thigh.GluteusMaximusInferior3Node;
  AnyDrawMuscle DrwMus = {#include "../DrawSettings/MusDrawSettings.any"
  };
};

AnyViaPointMuscle GluteusMaximusInferior4 = {
  AnyMuscleModel &MusMdl = ..MusPar.GluteusMaximusInferior4Par;
  AnyRefNode &Org = ..HipNodeRef.LegAttachmentNodes.GluteusMaximusInferior4Node;
  AnyRefNode &Ins = ..Seg.Thigh.GluteusMaximusInferior4Node;
  AnyDrawMuscle DrwMus = {#include "../DrawSettings/MusDrawSettings.any"
  };
};

AnyViaPointMuscle GluteusMaximusInferior5 = {
  AnyMuscleModel &MusMdl = ..MusPar.GluteusMaximusInferior5Par;
  AnyRefNode &Org = ..HipNodeRef.LegAttachmentNodes.GluteusMaximusInferior5Node;
  AnyRefNode &Ins = ..Seg.Thigh.GluteusMaximusInferior5Node;
  AnyDrawMuscle DrwMus = {#include "../DrawSettings/MusDrawSettings.any"
  };
};

AnyViaPointMuscle GluteusMaximusInferior6 = {
  AnyMuscleModel &MusMdl = ..MusPar.GluteusMaximusInferior6Par;
  AnyRefNode &Org = ..HipNodeRef.LegAttachmentNodes.GluteusMaximusInferior6Node;
  AnyRefNode &Ins = ..Seg.Thigh.GluteusMaximusInferior6Node;
  AnyDrawMuscle DrwMus = {#include "../DrawSettings/MusDrawSettings.any"
  };
};

#endif


AnyViaPointMuscle TensorFasciaeLatae1 = {
  AnyMuscleModel &MusMdl = ..MusPar.TensorFasciaeLatae1Par;
  AnyRefNode &Org = ..HipNodeRef.LegAttachmentNodes.TensorFasciaeLatae1Node;
  AnyRefNode &Ins = ..Seg.Shank.TensorFasciaeLatae1Node;
    AnyDrawMuscle DrwMus = {#include "../DrawSettings/MusDrawSettings.any"
  };
};

AnyViaPointMuscle TensorFasciaeLatae2 = {
  AnyMuscleModel &MusMdl = ..MusPar.TensorFasciaeLatae2Par;
  AnyRefNode &Org = ..HipNodeRef.LegAttachmentNodes.TensorFasciaeLatae2Node;
  AnyRefNode &Ins = ..Seg.Shank.TensorFasciaeLatae2Node;
    AnyDrawMuscle DrwMus = {#include "../DrawSettings/MusDrawSettings.any"
  };
};

AnyViaPointMuscle Piriformis1 = {
  AnyMuscleModel &MusMdl = ..MusPar.Piriformis1Par;
  AnyRefNode &Org = ..HipNodeRef.LegAttachmentNodes.Piriformis1Node;
  AnyRefNode &Ins = ..Seg.Thigh.Piriformis1Node;
    AnyDrawMuscle DrwMus = {#include "../DrawSettings/MusDrawSettings.any"
  };
};

AnyViaPointMuscle Gracilis1 = {
  AnyMuscleModel &MusMdl = ..MusPar.Gracilis1Par;
  AnyRefNode &Org = ..HipNodeRef.LegAttachmentNodes.Gracilis1Node;
  AnyRefNode &Via1 = ..Seg.Shank.GracilisViaNode1;
  AnyRefNode &Via2 = ..Seg.Shank.GracilisViaNode2;
  //AnyRefNode &Via3 = ..Seg.Shank.GracilisViaNode3;
  //AnyRefNode &Via4 = ..Seg.Shank.GracilisViaNode4;
  //AnyRefNode &Via5 = ..Seg.Shank.GracilisViaNode5;
  AnyRefNode &Via6 = ..Seg.Shank.GracilisViaNode6;
  AnyRefNode &Via7 = ..Seg.Shank.GracilisViaNode7;
  AnyRefNode &Via8 = ..Seg.Shank.GracilisViaNode8;
  AnyRefNode &Ins = ..Seg.Shank.Gracilis1Node;
    AnyDrawMuscle DrwMus = {
      #include "../DrawSettings/MusDrawSettings.any"
  };
};

AnyViaPointMuscle Gracilis2 = {
  AnyMuscleModel &MusMdl = ..MusPar.Gracilis2Par;
  AnyRefNode &Org = ..HipNodeRef.LegAttachmentNodes.Gracilis2Node;
  AnyRefNode &Via1 = ..Seg.Shank.GracilisViaNode1;
  AnyRefNode &Via2 = ..Seg.Shank.GracilisViaNode2;
  //AnyRefNode &Via3 = ..Seg.Shank.GracilisViaNode3;
  //AnyRefNode &Via4 = ..Seg.Shank.GracilisViaNode4;
  //AnyRefNode &Via5 = ..Seg.Shank.GracilisViaNode5;
  AnyRefNode &Via6 = ..Seg.Shank.GracilisViaNode6;
  AnyRefNode &Via7 = ..Seg.Shank.GracilisViaNode7;
  AnyRefNode &Via8 = ..Seg.Shank.GracilisViaNode8;
  AnyRefNode &Ins = ..Seg.Shank.Gracilis2Node;
    AnyDrawMuscle DrwMus = {
      #include "../DrawSettings/MusDrawSettings.any"
  };
};


AnyViaPointMuscle AdductorLongus1 = {
  AnyMuscleModel &MusMdl = ..MusPar.AdductorLongus1Par;
  AnyRefNode &Org = ..HipNodeRef.LegAttachmentNodes.AdductorLongus1Node;
  AnyRefNode &Ins = ..Seg.Thigh.AdductorLongus1Node;
    AnyDrawMuscle DrwMus = {#include "../DrawSettings/MusDrawSettings.any"
  };


};

AnyViaPointMuscle AdductorLongus2 = {
  AnyMuscleModel &MusMdl = ..MusPar.AdductorLongus2Par;
  AnyRefNode &Org = ..HipNodeRef.LegAttachmentNodes.AdductorLongus2Node;
  AnyRefNode &Ins = ..Seg.Thigh.AdductorLongus2Node;
    AnyDrawMuscle DrwMus = {#include "../DrawSettings/MusDrawSettings.any"
  };
};

AnyViaPointMuscle AdductorLongus3 = {
  AnyMuscleModel &MusMdl = ..MusPar.AdductorLongus3Par;
  AnyRefNode &Org = ..HipNodeRef.LegAttachmentNodes.AdductorLongus3Node;
  AnyRefNode &Ins = ..Seg.Thigh.AdductorLongus3Node;
    AnyDrawMuscle DrwMus = {#include "../DrawSettings/MusDrawSettings.any"
  };
};

AnyViaPointMuscle AdductorLongus4 = {
  AnyMuscleModel &MusMdl = ..MusPar.AdductorLongus4Par;
  AnyRefNode &Org = ..HipNodeRef.LegAttachmentNodes.AdductorLongus4Node;
  AnyRefNode &Ins = ..Seg.Thigh.AdductorLongus4Node;
    AnyDrawMuscle DrwMus = {#include "../DrawSettings/MusDrawSettings.any"
  };
};

AnyViaPointMuscle AdductorLongus5 = {
  AnyMuscleModel &MusMdl = ..MusPar.AdductorLongus5Par;
  AnyRefNode &Org = ..HipNodeRef.LegAttachmentNodes.AdductorLongus5Node;
  AnyRefNode &Ins = ..Seg.Thigh.AdductorLongus5Node;
    AnyDrawMuscle DrwMus = {#include "../DrawSettings/MusDrawSettings.any"
  };
};

AnyViaPointMuscle AdductorLongus6 = {
  AnyMuscleModel &MusMdl = ..MusPar.AdductorLongus6Par;
  AnyRefNode &Org = ..HipNodeRef.LegAttachmentNodes.AdductorLongus6Node;
  AnyRefNode &Ins = ..Seg.Thigh.AdductorLongus6Node;
    AnyDrawMuscle DrwMus = {#include "../DrawSettings/MusDrawSettings.any"
  };
};
//muscle changed to insert on thigh
AnyViaPointMuscle AdductorMagnusDistal1 = {
  AnyMuscleModel &MusMdl = ..MusPar.AdductorMagnusDistal1Par;
  AnyRefNode &Org = ..HipNodeRef.LegAttachmentNodes.AdductorMagnusDistal1Node;
  AnyRefNode &Ins = ..Seg.Thigh.AdductorMagnusDistal1Node;
    AnyDrawMuscle DrwMus = {#include "../DrawSettings/MusDrawSettings.any"
  };
};
//muscle changed to insert on thigh
AnyViaPointMuscle AdductorMagnusDistal2 = {
  AnyMuscleModel &MusMdl = ..MusPar.AdductorMagnusDistal2Par;
  AnyRefNode &Org = ..HipNodeRef.LegAttachmentNodes.AdductorMagnusDistal2Node;
  AnyRefNode &Ins = ..Seg.Thigh.AdductorMagnusDistal2Node;
    AnyDrawMuscle DrwMus = {#include "../DrawSettings/MusDrawSettings.any"
  };
};
//muscle changed to insert on thigh
AnyViaPointMuscle AdductorMagnusDistal3 = {
  AnyMuscleModel &MusMdl = ..MusPar.AdductorMagnusDistal3Par;
  AnyRefNode &Org = ..HipNodeRef.LegAttachmentNodes.AdductorMagnusDistal3Node;
  AnyRefNode &Ins = ..Seg.Thigh.AdductorMagnusDistal3Node;
    AnyDrawMuscle DrwMus = {#include "../DrawSettings/MusDrawSettings.any"
  };
};

AnyViaPointMuscle AdductorMagnusMid1 = {
  AnyMuscleModel &MusMdl = ..MusPar.AdductorMagnusMid1Par;
  AnyRefNode &Org = ..HipNodeRef.LegAttachmentNodes.AdductorMagnusMid1Node;
  AnyRefNode &Ins = ..Seg.Thigh.AdductorMagnusMid1Node;
    AnyDrawMuscle DrwMus = {#include "../DrawSettings/MusDrawSettings.any"
  };
};

AnyViaPointMuscle AdductorMagnusMid2 = {
  AnyMuscleModel &MusMdl = ..MusPar.AdductorMagnusMid2Par;
  AnyRefNode &Org = ..HipNodeRef.LegAttachmentNodes.AdductorMagnusMid2Node;
  AnyRefNode &Ins = ..Seg.Thigh.AdductorMagnusMid2Node;
    AnyDrawMuscle DrwMus = {#include "../DrawSettings/MusDrawSettings.any"
  };
};

AnyViaPointMuscle AdductorMagnusMid3 = {
  AnyMuscleModel &MusMdl = ..MusPar.AdductorMagnusMid3Par;
  AnyRefNode &Org = ..HipNodeRef.LegAttachmentNodes.AdductorMagnusMid3Node;
  AnyRefNode &Ins = ..Seg.Thigh.AdductorMagnusMid3Node;
    AnyDrawMuscle DrwMus = {#include "../DrawSettings/MusDrawSettings.any"
  };
};

AnyViaPointMuscle AdductorMagnusMid4 = {
  AnyMuscleModel &MusMdl = ..MusPar.AdductorMagnusMid4Par;
  AnyRefNode &Org = ..HipNodeRef.LegAttachmentNodes.AdductorMagnusMid4Node;
  AnyRefNode &Ins = ..Seg.Thigh.AdductorMagnusMid4Node;
    AnyDrawMuscle DrwMus = {#include "../DrawSettings/MusDrawSettings.any"
  };
};

AnyViaPointMuscle AdductorMagnusMid5 = {
  AnyMuscleModel &MusMdl = ..MusPar.AdductorMagnusMid5Par;
  AnyRefNode &Org = ..HipNodeRef.LegAttachmentNodes.AdductorMagnusMid5Node;
  AnyRefNode &Ins = ..Seg.Thigh.AdductorMagnusMid5Node;
    AnyDrawMuscle DrwMus = {#include "../DrawSettings/MusDrawSettings.any"
  };
};

AnyViaPointMuscle AdductorMagnusMid6 = {
  AnyMuscleModel &MusMdl = ..MusPar.AdductorMagnusMid6Par;
  AnyRefNode &Org = ..HipNodeRef.LegAttachmentNodes.AdductorMagnusMid6Node;
  AnyRefNode &Ins = ..Seg.Thigh.AdductorMagnusMid6Node;
    AnyDrawMuscle DrwMus = {#include "../DrawSettings/MusDrawSettings.any"
  };
};

AnyViaPointMuscle AdductorMagnusProximal1 = {
  AnyMuscleModel &MusMdl = ..MusPar.AdductorMagnusProximal1Par;
  AnyRefNode &Org = ..HipNodeRef.LegAttachmentNodes.AdductorMagnusProximal1Node;
  AnyRefNode &Ins = ..Seg.Thigh.AdductorMagnusProximal1Node;
    AnyDrawMuscle DrwMus = {#include "../DrawSettings/MusDrawSettings.any"
  };
};

AnyViaPointMuscle AdductorMagnusProximal2 = {
  AnyMuscleModel &MusMdl = ..MusPar.AdductorMagnusProximal2Par;
  AnyRefNode &Org = ..HipNodeRef.LegAttachmentNodes.AdductorMagnusProximal2Node;
  AnyRefNode &Ins = ..Seg.Thigh.AdductorMagnusProximal2Node;
    AnyDrawMuscle DrwMus = {#include "../DrawSettings/MusDrawSettings.any"
  };
};

AnyViaPointMuscle AdductorMagnusProximal3 = {
  AnyMuscleModel &MusMdl = ..MusPar.AdductorMagnusProximal3Par;
  AnyRefNode &Org = ..HipNodeRef.LegAttachmentNodes.AdductorMagnusProximal3Node;
  AnyRefNode &Ins = ..Seg.Thigh.AdductorMagnusProximal3Node;
    AnyDrawMuscle DrwMus = {#include "../DrawSettings/MusDrawSettings.any"
  };
};

AnyViaPointMuscle AdductorMagnusProximal4 = {
  AnyMuscleModel &MusMdl = ..MusPar.AdductorMagnusProximal4Par;
  AnyRefNode &Org = ..HipNodeRef.LegAttachmentNodes.AdductorMagnusProximal4Node;
  AnyRefNode &Ins = ..Seg.Thigh.AdductorMagnusProximal4Node;
    AnyDrawMuscle DrwMus = {#include "../DrawSettings/MusDrawSettings.any"
  };
};

AnyViaPointMuscle AdductorBrevisProximal1 = {
  AnyMuscleModel &MusMdl = ..MusPar.AdductorBrevisProximal1Par;
  AnyRefNode &Org = ..HipNodeRef.LegAttachmentNodes.AdductorBrevisProximal1Node;
  AnyRefNode &Ins = ..Seg.Thigh.AdductorBrevisProximal1Node;
    AnyDrawMuscle DrwMus = {#include "../DrawSettings/MusDrawSettings.any"
  };
};

AnyViaPointMuscle AdductorBrevisProximal2 = {
  AnyMuscleModel &MusMdl = ..MusPar.AdductorBrevisProximal2Par;
  AnyRefNode &Org = ..HipNodeRef.LegAttachmentNodes.AdductorBrevisProximal2Node;
  AnyRefNode &Ins = ..Seg.Thigh.AdductorBrevisProximal2Node;
    AnyDrawMuscle DrwMus = {#include "../DrawSettings/MusDrawSettings.any"
  };
};

AnyViaPointMuscle AdductorBrevisMid1 = {
  AnyMuscleModel &MusMdl = ..MusPar.AdductorBrevisMid1Par;
  AnyRefNode &Org = ..HipNodeRef.LegAttachmentNodes.AdductorBrevisMid1Node;
  AnyRefNode &Ins = ..Seg.Thigh.AdductorBrevisMid1Node;
    AnyDrawMuscle DrwMus = {#include "../DrawSettings/MusDrawSettings.any"
  };
};

AnyViaPointMuscle AdductorBrevisMid2 = {
  AnyMuscleModel &MusMdl = ..MusPar.AdductorBrevisMid2Par;
  AnyRefNode &Org = ..HipNodeRef.LegAttachmentNodes.AdductorBrevisMid2Node;
  AnyRefNode &Ins = ..Seg.Thigh.AdductorBrevisMid2Node;
    AnyDrawMuscle DrwMus = {#include "../DrawSettings/MusDrawSettings.any"
  };
};

AnyViaPointMuscle AdductorBrevisDistal1 = {
  AnyMuscleModel &MusMdl = ..MusPar.AdductorBrevisDistal1Par;
  AnyRefNode &Org = ..HipNodeRef.LegAttachmentNodes.AdductorBrevisDistal1Node;
  AnyRefNode &Ins = ..Seg.Thigh.AdductorBrevisDistal1Node;
    AnyDrawMuscle DrwMus = {#include "../DrawSettings/MusDrawSettings.any"
  };
};

AnyViaPointMuscle AdductorBrevisDistal2 = {
  AnyMuscleModel &MusMdl = ..MusPar.AdductorBrevisDistal2Par;
  AnyRefNode &Org = ..HipNodeRef.LegAttachmentNodes.AdductorBrevisDistal2Node;
  AnyRefNode &Ins = ..Seg.Thigh.AdductorBrevisDistal2Node;
    AnyDrawMuscle DrwMus = {#include "../DrawSettings/MusDrawSettings.any"
  };
};

AnyViaPointMuscle GemellusInferior1 = {
  AnyMuscleModel &MusMdl = ..MusPar.GemellusInferior1Par;
  AnyRefNode &Org = ..HipNodeRef.LegAttachmentNodes.GemellusInferior1Node;
  AnyRefNode &Ins = ..Seg.Thigh.GemellusInferior1Node;
    AnyDrawMuscle DrwMus = {#include "../DrawSettings/MusDrawSettings.any"
  };
};

AnyViaPointMuscle GemellusSuperior1 = {
  AnyMuscleModel &MusMdl = ..MusPar.GemellusSuperior1Par;
  AnyRefNode &Org = ..HipNodeRef.LegAttachmentNodes.GemellusSuperior1Node;
  AnyRefNode &Ins = ..Seg.Thigh.GemellusSuperior1Node;
    AnyDrawMuscle DrwMus = {#include "../DrawSettings/MusDrawSettings.any"
  };
};


AnyViaPointMuscle ObturatorExternusSuperior1 = {
  AnyMuscleModel &MusMdl = ..MusPar.ObturatorExternusSuperior1Par;
  AnyRefNode &Org = ..HipNodeRef.LegAttachmentNodes.ObturatorExternusSuperior1Node;
  AnyRefNode &Via1 = ..HipNodeRef.LegAttachmentNodes.ObturatorExternusSuperiorViaNode1;
  AnyRefNode &Ins = ..Seg.Thigh.ObturatorExternusSuperior1Node;
    AnyDrawMuscle DrwMus = {#include "../DrawSettings/MusDrawSettings.any"
  };
};

AnyViaPointMuscle ObturatorExternusSuperior2 = {
  AnyMuscleModel &MusMdl = ..MusPar.ObturatorExternusSuperior2Par;
  AnyRefNode &Org = ..HipNodeRef.LegAttachmentNodes.ObturatorExternusSuperior2Node;
  AnyRefNode &Via1 = ..HipNodeRef.LegAttachmentNodes.ObturatorExternusSuperiorViaNode1;
  AnyRefNode &Ins = ..Seg.Thigh.ObturatorExternusSuperior2Node;
    AnyDrawMuscle DrwMus = {#include "../DrawSettings/MusDrawSettings.any"
  };
};

AnyViaPointMuscle ObturatorExternusSuperior3 = {
  AnyMuscleModel &MusMdl = ..MusPar.ObturatorExternusSuperior3Par;
  AnyRefNode &Org = ..HipNodeRef.LegAttachmentNodes.ObturatorExternusSuperior3Node;
  AnyRefNode &Via1 = ..HipNodeRef.LegAttachmentNodes.ObturatorExternusSuperiorViaNode1;
  AnyRefNode &Ins = ..Seg.Thigh.ObturatorExternusSuperior3Node;
    AnyDrawMuscle DrwMus = {#include "../DrawSettings/MusDrawSettings.any"
  };
};

AnyViaPointMuscle ObturatorExternusInferior1 = {
  AnyMuscleModel &MusMdl = ..MusPar.ObturatorExternusInferior1Par;
  AnyRefNode &Org = ..HipNodeRef.LegAttachmentNodes.ObturatorExternusInferior1Node;
  AnyRefNode &Ins = ..Seg.Thigh.ObturatorExternusInferior1Node;
    AnyDrawMuscle DrwMus = {#include "../DrawSettings/MusDrawSettings.any"
  };
};

AnyViaPointMuscle ObturatorExternusInferior2 = {
  AnyMuscleModel &MusMdl = ..MusPar.ObturatorExternusInferior2Par;
  AnyRefNode &Org = ..HipNodeRef.LegAttachmentNodes.ObturatorExternusInferior2Node;
  AnyRefNode &Ins = ..Seg.Thigh.ObturatorExternusInferior2Node;
    AnyDrawMuscle DrwMus = {#include "../DrawSettings/MusDrawSettings.any"
  };
};

AnyViaPointMuscle ObturatorInternus1 = {
  AnyMuscleModel &MusMdl = ..MusPar.ObturatorInternus1Par;
  AnyRefNode &Org = ..HipNodeRef.LegAttachmentNodes.ObturatorInternus1Node;
  AnyRefNode &Via1 = ..HipNodeRef.LegAttachmentNodes.ObturatorInternusViaNode1;
  AnyRefNode &Ins = ..Seg.Thigh.ObturatorInternus1Node;
    AnyDrawMuscle DrwMus = {#include "../DrawSettings/MusDrawSettings.any"
  };
};

AnyViaPointMuscle ObturatorInternus2 = {
  AnyMuscleModel &MusMdl = ..MusPar.ObturatorInternus2Par;
  AnyRefNode &Org = ..HipNodeRef.LegAttachmentNodes.ObturatorInternus2Node;
  AnyRefNode &Via1 = ..HipNodeRef.LegAttachmentNodes.ObturatorInternusViaNode1;
  AnyRefNode &Ins = ..Seg.Thigh.ObturatorInternus2Node;
    AnyDrawMuscle DrwMus = {#include "../DrawSettings/MusDrawSettings.any"
  };
};

AnyViaPointMuscle ObturatorInternus3 = {
  AnyMuscleModel &MusMdl = ..MusPar.ObturatorInternus3Par;
  AnyRefNode &Org = ..HipNodeRef.LegAttachmentNodes.ObturatorInternus3Node;
  AnyRefNode &Via1 = ..HipNodeRef.LegAttachmentNodes.ObturatorInternusViaNode1;
  AnyRefNode &Ins = ..Seg.Thigh.ObturatorInternus3Node;
    AnyDrawMuscle DrwMus = {#include "../DrawSettings/MusDrawSettings.any"
  };
};

AnyViaPointMuscle Pectineus1 = {
  AnyMuscleModel &MusMdl = ..MusPar.Pectineus1Par;
  AnyRefNode &Org = ..HipNodeRef.LegAttachmentNodes.Pectineus1Node;
  AnyRefNode &Ins = ..Seg.Thigh.Pectineus1Node;
    AnyDrawMuscle DrwMus = {#include "../DrawSettings/MusDrawSettings.any"
  };
};

AnyViaPointMuscle Pectineus2 = {
  AnyMuscleModel &MusMdl = ..MusPar.Pectineus2Par;
  AnyRefNode &Org = ..HipNodeRef.LegAttachmentNodes.Pectineus2Node;
  AnyRefNode &Ins = ..Seg.Thigh.Pectineus2Node;
    AnyDrawMuscle DrwMus = {#include "../DrawSettings/MusDrawSettings.any"
  };
};

AnyViaPointMuscle Pectineus3 = {
  AnyMuscleModel &MusMdl = ..MusPar.Pectineus3Par;
  AnyRefNode &Org = ..HipNodeRef.LegAttachmentNodes.Pectineus3Node;
  AnyRefNode &Ins = ..Seg.Thigh.Pectineus3Node;
    AnyDrawMuscle DrwMus = {#include "../DrawSettings/MusDrawSettings.any"
  };
};

AnyViaPointMuscle Pectineus4 = {
  AnyMuscleModel &MusMdl = ..MusPar.Pectineus4Par;
  AnyRefNode &Org = ..HipNodeRef.LegAttachmentNodes.Pectineus4Node;
  AnyRefNode &Ins = ..Seg.Thigh.Pectineus4Node;
    AnyDrawMuscle DrwMus = {#include "../DrawSettings/MusDrawSettings.any"
  };
};

AnyViaPointMuscle Plantaris1 = {
  AnyMuscleModel &MusMdl = ..MusPar.Plantaris1Par;
  AnyRefNode &Org = ..Seg.Thigh.Plantaris1Node;
  AnyRefNode &Ins = ..Seg.Calcaneus.Plantaris1Node;
    AnyDrawMuscle DrwMus = {#include "../DrawSettings/MusDrawSettings.any"
  };
};

AnyViaPointMuscle Poplitues1 = {
  AnyMuscleModel &MusMdl = ..MusPar.Popliteus1Par;
  AnyRefNode &Org = ..Seg.Thigh.Popliteus1Node;
  AnyRefNode &Via1 = ..Seg.Shank.PopliteusViaNode1;
  AnyRefNode &Ins = ..Seg.Shank.Popliteus1Node;
    AnyDrawMuscle DrwMus = {#include "../DrawSettings/MusDrawSettings.any"
  };
};

AnyViaPointMuscle Poplitues2 = {
  AnyMuscleModel &MusMdl = ..MusPar.Popliteus2Par;
  AnyRefNode &Org = ..Seg.Thigh.Popliteus2Node;
  AnyRefNode &Via1 = ..Seg.Shank.PopliteusViaNode1;
  AnyRefNode &Ins = ..Seg.Shank.Popliteus2Node;
    AnyDrawMuscle DrwMus = {#include "../DrawSettings/MusDrawSettings.any"
  };
};


AnyViaPointMuscle QuadratusFemoris1 = {
  AnyMuscleModel &MusMdl = ..MusPar.QuadratusFemoris1Par;
  AnyRefNode &Org = ..HipNodeRef.LegAttachmentNodes.QuadratusFemoris1Node;
  AnyRefNode &Ins = ..Seg.Thigh.QuadratusFemoris1Node;
    AnyDrawMuscle DrwMus = {#include "../DrawSettings/MusDrawSettings.any"
  };
};

AnyViaPointMuscle QuadratusFemoris2 = {
  AnyMuscleModel &MusMdl = ..MusPar.QuadratusFemoris2Par;
  AnyRefNode &Org = ..HipNodeRef.LegAttachmentNodes.QuadratusFemoris2Node;
  AnyRefNode &Ins = ..Seg.Thigh.QuadratusFemoris2Node;
    AnyDrawMuscle DrwMus = {#include "../DrawSettings/MusDrawSettings.any"
  };
};

AnyViaPointMuscle QuadratusFemoris3 = {
  AnyMuscleModel &MusMdl = ..MusPar.QuadratusFemoris3Par;
  AnyRefNode &Org = ..HipNodeRef.LegAttachmentNodes.QuadratusFemoris3Node;
  AnyRefNode &Ins = ..Seg.Thigh.QuadratusFemoris3Node;
    AnyDrawMuscle DrwMus = {#include "../DrawSettings/MusDrawSettings.any"
  };
};

AnyViaPointMuscle QuadratusFemoris4 = {
  AnyMuscleModel &MusMdl = ..MusPar.QuadratusFemoris4Par;
  AnyRefNode &Org = ..HipNodeRef.LegAttachmentNodes.QuadratusFemoris4Node;
  AnyRefNode &Ins = ..Seg.Thigh.QuadratusFemoris4Node;
    AnyDrawMuscle DrwMus = {#include "../DrawSettings/MusDrawSettings.any"
  };
};
