// This include file contains all the muscle parameter
// data of the lower extremity. Please note that it is
// necessary to calibrate the model. This data is not
// calibrated.

// A lot of information in this file is obtained from:
// http: //isb.ri.ccf.org/data/delp/Muscle_parameter_table.txt

// Mark de Zee

// Sartorius, gracilis parameters added 26-6-02
// gmax 1,2,3 and tensor fasciae latae added 5-9-02
// missing muscles: peroneus long + tertius, adductor brevis, pectineus, quadratus femoris, gemelli
// Mark Thompson

/* All additional muscles from the Klein Horsman dataset that were not decribed in the former model have been added
at the end of the document. september 2007.
Some muscles of the former model are divided into more seperate parts.

An extra parameter, PCSA, became available from the dataset. Therefore, a new F0 will be calculated for each muscle
using F0 = PCSAfactor * PCSA. This factor will be defined first and will be referred to later, so it can be changed easily.


14-9-2007 Karin Gorter, Twente University
*/


AnyVar StrengthScaleShank = .StrengthScaling.Shank.StrengthScale;
AnyVar StrengthScaleThigh = .StrengthScaling.Thigh.StrengthScale;
AnyVar StrengthScalePelvis = .Scaling.StrengthScaling.Pelvis.StrengthScale;


AnyVar PCSAfactor = 27*.....HumanModel.StrengthParameters.StrengthIndexLeg; // = PCSAfactor in N/cm^2 , the PCSA itself is given in cm^2 so F0 is in Newton`s.
//Klein Horsman used a PCSAfactor of 27 N/cm^2

AnyFolder CadaverMusPar = {
#include "CadaverMuscleParameters.any"
};

AnyMuscleModel AdductorBrevisProximal1Par = {
   AnyFolder &MuscleParameters = .CadaverMusPar.AdductorBrevisProximal;
   AnyInt MuscleElemNo = 1; // The element number for the muscle
   AnyVar PCSA = MuscleParameters.VolumeMuscleBelly/(2*MuscleParameters.OptimalFiberlength);// Muscle volume is devided between muscle branches, and devided by fiber length to calculate PCSA
   F0 = .StrengthScalePelvis*.PCSAfactor*PCSA; // Maximum force output at optimum fiber length
};
AnyMuscleModel AdductorBrevisProximal2Par = {
   AnyFolder &MuscleParameters = .CadaverMusPar.AdductorBrevisProximal;
   AnyInt MuscleElemNo = 2; // The element number for the muscle
   AnyVar PCSA = MuscleParameters.VolumeMuscleBelly/(2*MuscleParameters.OptimalFiberlength);// Muscle volume is devided between muscle branches, and devided by fiber length to calculate PCSA
   F0 = .StrengthScalePelvis*.PCSAfactor*PCSA; // Maximum force output at optimum fiber length
};
AnyMuscleModel AdductorBrevisMid1Par = {
   AnyFolder &MuscleParameters = .CadaverMusPar.AdductorBrevisMid;
   AnyInt MuscleElemNo = 1; // The element number for the muscle
   AnyVar PCSA = MuscleParameters.VolumeMuscleBelly/(2*MuscleParameters.OptimalFiberlength);// Muscle volume is devided between muscle branches, and devided by fiber length to calculate PCSA
   F0 = .StrengthScalePelvis*.PCSAfactor*PCSA; // Maximum force output at optimum fiber length
};
AnyMuscleModel AdductorBrevisMid2Par = {
   AnyFolder &MuscleParameters = .CadaverMusPar.AdductorBrevisMid;
   AnyInt MuscleElemNo = 2; // The element number for the muscle
   AnyVar PCSA = MuscleParameters.VolumeMuscleBelly/(2*MuscleParameters.OptimalFiberlength);// Muscle volume is devided between muscle branches, and devided by fiber length to calculate PCSA
   F0 = .StrengthScalePelvis*.PCSAfactor*PCSA; // Maximum force output at optimum fiber length
};
AnyMuscleModel AdductorBrevisDistal1Par = {
   AnyFolder &MuscleParameters = .CadaverMusPar.AdductorBrevisDistal;
   AnyInt MuscleElemNo = 1; // The element number for the muscle
   AnyVar PCSA = MuscleParameters.VolumeMuscleBelly/(2*MuscleParameters.OptimalFiberlength);// Muscle volume is devided between muscle branches, and devided by fiber length to calculate PCSA
   F0 = .StrengthScalePelvis*.PCSAfactor*PCSA; // Maximum force output at optimum fiber length
};
AnyMuscleModel AdductorBrevisDistal2Par = {
   AnyFolder &MuscleParameters = .CadaverMusPar.AdductorBrevisDistal;
   AnyInt MuscleElemNo = 2; // The element number for the muscle
   AnyVar PCSA = MuscleParameters.VolumeMuscleBelly/(2*MuscleParameters.OptimalFiberlength);// Muscle volume is devided between muscle branches, and devided by fiber length to calculate PCSA
   F0 = .StrengthScalePelvis*.PCSAfactor*PCSA; // Maximum force output at optimum fiber length
};
AnyMuscleModel AdductorLongus1Par = {
   AnyFolder &MuscleParameters = .CadaverMusPar.AdductorLongus;
   AnyInt MuscleElemNo = 1; // The element number for the muscle
   AnyVar PCSA = MuscleParameters.VolumeMuscleBelly/(6*MuscleParameters.OptimalFiberlength);// Muscle volume is devided between muscle branches, and devided by fiber length to calculate PCSA
   F0 = .StrengthScaleThigh*.PCSAfactor*PCSA; // Maximum force output at optimum fiber length
};
AnyMuscleModel AdductorLongus2Par = {
   AnyFolder &MuscleParameters = .CadaverMusPar.AdductorLongus;
   AnyInt MuscleElemNo = 2; // The element number for the muscle
   AnyVar PCSA = MuscleParameters.VolumeMuscleBelly/(6*MuscleParameters.OptimalFiberlength);// Muscle volume is devided between muscle branches, and devided by fiber length to calculate PCSA
   F0 = .StrengthScaleThigh*.PCSAfactor*PCSA; // Maximum force output at optimum fiber length
};
AnyMuscleModel AdductorLongus3Par = {
   AnyFolder &MuscleParameters = .CadaverMusPar.AdductorLongus;
   AnyInt MuscleElemNo = 3; // The element number for the muscle
   AnyVar PCSA = MuscleParameters.VolumeMuscleBelly/(6*MuscleParameters.OptimalFiberlength);// Muscle volume is devided between muscle branches, and devided by fiber length to calculate PCSA
   F0 = .StrengthScaleThigh*.PCSAfactor*PCSA; // Maximum force output at optimum fiber length
};
AnyMuscleModel AdductorLongus4Par = {
   AnyFolder &MuscleParameters = .CadaverMusPar.AdductorLongus;
   AnyInt MuscleElemNo = 4; // The element number for the muscle
   AnyVar PCSA = MuscleParameters.VolumeMuscleBelly/(6*MuscleParameters.OptimalFiberlength);// Muscle volume is devided between muscle branches, and devided by fiber length to calculate PCSA
   F0 = .StrengthScaleThigh*.PCSAfactor*PCSA; // Maximum force output at optimum fiber length
};
AnyMuscleModel AdductorLongus5Par = {
   AnyFolder &MuscleParameters = .CadaverMusPar.AdductorLongus;
   AnyInt MuscleElemNo = 5; // The element number for the muscle
   AnyVar PCSA = MuscleParameters.VolumeMuscleBelly/(6*MuscleParameters.OptimalFiberlength);// Muscle volume is devided between muscle branches, and devided by fiber length to calculate PCSA
   F0 = .StrengthScaleThigh*.PCSAfactor*PCSA; // Maximum force output at optimum fiber length
};
AnyMuscleModel AdductorLongus6Par = {
   AnyFolder &MuscleParameters = .CadaverMusPar.AdductorLongus;
   AnyInt MuscleElemNo = 6; // The element number for the muscle
   AnyVar PCSA = MuscleParameters.VolumeMuscleBelly/(6*MuscleParameters.OptimalFiberlength);// Muscle volume is devided between muscle branches, and devided by fiber length to calculate PCSA
   F0 = .StrengthScaleThigh*.PCSAfactor*PCSA; // Maximum force output at optimum fiber length
};
AnyMuscleModel AdductorMagnusDistal1Par = {
   AnyFolder &MuscleParameters = .CadaverMusPar.AdductorMagnusDistal;
   AnyInt MuscleElemNo = 1; // The element number for the muscle
   AnyVar PCSA = MuscleParameters.VolumeMuscleBelly/(3*MuscleParameters.OptimalFiberlength);// Muscle volume is devided between muscle branches, and devided by fiber length to calculate PCSA
   F0 = .StrengthScaleThigh*.PCSAfactor*PCSA; // Maximum force output at optimum fiber length
};
AnyMuscleModel AdductorMagnusDistal2Par = {
   AnyFolder &MuscleParameters = .CadaverMusPar.AdductorMagnusDistal;
   AnyInt MuscleElemNo = 2; // The element number for the muscle
   AnyVar PCSA = MuscleParameters.VolumeMuscleBelly/(3*MuscleParameters.OptimalFiberlength);// Muscle volume is devided between muscle branches, and devided by fiber length to calculate PCSA
   F0 = .StrengthScaleThigh*.PCSAfactor*PCSA; // Maximum force output at optimum fiber length
};
AnyMuscleModel AdductorMagnusDistal3Par = {
   AnyFolder &MuscleParameters = .CadaverMusPar.AdductorMagnusDistal;
   AnyInt MuscleElemNo = 3; // The element number for the muscle
   AnyVar PCSA = MuscleParameters.VolumeMuscleBelly/(3*MuscleParameters.OptimalFiberlength);// Muscle volume is devided between muscle branches, and devided by fiber length to calculate PCSA
   F0 = .StrengthScaleThigh*.PCSAfactor*PCSA; // Maximum force output at optimum fiber length
};
AnyMuscleModel AdductorMagnusMid1Par = {
   AnyFolder &MuscleParameters = .CadaverMusPar.AdductorMagnusMid;
   AnyInt MuscleElemNo = 1; // The element number for the muscle
   AnyVar PCSA = MuscleParameters.VolumeMuscleBelly/(6*MuscleParameters.OptimalFiberlength);// Muscle volume is devided between muscle branches, and devided by fiber length to calculate PCSA
   F0 = .StrengthScaleThigh*.PCSAfactor*PCSA; // Maximum force output at optimum fiber length
};
AnyMuscleModel AdductorMagnusMid2Par = {
   AnyFolder &MuscleParameters = .CadaverMusPar.AdductorMagnusMid;
   AnyInt MuscleElemNo = 2; // The element number for the muscle
   AnyVar PCSA = MuscleParameters.VolumeMuscleBelly/(6*MuscleParameters.OptimalFiberlength);// Muscle volume is devided between muscle branches, and devided by fiber length to calculate PCSA
   F0 = .StrengthScaleThigh*.PCSAfactor*PCSA; // Maximum force output at optimum fiber length
};
AnyMuscleModel AdductorMagnusMid3Par = {
   AnyFolder &MuscleParameters = .CadaverMusPar.AdductorMagnusMid;
   AnyInt MuscleElemNo = 3; // The element number for the muscle
   AnyVar PCSA = MuscleParameters.VolumeMuscleBelly/(6*MuscleParameters.OptimalFiberlength);// Muscle volume is devided between muscle branches, and devided by fiber length to calculate PCSA
   F0 = .StrengthScaleThigh*.PCSAfactor*PCSA; // Maximum force output at optimum fiber length
};
AnyMuscleModel AdductorMagnusMid4Par = {
   AnyFolder &MuscleParameters = .CadaverMusPar.AdductorMagnusMid;
   AnyInt MuscleElemNo = 4; // The element number for the muscle
   AnyVar PCSA = MuscleParameters.VolumeMuscleBelly/(6*MuscleParameters.OptimalFiberlength);// Muscle volume is devided between muscle branches, and devided by fiber length to calculate PCSA
   F0 = .StrengthScaleThigh*.PCSAfactor*PCSA; // Maximum force output at optimum fiber length
};
AnyMuscleModel AdductorMagnusMid5Par = {
   AnyFolder &MuscleParameters = .CadaverMusPar.AdductorMagnusMid;
   AnyInt MuscleElemNo = 5; // The element number for the muscle
   AnyVar PCSA = MuscleParameters.VolumeMuscleBelly/(6*MuscleParameters.OptimalFiberlength);// Muscle volume is devided between muscle branches, and devided by fiber length to calculate PCSA
   F0 = .StrengthScaleThigh*.PCSAfactor*PCSA; // Maximum force output at optimum fiber length
};
AnyMuscleModel AdductorMagnusMid6Par = {
   AnyFolder &MuscleParameters = .CadaverMusPar.AdductorMagnusMid;
   AnyInt MuscleElemNo = 6; // The element number for the muscle
   AnyVar PCSA = MuscleParameters.VolumeMuscleBelly/(6*MuscleParameters.OptimalFiberlength);// Muscle volume is devided between muscle branches, and devided by fiber length to calculate PCSA
   F0 = .StrengthScaleThigh*.PCSAfactor*PCSA; // Maximum force output at optimum fiber length
};
AnyMuscleModel AdductorMagnusProximal1Par = {
   AnyFolder &MuscleParameters = .CadaverMusPar.AdductorMagnusProximal;
   AnyInt MuscleElemNo = 1; // The element number for the muscle
   AnyVar PCSA = MuscleParameters.VolumeMuscleBelly/(4*MuscleParameters.OptimalFiberlength);// Muscle volume is devided between muscle branches, and devided by fiber length to calculate PCSA
   F0 = .StrengthScaleThigh*.PCSAfactor*PCSA; // Maximum force output at optimum fiber length
};
AnyMuscleModel AdductorMagnusProximal2Par = {
   AnyFolder &MuscleParameters = .CadaverMusPar.AdductorMagnusProximal;
   AnyInt MuscleElemNo = 2; // The element number for the muscle
   AnyVar PCSA = MuscleParameters.VolumeMuscleBelly/(4*MuscleParameters.OptimalFiberlength);// Muscle volume is devided between muscle branches, and devided by fiber length to calculate PCSA
   F0 = .StrengthScaleThigh*.PCSAfactor*PCSA; // Maximum force output at optimum fiber length
};
AnyMuscleModel AdductorMagnusProximal3Par = {
   AnyFolder &MuscleParameters = .CadaverMusPar.AdductorMagnusProximal;
   AnyInt MuscleElemNo = 3; // The element number for the muscle
   AnyVar PCSA = MuscleParameters.VolumeMuscleBelly/(4*MuscleParameters.OptimalFiberlength);// Muscle volume is devided between muscle branches, and devided by fiber length to calculate PCSA
   F0 = .StrengthScaleThigh*.PCSAfactor*PCSA; // Maximum force output at optimum fiber length
};
AnyMuscleModel AdductorMagnusProximal4Par = {
   AnyFolder &MuscleParameters = .CadaverMusPar.AdductorMagnusProximal;
   AnyInt MuscleElemNo = 4; // The element number for the muscle
   AnyVar PCSA = MuscleParameters.VolumeMuscleBelly/(4*MuscleParameters.OptimalFiberlength);// Muscle volume is devided between muscle branches, and devided by fiber length to calculate PCSA
   F0 = .StrengthScaleThigh*.PCSAfactor*PCSA; // Maximum force output at optimum fiber length
};
AnyMuscleModel BicepsFemorisCaputLongum1Par = {
   AnyFolder &MuscleParameters = .CadaverMusPar.BicepsFemorisCaputLongum;
   AnyInt MuscleElemNo = 1; // The element number for the muscle
   AnyVar PCSA = MuscleParameters.VolumeMuscleBelly/(1*MuscleParameters.OptimalFiberlength);// Muscle volume is devided between muscle branches, and devided by fiber length to calculate PCSA
   F0 = .StrengthScaleThigh*.PCSAfactor*PCSA; // Maximum force output at optimum fiber length
};
AnyMuscleModel BicepsFemorisCaputBreve1Par = {
   AnyFolder &MuscleParameters = .CadaverMusPar.BicepsFemorisCaputBreve;
   AnyInt MuscleElemNo = 1; // The element number for the muscle
   AnyVar PCSA = MuscleParameters.VolumeMuscleBelly/(3*MuscleParameters.OptimalFiberlength);// Muscle volume is devided between muscle branches, and devided by fiber length to calculate PCSA
   F0 = .StrengthScaleThigh*.PCSAfactor*PCSA; // Maximum force output at optimum fiber length
};
AnyMuscleModel BicepsFemorisCaputBreve2Par = {
   AnyFolder &MuscleParameters = .CadaverMusPar.BicepsFemorisCaputBreve;
   AnyInt MuscleElemNo = 2; // The element number for the muscle
   AnyVar PCSA = MuscleParameters.VolumeMuscleBelly/(3*MuscleParameters.OptimalFiberlength);// Muscle volume is devided between muscle branches, and devided by fiber length to calculate PCSA
   F0 = .StrengthScaleThigh*.PCSAfactor*PCSA; // Maximum force output at optimum fiber length
};
AnyMuscleModel BicepsFemorisCaputBreve3Par = {
   AnyFolder &MuscleParameters = .CadaverMusPar.BicepsFemorisCaputBreve;
   AnyInt MuscleElemNo = 3; // The element number for the muscle
   AnyVar PCSA = MuscleParameters.VolumeMuscleBelly/(3*MuscleParameters.OptimalFiberlength);// Muscle volume is devided between muscle branches, and devided by fiber length to calculate PCSA
   F0 = .StrengthScaleThigh*.PCSAfactor*PCSA; // Maximum force output at optimum fiber length
};
AnyMuscleModel ExtensorDigitorumLongus1Par = {
   AnyFolder &MuscleParameters = .CadaverMusPar.ExtensorDigitorumLongus;
   AnyInt MuscleElemNo = 1; // The element number for the muscle
   AnyVar PCSA = MuscleParameters.VolumeMuscleBelly/(3*MuscleParameters.OptimalFiberlength);// Muscle volume is devided between muscle branches, and devided by fiber length to calculate PCSA
   F0 = .StrengthScaleShank*.PCSAfactor*PCSA; // Maximum force output at optimum fiber length
};
AnyMuscleModel ExtensorDigitorumLongus2Par = {
   AnyFolder &MuscleParameters = .CadaverMusPar.ExtensorDigitorumLongus;
   AnyInt MuscleElemNo = 2; // The element number for the muscle
   AnyVar PCSA = MuscleParameters.VolumeMuscleBelly/(3*MuscleParameters.OptimalFiberlength);// Muscle volume is devided between muscle branches, and devided by fiber length to calculate PCSA
   F0 = .StrengthScaleShank*.PCSAfactor*PCSA; // Maximum force output at optimum fiber length
};
AnyMuscleModel ExtensorDigitorumLongus3Par = {
   AnyFolder &MuscleParameters = .CadaverMusPar.ExtensorDigitorumLongus;
   AnyInt MuscleElemNo = 3; // The element number for the muscle
   AnyVar PCSA = MuscleParameters.VolumeMuscleBelly/(3*MuscleParameters.OptimalFiberlength);// Muscle volume is devided between muscle branches, and devided by fiber length to calculate PCSA
   F0 = .StrengthScaleShank*.PCSAfactor*PCSA; // Maximum force output at optimum fiber length
};
AnyMuscleModel ExtensorHallucisLongus1Par = {
   AnyFolder &MuscleParameters = .CadaverMusPar.ExtensorHallucisLongus;
   AnyInt MuscleElemNo = 1; // The element number for the muscle
   AnyVar PCSA = MuscleParameters.VolumeMuscleBelly/(3*MuscleParameters.OptimalFiberlength);// Muscle volume is devided between muscle branches, and devided by fiber length to calculate PCSA
   F0 = .StrengthScaleShank*.PCSAfactor*PCSA; // Maximum force output at optimum fiber length
};
AnyMuscleModel ExtensorHallucisLongus2Par = {
   AnyFolder &MuscleParameters = .CadaverMusPar.ExtensorHallucisLongus;
   AnyInt MuscleElemNo = 2; // The element number for the muscle
   AnyVar PCSA = MuscleParameters.VolumeMuscleBelly/(3*MuscleParameters.OptimalFiberlength);// Muscle volume is devided between muscle branches, and devided by fiber length to calculate PCSA
   F0 = .StrengthScaleShank*.PCSAfactor*PCSA; // Maximum force output at optimum fiber length
};
AnyMuscleModel ExtensorHallucisLongus3Par = {
   AnyFolder &MuscleParameters = .CadaverMusPar.ExtensorHallucisLongus;
   AnyInt MuscleElemNo = 3; // The element number for the muscle
   AnyVar PCSA = MuscleParameters.VolumeMuscleBelly/(3*MuscleParameters.OptimalFiberlength);// Muscle volume is devided between muscle branches, and devided by fiber length to calculate PCSA
   F0 = .StrengthScaleShank*.PCSAfactor*PCSA; // Maximum force output at optimum fiber length
};
AnyMuscleModel FlexorDigitorumLongus1Par = {
   AnyFolder &MuscleParameters = .CadaverMusPar.FlexorDigitorumLongus;
   AnyInt MuscleElemNo = 1; // The element number for the muscle
   AnyVar PCSA = MuscleParameters.VolumeMuscleBelly/(3*MuscleParameters.OptimalFiberlength);// Muscle volume is devided between muscle branches, and devided by fiber length to calculate PCSA
   F0 = .StrengthScaleShank*.PCSAfactor*PCSA; // Maximum force output at optimum fiber length
};
AnyMuscleModel FlexorDigitorumLongus2Par = {
   AnyFolder &MuscleParameters = .CadaverMusPar.FlexorDigitorumLongus;
   AnyInt MuscleElemNo = 2; // The element number for the muscle
   AnyVar PCSA = MuscleParameters.VolumeMuscleBelly/(3*MuscleParameters.OptimalFiberlength);// Muscle volume is devided between muscle branches, and devided by fiber length to calculate PCSA
   F0 = .StrengthScaleShank*.PCSAfactor*PCSA; // Maximum force output at optimum fiber length
};
AnyMuscleModel FlexorDigitorumLongus3Par = {
   AnyFolder &MuscleParameters = .CadaverMusPar.FlexorDigitorumLongus;
   AnyInt MuscleElemNo = 3; // The element number for the muscle
   AnyVar PCSA = MuscleParameters.VolumeMuscleBelly/(3*MuscleParameters.OptimalFiberlength);// Muscle volume is devided between muscle branches, and devided by fiber length to calculate PCSA
   F0 = .StrengthScaleShank*.PCSAfactor*PCSA; // Maximum force output at optimum fiber length
};
AnyMuscleModel FlexorHallucisLongus1Par = {
   AnyFolder &MuscleParameters = .CadaverMusPar.FlexorHallucisLongus;
   AnyInt MuscleElemNo = 1; // The element number for the muscle
   AnyVar PCSA = MuscleParameters.VolumeMuscleBelly/(3*MuscleParameters.OptimalFiberlength);// Muscle volume is devided between muscle branches, and devided by fiber length to calculate PCSA
   F0 = .StrengthScaleShank*.PCSAfactor*PCSA; // Maximum force output at optimum fiber length
};
AnyMuscleModel FlexorHallucisLongus2Par = {
   AnyFolder &MuscleParameters = .CadaverMusPar.FlexorHallucisLongus;
   AnyInt MuscleElemNo = 2; // The element number for the muscle
   AnyVar PCSA = MuscleParameters.VolumeMuscleBelly/(3*MuscleParameters.OptimalFiberlength);// Muscle volume is devided between muscle branches, and devided by fiber length to calculate PCSA
   F0 = .StrengthScaleShank*.PCSAfactor*PCSA; // Maximum force output at optimum fiber length
};
AnyMuscleModel FlexorHallucisLongus3Par = {
   AnyFolder &MuscleParameters = .CadaverMusPar.FlexorHallucisLongus;
   AnyInt MuscleElemNo = 3; // The element number for the muscle
   AnyVar PCSA = MuscleParameters.VolumeMuscleBelly/(3*MuscleParameters.OptimalFiberlength);// Muscle volume is devided between muscle branches, and devided by fiber length to calculate PCSA
   F0 = .StrengthScaleShank*.PCSAfactor*PCSA; // Maximum force output at optimum fiber length
};
AnyMuscleModel GastrocnemiusLateralis1Par = {
   AnyFolder &MuscleParameters = .CadaverMusPar.GastrocnemiusLateralis;
   AnyInt MuscleElemNo = 1; // The element number for the muscle
   AnyVar PCSA = MuscleParameters.VolumeMuscleBelly/(1*MuscleParameters.OptimalFiberlength);// Muscle volume is devided between muscle branches, and devided by fiber length to calculate PCSA
   F0 = .StrengthScaleShank*.PCSAfactor*PCSA; // Maximum force output at optimum fiber length
};
AnyMuscleModel GastrocnemiusMedialis1Par = {
   AnyFolder &MuscleParameters = .CadaverMusPar.GastrocnemiusMedialis;
   AnyInt MuscleElemNo = 1; // The element number for the muscle
   AnyVar PCSA = MuscleParameters.VolumeMuscleBelly/(1*MuscleParameters.OptimalFiberlength);// Muscle volume is devided between muscle branches, and devided by fiber length to calculate PCSA
   F0 = .StrengthScaleShank*.PCSAfactor*PCSA; // Maximum force output at optimum fiber length
};
AnyMuscleModel GemellusInferior1Par = {
   AnyFolder &MuscleParameters = .CadaverMusPar.GemellusInferior;
   AnyInt MuscleElemNo = 1; // The element number for the muscle
   AnyVar PCSA = MuscleParameters.VolumeMuscleBelly/(1*MuscleParameters.OptimalFiberlength);// Muscle volume is devided between muscle branches, and devided by fiber length to calculate PCSA
   F0 = .StrengthScalePelvis*.PCSAfactor*PCSA; // Maximum force output at optimum fiber length
};
AnyMuscleModel GemellusSuperior1Par = {
   AnyFolder &MuscleParameters = .CadaverMusPar.GemellusSuperior;
   AnyInt MuscleElemNo = 1; // The element number for the muscle
   AnyVar PCSA = MuscleParameters.VolumeMuscleBelly/(1*MuscleParameters.OptimalFiberlength);// Muscle volume is devided between muscle branches, and devided by fiber length to calculate PCSA
   F0 = .StrengthScalePelvis*.PCSAfactor*PCSA; // Maximum force output at optimum fiber length
};
AnyMuscleModel GluteusMaximusSuperior1Par = {
   AnyFolder &MuscleParameters = .CadaverMusPar.GluteusMaximusSuperior;
   AnyInt MuscleElemNo = 1; // The element number for the muscle
   AnyVar PCSA = MuscleParameters.VolumeMuscleBelly/(6*MuscleParameters.OptimalFiberlength);// Muscle volume is devided between muscle branches, and devided by fiber length to calculate PCSA
   F0 = .StrengthScaleThigh*.PCSAfactor*PCSA; // Maximum force output at optimum fiber length
};
AnyMuscleModel GluteusMaximusSuperior2Par = {
   AnyFolder &MuscleParameters = .CadaverMusPar.GluteusMaximusSuperior;
   AnyInt MuscleElemNo = 2; // The element number for the muscle
   AnyVar PCSA = MuscleParameters.VolumeMuscleBelly/(6*MuscleParameters.OptimalFiberlength);// Muscle volume is devided between muscle branches, and devided by fiber length to calculate PCSA
   F0 = .StrengthScaleThigh*.PCSAfactor*PCSA; // Maximum force output at optimum fiber length
};
AnyMuscleModel GluteusMaximusSuperior3Par = {
   AnyFolder &MuscleParameters = .CadaverMusPar.GluteusMaximusSuperior;
   AnyInt MuscleElemNo = 3; // The element number for the muscle
   AnyVar PCSA = MuscleParameters.VolumeMuscleBelly/(6*MuscleParameters.OptimalFiberlength);// Muscle volume is devided between muscle branches, and devided by fiber length to calculate PCSA
   F0 = .StrengthScaleThigh*.PCSAfactor*PCSA; // Maximum force output at optimum fiber length
};
AnyMuscleModel GluteusMaximusSuperior4Par = {
   AnyFolder &MuscleParameters = .CadaverMusPar.GluteusMaximusSuperior;
   AnyInt MuscleElemNo = 4; // The element number for the muscle
   AnyVar PCSA = MuscleParameters.VolumeMuscleBelly/(6*MuscleParameters.OptimalFiberlength);// Muscle volume is devided between muscle branches, and devided by fiber length to calculate PCSA
   F0 = .StrengthScaleThigh*.PCSAfactor*PCSA; // Maximum force output at optimum fiber length
};
AnyMuscleModel GluteusMaximusSuperior5Par = {
   AnyFolder &MuscleParameters = .CadaverMusPar.GluteusMaximusSuperior;
   AnyInt MuscleElemNo = 5; // The element number for the muscle
   AnyVar PCSA = MuscleParameters.VolumeMuscleBelly/(6*MuscleParameters.OptimalFiberlength);// Muscle volume is devided between muscle branches, and devided by fiber length to calculate PCSA
   F0 = .StrengthScaleThigh*.PCSAfactor*PCSA; // Maximum force output at optimum fiber length
};
AnyMuscleModel GluteusMaximusSuperior6Par = {
   AnyFolder &MuscleParameters = .CadaverMusPar.GluteusMaximusSuperior;
   AnyInt MuscleElemNo = 6; // The element number for the muscle
   AnyVar PCSA = MuscleParameters.VolumeMuscleBelly/(6*MuscleParameters.OptimalFiberlength);// Muscle volume is devided between muscle branches, and devided by fiber length to calculate PCSA
   F0 = .StrengthScaleThigh*.PCSAfactor*PCSA; // Maximum force output at optimum fiber length
};
AnyMuscleModel GluteusMaximusInferior1Par = {
   AnyFolder &MuscleParameters = .CadaverMusPar.GluteusMaximusInferior;
   AnyInt MuscleElemNo = 1; // The element number for the muscle
   AnyVar PCSA = MuscleParameters.VolumeMuscleBelly/(6*MuscleParameters.OptimalFiberlength);// Muscle volume is devided between muscle branches, and devided by fiber length to calculate PCSA
   F0 = .StrengthScaleThigh*.PCSAfactor*PCSA; // Maximum force output at optimum fiber length
};
AnyMuscleModel GluteusMaximusInferior2Par = {
   AnyFolder &MuscleParameters = .CadaverMusPar.GluteusMaximusInferior;
   AnyInt MuscleElemNo = 2; // The element number for the muscle
   AnyVar PCSA = MuscleParameters.VolumeMuscleBelly/(6*MuscleParameters.OptimalFiberlength);// Muscle volume is devided between muscle branches, and devided by fiber length to calculate PCSA
   F0 = .StrengthScaleThigh*.PCSAfactor*PCSA; // Maximum force output at optimum fiber length
};
AnyMuscleModel GluteusMaximusInferior3Par = {
   AnyFolder &MuscleParameters = .CadaverMusPar.GluteusMaximusInferior;
   AnyInt MuscleElemNo = 3; // The element number for the muscle
   AnyVar PCSA = MuscleParameters.VolumeMuscleBelly/(6*MuscleParameters.OptimalFiberlength);// Muscle volume is devided between muscle branches, and devided by fiber length to calculate PCSA
   F0 = .StrengthScaleThigh*.PCSAfactor*PCSA; // Maximum force output at optimum fiber length
};
AnyMuscleModel GluteusMaximusInferior4Par = {
   AnyFolder &MuscleParameters = .CadaverMusPar.GluteusMaximusInferior;
   AnyInt MuscleElemNo = 4; // The element number for the muscle
   AnyVar PCSA = MuscleParameters.VolumeMuscleBelly/(6*MuscleParameters.OptimalFiberlength);// Muscle volume is devided between muscle branches, and devided by fiber length to calculate PCSA
   F0 = .StrengthScaleThigh*.PCSAfactor*PCSA; // Maximum force output at optimum fiber length
};
AnyMuscleModel GluteusMaximusInferior5Par = {
   AnyFolder &MuscleParameters = .CadaverMusPar.GluteusMaximusInferior;
   AnyInt MuscleElemNo = 5; // The element number for the muscle
   AnyVar PCSA = MuscleParameters.VolumeMuscleBelly/(6*MuscleParameters.OptimalFiberlength);// Muscle volume is devided between muscle branches, and devided by fiber length to calculate PCSA
   F0 = .StrengthScaleThigh*.PCSAfactor*PCSA; // Maximum force output at optimum fiber length
};
AnyMuscleModel GluteusMaximusInferior6Par = {
   AnyFolder &MuscleParameters = .CadaverMusPar.GluteusMaximusInferior;
   AnyInt MuscleElemNo = 6; // The element number for the muscle
   AnyVar PCSA = MuscleParameters.VolumeMuscleBelly/(6*MuscleParameters.OptimalFiberlength);// Muscle volume is devided between muscle branches, and devided by fiber length to calculate PCSA
   F0 = .StrengthScaleThigh*.PCSAfactor*PCSA; // Maximum force output at optimum fiber length
};
AnyMuscleModel GluteusMediusAnterior1Par = {
   AnyFolder &MuscleParameters = .CadaverMusPar.GluteusMediusAnterior;
   AnyInt MuscleElemNo = 1; // The element number for the muscle
   AnyVar PCSA = MuscleParameters.VolumeMuscleBelly/(6*MuscleParameters.OptimalFiberlength);// Muscle volume is devided between muscle branches, and devided by fiber length to calculate PCSA
   F0 = .StrengthScalePelvis*.PCSAfactor*PCSA; // Maximum force output at optimum fiber length
};
AnyMuscleModel GluteusMediusAnterior2Par = {
   AnyFolder &MuscleParameters = .CadaverMusPar.GluteusMediusAnterior;
   AnyInt MuscleElemNo = 2; // The element number for the muscle
   AnyVar PCSA = MuscleParameters.VolumeMuscleBelly/(6*MuscleParameters.OptimalFiberlength);// Muscle volume is devided between muscle branches, and devided by fiber length to calculate PCSA
   F0 = .StrengthScalePelvis*.PCSAfactor*PCSA; // Maximum force output at optimum fiber length
};
AnyMuscleModel GluteusMediusAnterior3Par = {
   AnyFolder &MuscleParameters = .CadaverMusPar.GluteusMediusAnterior;
   AnyInt MuscleElemNo = 3; // The element number for the muscle
   AnyVar PCSA = MuscleParameters.VolumeMuscleBelly/(6*MuscleParameters.OptimalFiberlength);// Muscle volume is devided between muscle branches, and devided by fiber length to calculate PCSA
   F0 = .StrengthScalePelvis*.PCSAfactor*PCSA; // Maximum force output at optimum fiber length
};
AnyMuscleModel GluteusMediusAnterior4Par = {
   AnyFolder &MuscleParameters = .CadaverMusPar.GluteusMediusAnterior;
   AnyInt MuscleElemNo = 4; // The element number for the muscle
   AnyVar PCSA = MuscleParameters.VolumeMuscleBelly/(6*MuscleParameters.OptimalFiberlength);// Muscle volume is devided between muscle branches, and devided by fiber length to calculate PCSA
   F0 = .StrengthScalePelvis*.PCSAfactor*PCSA; // Maximum force output at optimum fiber length
};
AnyMuscleModel GluteusMediusAnterior5Par = {
   AnyFolder &MuscleParameters = .CadaverMusPar.GluteusMediusAnterior;
   AnyInt MuscleElemNo = 5; // The element number for the muscle
   AnyVar PCSA = MuscleParameters.VolumeMuscleBelly/(6*MuscleParameters.OptimalFiberlength);// Muscle volume is devided between muscle branches, and devided by fiber length to calculate PCSA
   F0 = .StrengthScalePelvis*.PCSAfactor*PCSA; // Maximum force output at optimum fiber length
};
AnyMuscleModel GluteusMediusAnterior6Par = {
   AnyFolder &MuscleParameters = .CadaverMusPar.GluteusMediusAnterior;
   AnyInt MuscleElemNo = 6; // The element number for the muscle
   AnyVar PCSA = MuscleParameters.VolumeMuscleBelly/(6*MuscleParameters.OptimalFiberlength);// Muscle volume is devided between muscle branches, and devided by fiber length to calculate PCSA
   F0 = .StrengthScalePelvis*.PCSAfactor*PCSA; // Maximum force output at optimum fiber length
};
AnyMuscleModel GluteusMediusPosterior1Par = {
   AnyFolder &MuscleParameters = .CadaverMusPar.GluteusMediusPosterior;
   AnyInt MuscleElemNo = 1; // The element number for the muscle
   AnyVar PCSA = MuscleParameters.VolumeMuscleBelly/(6*MuscleParameters.OptimalFiberlength);// Muscle volume is devided between muscle branches, and devided by fiber length to calculate PCSA
   F0 = .StrengthScalePelvis*.PCSAfactor*PCSA; // Maximum force output at optimum fiber length
};
AnyMuscleModel GluteusMediusPosterior2Par = {
   AnyFolder &MuscleParameters = .CadaverMusPar.GluteusMediusPosterior;
   AnyInt MuscleElemNo = 2; // The element number for the muscle
   AnyVar PCSA = MuscleParameters.VolumeMuscleBelly/(6*MuscleParameters.OptimalFiberlength);// Muscle volume is devided between muscle branches, and devided by fiber length to calculate PCSA
   F0 = .StrengthScalePelvis*.PCSAfactor*PCSA; // Maximum force output at optimum fiber length
};
AnyMuscleModel GluteusMediusPosterior3Par = {
   AnyFolder &MuscleParameters = .CadaverMusPar.GluteusMediusPosterior;
   AnyInt MuscleElemNo = 3; // The element number for the muscle
   AnyVar PCSA = MuscleParameters.VolumeMuscleBelly/(6*MuscleParameters.OptimalFiberlength);// Muscle volume is devided between muscle branches, and devided by fiber length to calculate PCSA
   F0 = .StrengthScalePelvis*.PCSAfactor*PCSA; // Maximum force output at optimum fiber length
};
AnyMuscleModel GluteusMediusPosterior4Par = {
   AnyFolder &MuscleParameters = .CadaverMusPar.GluteusMediusPosterior;
   AnyInt MuscleElemNo = 4; // The element number for the muscle
   AnyVar PCSA = MuscleParameters.VolumeMuscleBelly/(6*MuscleParameters.OptimalFiberlength);// Muscle volume is devided between muscle branches, and devided by fiber length to calculate PCSA
   F0 = .StrengthScalePelvis*.PCSAfactor*PCSA; // Maximum force output at optimum fiber length
};
AnyMuscleModel GluteusMediusPosterior5Par = {
   AnyFolder &MuscleParameters = .CadaverMusPar.GluteusMediusPosterior;
   AnyInt MuscleElemNo = 5; // The element number for the muscle
   AnyVar PCSA = MuscleParameters.VolumeMuscleBelly/(6*MuscleParameters.OptimalFiberlength);// Muscle volume is devided between muscle branches, and devided by fiber length to calculate PCSA
   F0 = .StrengthScalePelvis*.PCSAfactor*PCSA; // Maximum force output at optimum fiber length
};
AnyMuscleModel GluteusMediusPosterior6Par = {
   AnyFolder &MuscleParameters = .CadaverMusPar.GluteusMediusPosterior;
   AnyInt MuscleElemNo = 6; // The element number for the muscle
   AnyVar PCSA = MuscleParameters.VolumeMuscleBelly/(6*MuscleParameters.OptimalFiberlength);// Muscle volume is devided between muscle branches, and devided by fiber length to calculate PCSA
   F0 = .StrengthScalePelvis*.PCSAfactor*PCSA; // Maximum force output at optimum fiber length
};
AnyMuscleModel GluteusMinimusAnterior1Par = {
   AnyFolder &MuscleParameters = .CadaverMusPar.GluteusMinimusAnterior;
   AnyInt MuscleElemNo = 1; // The element number for the muscle
   AnyVar PCSA = MuscleParameters.VolumeMuscleBelly/(1*MuscleParameters.OptimalFiberlength);// Muscle volume is devided between muscle branches, and devided by fiber length to calculate PCSA
   F0 = .StrengthScalePelvis*.PCSAfactor*PCSA; // Maximum force output at optimum fiber length
};
AnyMuscleModel GluteusMinimusMid1Par = {
   AnyFolder &MuscleParameters = .CadaverMusPar.GluteusMinimusMid;
   AnyInt MuscleElemNo = 1; // The element number for the muscle
   AnyVar PCSA = MuscleParameters.VolumeMuscleBelly/(1*MuscleParameters.OptimalFiberlength);// Muscle volume is devided between muscle branches, and devided by fiber length to calculate PCSA
   F0 = .StrengthScalePelvis*.PCSAfactor*PCSA; // Maximum force output at optimum fiber length
};
AnyMuscleModel GluteusMinimusPosterior1Par = {
   AnyFolder &MuscleParameters = .CadaverMusPar.GluteusMinimusPosterior;
   AnyInt MuscleElemNo = 1; // The element number for the muscle
   AnyVar PCSA = MuscleParameters.VolumeMuscleBelly/(1*MuscleParameters.OptimalFiberlength);// Muscle volume is devided between muscle branches, and devided by fiber length to calculate PCSA
   F0 = .StrengthScalePelvis*.PCSAfactor*PCSA; // Maximum force output at optimum fiber length
};
AnyMuscleModel Gracilis1Par = {
   AnyFolder &MuscleParameters = .CadaverMusPar.Gracilis;
   AnyInt MuscleElemNo = 1; // The element number for the muscle
   AnyVar PCSA = MuscleParameters.VolumeMuscleBelly/(2*MuscleParameters.OptimalFiberlength);// Muscle volume is devided between muscle branches, and devided by fiber length to calculate PCSA
   F0 = .StrengthScaleThigh*.PCSAfactor*PCSA; // Maximum force output at optimum fiber length
};
AnyMuscleModel Gracilis2Par = {
   AnyFolder &MuscleParameters = .CadaverMusPar.Gracilis;
   AnyInt MuscleElemNo = 2; // The element number for the muscle
   AnyVar PCSA = MuscleParameters.VolumeMuscleBelly/(2*MuscleParameters.OptimalFiberlength);// Muscle volume is devided between muscle branches, and devided by fiber length to calculate PCSA
   F0 = .StrengthScaleThigh*.PCSAfactor*PCSA; // Maximum force output at optimum fiber length
};
AnyMuscleModel IliacusLateralis1Par = {
   AnyFolder &MuscleParameters = .CadaverMusPar.IliacusLateralis;
   AnyInt MuscleElemNo = 1; // The element number for the muscle
   AnyVar PCSA = MuscleParameters.VolumeMuscleBelly/(3*MuscleParameters.OptimalFiberlength);// Muscle volume is devided between muscle branches, and devided by fiber length to calculate PCSA
   F0 = .StrengthScalePelvis*.PCSAfactor*PCSA; // Maximum force output at optimum fiber length
};
AnyMuscleModel IliacusLateralis2Par = {
   AnyFolder &MuscleParameters = .CadaverMusPar.IliacusLateralis;
   AnyInt MuscleElemNo = 2; // The element number for the muscle
   AnyVar PCSA = MuscleParameters.VolumeMuscleBelly/(3*MuscleParameters.OptimalFiberlength);// Muscle volume is devided between muscle branches, and devided by fiber length to calculate PCSA
   F0 = .StrengthScalePelvis*.PCSAfactor*PCSA; // Maximum force output at optimum fiber length
};
AnyMuscleModel IliacusLateralis3Par = {
   AnyFolder &MuscleParameters = .CadaverMusPar.IliacusLateralis;
   AnyInt MuscleElemNo = 3; // The element number for the muscle
   AnyVar PCSA = MuscleParameters.VolumeMuscleBelly/(3*MuscleParameters.OptimalFiberlength);// Muscle volume is devided between muscle branches, and devided by fiber length to calculate PCSA
   F0 = .StrengthScalePelvis*.PCSAfactor*PCSA; // Maximum force output at optimum fiber length
};
AnyMuscleModel IliacusMid1Par = {
   AnyFolder &MuscleParameters = .CadaverMusPar.IliacusMid;
   AnyInt MuscleElemNo = 1; // The element number for the muscle
   AnyVar PCSA = MuscleParameters.VolumeMuscleBelly/(3*MuscleParameters.OptimalFiberlength);// Muscle volume is devided between muscle branches, and devided by fiber length to calculate PCSA
   F0 = .StrengthScalePelvis*.PCSAfactor*PCSA; // Maximum force output at optimum fiber length
};
AnyMuscleModel IliacusMid2Par = {
   AnyFolder &MuscleParameters = .CadaverMusPar.IliacusMid;
   AnyInt MuscleElemNo = 2; // The element number for the muscle
   AnyVar PCSA = MuscleParameters.VolumeMuscleBelly/(3*MuscleParameters.OptimalFiberlength);// Muscle volume is devided between muscle branches, and devided by fiber length to calculate PCSA
   F0 = .StrengthScalePelvis*.PCSAfactor*PCSA; // Maximum force output at optimum fiber length
};
AnyMuscleModel IliacusMid3Par = {
   AnyFolder &MuscleParameters = .CadaverMusPar.IliacusMid;
   AnyInt MuscleElemNo = 3; // The element number for the muscle
   AnyVar PCSA = MuscleParameters.VolumeMuscleBelly/(3*MuscleParameters.OptimalFiberlength);// Muscle volume is devided between muscle branches, and devided by fiber length to calculate PCSA
   F0 = .StrengthScalePelvis*.PCSAfactor*PCSA; // Maximum force output at optimum fiber length
};
AnyMuscleModel IliacusMedialis1Par = {
   AnyFolder &MuscleParameters = .CadaverMusPar.IliacusMedialis;
   AnyInt MuscleElemNo = 1; // The element number for the muscle
   AnyVar PCSA = MuscleParameters.VolumeMuscleBelly/(3*MuscleParameters.OptimalFiberlength);// Muscle volume is devided between muscle branches, and devided by fiber length to calculate PCSA
   F0 = .StrengthScalePelvis*.PCSAfactor*PCSA; // Maximum force output at optimum fiber length
};
AnyMuscleModel IliacusMedialis2Par = {
   AnyFolder &MuscleParameters = .CadaverMusPar.IliacusMedialis;
   AnyInt MuscleElemNo = 2; // The element number for the muscle
   AnyVar PCSA = MuscleParameters.VolumeMuscleBelly/(3*MuscleParameters.OptimalFiberlength);// Muscle volume is devided between muscle branches, and devided by fiber length to calculate PCSA
   F0 = .StrengthScalePelvis*.PCSAfactor*PCSA; // Maximum force output at optimum fiber length
};
AnyMuscleModel IliacusMedialis3Par = {
   AnyFolder &MuscleParameters = .CadaverMusPar.IliacusMedialis;
   AnyInt MuscleElemNo = 3; // The element number for the muscle
   AnyVar PCSA = MuscleParameters.VolumeMuscleBelly/(3*MuscleParameters.OptimalFiberlength);// Muscle volume is devided between muscle branches, and devided by fiber length to calculate PCSA
   F0 = .StrengthScalePelvis*.PCSAfactor*PCSA; // Maximum force output at optimum fiber length
};
AnyMuscleModel ObturatorExternusInferior1Par = {
   AnyFolder &MuscleParameters = .CadaverMusPar.ObturatorExternusInferior;
   AnyInt MuscleElemNo = 1; // The element number for the muscle
   AnyVar PCSA = MuscleParameters.VolumeMuscleBelly/(2*MuscleParameters.OptimalFiberlength);// Muscle volume is devided between muscle branches, and devided by fiber length to calculate PCSA
   F0 = .StrengthScalePelvis*.PCSAfactor*PCSA; // Maximum force output at optimum fiber length
};
AnyMuscleModel ObturatorExternusInferior2Par = {
   AnyFolder &MuscleParameters = .CadaverMusPar.ObturatorExternusInferior;
   AnyInt MuscleElemNo = 2; // The element number for the muscle
   AnyVar PCSA = MuscleParameters.VolumeMuscleBelly/(2*MuscleParameters.OptimalFiberlength);// Muscle volume is devided between muscle branches, and devided by fiber length to calculate PCSA
   F0 = .StrengthScalePelvis*.PCSAfactor*PCSA; // Maximum force output at optimum fiber length
};
AnyMuscleModel ObturatorExternusSuperior1Par = {
   AnyFolder &MuscleParameters = .CadaverMusPar.ObturatorExternusSuperior;
   AnyInt MuscleElemNo = 1; // The element number for the muscle
   AnyVar PCSA = MuscleParameters.VolumeMuscleBelly/(3*MuscleParameters.OptimalFiberlength);// Muscle volume is devided between muscle branches, and devided by fiber length to calculate PCSA
   F0 = .StrengthScalePelvis*.PCSAfactor*PCSA; // Maximum force output at optimum fiber length
};
AnyMuscleModel ObturatorExternusSuperior2Par = {
   AnyFolder &MuscleParameters = .CadaverMusPar.ObturatorExternusSuperior;
   AnyInt MuscleElemNo = 2; // The element number for the muscle
   AnyVar PCSA = MuscleParameters.VolumeMuscleBelly/(3*MuscleParameters.OptimalFiberlength);// Muscle volume is devided between muscle branches, and devided by fiber length to calculate PCSA
   F0 = .StrengthScalePelvis*.PCSAfactor*PCSA; // Maximum force output at optimum fiber length
};
AnyMuscleModel ObturatorExternusSuperior3Par = {
   AnyFolder &MuscleParameters = .CadaverMusPar.ObturatorExternusSuperior;
   AnyInt MuscleElemNo = 3; // The element number for the muscle
   AnyVar PCSA = MuscleParameters.VolumeMuscleBelly/(3*MuscleParameters.OptimalFiberlength);// Muscle volume is devided between muscle branches, and devided by fiber length to calculate PCSA
   F0 = .StrengthScalePelvis*.PCSAfactor*PCSA; // Maximum force output at optimum fiber length
};
AnyMuscleModel ObturatorInternus1Par = {
   AnyFolder &MuscleParameters = .CadaverMusPar.ObturatorInternus;
   AnyInt MuscleElemNo = 1; // The element number for the muscle
   AnyVar PCSA = MuscleParameters.VolumeMuscleBelly/(3*MuscleParameters.OptimalFiberlength);// Muscle volume is devided between muscle branches, and devided by fiber length to calculate PCSA
   F0 = .StrengthScalePelvis*.PCSAfactor*PCSA; // Maximum force output at optimum fiber length
};
AnyMuscleModel ObturatorInternus2Par = {
   AnyFolder &MuscleParameters = .CadaverMusPar.ObturatorInternus;
   AnyInt MuscleElemNo = 2; // The element number for the muscle
   AnyVar PCSA = MuscleParameters.VolumeMuscleBelly/(3*MuscleParameters.OptimalFiberlength);// Muscle volume is devided between muscle branches, and devided by fiber length to calculate PCSA
   F0 = .StrengthScalePelvis*.PCSAfactor*PCSA; // Maximum force output at optimum fiber length
};
AnyMuscleModel ObturatorInternus3Par = {
   AnyFolder &MuscleParameters = .CadaverMusPar.ObturatorInternus;
   AnyInt MuscleElemNo = 3; // The element number for the muscle
   AnyVar PCSA = MuscleParameters.VolumeMuscleBelly/(3*MuscleParameters.OptimalFiberlength);// Muscle volume is devided between muscle branches, and devided by fiber length to calculate PCSA
   F0 = .StrengthScalePelvis*.PCSAfactor*PCSA; // Maximum force output at optimum fiber length
};
AnyMuscleModel Pectineus1Par = {
   AnyFolder &MuscleParameters = .CadaverMusPar.Pectineus;
   AnyInt MuscleElemNo = 1; // The element number for the muscle
   AnyVar PCSA = MuscleParameters.VolumeMuscleBelly/(4*MuscleParameters.OptimalFiberlength);// Muscle volume is devided between muscle branches, and devided by fiber length to calculate PCSA
   F0 = .StrengthScaleThigh*.PCSAfactor*PCSA; // Maximum force output at optimum fiber length
};
AnyMuscleModel Pectineus2Par = {
   AnyFolder &MuscleParameters = .CadaverMusPar.Pectineus;
   AnyInt MuscleElemNo = 2; // The element number for the muscle
   AnyVar PCSA = MuscleParameters.VolumeMuscleBelly/(4*MuscleParameters.OptimalFiberlength);// Muscle volume is devided between muscle branches, and devided by fiber length to calculate PCSA
   F0 = .StrengthScaleThigh*.PCSAfactor*PCSA; // Maximum force output at optimum fiber length
};
AnyMuscleModel Pectineus3Par = {
   AnyFolder &MuscleParameters = .CadaverMusPar.Pectineus;
   AnyInt MuscleElemNo = 3; // The element number for the muscle
   AnyVar PCSA = MuscleParameters.VolumeMuscleBelly/(4*MuscleParameters.OptimalFiberlength);// Muscle volume is devided between muscle branches, and devided by fiber length to calculate PCSA
   F0 = .StrengthScaleThigh*.PCSAfactor*PCSA; // Maximum force output at optimum fiber length
};
AnyMuscleModel Pectineus4Par = {
   AnyFolder &MuscleParameters = .CadaverMusPar.Pectineus;
   AnyInt MuscleElemNo = 4; // The element number for the muscle
   AnyVar PCSA = MuscleParameters.VolumeMuscleBelly/(4*MuscleParameters.OptimalFiberlength);// Muscle volume is devided between muscle branches, and devided by fiber length to calculate PCSA
   F0 = .StrengthScaleThigh*.PCSAfactor*PCSA; // Maximum force output at optimum fiber length
};
AnyMuscleModel PeroneusBrevis1Par = {
   AnyFolder &MuscleParameters = .CadaverMusPar.PeroneusBrevis;
   AnyInt MuscleElemNo = 1; // The element number for the muscle
   AnyVar PCSA = MuscleParameters.VolumeMuscleBelly/(3*MuscleParameters.OptimalFiberlength);// Muscle volume is devided between muscle branches, and devided by fiber length to calculate PCSA
   F0 = .StrengthScaleShank*.PCSAfactor*PCSA; // Maximum force output at optimum fiber length
};
AnyMuscleModel PeroneusBrevis2Par = {
   AnyFolder &MuscleParameters = .CadaverMusPar.PeroneusBrevis;
   AnyInt MuscleElemNo = 2; // The element number for the muscle
   AnyVar PCSA = MuscleParameters.VolumeMuscleBelly/(3*MuscleParameters.OptimalFiberlength);// Muscle volume is devided between muscle branches, and devided by fiber length to calculate PCSA
   F0 = .StrengthScaleShank*.PCSAfactor*PCSA; // Maximum force output at optimum fiber length
};
AnyMuscleModel PeroneusBrevis3Par = {
   AnyFolder &MuscleParameters = .CadaverMusPar.PeroneusBrevis;
   AnyInt MuscleElemNo = 3; // The element number for the muscle
   AnyVar PCSA = MuscleParameters.VolumeMuscleBelly/(3*MuscleParameters.OptimalFiberlength);// Muscle volume is devided between muscle branches, and devided by fiber length to calculate PCSA
   F0 = .StrengthScaleShank*.PCSAfactor*PCSA; // Maximum force output at optimum fiber length
};
AnyMuscleModel PeroneusLongus1Par = {
   AnyFolder &MuscleParameters = .CadaverMusPar.PeroneusLongus;
   AnyInt MuscleElemNo = 1; // The element number for the muscle
   AnyVar PCSA = MuscleParameters.VolumeMuscleBelly/(3*MuscleParameters.OptimalFiberlength);// Muscle volume is devided between muscle branches, and devided by fiber length to calculate PCSA
   F0 = .StrengthScaleShank*.PCSAfactor*PCSA; // Maximum force output at optimum fiber length
};
AnyMuscleModel PeroneusLongus2Par = {
   AnyFolder &MuscleParameters = .CadaverMusPar.PeroneusLongus;
   AnyInt MuscleElemNo = 2; // The element number for the muscle
   AnyVar PCSA = MuscleParameters.VolumeMuscleBelly/(3*MuscleParameters.OptimalFiberlength);// Muscle volume is devided between muscle branches, and devided by fiber length to calculate PCSA
   F0 = .StrengthScaleShank*.PCSAfactor*PCSA; // Maximum force output at optimum fiber length
};
AnyMuscleModel PeroneusLongus3Par = {
   AnyFolder &MuscleParameters = .CadaverMusPar.PeroneusLongus;
   AnyInt MuscleElemNo = 3; // The element number for the muscle
   AnyVar PCSA = MuscleParameters.VolumeMuscleBelly/(3*MuscleParameters.OptimalFiberlength);// Muscle volume is devided between muscle branches, and devided by fiber length to calculate PCSA
   F0 = .StrengthScaleShank*.PCSAfactor*PCSA; // Maximum force output at optimum fiber length
};
AnyMuscleModel PeroneusTertius1Par = {
   AnyFolder &MuscleParameters = .CadaverMusPar.PeroneusTertius;
   AnyInt MuscleElemNo = 1; // The element number for the muscle
   AnyVar PCSA = MuscleParameters.VolumeMuscleBelly/(3*MuscleParameters.OptimalFiberlength);// Muscle volume is devided between muscle branches, and devided by fiber length to calculate PCSA
   F0 = .StrengthScaleShank*.PCSAfactor*PCSA; // Maximum force output at optimum fiber length
};
AnyMuscleModel PeroneusTertius2Par = {
   AnyFolder &MuscleParameters = .CadaverMusPar.PeroneusTertius;
   AnyInt MuscleElemNo = 2; // The element number for the muscle
   AnyVar PCSA = MuscleParameters.VolumeMuscleBelly/(3*MuscleParameters.OptimalFiberlength);// Muscle volume is devided between muscle branches, and devided by fiber length to calculate PCSA
   F0 = .StrengthScaleShank*.PCSAfactor*PCSA; // Maximum force output at optimum fiber length
};
AnyMuscleModel PeroneusTertius3Par = {
   AnyFolder &MuscleParameters = .CadaverMusPar.PeroneusTertius;
   AnyInt MuscleElemNo = 3; // The element number for the muscle
   AnyVar PCSA = MuscleParameters.VolumeMuscleBelly/(3*MuscleParameters.OptimalFiberlength);// Muscle volume is devided between muscle branches, and devided by fiber length to calculate PCSA
   F0 = .StrengthScaleShank*.PCSAfactor*PCSA; // Maximum force output at optimum fiber length
};
AnyMuscleModel Piriformis1Par = {
   AnyFolder &MuscleParameters = .CadaverMusPar.Piriformis;
   AnyInt MuscleElemNo = 1; // The element number for the muscle
   AnyVar PCSA = MuscleParameters.VolumeMuscleBelly/(1*MuscleParameters.OptimalFiberlength);// Muscle volume is devided between muscle branches, and devided by fiber length to calculate PCSA
   F0 = .StrengthScalePelvis*.PCSAfactor*PCSA; // Maximum force output at optimum fiber length
};
AnyMuscleModel Plantaris1Par = {
   AnyFolder &MuscleParameters = .CadaverMusPar.Plantaris;
   AnyInt MuscleElemNo = 1; // The element number for the muscle
   AnyVar PCSA = MuscleParameters.VolumeMuscleBelly/(1*MuscleParameters.OptimalFiberlength);// Muscle volume is devided between muscle branches, and devided by fiber length to calculate PCSA
   F0 = .StrengthScaleShank*.PCSAfactor*PCSA; // Maximum force output at optimum fiber length
};
AnyMuscleModel Popliteus1Par = {
   AnyFolder &MuscleParameters = .CadaverMusPar.Popliteus;
   AnyInt MuscleElemNo = 1; // The element number for the muscle
   AnyVar PCSA = MuscleParameters.VolumeMuscleBelly/(2*MuscleParameters.OptimalFiberlength);// Muscle volume is devided between muscle branches, and devided by fiber length to calculate PCSA
   F0 = .StrengthScaleShank*.PCSAfactor*PCSA; // Maximum force output at optimum fiber length
};
AnyMuscleModel Popliteus2Par = {
   AnyFolder &MuscleParameters = .CadaverMusPar.Popliteus;
   AnyInt MuscleElemNo = 2; // The element number for the muscle
   AnyVar PCSA = MuscleParameters.VolumeMuscleBelly/(2*MuscleParameters.OptimalFiberlength);// Muscle volume is devided between muscle branches, and devided by fiber length to calculate PCSA
   F0 = .StrengthScaleShank*.PCSAfactor*PCSA; // Maximum force output at optimum fiber length
};
AnyMuscleModel PsoasMinor1Par = {
   AnyFolder &MuscleParameters = .CadaverMusPar.PsoasMinor;
   AnyInt MuscleElemNo = 1; // The element number for the muscle
   AnyVar PCSA = MuscleParameters.VolumeMuscleBelly/(1*MuscleParameters.OptimalFiberlength);// Muscle volume is devided between muscle branches, and devided by fiber length to calculate PCSA
   F0 = .StrengthScalePelvis*.PCSAfactor*PCSA; // Maximum force output at optimum fiber length
};
AnyMuscleModel PsoasMajor1Par = {
   AnyFolder &MuscleParameters = .CadaverMusPar.PsoasMajor;
   AnyInt MuscleElemNo = 1; // The element number for the muscle
   AnyVar PCSA = MuscleParameters.VolumeMuscleBelly/(3*MuscleParameters.OptimalFiberlength);// Muscle volume is devided between muscle branches, and devided by fiber length to calculate PCSA
   F0 = .StrengthScalePelvis*.PCSAfactor*PCSA; // Maximum force output at optimum fiber length
};
AnyMuscleModel PsoasMajor2Par = {
   AnyFolder &MuscleParameters = .CadaverMusPar.PsoasMajor;
   AnyInt MuscleElemNo = 2; // The element number for the muscle
   AnyVar PCSA = MuscleParameters.VolumeMuscleBelly/(3*MuscleParameters.OptimalFiberlength);// Muscle volume is devided between muscle branches, and devided by fiber length to calculate PCSA
   F0 = .StrengthScalePelvis*.PCSAfactor*PCSA; // Maximum force output at optimum fiber length
};
AnyMuscleModel PsoasMajor3Par = {
   AnyFolder &MuscleParameters = .CadaverMusPar.PsoasMajor;
   AnyInt MuscleElemNo = 3; // The element number for the muscle
   AnyVar PCSA = MuscleParameters.VolumeMuscleBelly/(3*MuscleParameters.OptimalFiberlength);// Muscle volume is devided between muscle branches, and devided by fiber length to calculate PCSA
   F0 = .StrengthScalePelvis*.PCSAfactor*PCSA; // Maximum force output at optimum fiber length
};
AnyMuscleModel QuadratusFemoris1Par = {
   AnyFolder &MuscleParameters = .CadaverMusPar.QuadratusFemoris;
   AnyInt MuscleElemNo = 1; // The element number for the muscle
   AnyVar PCSA = MuscleParameters.VolumeMuscleBelly/(4*MuscleParameters.OptimalFiberlength);// Muscle volume is devided between muscle branches, and devided by fiber length to calculate PCSA
   F0 = .StrengthScalePelvis*.PCSAfactor*PCSA; // Maximum force output at optimum fiber length
};
AnyMuscleModel QuadratusFemoris2Par = {
   AnyFolder &MuscleParameters = .CadaverMusPar.QuadratusFemoris;
   AnyInt MuscleElemNo = 2; // The element number for the muscle
   AnyVar PCSA = MuscleParameters.VolumeMuscleBelly/(4*MuscleParameters.OptimalFiberlength);// Muscle volume is devided between muscle branches, and devided by fiber length to calculate PCSA
   F0 = .StrengthScalePelvis*.PCSAfactor*PCSA; // Maximum force output at optimum fiber length
};
AnyMuscleModel QuadratusFemoris3Par = {
   AnyFolder &MuscleParameters = .CadaverMusPar.QuadratusFemoris;
   AnyInt MuscleElemNo = 3; // The element number for the muscle
   AnyVar PCSA = MuscleParameters.VolumeMuscleBelly/(4*MuscleParameters.OptimalFiberlength);// Muscle volume is devided between muscle branches, and devided by fiber length to calculate PCSA
   F0 = .StrengthScalePelvis*.PCSAfactor*PCSA; // Maximum force output at optimum fiber length
};
AnyMuscleModel QuadratusFemoris4Par = {
   AnyFolder &MuscleParameters = .CadaverMusPar.QuadratusFemoris;
   AnyInt MuscleElemNo = 4; // The element number for the muscle
   AnyVar PCSA = MuscleParameters.VolumeMuscleBelly/(4*MuscleParameters.OptimalFiberlength);// Muscle volume is devided between muscle branches, and devided by fiber length to calculate PCSA
   F0 = .StrengthScalePelvis*.PCSAfactor*PCSA; // Maximum force output at optimum fiber length
};
AnyMuscleModel RectusFemoris1Par = {
   AnyFolder &MuscleParameters = .CadaverMusPar.RectusFemoris;
   AnyInt MuscleElemNo = 1; // The element number for the muscle
   AnyVar PCSA = MuscleParameters.VolumeMuscleBelly/(2*MuscleParameters.OptimalFiberlength);// Muscle volume is devided between muscle branches, and devided by fiber length to calculate PCSA
   F0 = .StrengthScaleThigh*.PCSAfactor*PCSA; // Maximum force output at optimum fiber length
};
AnyMuscleModel RectusFemoris2Par = {
   AnyFolder &MuscleParameters = .CadaverMusPar.RectusFemoris;
   AnyInt MuscleElemNo = 2; // The element number for the muscle
   AnyVar PCSA = MuscleParameters.VolumeMuscleBelly/(2*MuscleParameters.OptimalFiberlength);// Muscle volume is devided between muscle branches, and devided by fiber length to calculate PCSA
   F0 = .StrengthScaleThigh*.PCSAfactor*PCSA; // Maximum force output at optimum fiber length
};
AnyMuscleModel SartoriusProximal1Par = {
   AnyFolder &MuscleParameters = .CadaverMusPar.SartoriusProximal;
   AnyInt MuscleElemNo = 1; // The element number for the muscle
   AnyVar PCSA = MuscleParameters.VolumeMuscleBelly/(1*MuscleParameters.OptimalFiberlength);// Muscle volume is devided between muscle branches, and devided by fiber length to calculate PCSA
   F0 = .StrengthScaleThigh*.PCSAfactor*PCSA; // Maximum force output at optimum fiber length
};
AnyMuscleModel SartoriusDistal1Par = {
   AnyFolder &MuscleParameters = .CadaverMusPar.SartoriusDistal;
   AnyInt MuscleElemNo = 1; // The element number for the muscle
   AnyVar PCSA = MuscleParameters.VolumeMuscleBelly/(1*MuscleParameters.OptimalFiberlength);// Muscle volume is devided between muscle branches, and devided by fiber length to calculate PCSA
   F0 = .StrengthScaleThigh*.PCSAfactor*PCSA; // Maximum force output at optimum fiber length
};
AnyMuscleModel Semimembranosus1Par = {
   AnyFolder &MuscleParameters = .CadaverMusPar.Semimembranosus;
   AnyInt MuscleElemNo = 1; // The element number for the muscle
   AnyVar PCSA = MuscleParameters.VolumeMuscleBelly/(1*MuscleParameters.OptimalFiberlength);// Muscle volume is devided between muscle branches, and devided by fiber length to calculate PCSA
   F0 = .StrengthScaleThigh*.PCSAfactor*PCSA; // Maximum force output at optimum fiber length
};
AnyMuscleModel Semitendinosus1Par = {
   AnyFolder &MuscleParameters = .CadaverMusPar.Semitendinosus;
   AnyInt MuscleElemNo = 1; // The element number for the muscle
   AnyVar PCSA = MuscleParameters.VolumeMuscleBelly/(1*MuscleParameters.OptimalFiberlength);// Muscle volume is devided between muscle branches, and devided by fiber length to calculate PCSA
   F0 = .StrengthScaleThigh*.PCSAfactor*PCSA; // Maximum force output at optimum fiber length
};
AnyMuscleModel SoleusMedialis1Par = {
   AnyFolder &MuscleParameters = .CadaverMusPar.SoleusMedialis;
   AnyInt MuscleElemNo = 1; // The element number for the muscle
   AnyVar PCSA = MuscleParameters.VolumeMuscleBelly/(3*MuscleParameters.OptimalFiberlength);// Muscle volume is devided between muscle branches, and devided by fiber length to calculate PCSA
   F0 = .StrengthScaleShank*.PCSAfactor*PCSA; // Maximum force output at optimum fiber length
};
AnyMuscleModel SoleusMedialis2Par = {
   AnyFolder &MuscleParameters = .CadaverMusPar.SoleusMedialis;
   AnyInt MuscleElemNo = 2; // The element number for the muscle
   AnyVar PCSA = MuscleParameters.VolumeMuscleBelly/(3*MuscleParameters.OptimalFiberlength);// Muscle volume is devided between muscle branches, and devided by fiber length to calculate PCSA
   F0 = .StrengthScaleShank*.PCSAfactor*PCSA; // Maximum force output at optimum fiber length
};
AnyMuscleModel SoleusMedialis3Par = {
   AnyFolder &MuscleParameters = .CadaverMusPar.SoleusMedialis;
   AnyInt MuscleElemNo = 3; // The element number for the muscle
   AnyVar PCSA = MuscleParameters.VolumeMuscleBelly/(3*MuscleParameters.OptimalFiberlength);// Muscle volume is devided between muscle branches, and devided by fiber length to calculate PCSA
   F0 = .StrengthScaleShank*.PCSAfactor*PCSA; // Maximum force output at optimum fiber length
};
AnyMuscleModel SoleusLateralis1Par = {
   AnyFolder &MuscleParameters = .CadaverMusPar.SoleusLateralis;
   AnyInt MuscleElemNo = 1; // The element number for the muscle
   AnyVar PCSA = MuscleParameters.VolumeMuscleBelly/(3*MuscleParameters.OptimalFiberlength);// Muscle volume is devided between muscle branches, and devided by fiber length to calculate PCSA
   F0 = .StrengthScaleShank*.PCSAfactor*PCSA; // Maximum force output at optimum fiber length
};
AnyMuscleModel SoleusLateralis2Par = {
   AnyFolder &MuscleParameters = .CadaverMusPar.SoleusLateralis;
   AnyInt MuscleElemNo = 2; // The element number for the muscle
   AnyVar PCSA = MuscleParameters.VolumeMuscleBelly/(3*MuscleParameters.OptimalFiberlength);// Muscle volume is devided between muscle branches, and devided by fiber length to calculate PCSA
   F0 = .StrengthScaleShank*.PCSAfactor*PCSA; // Maximum force output at optimum fiber length
};
AnyMuscleModel SoleusLateralis3Par = {
   AnyFolder &MuscleParameters = .CadaverMusPar.SoleusLateralis;
   AnyInt MuscleElemNo = 3; // The element number for the muscle
   AnyVar PCSA = MuscleParameters.VolumeMuscleBelly/(3*MuscleParameters.OptimalFiberlength);// Muscle volume is devided between muscle branches, and devided by fiber length to calculate PCSA
   F0 = .StrengthScaleShank*.PCSAfactor*PCSA; // Maximum force output at optimum fiber length
};
AnyMuscleModel TensorFasciaeLatae1Par = {
   AnyFolder &MuscleParameters = .CadaverMusPar.TensorFasciaeLatae;
   AnyInt MuscleElemNo = 1; // The element number for the muscle
   AnyVar PCSA = MuscleParameters.VolumeMuscleBelly/(2*MuscleParameters.OptimalFiberlength);// Muscle volume is devided between muscle branches, and devided by fiber length to calculate PCSA
   F0 = .StrengthScaleThigh*.PCSAfactor*PCSA; // Maximum force output at optimum fiber length
};
AnyMuscleModel TensorFasciaeLatae2Par = {
   AnyFolder &MuscleParameters = .CadaverMusPar.TensorFasciaeLatae;
   AnyInt MuscleElemNo = 2; // The element number for the muscle
   AnyVar PCSA = MuscleParameters.VolumeMuscleBelly/(2*MuscleParameters.OptimalFiberlength);// Muscle volume is devided between muscle branches, and devided by fiber length to calculate PCSA
   F0 = .StrengthScaleThigh*.PCSAfactor*PCSA; // Maximum force output at optimum fiber length
};
AnyMuscleModel TibialisAnterior1Par = {
   AnyFolder &MuscleParameters = .CadaverMusPar.TibialisAnterior;
   AnyInt MuscleElemNo = 1; // The element number for the muscle
   AnyVar PCSA = MuscleParameters.VolumeMuscleBelly/(3*MuscleParameters.OptimalFiberlength);// Muscle volume is devided between muscle branches, and devided by fiber length to calculate PCSA
   F0 = .StrengthScaleShank*.PCSAfactor*PCSA; // Maximum force output at optimum fiber length
};
AnyMuscleModel TibialisAnterior2Par = {
   AnyFolder &MuscleParameters = .CadaverMusPar.TibialisAnterior;
   AnyInt MuscleElemNo = 2; // The element number for the muscle
   AnyVar PCSA = MuscleParameters.VolumeMuscleBelly/(3*MuscleParameters.OptimalFiberlength);// Muscle volume is devided between muscle branches, and devided by fiber length to calculate PCSA
   F0 = .StrengthScaleShank*.PCSAfactor*PCSA; // Maximum force output at optimum fiber length
};
AnyMuscleModel TibialisAnterior3Par = {
   AnyFolder &MuscleParameters = .CadaverMusPar.TibialisAnterior;
   AnyInt MuscleElemNo = 3; // The element number for the muscle
   AnyVar PCSA = MuscleParameters.VolumeMuscleBelly/(3*MuscleParameters.OptimalFiberlength);// Muscle volume is devided between muscle branches, and devided by fiber length to calculate PCSA
   F0 = .StrengthScaleShank*.PCSAfactor*PCSA; // Maximum force output at optimum fiber length
};
AnyMuscleModel TibialisPosteriorMedialis1Par = {
   AnyFolder &MuscleParameters = .CadaverMusPar.TibialisPosteriorMedialis;
   AnyInt MuscleElemNo = 1; // The element number for the muscle
   AnyVar PCSA = MuscleParameters.VolumeMuscleBelly/(3*MuscleParameters.OptimalFiberlength);// Muscle volume is devided between muscle branches, and devided by fiber length to calculate PCSA
   F0 = .StrengthScaleShank*.PCSAfactor*PCSA; // Maximum force output at optimum fiber length
};
AnyMuscleModel TibialisPosteriorMedialis2Par = {
   AnyFolder &MuscleParameters = .CadaverMusPar.TibialisPosteriorMedialis;
   AnyInt MuscleElemNo = 2; // The element number for the muscle
   AnyVar PCSA = MuscleParameters.VolumeMuscleBelly/(3*MuscleParameters.OptimalFiberlength);// Muscle volume is devided between muscle branches, and devided by fiber length to calculate PCSA
   F0 = .StrengthScaleShank*.PCSAfactor*PCSA; // Maximum force output at optimum fiber length
};
AnyMuscleModel TibialisPosteriorMedialis3Par = {
   AnyFolder &MuscleParameters = .CadaverMusPar.TibialisPosteriorMedialis;
   AnyInt MuscleElemNo = 3; // The element number for the muscle
   AnyVar PCSA = MuscleParameters.VolumeMuscleBelly/(3*MuscleParameters.OptimalFiberlength);// Muscle volume is devided between muscle branches, and devided by fiber length to calculate PCSA
   F0 = .StrengthScaleShank*.PCSAfactor*PCSA; // Maximum force output at optimum fiber length
};
AnyMuscleModel TibialisPosteriorLateralis1Par = {
   AnyFolder &MuscleParameters = .CadaverMusPar.TibialisPosteriorLateralis;
   AnyInt MuscleElemNo = 1; // The element number for the muscle
   AnyVar PCSA = MuscleParameters.VolumeMuscleBelly/(3*MuscleParameters.OptimalFiberlength);// Muscle volume is devided between muscle branches, and devided by fiber length to calculate PCSA
   F0 = .StrengthScaleShank*.PCSAfactor*PCSA; // Maximum force output at optimum fiber length
};
AnyMuscleModel TibialisPosteriorLateralis2Par = {
   AnyFolder &MuscleParameters = .CadaverMusPar.TibialisPosteriorLateralis;
   AnyInt MuscleElemNo = 2; // The element number for the muscle
   AnyVar PCSA = MuscleParameters.VolumeMuscleBelly/(3*MuscleParameters.OptimalFiberlength);// Muscle volume is devided between muscle branches, and devided by fiber length to calculate PCSA
   F0 = .StrengthScaleShank*.PCSAfactor*PCSA; // Maximum force output at optimum fiber length
};
AnyMuscleModel TibialisPosteriorLateralis3Par = {
   AnyFolder &MuscleParameters = .CadaverMusPar.TibialisPosteriorLateralis;
   AnyInt MuscleElemNo = 3; // The element number for the muscle
   AnyVar PCSA = MuscleParameters.VolumeMuscleBelly/(3*MuscleParameters.OptimalFiberlength);// Muscle volume is devided between muscle branches, and devided by fiber length to calculate PCSA
   F0 = .StrengthScaleShank*.PCSAfactor*PCSA; // Maximum force output at optimum fiber length
};
AnyMuscleModel VastusIntermedius1Par = {
   AnyFolder &MuscleParameters = .CadaverMusPar.VastusIntermedius;
   AnyInt MuscleElemNo = 1; // The element number for the muscle
   AnyVar PCSA = MuscleParameters.VolumeMuscleBelly/(6*MuscleParameters.OptimalFiberlength);// Muscle volume is devided between muscle branches, and devided by fiber length to calculate PCSA
   F0 = .StrengthScaleThigh*.PCSAfactor*PCSA; // Maximum force output at optimum fiber length
};
AnyMuscleModel VastusIntermedius2Par = {
   AnyFolder &MuscleParameters = .CadaverMusPar.VastusIntermedius;
   AnyInt MuscleElemNo = 2; // The element number for the muscle
   AnyVar PCSA = MuscleParameters.VolumeMuscleBelly/(6*MuscleParameters.OptimalFiberlength);// Muscle volume is devided between muscle branches, and devided by fiber length to calculate PCSA
   F0 = .StrengthScaleThigh*.PCSAfactor*PCSA; // Maximum force output at optimum fiber length
};
AnyMuscleModel VastusIntermedius3Par = {
   AnyFolder &MuscleParameters = .CadaverMusPar.VastusIntermedius;
   AnyInt MuscleElemNo = 3; // The element number for the muscle
   AnyVar PCSA = MuscleParameters.VolumeMuscleBelly/(6*MuscleParameters.OptimalFiberlength);// Muscle volume is devided between muscle branches, and devided by fiber length to calculate PCSA
   F0 = .StrengthScaleThigh*.PCSAfactor*PCSA; // Maximum force output at optimum fiber length
};
AnyMuscleModel VastusIntermedius4Par = {
   AnyFolder &MuscleParameters = .CadaverMusPar.VastusIntermedius;
   AnyInt MuscleElemNo = 4; // The element number for the muscle
   AnyVar PCSA = MuscleParameters.VolumeMuscleBelly/(6*MuscleParameters.OptimalFiberlength);// Muscle volume is devided between muscle branches, and devided by fiber length to calculate PCSA
   F0 = .StrengthScaleThigh*.PCSAfactor*PCSA; // Maximum force output at optimum fiber length
};
AnyMuscleModel VastusIntermedius5Par = {
   AnyFolder &MuscleParameters = .CadaverMusPar.VastusIntermedius;
   AnyInt MuscleElemNo = 5; // The element number for the muscle
   AnyVar PCSA = MuscleParameters.VolumeMuscleBelly/(6*MuscleParameters.OptimalFiberlength);// Muscle volume is devided between muscle branches, and devided by fiber length to calculate PCSA
   F0 = .StrengthScaleThigh*.PCSAfactor*PCSA; // Maximum force output at optimum fiber length
};
AnyMuscleModel VastusIntermedius6Par = {
   AnyFolder &MuscleParameters = .CadaverMusPar.VastusIntermedius;
   AnyInt MuscleElemNo = 6; // The element number for the muscle
   AnyVar PCSA = MuscleParameters.VolumeMuscleBelly/(6*MuscleParameters.OptimalFiberlength);// Muscle volume is devided between muscle branches, and devided by fiber length to calculate PCSA
   F0 = .StrengthScaleThigh*.PCSAfactor*PCSA; // Maximum force output at optimum fiber length
};
AnyMuscleModel VastusLateralisInferior1Par = {
   AnyFolder &MuscleParameters = .CadaverMusPar.VastusLateralisInferior;
   AnyInt MuscleElemNo = 1; // The element number for the muscle
   AnyVar PCSA = MuscleParameters.VolumeMuscleBelly/(6*MuscleParameters.OptimalFiberlength);// Muscle volume is devided between muscle branches, and devided by fiber length to calculate PCSA
   F0 = .StrengthScaleThigh*.PCSAfactor*PCSA; // Maximum force output at optimum fiber length
};
AnyMuscleModel VastusLateralisInferior2Par = {
   AnyFolder &MuscleParameters = .CadaverMusPar.VastusLateralisInferior;
   AnyInt MuscleElemNo = 2; // The element number for the muscle
   AnyVar PCSA = MuscleParameters.VolumeMuscleBelly/(6*MuscleParameters.OptimalFiberlength);// Muscle volume is devided between muscle branches, and devided by fiber length to calculate PCSA
   F0 = .StrengthScaleThigh*.PCSAfactor*PCSA; // Maximum force output at optimum fiber length
};
AnyMuscleModel VastusLateralisInferior3Par = {
   AnyFolder &MuscleParameters = .CadaverMusPar.VastusLateralisInferior;
   AnyInt MuscleElemNo = 3; // The element number for the muscle
   AnyVar PCSA = MuscleParameters.VolumeMuscleBelly/(6*MuscleParameters.OptimalFiberlength);// Muscle volume is devided between muscle branches, and devided by fiber length to calculate PCSA
   F0 = .StrengthScaleThigh*.PCSAfactor*PCSA; // Maximum force output at optimum fiber length
};
AnyMuscleModel VastusLateralisInferior4Par = {
   AnyFolder &MuscleParameters = .CadaverMusPar.VastusLateralisInferior;
   AnyInt MuscleElemNo = 4; // The element number for the muscle
   AnyVar PCSA = MuscleParameters.VolumeMuscleBelly/(6*MuscleParameters.OptimalFiberlength);// Muscle volume is devided between muscle branches, and devided by fiber length to calculate PCSA
   F0 = .StrengthScaleThigh*.PCSAfactor*PCSA; // Maximum force output at optimum fiber length
};
AnyMuscleModel VastusLateralisInferior5Par = {
   AnyFolder &MuscleParameters = .CadaverMusPar.VastusLateralisInferior;
   AnyInt MuscleElemNo = 5; // The element number for the muscle
   AnyVar PCSA = MuscleParameters.VolumeMuscleBelly/(6*MuscleParameters.OptimalFiberlength);// Muscle volume is devided between muscle branches, and devided by fiber length to calculate PCSA
   F0 = .StrengthScaleThigh*.PCSAfactor*PCSA; // Maximum force output at optimum fiber length
};
AnyMuscleModel VastusLateralisInferior6Par = {
   AnyFolder &MuscleParameters = .CadaverMusPar.VastusLateralisInferior;
   AnyInt MuscleElemNo = 6; // The element number for the muscle
   AnyVar PCSA = MuscleParameters.VolumeMuscleBelly/(6*MuscleParameters.OptimalFiberlength);// Muscle volume is devided between muscle branches, and devided by fiber length to calculate PCSA
   F0 = .StrengthScaleThigh*.PCSAfactor*PCSA; // Maximum force output at optimum fiber length
};
AnyMuscleModel VastusLateralisSuperior1Par = {
   AnyFolder &MuscleParameters = .CadaverMusPar.VastusLateralisSuperior;
   AnyInt MuscleElemNo = 1; // The element number for the muscle
   AnyVar PCSA = MuscleParameters.VolumeMuscleBelly/(2*MuscleParameters.OptimalFiberlength);// Muscle volume is devided between muscle branches, and devided by fiber length to calculate PCSA
   F0 = .StrengthScaleThigh*.PCSAfactor*PCSA; // Maximum force output at optimum fiber length
};
AnyMuscleModel VastusLateralisSuperior2Par = {
   AnyFolder &MuscleParameters = .CadaverMusPar.VastusLateralisSuperior;
   AnyInt MuscleElemNo = 2; // The element number for the muscle
   AnyVar PCSA = MuscleParameters.VolumeMuscleBelly/(2*MuscleParameters.OptimalFiberlength);// Muscle volume is devided between muscle branches, and devided by fiber length to calculate PCSA
   F0 = .StrengthScaleThigh*.PCSAfactor*PCSA; // Maximum force output at optimum fiber length
};
AnyMuscleModel VastusMedialisInferior1Par = {
   AnyFolder &MuscleParameters = .CadaverMusPar.VastusMedialisInferior;
   AnyInt MuscleElemNo = 1; // The element number for the muscle
   AnyVar PCSA = MuscleParameters.VolumeMuscleBelly/(2*MuscleParameters.OptimalFiberlength);// Muscle volume is devided between muscle branches, and devided by fiber length to calculate PCSA
   F0 = .StrengthScaleThigh*.PCSAfactor*PCSA; // Maximum force output at optimum fiber length
};
AnyMuscleModel VastusMedialisInferior2Par = {
   AnyFolder &MuscleParameters = .CadaverMusPar.VastusMedialisInferior;
   AnyInt MuscleElemNo = 2; // The element number for the muscle
   AnyVar PCSA = MuscleParameters.VolumeMuscleBelly/(2*MuscleParameters.OptimalFiberlength);// Muscle volume is devided between muscle branches, and devided by fiber length to calculate PCSA
   F0 = .StrengthScaleThigh*.PCSAfactor*PCSA; // Maximum force output at optimum fiber length
};
AnyMuscleModel VastusMedialisMid1Par = {
   AnyFolder &MuscleParameters = .CadaverMusPar.VastusMedialisMid;
   AnyInt MuscleElemNo = 1; // The element number for the muscle
   AnyVar PCSA = MuscleParameters.VolumeMuscleBelly/(2*MuscleParameters.OptimalFiberlength);// Muscle volume is devided between muscle branches, and devided by fiber length to calculate PCSA
   F0 = .StrengthScaleThigh*.PCSAfactor*PCSA; // Maximum force output at optimum fiber length
};
AnyMuscleModel VastusMedialisMid2Par = {
   AnyFolder &MuscleParameters = .CadaverMusPar.VastusMedialisMid;
   AnyInt MuscleElemNo = 2; // The element number for the muscle
   AnyVar PCSA = MuscleParameters.VolumeMuscleBelly/(2*MuscleParameters.OptimalFiberlength);// Muscle volume is devided between muscle branches, and devided by fiber length to calculate PCSA
   F0 = .StrengthScaleThigh*.PCSAfactor*PCSA; // Maximum force output at optimum fiber length
};
AnyMuscleModel VastusMedialisSuperior1Par = {
   AnyFolder &MuscleParameters = .CadaverMusPar.VastusMedialisSuperior;
   AnyInt MuscleElemNo = 1; // The element number for the muscle
   AnyVar PCSA = MuscleParameters.VolumeMuscleBelly/(6*MuscleParameters.OptimalFiberlength);// Muscle volume is devided between muscle branches, and devided by fiber length to calculate PCSA
   F0 = .StrengthScaleThigh*.PCSAfactor*PCSA; // Maximum force output at optimum fiber length
};
AnyMuscleModel VastusMedialisSuperior2Par = {
   AnyFolder &MuscleParameters = .CadaverMusPar.VastusMedialisSuperior;
   AnyInt MuscleElemNo = 2; // The element number for the muscle
   AnyVar PCSA = MuscleParameters.VolumeMuscleBelly/(6*MuscleParameters.OptimalFiberlength);// Muscle volume is devided between muscle branches, and devided by fiber length to calculate PCSA
   F0 = .StrengthScaleThigh*.PCSAfactor*PCSA; // Maximum force output at optimum fiber length
};
AnyMuscleModel VastusMedialisSuperior3Par = {
   AnyFolder &MuscleParameters = .CadaverMusPar.VastusMedialisSuperior;
   AnyInt MuscleElemNo = 3; // The element number for the muscle
   AnyVar PCSA = MuscleParameters.VolumeMuscleBelly/(6*MuscleParameters.OptimalFiberlength);// Muscle volume is devided between muscle branches, and devided by fiber length to calculate PCSA
   F0 = .StrengthScaleThigh*.PCSAfactor*PCSA; // Maximum force output at optimum fiber length
};
AnyMuscleModel VastusMedialisSuperior4Par = {
   AnyFolder &MuscleParameters = .CadaverMusPar.VastusMedialisSuperior;
   AnyInt MuscleElemNo = 4; // The element number for the muscle
   AnyVar PCSA = MuscleParameters.VolumeMuscleBelly/(6*MuscleParameters.OptimalFiberlength);// Muscle volume is devided between muscle branches, and devided by fiber length to calculate PCSA
   F0 = .StrengthScaleThigh*.PCSAfactor*PCSA; // Maximum force output at optimum fiber length
};
AnyMuscleModel VastusMedialisSuperior5Par = {
   AnyFolder &MuscleParameters = .CadaverMusPar.VastusMedialisSuperior;
   AnyInt MuscleElemNo = 5; // The element number for the muscle
   AnyVar PCSA = MuscleParameters.VolumeMuscleBelly/(6*MuscleParameters.OptimalFiberlength);// Muscle volume is devided between muscle branches, and devided by fiber length to calculate PCSA
   F0 = .StrengthScaleThigh*.PCSAfactor*PCSA; // Maximum force output at optimum fiber length
};
AnyMuscleModel VastusMedialisSuperior6Par = {
   AnyFolder &MuscleParameters = .CadaverMusPar.VastusMedialisSuperior;
   AnyInt MuscleElemNo = 6; // The element number for the muscle
   AnyVar PCSA = MuscleParameters.VolumeMuscleBelly/(6*MuscleParameters.OptimalFiberlength);// Muscle volume is devided between muscle branches, and devided by fiber length to calculate PCSA
   F0 = .StrengthScaleThigh*.PCSAfactor*PCSA; // Maximum force output at optimum fiber length
};
