//This file contains the interface to the leg it consist of joints and
//nodes which can be used for defining contact with the sorroundings


AnyKinMeasureOrg AnklePlantarFlexion={

  AnyFolder &Shank = ..Seg.Shank.AnkleJoint;
  Shank ={
    AnyRefNode RotNode={
      ARel={{0,....Sign*-1,0},{....Sign*1,0,0},{0,0,1}};
    };
  };
  AnyFolder &Talus = ..Seg.Talus.AnkleJoint;
  Talus ={
    AnyRefNode RotNode={
      ARel={{....Sign*1,0,0},{0,....Sign*1,0},{0,0,1}};
    };
  };
  AnyKinRotational Ankle = {
    Type=RotAxesAngles;
    AnyRefNode &ShankNode = ...Seg.Shank.AnkleJoint;
    AnyRefNode &FootNode  = ...Seg.Talus.AnkleJoint;

  }; // End of Ankle
  MeasureOrganizer={0};
};

//AnyKinMeasureOrg AnkleEversion={
//  AnyKinRotational &Ankle = .AnklePlantarFlexion.Ankle;
//  MeasureOrganizer={1};
//};


AnyKinMeasureOrg SubTalarEversion={

  AnyFolder &Talus = ..Seg.Talus.SubTalarJoint;
  Talus ={
    AnyRefNode RotNode={
      ARel={{0,....Sign*-1,0},{....Sign*1,0,0},{0,0,1}};
    };
  };
  AnyFolder &Foot = ..Seg.Foot.SubTalarJoint;
  Foot ={
    AnyRefNode RotNode={
      ARel={{....Sign*1,0,0},{0,....Sign*1,0},{0,0,1}};
    };
  };
  AnyKinRotational Ankle = {
    Type=RotAxesAngles;
    AnyRefNode &TalusNode = ...Seg.Talus.SubTalarJoint;
    AnyRefNode &SubTalarNode  = ...Seg.Foot.SubTalarJoint;

  }; // End of SubTalar
  MeasureOrganizer={0};
};


AnyKinMeasureOrg KneeFlexion = {
  AnyFolder &Thigh = ..Seg.Thigh.KneeJoint;
  Thigh ={
    AnyRefNode RotNode={
      ARel={{....Sign*1,0,0},{0,....Sign*1,0},{0,0,1}};
    };
  };
  AnyFolder &Shank = ..Seg.Shank.KneeJoint;
  Shank ={
    AnyRefNode RotNode={
      ARel={{....Sign*1,0,0},{0,....Sign*1,0},{0,0,1}};
    };
  };
  AnyKinRotational KneeRot={
    AnyRefNode &ShankNode = ...Seg.Shank.KneeJoint.RotNode;
    AnyRefNode &ThighNode = ...Seg.Thigh.KneeJoint.RotNode;
    Type=RotAxesAngles;
  };
  MeasureOrganizer={0};
};
//
//
//
//AnyKinMeasureOrg PatellaFlexion = {
//  AnyFolder &Thigh = ..Seg.Thigh.PatellaFemurJoint;
//  Thigh ={
//    AnyRefNode RotNode={
//      ARel={{....Sign*1,0,0},{0,....Sign*1,0},{0,0,1}};
//    };
//  };
//  AnyFolder &Patella = ..Seg.Patella.PatellaFemurJoint;
//  Patella ={
//    AnyRefNode RotNode={
//      ARel={{....Sign*1,0,0},{0,....Sign*1,0},{0,0,1}};
//    };
//  };
//  AnyKinRotational PatellaMeasure={
//    AnyRefNode &ThighNode = ...Seg.Thigh.PatellaFemurJoint.RotNode;
//    AnyRefNode &PatellaNode = ...Seg.Patella.PatellaFemurJoint.RotNode;
//    Type=RotAxesAngles;
//  };
//  MeasureOrganizer={0};
//};
//
//AnyKinMeasureOrg PatellaRotation = {
//  AnyKinRotational &PatellaFemurJoint =.PatellaFlexion.PatellaMeasure;
//  MeasureOrganizer={1};
//};
//


AnyKinMeasureOrg HipFlexion = {
  //create new rotated node
  AnyFolder &HipNodeRef=..HipNodeRef;
  HipNodeRef={
    AnyRefNode RotNode={
      ARel= {{....Sign*-1,0,0},{0,....Sign*-1,0},{0,0,1}};
    };
  };
  AnyFolder &ThighNodeRef = ..Seg.Thigh.HipJoint;
  ThighNodeRef ={
    AnyRefNode RotNode={
      ARel={{....Sign*-1,0,0},{0,....Sign*-1,0},{0,0,1}};
    };
  };
  AnyKinRotational HipMeasure ={
    AnyRefNode &PelvisNode = ...HipNodeRef.RotNode;
    AnyRefNode &ThighNode = ...Seg.Thigh.HipJoint.RotNode;

    PelvisNode={//AnyDrawRefFrame drw={RGB={1,0,0};};
    };
    ThighNode={//AnyDrawRefFrame drw={RGB={0,1,0};};
    };

    Type=RotAxesAngles;
  };
  MeasureOrganizer={0};
};
AnyKinMeasureOrg HipAbduction = {
  AnyKinRotational &HipJoint =.HipFlexion.HipMeasure;
  MeasureOrganizer={2};
};
AnyKinMeasureOrg HipExternalRotation ={
  AnyKinRotational &HipJoint =.HipFlexion.HipMeasure;
  MeasureOrganizer={1};
};


AnyKinMeasureOrg HipFlexionJntMus = {
  AnyKinRotational HipMeasure ={
    AnyRefNode &PelvisNode = ...HipNodeRef.RotNode;
    AnyRefNode &ThighNode = ...Seg.Thigh.HipJoint.RotNode;
    AngVelOnOff = On; // xyz vector output
    Type=RotAxesAngles;
  };
  MeasureOrganizer={2};
};
AnyKinMeasureOrg HipAbductionJntMus = {
  AnyKinRotational &HipJoint =.HipFlexionJntMus.HipMeasure;
  MeasureOrganizer={0};
};
AnyKinMeasureOrg HipExternalRotationJntMus ={
  AnyKinRotational &HipJoint =.HipFlexionJntMus.HipMeasure;
  MeasureOrganizer={1};
};


AnyRefNode &HeelContactNode =.Seg.Foot.HeelNode;
AnyRefNode &ToeMedialContactNode  =.Seg.Foot.ToeMedialContactNode;
AnyRefNode &ToeLateralContactNode =.Seg.Foot.ToeLateralContactNode;
