//This is the calibration2 file it will calibrate specfic muscles on the leg
AnyFolder LegCal2 ={

  AnyFolder &Pelvis = ...HumanFolderRef.Trunk.SegmentsLumbar.PelvisSeg; //This is a reference to the folder which holds the human part of the model
  AnyFolder &LegSegSide = .SideHumanFolderRef.Leg.Seg; //This is a reference to the folder which holds the human part of the model

  AnyFolder &JointsCal2 =  .SideHumanFolderRef.Leg.Jnt;


  AnyFixedRefFrame ground = {
    AnyRefNode node = {
       ARel=..Pelvis.Axes0;
      sRel=..Pelvis.r0;
    };
  };

  AnyRevoluteJoint PelvisGround={
    AnyRefFrame &Ground = .ground.node;
    AnyRefFrame &Sacrum= ....HumanFolderRef.Trunk.SegmentsLumbar.PelvisSeg;
    Axis=z;
  };

  AnyKinEqSimpleDriver PelvisGroundRot = {
    AnyRevoluteJoint &Jnt = .PelvisGround;
    DriverPos = {0};
    DriverVel = {0};
    Reaction.Type = {Off};
  };


//
//  AnyKinEqSimpleDriver JntDOFDriverRight = {
//    AnyKinMeasure &Joint = ..SideHumanFolderRef.Leg.JntDOF;
//    DriverPos = {1.83,0.0,0,0,0,-0.87}; //-15 degrees dorsal flexion
//    DriverVel = {0.0,0.0,0,0,0,0};
//    Reaction.Type = {Off,Off,Off,Off,Off,Off};
//  };//JntDOFDriverRight

AnyKinEqSimpleDriver Hip = {
    AnySphericalJoint &Spherical = .JointsCal2.Hip;
    MeasureOrganizer = {2,0,1}; // flexion/extension, abduction/adduction, internal/external rotation
    DriverPos = {-50,0,0}*pi/180; //50 degrees hip flexion
    DriverVel = {0,0,0}*pi/180;
    Reaction.Type = {Off,Off,Off};
  };


  AnyKinEqSimpleDriver Knee = {
    AnyRevoluteJoint &Hinge = .JointsCal2.Knee;
    DriverPos = {  0*pi/180};
    DriverVel = {0*pi/180};
    Reaction.Type = {Off};
  };


  AnyKinEqSimpleDriver Ankle = {
    AnyRevoluteJoint &Hinge = .JointsCal2.Ankle;
    DriverPos = {10*pi/180}; //15 degrees dorsal flexion
    DriverVel = {0*pi/180};
    Reaction.Type = {Off};
  };

  AnyKinEqSimpleDriver SubTalar = {
    AnyRevoluteJoint &Hinge = .JointsCal2.SubTalar;
    DriverPos = {0*pi/180};
    DriverVel = {0*pi/180};
    Reaction.Type = {Off};
  };


  // Calibration2 calibrates the following muscles of the lower leg:
  // Soleus, Gastrocnemius, Tibialis Posterior, Gluteus maximus minimus and medius
  // Hamstrings: Semitendinosus, Semimembranosus, Biceps Femoris
  AnyFolder &MuscleParRightCal2 =  .SideHumanFolderRef.Leg.MusPar;

  AnyFolder MusRight={
    //Muscles main function: plantar flexion
    AnyViaPointMuscle &TibialisPosteriorLateralis1 = ..SideHumanFolderRef.Leg.Mus.TibialisPosteriorLateralis1;
    AnyViaPointMuscle &TibialisPosteriorLateralis2 = ..SideHumanFolderRef.Leg.Mus.TibialisPosteriorLateralis2;
    AnyViaPointMuscle &TibialisPosteriorLateralis3 = ..SideHumanFolderRef.Leg.Mus.TibialisPosteriorLateralis3;
    AnyViaPointMuscle &TibialisPosteriorMedialis1 = ..SideHumanFolderRef.Leg.Mus.TibialisPosteriorMedialis1;
    AnyViaPointMuscle &TibialisPosteriorMedialis2 = ..SideHumanFolderRef.Leg.Mus.TibialisPosteriorMedialis2;
    AnyViaPointMuscle &TibialisPosteriorMedialis3 = ..SideHumanFolderRef.Leg.Mus.TibialisPosteriorMedialis3;
    AnyShortestPathMuscle &GastrocnemiusLateralis1 =  ..SideHumanFolderRef.Leg.Mus.GastrocnemiusLateralis1;
    AnyShortestPathMuscle &GastrocnemiusMedialis1 =  ..SideHumanFolderRef.Leg.Mus.GastrocnemiusMedialis1;

    AnyViaPointMuscle &PeroneusBrevis1  = ..SideHumanFolderRef.Leg.Mus.PeroneusBrevis1;
    AnyViaPointMuscle &PeroneusBrevis2  = ..SideHumanFolderRef.Leg.Mus.PeroneusBrevis2;
    AnyViaPointMuscle &PeroneusBrevis3  = ..SideHumanFolderRef.Leg.Mus.PeroneusBrevis3;
    AnyViaPointMuscle &PeroneusLongus1  = ..SideHumanFolderRef.Leg.Mus.PeroneusLongus1;
    AnyViaPointMuscle &PeroneusLongus2  = ..SideHumanFolderRef.Leg.Mus.PeroneusLongus2;
    AnyViaPointMuscle &PeroneusLongus3  = ..SideHumanFolderRef.Leg.Mus.PeroneusLongus3;
    AnyViaPointMuscle &FlexorHallucisLongus1 = ..SideHumanFolderRef.Leg.Mus.FlexorHallucisLongus1;
    AnyViaPointMuscle &FlexorHallucisLongus2 = ..SideHumanFolderRef.Leg.Mus.FlexorHallucisLongus2;
    AnyViaPointMuscle &FlexorHallucisLongus3 = ..SideHumanFolderRef.Leg.Mus.FlexorHallucisLongus3;
    AnyViaPointMuscle &FlexorDigitorumLongus1 = ..SideHumanFolderRef.Leg.Mus.FlexorDigitorumLongus1;
    AnyViaPointMuscle &FlexorDigitorumLongus2 = ..SideHumanFolderRef.Leg.Mus.FlexorDigitorumLongus2;
    AnyViaPointMuscle &FlexorDigitorumLongus3 = ..SideHumanFolderRef.Leg.Mus.FlexorDigitorumLongus3;
    AnyViaPointMuscle &Plantaris1 = ..SideHumanFolderRef.Leg.Mus.Plantaris1;


    //Muscle main function: hip flexion
    AnyViaPointMuscle &GluteusMaximusSuperior1 =  ..SideHumanFolderRef.Leg.Mus.GluteusMaximusSuperior1;
    AnyViaPointMuscle &GluteusMaximusSuperior2 =  ..SideHumanFolderRef.Leg.Mus.GluteusMaximusSuperior2;
    AnyViaPointMuscle &GluteusMaximusSuperior3 =  ..SideHumanFolderRef.Leg.Mus.GluteusMaximusSuperior3;
    AnyViaPointMuscle &GluteusMaximusSuperior4 =  ..SideHumanFolderRef.Leg.Mus.GluteusMaximusSuperior4;
    AnyViaPointMuscle &GluteusMaximusSuperior5 =  ..SideHumanFolderRef.Leg.Mus.GluteusMaximusSuperior5;
    AnyViaPointMuscle &GluteusMaximusSuperior6 =  ..SideHumanFolderRef.Leg.Mus.GluteusMaximusSuperior6;
    AnyViaPointMuscle &GluteusMaximusInferior1 =  ..SideHumanFolderRef.Leg.Mus.GluteusMaximusInferior1;
    AnyViaPointMuscle &GluteusMaximusInferior2 =  ..SideHumanFolderRef.Leg.Mus.GluteusMaximusInferior2;
    AnyViaPointMuscle &GluteusMaximusInferior3 =  ..SideHumanFolderRef.Leg.Mus.GluteusMaximusInferior3;
    AnyViaPointMuscle &GluteusMaximusInferior4 =  ..SideHumanFolderRef.Leg.Mus.GluteusMaximusInferior4;
    AnyViaPointMuscle &GluteusMaximusInferior5 =  ..SideHumanFolderRef.Leg.Mus.GluteusMaximusInferior5;
    AnyViaPointMuscle &GluteusMaximusInferior6 =  ..SideHumanFolderRef.Leg.Mus.GluteusMaximusInferior6;
//    AnyViaPointMuscle &GluteusMinimusAnterior1 =  ..SideHumanFolderRef.Leg.Mus.GluteusMinimusAnterior1;
//    AnyViaPointMuscle &GluteusMinimusMid1 =  ..SideHumanFolderRef.Leg.Mus.GluteusMinimusMid1;
//    AnyViaPointMuscle &GluteusMinimusPosterior1 =  ..SideHumanFolderRef.Leg.Mus.GluteusMinimusPosterior1;
//    AnyViaPointMuscle &GluteusMediusAnterior1 =  ..SideHumanFolderRef.Leg.Mus.GluteusMediusAnterior1;
//    AnyViaPointMuscle &GluteusMediusAnterior2 =  ..SideHumanFolderRef.Leg.Mus.GluteusMediusAnterior2;
//    AnyViaPointMuscle &GluteusMediusAnterior3 =  ..SideHumanFolderRef.Leg.Mus.GluteusMediusAnterior3;
//    AnyViaPointMuscle &GluteusMediusAnterior4 =  ..SideHumanFolderRef.Leg.Mus.GluteusMediusAnterior4;
//    AnyViaPointMuscle &GluteusMediusAnterior5 =  ..SideHumanFolderRef.Leg.Mus.GluteusMediusAnterior5;
//    AnyViaPointMuscle &GluteusMediusAnterior6 =  ..SideHumanFolderRef.Leg.Mus.GluteusMediusAnterior6;
//    AnyViaPointMuscle &GluteusMediusPosterior1 =  ..SideHumanFolderRef.Leg.Mus.GluteusMediusPosterior1;
//    AnyViaPointMuscle &GluteusMediusPosterior2 =  ..SideHumanFolderRef.Leg.Mus.GluteusMediusPosterior2;
//    AnyViaPointMuscle &GluteusMediusPosterior3 =  ..SideHumanFolderRef.Leg.Mus.GluteusMediusPosterior3;
//    AnyViaPointMuscle &GluteusMediusPosterior4 =  ..SideHumanFolderRef.Leg.Mus.GluteusMediusPosterior4;
//    AnyViaPointMuscle &GluteusMediusPosterior5 =  ..SideHumanFolderRef.Leg.Mus.GluteusMediusPosterior5;
//    AnyViaPointMuscle &GluteusMediusPosterior6 =  ..SideHumanFolderRef.Leg.Mus.GluteusMediusPosterior6;

//        AnyViaPointMuscle &SoleusMedialis1 =  ..SideHumanFolderRef.Leg.Mus.SoleusMedialis1;
//    AnyViaPointMuscle &SoleusMedialis2 =  ..SideHumanFolderRef.Leg.Mus.SoleusMedialis2;
//    AnyViaPointMuscle &SoleusMedialis3 =  ..SideHumanFolderRef.Leg.Mus.SoleusMedialis3;
//    AnyViaPointMuscle &SoleusLateralis4 =  ..SideHumanFolderRef.Leg.Mus.SoleusLateralis4;
//    AnyViaPointMuscle &SoleusLateralis5 =  ..SideHumanFolderRef.Leg.Mus.SoleusLateralis5;
//    AnyViaPointMuscle &SoleusLateralis6 =  ..SideHumanFolderRef.Leg.Mus.SoleusLateralis6;
//

//    //Iliopsoas is calibated using a straight leg, this fits better with results on situp motion and no data on optimal angle has been found in litterature
//   // AnyShortestPathMuscle &Iliopsoas =..SideHumanFolderRef.Leg.Mus.Iliopsoas;
////    AnyViaPointMuscle &Semitendinosus1 =  ..SideHumanFolderRef.Leg.Mus.Semitendinosus1;
////    AnyViaPointMuscle &Semimembranosus1 =  ..SideHumanFolderRef.Leg.Mus.Semimembranosus1;
////    AnyViaPointMuscle &BicepsFemorisCaputLongum1 =  ..SideHumanFolderRef.Leg.Mus.BicepsFemorisCaputLongum1;
////    AnyViaPointMuscle &BicepsFemorisCaputBreve1 =  ..SideHumanFolderRef.Leg.Mus.BicepsFemorisCaputBreve1;
////    AnyViaPointMuscle &BicepsFemorisCaputBreve2 =  ..SideHumanFolderRef.Leg.Mus.BicepsFemorisCaputBreve2;
////
////    AnyViaPointMuscle &SartoriusProximal1 = ..SideHumanFolderRef.Leg.Mus.SartoriusProximal1;
////    AnyViaPointMuscle &SartoriusDistal1 = ..SideHumanFolderRef.Leg.Mus.SartoriusDistal1;

//    AnyViaPointMuscle &RectusFemoris1 = ..SideHumanFolderRef.Leg.Mus.RectusFemoris1;
//    AnyViaPointMuscle &RectusFemoris2 = ..SideHumanFolderRef.Leg.Mus.RectusFemoris2;


    //--------------------
//    AnyViaPointMuscle &VastusLateralisInferior1 = ..SideHumanFolderRef.Leg.Mus.VastusLateralisInferior1;
//    AnyViaPointMuscle &VastusLateralisInferior2 = ..SideHumanFolderRef.Leg.Mus.VastusLateralisInferior2;
//    AnyViaPointMuscle &VastusLateralisInferior3 = ..SideHumanFolderRef.Leg.Mus.VastusLateralisInferior3;
//    AnyViaPointMuscle &VastusLateralisInferior4 = ..SideHumanFolderRef.Leg.Mus.VastusLateralisInferior4;
//    AnyViaPointMuscle &VastusLateralisInferior5 = ..SideHumanFolderRef.Leg.Mus.VastusLateralisInferior5;
//    AnyViaPointMuscle &VastusLateralisInferior6 = ..SideHumanFolderRef.Leg.Mus.VastusLateralisInferior6;
//    AnyViaPointMuscle &VastusLateralisSuperior7 = ..SideHumanFolderRef.Leg.Mus.VastusLateralisSuperior7;
//    AnyViaPointMuscle &VastusLateralisSuperior8 = ..SideHumanFolderRef.Leg.Mus.VastusLateralisSuperior8;
//    AnyViaPointMuscle &VastusMedialisInferior1 =..SideHumanFolderRef.Leg.Mus.VastusMedialisInferior1;
//    AnyViaPointMuscle &VastusMedialisInferior2 =..SideHumanFolderRef.Leg.Mus.VastusMedialisInferior2;
//    AnyViaPointMuscle &VastusMedialisMid3 =..SideHumanFolderRef.Leg.Mus.VastusMedialisMid3;
//    AnyViaPointMuscle &VastusMedialisMid4 =..SideHumanFolderRef.Leg.Mus.VastusMedialisMid4;
//    AnyViaPointMuscle &VastusMedialisSuperior5 =..SideHumanFolderRef.Leg.Mus.VastusMedialisSuperior5;
//    AnyViaPointMuscle &VastusMedialisSuperior6 =..SideHumanFolderRef.Leg.Mus.VastusMedialisSuperior6;
//    AnyViaPointMuscle &VastusMedialisSuperior7 =..SideHumanFolderRef.Leg.Mus.VastusMedialisSuperior7;
//    AnyViaPointMuscle &VastusMedialisSuperior8 =..SideHumanFolderRef.Leg.Mus.VastusMedialisSuperior8;
//    AnyViaPointMuscle &VastusMedialisSuperior9 =..SideHumanFolderRef.Leg.Mus.VastusMedialisSuperior9;
//    AnyViaPointMuscle &VastusMedialisSuperior10 =..SideHumanFolderRef.Leg.Mus.VastusMedialisSuperior10;
//    AnyViaPointMuscle &VastusIntermedius1 = ..SideHumanFolderRef.Leg.Mus.VastusIntermedius1;
//    AnyViaPointMuscle &VastusIntermedius2 = ..SideHumanFolderRef.Leg.Mus.VastusIntermedius2;
//    AnyViaPointMuscle &VastusIntermedius3 = ..SideHumanFolderRef.Leg.Mus.VastusIntermedius3;
//    AnyViaPointMuscle &VastusIntermedius4 = ..SideHumanFolderRef.Leg.Mus.VastusIntermedius4;
//    AnyViaPointMuscle &VastusIntermedius5 = ..SideHumanFolderRef.Leg.Mus.VastusIntermedius5;
//    AnyViaPointMuscle &VastusIntermedius6 = ..SideHumanFolderRef.Leg.Mus.VastusIntermedius6;


  };

};

// The study: Operations to be performed on the model
AnyBodyCalibrationStudy LegCalibrationStudy2 = {
  AnyFolder &ref=.LegCal2;
  nStep = 1;
};
