//This is the calibration2 file it will calibrate specfic muscles on the leg
AnyFolder LegCal3={

  AnyFolder &Pelvis = ...HumanFolderRef.Trunk.SegmentsLumbar.PelvisSeg;  //This is a reference to the folder which holds the human part of the model
  AnyFolder &LegSegSide = .SideHumanFolderRef.Leg.Seg; //This is a reference to the folder which holds the human part of the model

  AnyFolder &JointsCal2 = .SideHumanFolderRef.Leg.Jnt;

  AnyFixedRefFrame ground = {
    AnyRefNode node = {
      ARel=..Pelvis.Axes0;
      sRel=..Pelvis.r0;
    };
  };

  AnyRevoluteJoint PelvisGround={
    AnyRefFrame &Ground = .ground.node;
    AnyRefFrame &Sacrum= ....HumanFolderRef.Trunk.SegmentsLumbar.PelvisSeg;
    Axis=z;
  };

  AnyKinEqSimpleDriver PelvisGroundRot = {
    AnyRevoluteJoint &Jnt = .PelvisGround;
    DriverPos = {0};
    DriverVel = {0};
    Reaction.Type = {Off};
  };


//  AnyKinEqSimpleDriver JntDOFDriver = {
//    AnyKinMeasure &Joint = ..SideHumanFolderRef.Leg.JntDOF;
//    DriverPos = {1.40,0.0,-1.22,0,0,0}; //10 degrees plantar flexion
//    DriverVel = {0.0,0.0,0,0,0,0};
//    Reaction.Type = {Off,Off,Off,Off,Off,Off};
//  };//JntDOFDriver

  AnyKinEqSimpleDriver Hip = {
    AnySphericalJoint &Spherical = .JointsCal2.Hip;
    MeasureOrganizer = {2,0,1}; // flexion/extension, abduction/adduction, internal/external rotation
    DriverPos = {0,0,0}*pi/180;
    DriverVel = {0,0,0}*pi/180;
    Reaction.Type = {Off,Off,Off};
  };


  AnyKinEqSimpleDriver Knee = {
    AnyRevoluteJoint &Hinge = .JointsCal2.Knee;
    DriverPos = {-70*pi/180}; // 70 degrees knee flexion
    DriverVel = {0*pi/180};
    Reaction.Type = {Off};
  };


  AnyKinEqSimpleDriver Ankle = {
    AnyRevoluteJoint &Hinge = .JointsCal2.Ankle;
    DriverPos = {-20*pi/180}; //20 degrees plantar flexion
    DriverVel = {0*pi/180};
    Reaction.Type = {Off};
  };

  AnyKinEqSimpleDriver SubTalar = {
    AnyRevoluteJoint &Hinge = .JointsCal2.SubTalar;
    DriverPos = {0*pi/180};
    DriverVel = {0*pi/180};
    Reaction.Type = {Off};
  };


  // Calibration3 calibrates the following muscles of the lower leg:
  // Quadriceps muscles, Tibialis Anterior
  AnyFolder &MuscleParCal2 =.SideHumanFolderRef.Leg.MusPar;

  AnyFolder Mus = {
    //Muscle main function: Dorsal flexion
    AnyViaPointMuscle &TibialisAnterior1 = ..SideHumanFolderRef.Leg.Mus.TibialisAnterior1;
    AnyViaPointMuscle &TibialisAnterior2 = ..SideHumanFolderRef.Leg.Mus.TibialisAnterior2;
    AnyViaPointMuscle &TibialisAnterior3 = ..SideHumanFolderRef.Leg.Mus.TibialisAnterior3;
    AnyViaPointMuscle &PeroneusTertius1 = ..SideHumanFolderRef.Leg.Mus.PeroneusTertius1;
    AnyViaPointMuscle &ExtensorDigitorumLongus1  = ..SideHumanFolderRef.Leg.Mus.ExtensorDigitorumLongus1;
    AnyViaPointMuscle &ExtensorDigitorumLongus2  = ..SideHumanFolderRef.Leg.Mus.ExtensorDigitorumLongus2;
    AnyViaPointMuscle &ExtensorDigitorumLongus3  = ..SideHumanFolderRef.Leg.Mus.ExtensorDigitorumLongus3;
    AnyViaPointMuscle &ExtensorHallucisLongus1 = ..SideHumanFolderRef.Leg.Mus.ExtensorHallucisLongus1;
    AnyViaPointMuscle &ExtensorHallucisLongus2 = ..SideHumanFolderRef.Leg.Mus.ExtensorHallucisLongus2;
    AnyViaPointMuscle &ExtensorHallucisLongus3 = ..SideHumanFolderRef.Leg.Mus.ExtensorHallucisLongus3;

//      AnyViaPointMuscle &SoleusMedialis1 =  ..SideHumanFolderRef.Leg.Mus.SoleusMedialis1;
//    AnyViaPointMuscle &SoleusMedialis2 =  ..SideHumanFolderRef.Leg.Mus.SoleusMedialis2;
//    AnyViaPointMuscle &SoleusMedialis3 =  ..SideHumanFolderRef.Leg.Mus.SoleusMedialis3;
//    AnyViaPointMuscle &SoleusLateralis4 =  ..SideHumanFolderRef.Leg.Mus.SoleusLateralis4;
//    AnyViaPointMuscle &SoleusLateralis5 =  ..SideHumanFolderRef.Leg.Mus.SoleusLateralis5;
//    AnyViaPointMuscle &SoleusLateralis6 =  ..SideHumanFolderRef.Leg.Mus.SoleusLateralis6;
//

    //Muscle main function: knee extension
//    AnyViaPointMuscle &VastusLateralisInferior1 = ..SideHumanFolderRef.Leg.Mus.VastusLateralisInferior1;
//    AnyViaPointMuscle &VastusLateralisInferior2 = ..SideHumanFolderRef.Leg.Mus.VastusLateralisInferior2;
//    AnyViaPointMuscle &VastusLateralisInferior3 = ..SideHumanFolderRef.Leg.Mus.VastusLateralisInferior3;
//    AnyViaPointMuscle &VastusLateralisInferior4 = ..SideHumanFolderRef.Leg.Mus.VastusLateralisInferior4;
//    AnyViaPointMuscle &VastusLateralisInferior5 = ..SideHumanFolderRef.Leg.Mus.VastusLateralisInferior5;
//    AnyViaPointMuscle &VastusLateralisInferior6 = ..SideHumanFolderRef.Leg.Mus.VastusLateralisInferior6;
//    AnyViaPointMuscle &VastusLateralisSuperior7 = ..SideHumanFolderRef.Leg.Mus.VastusLateralisSuperior7;
//    AnyViaPointMuscle &VastusLateralisSuperior8 = ..SideHumanFolderRef.Leg.Mus.VastusLateralisSuperior8;
//    AnyViaPointMuscle &VastusMedialisInferior1 =..SideHumanFolderRef.Leg.Mus.VastusMedialisInferior1;
//    AnyViaPointMuscle &VastusMedialisInferior2 =..SideHumanFolderRef.Leg.Mus.VastusMedialisInferior2;
//    AnyViaPointMuscle &VastusMedialisMid3 =..SideHumanFolderRef.Leg.Mus.VastusMedialisMid3;
//    AnyViaPointMuscle &VastusMedialisMid4 =..SideHumanFolderRef.Leg.Mus.VastusMedialisMid4;
//    AnyViaPointMuscle &VastusMedialisSuperior5 =..SideHumanFolderRef.Leg.Mus.VastusMedialisSuperior5;
//    AnyViaPointMuscle &VastusMedialisSuperior6 =..SideHumanFolderRef.Leg.Mus.VastusMedialisSuperior6;
//    AnyViaPointMuscle &VastusMedialisSuperior7 =..SideHumanFolderRef.Leg.Mus.VastusMedialisSuperior7;
//    AnyViaPointMuscle &VastusMedialisSuperior8 =..SideHumanFolderRef.Leg.Mus.VastusMedialisSuperior8;
//    AnyViaPointMuscle &VastusMedialisSuperior9 =..SideHumanFolderRef.Leg.Mus.VastusMedialisSuperior9;
//    AnyViaPointMuscle &VastusMedialisSuperior10 =..SideHumanFolderRef.Leg.Mus.VastusMedialisSuperior10;
//    AnyViaPointMuscle &VastusIntermedius1 = ..SideHumanFolderRef.Leg.Mus.VastusIntermedius1;
//    AnyViaPointMuscle &VastusIntermedius2 = ..SideHumanFolderRef.Leg.Mus.VastusIntermedius2;
//    AnyViaPointMuscle &VastusIntermedius3 = ..SideHumanFolderRef.Leg.Mus.VastusIntermedius3;
//    AnyViaPointMuscle &VastusIntermedius4 = ..SideHumanFolderRef.Leg.Mus.VastusIntermedius4;
//    AnyViaPointMuscle &VastusIntermedius5 = ..SideHumanFolderRef.Leg.Mus.VastusIntermedius5;
//    AnyViaPointMuscle &VastusIntermedius6 = ..SideHumanFolderRef.Leg.Mus.VastusIntermedius6;
//
//    AnyViaPointMuscle &RectusFemoris1 = ..SideHumanFolderRef.Leg.Mus.RectusFemoris1;
//    AnyViaPointMuscle &RectusFemoris2 = ..SideHumanFolderRef.Leg.Mus.RectusFemoris2;
  };
};


// The study: Operations to be performed on the model
AnyBodyCalibrationStudy LegCalibrationStudy3 = {
  AnyFolder &ref=.LegCal3;
 nStep = 1;
};
