//This is the calibration4 file it will calibrate specfic muscles on the leg
AnyFolder LegCal5={

  AnyFolder &Pelvis = ...HumanFolderRef.Trunk.SegmentsLumbar.PelvisSeg; //This is a reference to the folder which holds the human part of the model
  AnyFolder &LegSegSide = .SideHumanFolderRef.Leg.Seg; //This is a reference to the folder which holds the human part of the model
  AnyFolder &JointsCal2 = .SideHumanFolderRef.Leg.Jnt;

  AnyFixedRefFrame ground = {
    AnyRefNode node = {
      ARel=..Pelvis.Axes0;
      sRel=..Pelvis.r0;
    };
  };

  AnyRevoluteJoint PelvisGround={
    AnyRefFrame &Ground = .ground.node;
    AnySeg &Sacrum= ....HumanFolderRef.Trunk.SegmentsLumbar.PelvisSeg;

    Axis=z;
  };

  AnyKinEqSimpleDriver PelvisGroundRot = {
    AnyRevoluteJoint &Jnt = .PelvisGround;
    DriverPos = {0};
    DriverVel = {0};
    Reaction.Type = {Off};
  };


  AnyKinEqSimpleDriver Hip = {
    AnySphericalJoint &Spherical = .JointsCal2.Hip;
    MeasureOrganizer = {2,0,1}; // flexion/extension, abduction/adduction, internal/external rotation
    DriverPos = {-60,0,..Sign*10}*pi/180;
    DriverVel = {0,0,0}*pi/180;
    Reaction.Type = {Off,Off,Off};
  };


  AnyKinEqSimpleDriver Knee = {
    AnyRevoluteJoint &Hinge = .JointsCal2.Knee;
    DriverPos = {-50*pi/180};
    DriverVel = {0*pi/180};
    Reaction.Type = {Off};
  };


  AnyKinEqSimpleDriver Ankle = {
    AnyRevoluteJoint &Hinge = .JointsCal2.Ankle;
    DriverPos = {10*pi/180}; // 10 degrees dorsi flexion
    DriverVel = {0*pi/180};
    Reaction.Type = {Off};
  };

  AnyKinEqSimpleDriver SubTalar = {
    AnyRevoluteJoint &Hinge = .JointsCal2.SubTalar;
    DriverPos = {-20*pi/180};
    DriverVel = {0*pi/180};
    Reaction.Type = {Off};
  };
//


  //AnyFolder &MuscleParCal5 =.SideHumanFolderRef.Leg.MusPar;

  AnyFolder Mus = {
    //Muscle main function: knee extension
       AnyViaPointMuscle &VastusLateralisInferior1 = ..SideHumanFolderRef.Leg.Mus.VastusLateralisInferior1;
    AnyViaPointMuscle &VastusLateralisInferior2 = ..SideHumanFolderRef.Leg.Mus.VastusLateralisInferior2;
    AnyViaPointMuscle &VastusLateralisInferior3 = ..SideHumanFolderRef.Leg.Mus.VastusLateralisInferior3;
    AnyViaPointMuscle &VastusLateralisInferior4 = ..SideHumanFolderRef.Leg.Mus.VastusLateralisInferior4;
    AnyViaPointMuscle &VastusLateralisInferior5 = ..SideHumanFolderRef.Leg.Mus.VastusLateralisInferior5;
    AnyViaPointMuscle &VastusLateralisInferior6 = ..SideHumanFolderRef.Leg.Mus.VastusLateralisInferior6;
    AnyViaPointMuscle &VastusLateralisSuperior7 = ..SideHumanFolderRef.Leg.Mus.VastusLateralisSuperior7;
    AnyViaPointMuscle &VastusLateralisSuperior8 = ..SideHumanFolderRef.Leg.Mus.VastusLateralisSuperior8;
    AnyViaPointMuscle &VastusMedialisInferior1 =..SideHumanFolderRef.Leg.Mus.VastusMedialisInferior1;
    AnyViaPointMuscle &VastusMedialisInferior2 =..SideHumanFolderRef.Leg.Mus.VastusMedialisInferior2;
    AnyViaPointMuscle &VastusMedialisMid3 =..SideHumanFolderRef.Leg.Mus.VastusMedialisMid3;
    AnyViaPointMuscle &VastusMedialisMid4 =..SideHumanFolderRef.Leg.Mus.VastusMedialisMid4;
    AnyViaPointMuscle &VastusMedialisSuperior5 =..SideHumanFolderRef.Leg.Mus.VastusMedialisSuperior5;
    AnyViaPointMuscle &VastusMedialisSuperior6 =..SideHumanFolderRef.Leg.Mus.VastusMedialisSuperior6;
    AnyViaPointMuscle &VastusMedialisSuperior7 =..SideHumanFolderRef.Leg.Mus.VastusMedialisSuperior7;
    AnyViaPointMuscle &VastusMedialisSuperior8 =..SideHumanFolderRef.Leg.Mus.VastusMedialisSuperior8;
    AnyViaPointMuscle &VastusMedialisSuperior9 =..SideHumanFolderRef.Leg.Mus.VastusMedialisSuperior9;
    AnyViaPointMuscle &VastusMedialisSuperior10 =..SideHumanFolderRef.Leg.Mus.VastusMedialisSuperior10;
    AnyViaPointMuscle &VastusIntermedius1 = ..SideHumanFolderRef.Leg.Mus.VastusIntermedius1;
    AnyViaPointMuscle &VastusIntermedius2 = ..SideHumanFolderRef.Leg.Mus.VastusIntermedius2;
    AnyViaPointMuscle &VastusIntermedius3 = ..SideHumanFolderRef.Leg.Mus.VastusIntermedius3;
    AnyViaPointMuscle &VastusIntermedius4 = ..SideHumanFolderRef.Leg.Mus.VastusIntermedius4;
    AnyViaPointMuscle &VastusIntermedius5 = ..SideHumanFolderRef.Leg.Mus.VastusIntermedius5;
    AnyViaPointMuscle &VastusIntermedius6 = ..SideHumanFolderRef.Leg.Mus.VastusIntermedius6;

    AnyViaPointMuscle &TensorFasciaeLatae1 = ..SideHumanFolderRef.Leg.Mus.TensorFasciaeLatae1;
    AnyViaPointMuscle &TensorFasciaeLatae2 = ..SideHumanFolderRef.Leg.Mus.TensorFasciaeLatae2;
    AnyViaPointMuscle &RectusFemoris1 = ..SideHumanFolderRef.Leg.Mus.RectusFemoris1;
    AnyViaPointMuscle &RectusFemoris2 = ..SideHumanFolderRef.Leg.Mus.RectusFemoris2;


    AnyViaPointMuscle &ObturatorExternusSuperior1 = ..SideHumanFolderRef.Leg.Mus.ObturatorExternusSuperior1;
    AnyViaPointMuscle &ObturatorExternusSuperior2 = ..SideHumanFolderRef.Leg.Mus.ObturatorExternusSuperior2;
    AnyViaPointMuscle &ObturatorExternusSuperior3 = ..SideHumanFolderRef.Leg.Mus.ObturatorExternusSuperior3;
    AnyViaPointMuscle &ObturatorExternusInferior1 = ..SideHumanFolderRef.Leg.Mus.ObturatorExternusInferior1;
    AnyViaPointMuscle &ObturatorExternusInferior2 = ..SideHumanFolderRef.Leg.Mus.ObturatorExternusInferior2;
    AnyViaPointMuscle &ObturatorInternus1 = ..SideHumanFolderRef.Leg.Mus.ObturatorInternus1;
    AnyViaPointMuscle &ObturatorInternus2 = ..SideHumanFolderRef.Leg.Mus.ObturatorInternus2;
    AnyViaPointMuscle &ObturatorInternus3 = ..SideHumanFolderRef.Leg.Mus.ObturatorInternus3;

        AnyViaPointMuscle &PeroneusBrevis1  = ..SideHumanFolderRef.Leg.Mus.PeroneusBrevis1;
    AnyViaPointMuscle &PeroneusBrevis2  = ..SideHumanFolderRef.Leg.Mus.PeroneusBrevis2;
    AnyViaPointMuscle &PeroneusBrevis3  = ..SideHumanFolderRef.Leg.Mus.PeroneusBrevis3;
    AnyViaPointMuscle &PeroneusLongus1  = ..SideHumanFolderRef.Leg.Mus.PeroneusLongus1;
    AnyViaPointMuscle &PeroneusLongus2  = ..SideHumanFolderRef.Leg.Mus.PeroneusLongus2;
    AnyViaPointMuscle &PeroneusLongus3  = ..SideHumanFolderRef.Leg.Mus.PeroneusLongus3;

  };

};


// The study: Operations to be performed on the model
AnyBodyCalibrationStudy LegCalibrationStudy5 = {
  AnyFolder &ref=.LegCal5;
 nStep = 1;
   InitialConditions.SolverType = KinSolOverDeterminate;

};
