#if BM_FOOT_MODEL == _FOOT_MODEL_DETAILED_GM_

  //************************************************
  //              DriverIntertarsal
  //************************************************


  AnyKinEqSimpleDriver TaloNavi =
  {
    AnyKinMeasure &ref1 = ..SideInterfaceFolderRef.TaloNavicularEversion;
    AnyKinMeasure &ref2 = ..SideInterfaceFolderRef.TaloNavicularAbduction;
    AnyKinMeasure &ref3 = ..SideInterfaceFolderRef.TaloNavicularDorsiFlexion;
    DriverPos = {0,0,0}*pi/180;
    DriverVel = {0,0,0};
    Reaction.Type = {Off,Off,Off};
  };

  AnyKinEqSimpleDriver NaviCuneiMed =
  {
    AnyKinMeasure &ref2 = ..SideInterfaceFolderRef.NaviculoMedialCuneiformAbduction;
    AnyKinMeasure &ref3 = ..SideInterfaceFolderRef.NaviculoMedialCuneiformDorsiFlexion;
    DriverPos = {0,0}*pi/180;
    DriverVel = {0,0};
    Reaction.Type = {Off,Off};
  };

  AnyKinEqSimpleDriver NaviCuneiInt =
  {
    AnyKinMeasure &ref2 = ..SideInterfaceFolderRef.NaviculoIntermediateCuneiformDorsiFlexion;
    DriverPos = {0}*pi/180;
    DriverVel = {0};
    Reaction.Type = {Off};
  };

  AnyKinEqSimpleDriver NaviCuneiLat =
  {
    AnyKinMeasure &ref2 = ..SideInterfaceFolderRef.NaviculoLateralCuneiformDorsiFlexion;
    DriverPos = {0}*pi/180;
    DriverVel = {0};
    Reaction.Type = {Off};
  };

  AnyKinEqSimpleDriver CalCuboid =
  {
    AnyKinMeasure &ref1 = ..SideInterfaceFolderRef.CalcaneoCuboidEversion;
    AnyKinMeasure &ref3 = ..SideInterfaceFolderRef.CalcaneoCuboidDorsiFlexion;
    DriverPos = {0,0}*pi/180;
    DriverVel = {0,0};
    Reaction.Type = {Off, Off};
  };


  //************************************************
  //              DriverTarsoMt
  //************************************************


  AnyKinEqSimpleDriver TarsoMt1 =
  {
    AnyKinMeasure &ref2 = ..SideInterfaceFolderRef.TarsoMetatarsal1Abduction;
    AnyKinMeasure &ref3 = ..SideInterfaceFolderRef.TarsoMetatarsal1DorsiFlexion;
    DriverPos = {0,0}*pi/180;
    DriverVel = {0,0};
    Reaction.Type = {Off,Off};
  };


  AnyKinEqSimpleDriver TarsoMt2 =
  {
    AnyKinMeasure &ref2 = ..SideInterfaceFolderRef.TarsoMetatarsal2DorsiFlexion;
    DriverPos = {0}*pi/180;
    DriverVel = {0};
    Reaction.Type = {Off};
  };


  AnyKinEqSimpleDriver TarsoMt3 =
  {
    AnyKinMeasure &ref2 = ..SideInterfaceFolderRef.TarsoMetatarsal3DorsiFlexion;
    DriverPos = {0}*pi/180;
    DriverVel = {0};
    Reaction.Type = {Off};
  };


  AnyKinEqSimpleDriver TarsoMt4 =
  {
    AnyKinMeasure &ref2 = ..SideInterfaceFolderRef.TarsoMetatarsal4DorsiFlexion;
    DriverPos = {0}*pi/180;
    DriverVel = {0};
    Reaction.Type = {Off};
  };


  AnyKinEqSimpleDriver TarsoMt5 =
  {
    AnyKinMeasure &ref3 = ..SideInterfaceFolderRef.TarsoMetatarsal5SkewDorsiFlexion;
    DriverPos = {0}*pi/180;
    DriverVel = {0};
    Reaction.Type = {Off};
  };


  //************************************************
  //              DriverMtPhal
  //************************************************


  AnyKinEqSimpleDriver MtPhal1 =
  {
    AnyKinMeasure &ref1 = ..SideInterfaceFolderRef.MetatarsoPhalangeal1Abduction;
    AnyKinMeasure &ref2 = ..SideInterfaceFolderRef.MetatarsoPhalangeal1DorsiFlexion;
    DriverPos = {0,0}*pi/180;
    DriverVel = {0,0};
    Reaction.Type = {Off, Off};
  };
#endif

#if BM_FOOT_MODEL == _FOOT_MODEL_TOE_FLEX_GM_
  AnyKinEqSimpleDriver MtPhal1 =
  {
    AnyKinMeasure &ref2 = ..SideInterfaceFolderRef.MetatarsoPhalangeal1DorsiFlexion;
    DriverPos = {0}*pi/180;
    DriverVel = {0}*pi/180;
    Reaction.Type = {Off};
  };
#endif

#if BM_FOOT_MODEL == _FOOT_MODEL_DETAILED_GM_

  AnyKinEqSimpleDriver MtPhal2 =
  {
    AnyKinMeasure &ref1 = ..SideInterfaceFolderRef.MetatarsoPhalangeal2Abduction;
    AnyKinMeasure &ref2 = ..SideInterfaceFolderRef.MetatarsoPhalangeal2DorsiFlexion;
    DriverPos = {0,0}*pi/180;
    DriverVel = {0,0};
    Reaction.Type = {Off, Off};
  };

  AnyKinEqSimpleDriver MtPhal3 =
  {
    AnyKinMeasure &ref1 = ..SideInterfaceFolderRef.MetatarsoPhalangeal3Abduction;
    AnyKinMeasure &ref2 = ..SideInterfaceFolderRef.MetatarsoPhalangeal3DorsiFlexion;
    DriverPos = {0,0}*pi/180;
    DriverVel = {0,0};
    Reaction.Type = {Off, Off};
  };


  AnyKinEqSimpleDriver MtPhal4 =
  {
    AnyKinMeasure &ref1 = ..SideInterfaceFolderRef.MetatarsoPhalangeal4Abduction;
    AnyKinMeasure &ref2 = ..SideInterfaceFolderRef.MetatarsoPhalangeal4DorsiFlexion;
    DriverPos = {0,0}*pi/180;
    DriverVel = {0,0};
    Reaction.Type = {Off, Off};
  };


  AnyKinEqSimpleDriver MtPhal5 =
  {
    AnyKinMeasure &ref1 = ..SideInterfaceFolderRef.MetatarsoPhalangeal5Abduction;
    AnyKinMeasure &ref2 = ..SideInterfaceFolderRef.MetatarsoPhalangeal5DorsiFlexion;
    DriverPos = {0,0}*pi/180;
    DriverVel = {0,0};
    Reaction.Type = {Off, Off};
  };


  //************************************************
  //              DriverProxPhal
  //************************************************


  AnyKinEqSimpleDriver ProxPhal1 =
  {
    AnyKinMeasure &ref1 = ..SideInterfaceFolderRef.ProximoDistalPhalange1DorsiFlexion;
    DriverPos = {0}*pi/180;
    DriverVel = {0};
    Reaction.Type = {Off};
  };


  AnyKinEqSimpleDriver ProxPhal2 =
  {
    AnyKinMeasure &ref1 = ..SideInterfaceFolderRef.ProximoMedialPhalange2DorsiFlexion;
    DriverPos = {0}*pi/180;
    DriverVel = {0};
    Reaction.Type = {Off};
  };


  AnyKinEqSimpleDriver ProxPhal3 =
  {
    AnyKinMeasure &ref1 = ..SideInterfaceFolderRef.ProximoMedialPhalange3DorsiFlexion;
    DriverPos = {0}*pi/180;
    DriverVel = {0};
    Reaction.Type = {Off};
  };


  AnyKinEqSimpleDriver ProxPhal4 =
  {
    AnyKinMeasure &ref1 = ..SideInterfaceFolderRef.ProximoMedialPhalange4DorsiFlexion;
    DriverPos = {0}*pi/180;
    DriverVel = {0};
    Reaction.Type = {Off};
  };


  AnyKinEqSimpleDriver ProxPhal5 =
  {
    AnyKinMeasure &ref1 = ..SideInterfaceFolderRef.ProximoMedialPhalange5DorsiFlexion;
    DriverPos = {0}*pi/180;
    DriverVel = {0};
    Reaction.Type = {Off};
  };


  //************************************************
  //              DriverDistPhal
  //************************************************


  AnyKinEqSimpleDriver DistPhal2 =
  {
    AnyKinMeasure &ref1 = ..SideInterfaceFolderRef.MedioDistalPhalange2DorsiFlexion;
    DriverPos = {0}*pi/180;
    DriverVel = {0};
    Reaction.Type = {Off};
  };


  AnyKinEqSimpleDriver DistPhal3 =
  {
    AnyKinMeasure &ref1 = ..SideInterfaceFolderRef.MedioDistalPhalange3DorsiFlexion;
    DriverPos = {0}*pi/180;
    DriverVel = {0};
    Reaction.Type = {Off};
  };


  AnyKinEqSimpleDriver DistPhal4 =
  {
    AnyKinMeasure &ref1 = ..SideInterfaceFolderRef.MedioDistalPhalange4DorsiFlexion;
    DriverPos = {0}*pi/180;
    DriverVel = {0};
    Reaction.Type = {Off};
  };


  AnyKinEqSimpleDriver DistPhal5 =
  {
    AnyKinMeasure &ref1 = ..SideInterfaceFolderRef.MedioDistalPhalange5DorsiFlexion;
    DriverPos = {0}*pi/180;
    DriverVel = {0};
    Reaction.Type = {Off};
  };

#endif
