//This will run calibration1 on the left leg
AnyFolder LeftLegCalibration1={
  AnyFolder &SideHumanFolderRef=..HumanFolderRef.Left;
  #include "LegCal1.any"
};

//This will run calibration2 on the left leg
AnyFolder LeftLegCalibration2={
  AnyVar Sign = -1;
  AnyFolder &SideHumanFolderRef=..HumanFolderRef.Left;
  #include "LegCal2.any"
};

//This will run calibration3 on the left leg
AnyFolder LeftLegCalibration3={
  AnyFolder &SideHumanFolderRef=..HumanFolderRef.Left;
  #include "LegCal3.any"
};

//  This will run calibration4 on the left leg
//  AnyFolder RightLegCalibration4={
//    AnyFolder &SideHumanFolderRef=..HumanFolderRef.Right;
//    #include "LegCal4.any"
//  };

//This will run calibration5 on the left leg
AnyFolder LeftLegCalibration5={
  AnyVar Sign = -1;
  AnyFolder &SideHumanFolderRef=..HumanFolderRef.Left;
  #include "LegCal5.any"
};

AnyFolder LeftLegCalibration6={
  AnyVar Sign = -1;
  AnyFolder &SideHumanFolderRef=..HumanFolderRef.Left;
  #include "LegCal6.any"
};

AnyFolder LeftLegCalibration7={
  AnyVar Sign = -1;
  AnyFolder &SideHumanFolderRef=..HumanFolderRef.Left;
  #include "LegCal7.any"
};

#if BM_LEG_MORPHOLOGY == 2
AnyFolder LeftLegCalibration8={
  AnyVar Sign = -1;
  AnyFolder &SideHumanFolderRef=..HumanFolderRef.Left;
  #include "LegCal8.any"
};
#endif

CalibrationSequence ={
  AnyOperation &Cal1LegLeft = .LeftLegCalibration1.LegCalibrationStudy1.TendonLengthAdjustment;
  AnyOperation &Cal2LegLeft = .LeftLegCalibration2.LegCalibrationStudy2.TendonLengthAdjustment;
  AnyOperation &Cal3LegLeft = .LeftLegCalibration3.LegCalibrationStudy3.TendonLengthAdjustment;
//  AnyOperation &Cal4LegRight = .RightLegCalibration4.LegCalibrationStudy4.TendonLengthAdjustment;
  AnyOperation &Cal5LegLeft = .LeftLegCalibration5.LegCalibrationStudy5.TendonLengthAdjustment;
  AnyOperation &Cal6LegLeft = .LeftLegCalibration6.LegCalibrationStudy6.TendonLengthAdjustment;
  AnyOperation &Cal7LegLeft = .LeftLegCalibration7.LegCalibrationStudy7.TendonLengthAdjustment;
#if BM_LEG_MORPHOLOGY == 2
  AnyOperation &Cal8LegLeft = .LeftLegCalibration8.LegCalibrationStudy8.TendonLengthAdjustment;
#endif
};
