SelectedOutput.Left = {

  AnyFolder Leg = {


    AnyFolder JointReactionForce = {


      /// Medial positive
      AnyVar Hip_MediolateralForce = ....Left.Leg.Jnt.Hip.Constraints.Reaction.Fout[2];
      /// Proximal positive
      AnyVar Hip_ProximoDistalForce = ....Left.Leg.Jnt.Hip.Constraints.Reaction.Fout[1];
      /// Anterior positive
      AnyVar Hip_AnteroPosteriorForce = ....Left.Leg.Jnt.Hip.Constraints.Reaction.Fout[0];
      // Thigh.HipJoint ref

      /// Medial positive
      AnyVar Knee_MedioLateralForce = ....Left.Leg.Jnt.Knee.Constraints.Reaction.Fout[2];
      /// Proximal positive
      AnyVar Knee_ProximoDistalForce = ....Left.Leg.Jnt.Knee.Constraints.Reaction.Fout[1];
      /// Anterior positive
      AnyVar Knee_AnteroPosteriorForce = ....Left.Leg.Jnt.Knee.Constraints.Reaction.Fout[0];
      /// External positive
      AnyVar Knee_AxialMoment = ....Left.Leg.MomentMeasure.KneeJointReactionMoments.Mlocal[1];
      /// Internal positive
      AnyVar Knee_LateralMoment = ....Left.Leg.MomentMeasure.KneeJointReactionMoments.Mlocal[0];
      // Thigh.KneeJoint ref

      /// Medial positive
      AnyVar Ankle_MedioLateralForce = ....Left.Leg.Jnt.Ankle.Constraints.Reaction.Fout[2];
      /// Proximal positive
      AnyVar Ankle_ProximoDistalForce = ....Left.Leg.Jnt.Ankle.Constraints.Reaction.Fout[1];
      /// Anterior positive
      AnyVar Ankle_AnteroPosteriorForce = ....Left.Leg.Jnt.Ankle.Constraints.Reaction.Fout[0];
      /// External positive
      AnyVar Ankle_AxialMoment = ....Left.Leg.MomentMeasure.AnkleJointReactionMoments.Mlocal[1];
      // Shank.AnkleJoint ref


      //****************************************************

//      /// External positive
//      AnyVar Ankle_LateralMoment = ....Left.Leg.Jnt.Ankle.Constraints.Reaction.Fout[4];
//      // Shank.AnkleJoint ref
//
//      /// Lateral positive
//      AnyVar Talus_MedioLateralForce = ....Left.Leg.Jnt.SubTalar.Constraints.Reaction.Fout[0];
//      /// Proximal positive
//      AnyVar Talus_ProximoDistalForce = ....Left.Leg.Jnt.SubTalar.Constraints.Reaction.Fout[1];
//      /// Anterior positive
//      AnyVar Talus_AnteroPosteriorForce = ....Left.Leg.Jnt.SubTalar.Constraints.Reaction.Fout[2];
//      /// External positive
//      AnyVar Talus_AxialMoment = ....Left.Leg.Jnt.SubTalar.Constraints.Reaction.Fout[3];
//      /// Flexion positive
//      AnyVar Talus_FlexionExtensionMoment = ....Left.Leg.Jnt.SubTalar.Constraints.Reaction.Fout[4];
//      // Talus.SubTalarJoint ref


    }; //End JointReactionForce


    AnyFolder JointMomentMeasure = {


      AnyVar HipAbduction = ....Left.Leg.MomentMeasure.HipNetMomentMuscle.MHipAbduction;

      AnyVar HipFlexion = ....Left.Leg.MomentMeasure.HipNetMomentMuscle.MHipFlexion;

      AnyVar HipExternalRotation = ....Left.Leg.MomentMeasure.HipNetMomentMuscle.MHipExternalRotation;
      // HipNodeRef.RotNode ref

      AnyVar KneeFlexion = -....Left.Leg.MomentMeasure.KneeNetMomentMuscle.MKneeFlexion;
      // Shank.KneeJoint.RotNode ref

      AnyVar AnklePlantarFlexion = ....Left.Leg.MomentMeasure.AnklePlantarFlexionNetMomentMuscle.MPlantarFlexion;
      // Shank.AnkleJoint ref

      AnyVar SubTalarEversion = ....Left.Leg.MomentMeasure.SubTalarEversionNetMomentMuscle.MSubTalarEversion;
      // Talus.SubTalarJoint ref


    }; //End JointMomentMeasure


    AnyFolder Muscles =
    {
      AnySearchFun MuscleList =
      {
        #if ((LEFT_LEG_TD_SIMPLE_MUSCLES) + (LEFT_LEG_TD_MUS_3E)) == 0
          Search = ".....Left.Leg.JointMuscles.*.*.dof0.Muscle.*.Activity";
        #else
          Search = ".....Left.Leg.Mus.*.Activity";
        #endif
      };

      AnyVar Envelope = max(MuscleList());


        #if ((LEFT_LEG_TD_SIMPLE_MUSCLES) + (LEFT_LEG_TD_MUS_3E)) == 0


            #else


      //********************************************************************************


      AnyFolder MuscleActivity = {


        AnySearchFun GluteusMaxActivityList =  {
          #if ((LEFT_LEG_TD_SIMPLE_MUSCLES) + (LEFT_LEG_TD_MUS_3E)) == 0
          #else
          Search = "......Left.Leg.Mus.GluteusMax*.Activity";
          #endif
        };


        // GlutMed
        AnySearchFun GlutMedActivityList =  {
          #if ((LEFT_LEG_TD_SIMPLE_MUSCLES) + (LEFT_LEG_TD_MUS_3E)) == 0
          #else
          Search = "......Left.Leg.Mus.GluteusMed*.Activity";
          #endif
        };

        // GlutMin
        AnySearchFun GlutMinActivityList =  {
          #if ((LEFT_LEG_TD_SIMPLE_MUSCLES) + (LEFT_LEG_TD_MUS_3E)) == 0
          #else
          Search = "......Left.Leg.Mus.GluteusMin*.Activity";
          #endif
        };

        // Sartorius
        AnySearchFun SartoriusActivityList =  {
          #if ((LEFT_LEG_TD_SIMPLE_MUSCLES) + (LEFT_LEG_TD_MUS_3E)) == 0
          #else
          Search = "......Left.Leg.Mus.Sartorius*.Activity";
          #endif
        };

        // Tensor Fasciae Latae
        AnySearchFun TensorFasciaeActivityList =  {
          #if ((LEFT_LEG_TD_SIMPLE_MUSCLES) + (LEFT_LEG_TD_MUS_3E)) == 0
          #else
          Search = "......Left.Leg.Mus.TensorFasciae*.Activity";
          #endif
        };


        // Psoas Major
        AnySearchFun PsoasMajorActivityList =  {
          #if ((LEFT_LEG_TD_SIMPLE_MUSCLES) + (LEFT_LEG_TD_MUS_3E)) == 0
          #else
          Search = "......Trunk.MusclesSpineLeft.PsoasMajor.*.Activity";
          #endif
        };

        //        // Psoas Minor
        //        AnySearchFun PsoasMinorActivityList =  {
        //          #if ((LEFT_LEG_TD_SIMPLE_MUSCLES) + (LEFT_LEG_TD_MUS_3E)) == 0
        //          #else
        //          Search = "......Trunk.Leg.MusclesSpineLeft.PsoasMinor.*.Activity";
        //          #endif
        //        };

        AnySearchFun IliacusActivityList =  {
          #if ((LEFT_LEG_TD_SIMPLE_MUSCLES) + (LEFT_LEG_TD_MUS_3E)) == 0
          #else
          Search = "......Left.Leg.Mus.Iliac*.Activity";
          #endif
        };

        AnySearchFun RectusFemorisActivityList =  {
          #if ((LEFT_LEG_TD_SIMPLE_MUSCLES) + (LEFT_LEG_TD_MUS_3E)) == 0
          #else
          Search = "......Left.Leg.Mus.RectusF*.Activity";
          #endif
        };

        AnySearchFun PectineusActivityList =  {
          #if ((LEFT_LEG_TD_SIMPLE_MUSCLES) + (LEFT_LEG_TD_MUS_3E)) == 0
          #else
          Search = "......Left.Leg.Mus.Pect*.Activity";
          #endif
        };

        AnySearchFun GracilisActivityList =  {
          #if ((LEFT_LEG_TD_SIMPLE_MUSCLES) + (LEFT_LEG_TD_MUS_3E)) == 0
          #else
          Search = "......Left.Leg.Mus.Gracili*.Activity";
          #endif
        };

        AnySearchFun AdductorLongusActivityList =  {
          #if ((LEFT_LEG_TD_SIMPLE_MUSCLES) + (LEFT_LEG_TD_MUS_3E)) == 0
          #else
          Search = "......Left.Leg.Mus.AdductorLongus*.Activity";
          #endif
        };

        AnySearchFun AdductorBrevisActivityList =  {
          #if ((LEFT_LEG_TD_SIMPLE_MUSCLES) + (LEFT_LEG_TD_MUS_3E)) == 0
          #else
          Search = "......Left.Leg.Mus.AdductorBr*.Activity";
          #endif
        };


        AnySearchFun AdductorMagnusActivityList =  {
          #if ((LEFT_LEG_TD_SIMPLE_MUSCLES) + (LEFT_LEG_TD_MUS_3E)) == 0
          #else
          Search = "......Left.Leg.Mus.AdductorMag*.Activity";
          #endif
        };

        //                 AnySearchFun AdductorMinimusActivityList =  {
        //          #if ((LEFT_LEG_TD_SIMPLE_MUSCLES) + (LEFT_LEG_TD_MUS_3E)) == 0
        //          #else
        //          Search = "......Left.Leg.Mus.AdductorMin*.Activity";
        //          #endif
        //        };


        AnySearchFun ObturatorExtActivityList =  {
          #if ((LEFT_LEG_TD_SIMPLE_MUSCLES) + (LEFT_LEG_TD_MUS_3E)) == 0
          #else
          Search = "......Left.Leg.Mus.ObturatorExt*.Activity";
          #endif
        };


        AnySearchFun SemimembranosusActivityList =  {
          #if ((LEFT_LEG_TD_SIMPLE_MUSCLES) + (LEFT_LEG_TD_MUS_3E)) == 0
          #else
          Search = "......Left.Leg.Mus.Semimembr*.Activity";
          #endif
        };

        AnySearchFun SemimemtendinosusActivityList =  {
          #if ((LEFT_LEG_TD_SIMPLE_MUSCLES) + (LEFT_LEG_TD_MUS_3E)) == 0
          #else
          Search = "......Left.Leg.Mus.Semitend*.Activity";
          #endif
        };

        AnySearchFun BicepsFemorisCaputBreveActivityList =  {
          #if ((LEFT_LEG_TD_SIMPLE_MUSCLES) + (LEFT_LEG_TD_MUS_3E)) == 0
          #else
          Search = "......Left.Leg.Mus.BicepsFemorisCaputBreve*.Activity";
          #endif
        };

        AnySearchFun BicepsFemorisCaputLongActivityList =  {
          #if ((LEFT_LEG_TD_SIMPLE_MUSCLES) + (LEFT_LEG_TD_MUS_3E)) == 0
          #else
          Search = "......Left.Leg.Mus.BicepsFemorisCaputL*.Activity";
          #endif
        };


        AnySearchFun GastrocActivityList =  {
          #if ((LEFT_LEG_TD_SIMPLE_MUSCLES) + (LEFT_LEG_TD_MUS_3E)) == 0
          #else
          Search = "......Left.Leg.Mus.Gastroc*.Activity";
          #endif
        };


          AnySearchFun TibPostActivityList =  {
          #if ((LEFT_LEG_TD_SIMPLE_MUSCLES) + (LEFT_LEG_TD_MUS_3E)) == 0
          #else
          Search = "......Left.Leg.Mus.TibialisPost*.Activity";
          #endif
        };


        AnySearchFun TibAntActivityList =  {
          #if ((LEFT_LEG_TD_SIMPLE_MUSCLES) + (LEFT_LEG_TD_MUS_3E)) == 0
          #else
          Search = "......Left.Leg.Mus.TibialisAnt*.Activity";
          #endif
        };


        AnyVar GluteusMaxActivity = max(GluteusMaxActivityList());
        AnyVar GluteusMedActivity = max(GlutMedActivityList());
        AnyVar GluteusMinActivity = max(GlutMinActivityList());
        AnyVar SartoriusActivity = max(SartoriusActivityList());
        AnyVar TensorFasciaeActivity = max(TensorFasciaeActivityList());
        AnyVar PsoasMajorActivity = max(PsoasMajorActivityList());
        //        AnyVar PsoasMinorActivity = max(PsoasMinorActivityList());
        AnyVar IliacusActivity = max(IliacusActivityList());
        AnyVar RectusFemorisActivity = max(RectusFemorisActivityList());
        AnyVar PectineusActivity = max(PectineusActivityList());
        AnyVar GracilisActivity = max(GracilisActivityList());
        AnyVar AdductorLongusActivity = max(AdductorLongusActivityList());
        AnyVar AdductorBrevisActivity = max(AdductorBrevisActivityList());
        AnyVar AdductorMagnusActivity = max(AdductorMagnusActivityList());
        //        AnyVar AdductorMinimusActivity = max(AdductorMinimusActivityList());
        AnyVar ObturatorExtActivity = max(ObturatorExtActivityList());
        AnyVar SemimembranosusActivity = max(SemimembranosusActivityList());
        AnyVar SemitendinosusActivity = max(SemimemtendinosusActivityList());
        AnyVar BicepsFemorisCaputBreveActivity = max(BicepsFemorisCaputBreveActivityList());
        AnyVar BicepsFemorisCaputLongActivity = max(BicepsFemorisCaputLongActivityList());
        AnyVar GastrocActivity = max(GastrocActivityList());
        AnyVar TibialisAnteriorActivity = max(TibAntActivityList());
        AnyVar TibialisPosteriorActivity = max(TibPostActivityList());


      };
       //*************************************************


        /*   Hip Abductors
      o	Gluteus medius
      o	Gluteus minimus
      o	Sartorius
      o	Tensor fasciae latae
      */

      AnyFloat HipAbductorMuscleActivity = {MuscleActivity.GluteusMedActivity, MuscleActivity.GluteusMinActivity, MuscleActivity.SartoriusActivity, MuscleActivity.TensorFasciaeActivity};
 //      AnyVar HipAbductorMuscleActivity = MuscleActivity.GluteusMedActivity + MuscleActivity.GluteusMedActivity + MuscleActivity.SartoriusActivity + MuscleActivity.TensorFasciaeActivity;


      /* Hip Flexors:
      o	Psoas major
      o	Psoas minor
      o	Iliacus
      o	Rectus femoris
      o	Sartorius
      o	Tensor fasciae latae
      o	Pectineus
      o	Adductor longus
      o	Adductor brevis
      o	Gracilis
      */

      AnyFloat HipFlexorMuscleActivity = {MuscleActivity.PsoasMajorActivity, MuscleActivity.IliacusActivity, MuscleActivity.RectusFemorisActivity,
        MuscleActivity.SartoriusActivity, MuscleActivity.TensorFasciaeActivity, MuscleActivity.PectineusActivity,
        MuscleActivity.AdductorLongusActivity, MuscleActivity.AdductorBrevisActivity, MuscleActivity.GracilisActivity};
//      AnyVar HipFlexorMuscleActivity = MuscleActivity.PsoasMajorActivity + MuscleActivity.IliacusActivity + MuscleActivity.RectusFemorisActivity + MuscleActivity.SartoriusActivity + MuscleActivity.TensorFasciaeActivity
//      + MuscleActivity.PectineusActivity
//      + MuscleActivity.AdductorLongusActivity + MuscleActivity.AdductorBrevisActivity + MuscleActivity.GracilisActivity;

      /*  Hip adductors:
      o	Adductor brevis
      o	Adductor longus
      o	Adductor magnus
      o	Adductor minimus
      o	pectineus
      o	gracilis
      o	Obturator externus
      */

      AnyFloat HipAdductorMuscleActivity = {MuscleActivity.ObturatorExtActivity, MuscleActivity.PectineusActivity, MuscleActivity.AdductorMagnusActivity, // + AdductorMinimusActivity
                                            MuscleActivity.AdductorLongusActivity, MuscleActivity.AdductorBrevisActivity, MuscleActivity.GracilisActivity};
//      AnyVar HipAdductorMuscleActivity = MuscleActivity.ObturatorExtActivity + MuscleActivity.PectineusActivity + MuscleActivity.AdductorMagnusActivity // + AdductorMinimusActivity
//      + MuscleActivity.AdductorLongusActivity + MuscleActivity.AdductorBrevisActivity + MuscleActivity.GracilisActivity;


      /* Hip extensors:
      o	Gluteus maximus
      o	Most of the hamstrings:
      "	Long head of biceps femoris, short head is not a hip extensor, only a knee flexor
      "	Semimembranosus muscle
      "	Semitendinosus muscle

      */

//      AnyVar HipExtensorMuscleActivity = MuscleActivity.GluteusMaxActivity + MuscleActivity.BicepsFemorisCaputBreveActivity + MuscleActivity.SemimembranosusActivity + MuscleActivity.SemitendinosusActivity;
      AnyFloat HipExtensorMuscleActivity = {MuscleActivity.GluteusMaxActivity, MuscleActivity.BicepsFemorisCaputBreveActivity, MuscleActivity.SemimembranosusActivity, MuscleActivity.SemitendinosusActivity};

      /* Knee flexors:
      o	hamstrings (also hip extensors):
      "	biceps femoris (short head does not extend hip)
      "	semimembranosus
      "	semitendinosus
      o	gastrocnemius (also plantar flexor as a calf muscle)
      o	gracilis (also hip flexor/adductor)
      o	sartorius (also hip flexor/abductor/lateral rotator)
      */

//      AnyVar KneeFlexorMuscleActivity = MuscleActivity.BicepsFemorisCaputLongActivity + MuscleActivity.GastrocActivity + MuscleActivity.GracilisActivity + MuscleActivity.SartoriusActivity;
       AnyFloat KneeFlexorMuscleActivity = {MuscleActivity.BicepsFemorisCaputLongActivity, MuscleActivity.GastrocActivity, MuscleActivity.GracilisActivity, MuscleActivity.SartoriusActivity};


      // ********************************************************


       //*************************************************

      // Search Functions:

      AnyFolder MuscleForces = {


        AnySearchFun GluteusMaxForceList =  {
          #if ((LEFT_LEG_TD_SIMPLE_MUSCLES) + (LEFT_LEG_TD_MUS_3E)) == 0
          #else
          Search = "......Left.Leg.Mus.GluteusMax*.Fout";
          #endif
        };


        // GlutMed
        AnySearchFun GlutMedForceList =  {
          #if ((LEFT_LEG_TD_SIMPLE_MUSCLES) + (LEFT_LEG_TD_MUS_3E)) == 0
          #else
          Search = "......Left.Leg.Mus.GluteusMed*.Fout";
          #endif
        };

        // GlutMin
        AnySearchFun GlutMinForceList =  {
          #if ((LEFT_LEG_TD_SIMPLE_MUSCLES) + (LEFT_LEG_TD_MUS_3E)) == 0
          #else
          Search = "......Left.Leg.Mus.GluteusMin*.Fout";
          #endif
        };

        // Sartorius
        AnySearchFun SartoriusForceList =  {
          #if ((LEFT_LEG_TD_SIMPLE_MUSCLES) + (LEFT_LEG_TD_MUS_3E)) == 0
          #else
          Search = "......Left.Leg.Mus.Sartorius*.Fout";
          #endif
        };

        // Tensor Fasciae Latae
        AnySearchFun TensorFasciaeForceList =  {
          #if ((LEFT_LEG_TD_SIMPLE_MUSCLES) + (LEFT_LEG_TD_MUS_3E)) == 0
          #else
          Search = "......Left.Leg.Mus.TensorFasciae*.Fout";
          #endif
        };


        // Psoas Major
        AnySearchFun PsoasMajorForceList =  {
          #if ((LEFT_LEG_TD_SIMPLE_MUSCLES) + (LEFT_LEG_TD_MUS_3E)) == 0
          #else
          Search = "......Trunk.MusclesSpineLeft.PsoasMajor.*.Fout";
          #endif
        };


        //        // Psoas Minor
        //        AnySearchFun PsoasMinorForceList =  {
        //          #if ((LEFT_LEG_TD_SIMPLE_MUSCLES) + (LEFT_LEG_TD_MUS_3E)) == 0
        //          #else
        //          Search = "......Trunk.Leg.MusclesSpineLeft.PsoasMinor.*.Fout";
        //          #endif
        //        };

        AnySearchFun IliacusForceList =  {
          #if ((LEFT_LEG_TD_SIMPLE_MUSCLES) + (LEFT_LEG_TD_MUS_3E)) == 0
          #else
          Search = "......Left.Leg.Mus.Iliac*.Fout";
          #endif
        };

        AnySearchFun RectusFemorisForceList =  {
          #if ((LEFT_LEG_TD_SIMPLE_MUSCLES) + (LEFT_LEG_TD_MUS_3E)) == 0
          #else
          Search = "......Left.Leg.Mus.RectusF*.Fout";
          #endif
        };

        AnySearchFun PectineusForceList =  {
          #if ((LEFT_LEG_TD_SIMPLE_MUSCLES) + (LEFT_LEG_TD_MUS_3E)) == 0
          #else
          Search = "......Left.Leg.Mus.Pect*.Fout";
          #endif
        };

        AnySearchFun GracilisForceList =  {
          #if ((LEFT_LEG_TD_SIMPLE_MUSCLES) + (LEFT_LEG_TD_MUS_3E)) == 0
          #else
          Search = "......Left.Leg.Mus.Gracili*.Fout";
          #endif
        };

        AnySearchFun AdductorLongusForceList =  {
          #if ((LEFT_LEG_TD_SIMPLE_MUSCLES) + (LEFT_LEG_TD_MUS_3E)) == 0
          #else
          Search = "......Left.Leg.Mus.AdductorLongus*.Fout";
          #endif
        };

        AnySearchFun AdductorBrevisForceList =  {
          #if ((LEFT_LEG_TD_SIMPLE_MUSCLES) + (LEFT_LEG_TD_MUS_3E)) == 0
          #else
          Search = "......Left.Leg.Mus.AdductorBr*.Fout";
          #endif
        };


        AnySearchFun AdductorMagnusForceList =  {
          #if ((LEFT_LEG_TD_SIMPLE_MUSCLES) + (LEFT_LEG_TD_MUS_3E)) == 0
          #else
          Search = "......Left.Leg.Mus.AdductorMag*.Fout";
          #endif
        };

        //                 AnySearchFun AdductorMinimusForceList =  {
        //          #if ((LEFT_LEG_TD_SIMPLE_MUSCLES) + (LEFT_LEG_TD_MUS_3E)) == 0
        //          #else
        //          Search = "......Left.Leg.Mus.AdductorMin*.Fout";
        //          #endif
        //        };


        AnySearchFun ObturatorExtForceList =  {
          #if ((LEFT_LEG_TD_SIMPLE_MUSCLES) + (LEFT_LEG_TD_MUS_3E)) == 0
          #else
          Search = "......Left.Leg.Mus.ObturatorExt*.Fout";
          #endif
        };


        AnySearchFun SemimembranosusForceList =  {
          #if ((LEFT_LEG_TD_SIMPLE_MUSCLES) + (LEFT_LEG_TD_MUS_3E)) == 0
          #else
          Search = "......Left.Leg.Mus.Semimembr*.Fout";
          #endif
        };

        AnySearchFun SemimemtendinosusForceList =  {
          #if ((LEFT_LEG_TD_SIMPLE_MUSCLES) + (LEFT_LEG_TD_MUS_3E)) == 0
          #else
          Search = "......Left.Leg.Mus.Semitend*.Fout";
          #endif
        };

        AnySearchFun BicepsFemorisCaputBreveForceList =  {
          #if ((LEFT_LEG_TD_SIMPLE_MUSCLES) + (LEFT_LEG_TD_MUS_3E)) == 0
          #else
          Search = "......Left.Leg.Mus.BicepsFemorisCaputBreve*.Fout";
          #endif
        };


        AnySearchFun BicepsFemorisCaputLongForceList =  {
          #if ((LEFT_LEG_TD_SIMPLE_MUSCLES) + (LEFT_LEG_TD_MUS_3E)) == 0
          #else
          Search = "......Left.Leg.Mus.BicepsFemorisCaputL*.Fout";
          #endif
        };


        AnySearchFun GastrocForceList =  {
          #if ((LEFT_LEG_TD_SIMPLE_MUSCLES) + (LEFT_LEG_TD_MUS_3E)) == 0
          #else
          Search = "......Left.Leg.Mus.Gastroc*.Fout";
          #endif
        };
        AnySearchFun TibPostForceList =  {
          #if ((LEFT_LEG_TD_SIMPLE_MUSCLES) + (LEFT_LEG_TD_MUS_3E)) == 0
          #else
          Search = "......Left.Leg.Mus.TibialisPost*.Fout";
          #endif
        };


        AnySearchFun TibAntForceList =  {
          #if ((LEFT_LEG_TD_SIMPLE_MUSCLES) + (LEFT_LEG_TD_MUS_3E)) == 0
          #else
          Search = "......Left.Leg.Mus.TibialisAnt*.Fout";
          #endif
        };

//*****
        AnyVar GluteusMaxForce = sum(GluteusMaxForceList());
        AnyVar GluteusMedForce = sum(GlutMedForceList());
        AnyVar GluteusMinForce = sum(GlutMinForceList());
        AnyVar SartoriusForce = sum(SartoriusForceList());
        AnyVar TensorFasciaeForce = sum(TensorFasciaeForceList());
        AnyVar PsoasMajorForce = sum(PsoasMajorForceList());
        //        AnyVar PsoasMinorForce = sum(PsoasMinorForceList());
        AnyVar IliacusForce = sum(IliacusForceList());
        AnyVar RectusFemorisForce = sum(RectusFemorisForceList());
        AnyVar PectineusForce = sum(PectineusForceList());
        AnyVar GracilisForce = sum(GracilisForceList());
        AnyVar AdductorLongusForce = sum(AdductorLongusForceList());
        AnyVar AdductorBrevisForce = sum(AdductorBrevisForceList());
        AnyVar AdductorMagnusForce = sum(AdductorMagnusForceList());
        //        AnyVar AdductorMinimusForce = sum(AdductorMinimusForceList());
        AnyVar ObturatorExtForce = sum(ObturatorExtForceList());
        AnyVar SemimembranosusForce = sum(SemimembranosusForceList());
        AnyVar SemitendinosusForce = sum(SemimemtendinosusForceList());
        AnyVar BicepsFemorisCaputBreveForce = sum(BicepsFemorisCaputBreveForceList());
        AnyVar BicepsFemorisCaputLongForce = sum(BicepsFemorisCaputLongForceList());
        AnyVar GastrocForce = sum(GastrocForceList());
        AnyVar TibialisAnteriorForce= max(TibAntForceList());
        AnyVar TibialisPosteriorForce= max(TibPostForceList());

      };


      /*   Hip Abductors
      o	Gluteus medius
      o	Gluteus minimus
      o	Sartorius
      o	Tensor fasciae latae
      */

      AnyVar HipAbductorMuscleForce = MuscleForces.GluteusMedForce + MuscleForces.GluteusMedForce + MuscleForces.SartoriusForce + MuscleForces.TensorFasciaeForce;


      /* Hip Flexors:
      o	Psoas major
      o	Psoas minor
      o	Iliacus
      o	Rectus femoris
      o	Sartorius
      o	Tensor fasciae latae
      o	Pectineus
      o	Adductor longus
      o	Adductor brevis
      o	Gracilis
      */

      AnyVar HipFlexorMuscleForce = MuscleForces.PsoasMajorForce + MuscleForces.IliacusForce + MuscleForces.RectusFemorisForce + MuscleForces.SartoriusForce + MuscleForces.TensorFasciaeForce
      + MuscleForces.PectineusForce
      + MuscleForces.AdductorLongusForce + MuscleForces.AdductorBrevisForce + MuscleForces.GracilisForce;

      /*  Hip adductors:
      o	Adductor brevis
      o	Adductor longus
      o	Adductor magnus
      o	Adductor minimus
      o	pectineus
      o	gracilis
      o	Obturator externus
      */

      AnyVar HipAdductorMuscleForce = MuscleForces.ObturatorExtForce + MuscleForces.PectineusForce + MuscleForces.AdductorMagnusForce // + AdductorMinimusForce
      + MuscleForces.AdductorLongusForce + MuscleForces.AdductorBrevisForce + MuscleForces.GracilisForce;


      /* Hip extensors:
      o	Gluteus maximus
      o	Most of the hamstrings:
      "	Long head of biceps femoris, short head is not a hip extensor, only a knee flexor
      "	Semimembranosus muscle
      "	Semitendinosus muscle

      */

      AnyVar HipExtensorMuscleForce = MuscleForces.GluteusMaxForce + MuscleForces.BicepsFemorisCaputBreveForce + MuscleForces.SemimembranosusForce + MuscleForces.SemitendinosusForce;

      /* Knee flexors:
      o	hamstrings (also hip extensors):
      "	biceps femoris (short head does not extend hip)
      "	semimembranosus
      "	semitendinosus
      o	gastrocnemius (also plantar flexor as a calf muscle)
      o	gracilis (also hip flexor/adductor)
      o	sartorius (also hip flexor/abductor/lateral rotator)
      */

      AnyVar KneeFlexorMuscleForce = MuscleForces.BicepsFemorisCaputLongForce + MuscleForces.GastrocForce + MuscleForces.GracilisForce + MuscleForces.SartoriusForce;


#endif


}; //End Muscles


  }; //End Leg


}; //End Left
