//This is the calibration7 file, it will calibrate specific muscles of the leg
AnyFolder LegCal7 ={

  AnyFolder &Pelvis = ...HumanFolderRef.Trunk.SegmentsLumbar.PelvisSeg;
  AnyFolder &Sacrum = ...HumanFolderRef.Trunk.SegmentsLumbar.SacrumSeg;

  AnyFolder &LegSegSide = .SideHumanFolderRef.Leg.Seg;

  AnyFolder &LegJointsSide = .SideHumanFolderRef.Leg.Jnt;
  AnyFolder &SacrumPelvisJnt = ...HumanFolderRef.Trunk.JointsLumbar.SacrumPelvisJnt;


  AnyFixedRefFrame ground = {
    AnyRefNode node = {
      ARel=..Pelvis.Axes0;
      sRel=..Pelvis.r0;
    };
  };

  AnyRevoluteJoint PelvisGround={
    AnyRefFrame &Ground = .ground.node;
    AnyRefFrame &Sacrum= ....HumanFolderRef.Trunk.SegmentsLumbar.PelvisSeg;
    Axis=z;
  };

  AnyKinEqSimpleDriver PelvisGroundRot = {
    AnyRevoluteJoint &Jnt = .PelvisGround;
    DriverPos = {0};
    DriverVel = {0};
    Reaction.Type = {Off};
  };

  AnyKinEqSimpleDriver PelvisSacrumFix = {
    AnyKinMeasure &Jnt = .SacrumPelvisJnt;
    DriverPos = {0,0,0};
    DriverVel = {0,0,0};
    Reaction.Type = {Off,Off,Off};
  };

  AnyKinEqSimpleDriver Hip = {
    AnySphericalJoint &Spherical = .LegJointsSide.Hip;
#if BM_LEG_MORPHOLOGY == 1
    DriverPos = {-35,0,0}*pi/180; //50 degrees hip flexion
#endif
#if BM_LEG_MORPHOLOGY == 2
    DriverPos = {0,..Sign*10,..Sign*5}*pi/180;
#endif
    MeasureOrganizer = {2,0,1}; // flexion/extension, abduction/adduction, internal/external rotation
    DriverVel = {0,0,0}*pi/180;
    Reaction.Type = {Off,Off,Off};
  };

  AnyKinEqSimpleDriver Knee = {
    AnyRevoluteJoint &Hinge = .LegJointsSide.Knee;
    DriverPos = {0*pi/180};
    DriverVel = {0*pi/180};
    Reaction.Type = {Off};
  };

  AnyKinEqSimpleDriver Ankle = {
    AnyRevoluteJoint &Hinge = .LegJointsSide.Ankle;
#if BM_LEG_MORPHOLOGY == 1
    DriverPos = {10*pi/180}; //15 degrees dorsal flexion
#endif
#if BM_LEG_MORPHOLOGY == 2
    DriverPos = {0*pi/180};
#endif
    DriverVel = {0*pi/180};
    Reaction.Type = {Off};
  };

  AnyKinEqSimpleDriver SubTalar = {
    AnyRevoluteJoint &Hinge = .LegJointsSide.SubTalar;
    DriverPos = {0*pi/180};
    DriverVel = {0*pi/180};
    Reaction.Type = {Off};
  };

#if BM_LEG_MORPHOLOGY == 1
  //AnyFolder &MuscleParCal2 = .SideHumanFolderRef.Leg.MusPar;
#endif
#if BM_LEG_MORPHOLOGY == 2
  //AnyFolder &MuscleParCal6 = .SideHumanFolderRef.Leg.MusPar;
#endif

  AnyFolder Mus = {
#if BM_LEG_MORPHOLOGY == 1
    AnyViaPointMuscle &Semimembranosus1 =  ..SideHumanFolderRef.Leg.Mus.Semimembranosus1 ;
    AnyViaPointMuscle &Semitendinosus1 =  ..SideHumanFolderRef.Leg.Mus.Semitendinosus1;
#endif
#if BM_LEG_MORPHOLOGY == 2
    AnyViaPointMuscle &AdductorLongus1 = ..SideHumanFolderRef.Leg.Mus.AdductorLongus1;
    AnyViaPointMuscle &AdductorLongus2 = ..SideHumanFolderRef.Leg.Mus.AdductorLongus2;
    AnyViaPointMuscle &AdductorLongus3 = ..SideHumanFolderRef.Leg.Mus.AdductorLongus3;
    AnyViaPointMuscle &AdductorLongus4 = ..SideHumanFolderRef.Leg.Mus.AdductorLongus4;
    AnyViaPointMuscle &AdductorLongus5 = ..SideHumanFolderRef.Leg.Mus.AdductorLongus5;

    AnyViaPointMuscle &AdductorLongus6 = ..SideHumanFolderRef.Leg.Mus.AdductorLongus6;

    AnyViaPointMuscle &AdductorMagnusDistal1 = ..SideHumanFolderRef.Leg.Mus.AdductorMagnusDistal1;
    AnyViaPointMuscle &AdductorMagnusDistal2 = ..SideHumanFolderRef.Leg.Mus.AdductorMagnusDistal2;
    AnyViaPointMuscle &AdductorMagnusDistal3 = ..SideHumanFolderRef.Leg.Mus.AdductorMagnusDistal3;
    AnyViaPointMuscle &AdductorMagnusMid1 = ..SideHumanFolderRef.Leg.Mus.AdductorMagnusMid1;
    AnyViaPointMuscle &AdductorMagnusMid2 = ..SideHumanFolderRef.Leg.Mus.AdductorMagnusMid2;
    AnyViaPointMuscle &AdductorMagnusMid3 = ..SideHumanFolderRef.Leg.Mus.AdductorMagnusMid3;
    AnyViaPointMuscle &AdductorMagnusMid4 = ..SideHumanFolderRef.Leg.Mus.AdductorMagnusMid4;
    AnyViaPointMuscle &AdductorMagnusMid5 = ..SideHumanFolderRef.Leg.Mus.AdductorMagnusMid5;
    AnyViaPointMuscle &AdductorMagnusMid6 = ..SideHumanFolderRef.Leg.Mus.AdductorMagnusMid6;
    AnyViaPointMuscle &AdductorMagnusProximal1 = ..SideHumanFolderRef.Leg.Mus.AdductorMagnusProximal1;
    AnyViaPointMuscle &AdductorMagnusProximal2 = ..SideHumanFolderRef.Leg.Mus.AdductorMagnusProximal2;
    AnyViaPointMuscle &AdductorMagnusProximal3 = ..SideHumanFolderRef.Leg.Mus.AdductorMagnusProximal3;
    AnyViaPointMuscle &AdductorMagnusProximal4 = ..SideHumanFolderRef.Leg.Mus.AdductorMagnusProximal4;
    AnyViaPointMuscle &AdductorBrevisProximal1 = ..SideHumanFolderRef.Leg.Mus.AdductorBrevisProximal1 ;
    AnyViaPointMuscle &AdductorBrevisProximal2 = ..SideHumanFolderRef.Leg.Mus.AdductorBrevisProximal2 ;
    AnyViaPointMuscle &AdductorBrevisMid1 = ..SideHumanFolderRef.Leg.Mus.AdductorBrevisMid1 ;
    AnyViaPointMuscle &AdductorBrevisMid2 = ..SideHumanFolderRef.Leg.Mus.AdductorBrevisMid2 ;
    AnyViaPointMuscle &AdductorBrevisDistal1 = ..SideHumanFolderRef.Leg.Mus.AdductorBrevisDistal1 ;
    AnyViaPointMuscle &AdductorBrevisDistal2 = ..SideHumanFolderRef.Leg.Mus.AdductorBrevisDistal2 ;

    AnyViaPointMuscle &Gracilis1 = ..SideHumanFolderRef.Leg.Mus.Gracilis1;
    AnyViaPointMuscle &Gracilis2 = ..SideHumanFolderRef.Leg.Mus.Gracilis2;

    AnyShortestPathMuscle &Pectineus1 = ..SideHumanFolderRef.Leg.Mus.Pectineus1;
    AnyShortestPathMuscle &Pectineus2 = ..SideHumanFolderRef.Leg.Mus.Pectineus2;
    AnyShortestPathMuscle &Pectineus3 = ..SideHumanFolderRef.Leg.Mus.Pectineus3;
    AnyShortestPathMuscle &Pectineus4 = ..SideHumanFolderRef.Leg.Mus.Pectineus4;
#endif
  };

};

// The study: Operations to be performed on the model
AnyBodyCalibrationStudy LegCalibrationStudy7 = {
  AnyFolder &ref=.LegCal7;
  nStep = 1;
  InitialConditions.SolverType = KinSolOverDeterminate;
};
