// Definitions of muscles in the right lower extremity

// Muscles and muscle-parts added, based on the Klein Horsman dataset. Karin Gorter, 9-2007

// Mark de Zee

// Sartorius, gracilis added to "hamstrings" biarticular
// muscles 26-6-02. GMax split into three, tensor fasciae
// latae added 5-9-02
// Mark Thompson

// -------------------------------------------------------
// This is an interface reference to make sure that the
// include file MusDrawSettings.any always can be left
// unchanged and not affected by different directory
// levels.
// -------------------------------------------------------


AnyViaPointMuscle SoleusMedialis1 = {
  AnyMuscleModel &MusMdl = ..MusPar.SoleusMedialis1Par;
  AnyRefNode &Org = ..Seg.Shank.SoleusMedialis1Node;
  AnyRefNode &Ins = ..Seg.Foot.SoleusMedialis1Node;
  AnyDrawMuscle DrwMus = {#include "../DrawSettings/MusDrawSettings.any"
  };
};

AnyViaPointMuscle SoleusMedialis2 = {
  AnyMuscleModel &MusMdl = ..MusPar.SoleusMedialis2Par;
  AnyRefNode &Org = ..Seg.Shank.SoleusMedialis2Node;
  AnyRefNode &Ins = ..Seg.Foot.SoleusMedialis2Node;
  AnyDrawMuscle DrwMus = {#include "../DrawSettings/MusDrawSettings.any"
  };
};

AnyViaPointMuscle SoleusMedialis3 = {
  AnyMuscleModel &MusMdl = ..MusPar.SoleusMedialis3Par;
  AnyRefNode &Org = ..Seg.Shank.SoleusMedialis3Node;
  AnyRefNode &Ins = ..Seg.Foot.SoleusMedialis3Node;
  AnyDrawMuscle DrwMus = {#include "../DrawSettings/MusDrawSettings.any"
  };
};

AnyViaPointMuscle SoleusLateralis1 = {
  AnyMuscleModel &MusMdl = ..MusPar.SoleusLateralis1Par;
  AnyRefNode &Org = ..Seg.Shank.SoleusLateralis1Node;
  AnyRefNode &Ins = ..Seg.Foot.SoleusLateralis1Node;
  AnyDrawMuscle DrwMus = {#include "../DrawSettings/MusDrawSettings.any"
  };
};

AnyViaPointMuscle SoleusLateralis2 = {
  AnyMuscleModel &MusMdl = ..MusPar.SoleusLateralis2Par;
  AnyRefNode &Org = ..Seg.Shank.SoleusLateralis2Node;
  AnyRefNode &Ins = ..Seg.Foot.SoleusLateralis2Node;
  AnyDrawMuscle DrwMus = {#include "../DrawSettings/MusDrawSettings.any"
  };
};

AnyViaPointMuscle SoleusLateralis3 = {
  AnyMuscleModel &MusMdl = ..MusPar.SoleusLateralis3Par;
  AnyRefNode &Org = ..Seg.Shank.SoleusLateralis3Node;
  AnyRefNode &Ins = ..Seg.Foot.SoleusLateralis3Node;
  AnyDrawMuscle DrwMus = {#include "../DrawSettings/MusDrawSettings.any"
  };
};

#if BM_LEG_MORPHOLOGY == 1
AnyShortestPathMuscle GastrocnemiusLateralis1 = {
  AnyMuscleModel &MusMdl = ..MusPar.GastrocnemiusLateralis1Par;
  AnyRefNode &Org = ..Seg.Thigh.GastrocnemiusLateralis1Node;
  AnyRefNode &Via1 = ..Seg.Shank.GastrocnemiusLateralis1ViaNode;
  //  AnySurface &srf = ..Seg.Thigh.CylCenter.WrapSurf;
  AnySurface &srf = ..Seg.Thigh.GastroWrapSurf.cyl;
  AnyRefNode &Ins = ..Seg.Foot.GastrocnemiusLateralis1Node;
  SPLine.StringMesh = 45;
  AnyDrawMuscle DrwMus = {
    #include "../DrawSettings/MusDrawSettings.any"
  };
};

AnyShortestPathMuscle GastrocnemiusMedialis1 = {
  AnyMuscleModel &MusMdl = ..MusPar.GastrocnemiusMedialis1Par;
  AnyRefNode &Org = ..Seg.Thigh.GastrocnemiusMedialis1Node;
  AnyRefNode &Via1 = ..Seg.Shank.GastrocnemiusMedialis1ViaNode;
  //  AnySurface &srf = ..Seg.Thigh.CylCenter.WrapSurf;
  AnySurface &srf = ..Seg.Thigh.GastroWrapSurf.cyl;
  AnyRefNode &Ins = ..Seg.Foot.GastrocnemiusMedialis1Node;
  SPLine.StringMesh = 45;
  AnyDrawMuscle DrwMus = {
    #include "../DrawSettings/MusDrawSettings.any"
  };
};
#endif

#if BM_LEG_MORPHOLOGY == 2
AnyShortestPathMuscle GastrocnemiusLateralis1 = {
  AnyMuscleModel &MusMdl = ..MusPar.GastrocnemiusLateralis1Par;
  AnyRefNode &Org = ..Seg.Thigh.GastrocnemiusLateralis1Node;
  AnySurface &srf = ..Seg.Thigh.GastroWrapSurf.cyl;
  //  AnyRefNode &Via1 = ..Seg.Thigh.GastrocnemiusLateralis1ViaNode;
  //  AnyRefNode &Via2 = ..Seg.Thigh.GastrocnemiusLateralis2ViaNode;
  //  AnyRefNode &Via3 = ..Seg.Thigh.GastrocnemiusLateralis3ViaNode;
  //  AnyRefNode &Via4 = ..Seg.Thigh.GastrocnemiusLateralis4ViaNode;
  //  AnyRefNode &Via5 = ..Seg.Thigh.GastrocnemiusLateralis5ViaNode;
  //  AnyRefNode &Via6 = ..Seg.Thigh.GastrocnemiusLateralis6ViaNode;
  AnyRefNode &Via7 = ..Seg.Shank.GastrocnemiusLateralis7ViaNode;
  AnyRefNode &Via8 = ..Seg.Shank.GastrocnemiusLateralis8ViaNode;
  AnyRefNode &Via9 = ..Seg.Shank.GastrocnemiusLateralis9ViaNode;
  AnyRefNode &Via10 = ..Seg.Shank.GastrocnemiusLateralis10ViaNode;
  AnyRefNode &Ins = ..Seg.Foot.GastrocnemiusLateralis1Node;
  SPLine.StringMesh = 45;
  AnyDrawMuscle DrwMus = {
    #include "../DrawSettings/MusDrawSettings.any"
  };
};

AnyShortestPathMuscle GastrocnemiusMedialis1 = {
  AnyMuscleModel &MusMdl = ..MusPar.GastrocnemiusMedialis1Par;
  AnyRefNode &Org = ..Seg.Thigh.GastrocnemiusMedialis1Node;
  AnyRefNode &Via1 = ..Seg.Thigh.GastrocnemiusMedialis1ViaNode;
  AnySurface &srf = ..Seg.Thigh.GastroWrapSurf.cyl;
  //  AnyRefNode &Via2 = ..Seg.Thigh.GastrocnemiusMedialis2ViaNode;
  //  AnyRefNode &Via3 = ..Seg.Thigh.GastrocnemiusMedialis3ViaNode;
  AnyRefNode &Via4 = ..Seg.Shank.GastrocnemiusMedialis4ViaNode;
  AnyRefNode &Via5 = ..Seg.Shank.GastrocnemiusMedialis5ViaNode;
  AnyRefNode &Via6 = ..Seg.Shank.GastrocnemiusMedialis6ViaNode;
  AnyRefNode &Via7 = ..Seg.Shank.GastrocnemiusMedialis7ViaNode;
  AnyRefNode &Via8 = ..Seg.Shank.GastrocnemiusMedialis8ViaNode;
  AnyRefNode &Via9 = ..Seg.Shank.GastrocnemiusMedialis9ViaNode;
  AnyRefNode &Ins = ..Seg.Foot.GastrocnemiusMedialis1Node;
  SPLine.StringMesh = 45;
  AnyDrawMuscle DrwMus = {
    #include "../DrawSettings/MusDrawSettings.any"
  };
};
#endif


#if BM_LEG_MORPHOLOGY ==1
AnyViaPointMuscle FlexorDigitorumLongus1 = {
  AnyMuscleModel &MusMdl = ..MusPar.FlexorDigitorumLongus1Par;
  AnyRefNode &Org = ..Seg.Shank.FlexorDigitorumLongus1Node;
  AnyRefNode &Via1 = ..Seg.Shank.FlexorDigitorumLongusViaNode1;
  AnyRefNode &Via2 = ..Seg.Shank.FlexorDigitorumLongusViaNode2;
  // AnyRefNode &Via3 = ..Seg.Shank.FlexorDigitorumLongusViaNode3;
  //AnyRefNode &Via4 = ..Seg.Shank.FlexorDigitorumLongusViaNode4;
  AnyRefNode &Via5 = ..Seg.Shank.FlexorDigitorumLongusViaNode5;
  AnyRefNode &Via6 = ..Seg.Shank.FlexorDigitorumLongusViaNode6;
  AnyRefNode &Via7 = ..Seg.Foot.FlexorDigitorumLongusViaNode7;
  AnyRefNode &Via8 = ..Seg.Foot.FlexorDigitorumLongusViaNode8;
  AnyRefNode &Ins = ..Seg.Foot.FlexorDigitorumLongus1Node;
  AnyDrawMuscle DrwMus = {
    #include "../DrawSettings/MusDrawSettings.any"};
};

AnyViaPointMuscle FlexorDigitorumLongus2 = {
  AnyMuscleModel &MusMdl = ..MusPar.FlexorDigitorumLongus2Par;
  AnyRefNode &Org = ..Seg.Shank.FlexorDigitorumLongus2Node;
  AnyRefNode &Via1 = ..Seg.Shank.FlexorDigitorumLongusViaNode1;
  AnyRefNode &Via2 = ..Seg.Shank.FlexorDigitorumLongusViaNode2;
  // AnyRefNode &Via3 = ..Seg.Shank.FlexorDigitorumLongusViaNode3;
  // AnyRefNode &Via4 = ..Seg.Shank.FlexorDigitorumLongusViaNode4;
  AnyRefNode &Via5 = ..Seg.Shank.FlexorDigitorumLongusViaNode5;
  AnyRefNode &Via6 = ..Seg.Shank.FlexorDigitorumLongusViaNode6;
  AnyRefNode &Via7 = ..Seg.Foot.FlexorDigitorumLongusViaNode7;
  AnyRefNode &Via8 = ..Seg.Foot.FlexorDigitorumLongusViaNode8;
  AnyRefNode &Ins = ..Seg.Foot.FlexorDigitorumLongus2Node;
  AnyDrawMuscle DrwMus = {
    #include "../DrawSettings/MusDrawSettings.any"
  };
};

AnyViaPointMuscle FlexorDigitorumLongus3 = {
  AnyMuscleModel &MusMdl = ..MusPar.FlexorDigitorumLongus3Par;
  AnyRefNode &Org = ..Seg.Shank.FlexorDigitorumLongus3Node;
  AnyRefNode &Via1 = ..Seg.Shank.FlexorDigitorumLongusViaNode1;
  AnyRefNode &Via2 = ..Seg.Shank.FlexorDigitorumLongusViaNode2;
  //AnyRefNode &Via3 = ..Seg.Shank.FlexorDigitorumLongusViaNode3;
  //AnyRefNode &Via4 = ..Seg.Shank.FlexorDigitorumLongusViaNode4;
  AnyRefNode &Via5 = ..Seg.Shank.FlexorDigitorumLongusViaNode5;
  AnyRefNode &Via6 = ..Seg.Shank.FlexorDigitorumLongusViaNode6;
  AnyRefNode &Via7 = ..Seg.Foot.FlexorDigitorumLongusViaNode7;
  AnyRefNode &Via8 = ..Seg.Foot.FlexorDigitorumLongusViaNode8;
  AnyRefNode &Ins = ..Seg.Foot.FlexorDigitorumLongus3Node;
  AnyDrawMuscle DrwMus = {
    #include "../DrawSettings/MusDrawSettings.any"
  };
};
#endif

#if BM_LEG_MORPHOLOGY == 2
AnyViaPointMuscle FlexorDigitorumLongus1 = {
  AnyMuscleModel &MusMdl = ..MusPar.FlexorDigitorumLongus1Par;
  AnyRefNode &Org = ..Seg.Shank.FlexorDigitorumLongus1Node;
  AnyRefNode &Via1 = ..Seg.Shank.FlexorDigitorumLongusViaNode1;
  AnyRefNode &Via2 = ..Seg.Shank.FlexorDigitorumLongusViaNode2;
  AnyRefNode &Via3 = ..Seg.Shank.FlexorDigitorumLongusViaNode3;
  AnyRefNode &Via4 = ..Seg.Shank.FlexorDigitorumLongusViaNode4;
  AnyRefNode &Via5 = ..Seg.Shank.FlexorDigitorumLongusViaNode5;
//  AnyRefNode &Via6 = ..Seg.Shank.FlexorDigitorumLongusViaNode6;
  AnyRefNode &Via7 = ..Seg.Foot.FlexorDigitorumLongusViaNode7;
  AnyRefNode &Via8 = ..Seg.Foot.FlexorDigitorumLongusViaNode8;
//  AnyRefNode &Via9 = ..Seg.Foot.FlexorDigitorumLongusViaNode9;
  AnyRefNode &Ins = ..Seg.Foot.FlexorDigitorumLongus1Node;
  AnyDrawMuscle DrwMus = {
    #include "../DrawSettings/MusDrawSettings.any"};
};

AnyViaPointMuscle FlexorDigitorumLongus2 = {
  AnyMuscleModel &MusMdl = ..MusPar.FlexorDigitorumLongus2Par;
  AnyRefNode &Org = ..Seg.Shank.FlexorDigitorumLongus2Node;
  AnyRefNode &Via1 = ..Seg.Shank.FlexorDigitorumLongusViaNode1;
  AnyRefNode &Via2 = ..Seg.Shank.FlexorDigitorumLongusViaNode2;
  AnyRefNode &Via3 = ..Seg.Shank.FlexorDigitorumLongusViaNode3;
  AnyRefNode &Via4 = ..Seg.Shank.FlexorDigitorumLongusViaNode4;
  AnyRefNode &Via5 = ..Seg.Shank.FlexorDigitorumLongusViaNode5;
//  AnyRefNode &Via6 = ..Seg.Shank.FlexorDigitorumLongusViaNode6;
  AnyRefNode &Via7 = ..Seg.Foot.FlexorDigitorumLongusViaNode7;
  AnyRefNode &Via8 = ..Seg.Foot.FlexorDigitorumLongusViaNode8;
 // AnyRefNode &Via9 = ..Seg.Foot.FlexorDigitorumLongusViaNode10;
  AnyRefNode &Ins = ..Seg.Foot.FlexorDigitorumLongus2Node;
  AnyDrawMuscle DrwMus = {
    #include "../DrawSettings/MusDrawSettings.any"};
};

AnyViaPointMuscle FlexorDigitorumLongus3 = {
  AnyMuscleModel &MusMdl = ..MusPar.FlexorDigitorumLongus3Par;
  AnyRefNode &Org = ..Seg.Shank.FlexorDigitorumLongus3Node;
  AnyRefNode &Via1 = ..Seg.Shank.FlexorDigitorumLongusViaNode1;
  AnyRefNode &Via2 = ..Seg.Shank.FlexorDigitorumLongusViaNode2;
  AnyRefNode &Via3 = ..Seg.Shank.FlexorDigitorumLongusViaNode3;
  AnyRefNode &Via4 = ..Seg.Shank.FlexorDigitorumLongusViaNode4;
  AnyRefNode &Via5 = ..Seg.Shank.FlexorDigitorumLongusViaNode5;
//  AnyRefNode &Via6 = ..Seg.Shank.FlexorDigitorumLongusViaNode6;
  AnyRefNode &Via7 = ..Seg.Foot.FlexorDigitorumLongusViaNode7;
  AnyRefNode &Via8 = ..Seg.Foot.FlexorDigitorumLongusViaNode8;
 // AnyRefNode &Via9 = ..Seg.Foot.FlexorDigitorumLongusViaNode11;
  AnyRefNode &Ins = ..Seg.Foot.FlexorDigitorumLongus3Node;
  AnyDrawMuscle DrwMus = {
    #include "../DrawSettings/MusDrawSettings.any"};
};
AnyViaPointMuscle FlexorDigitorumLongus4 = {
  AnyMuscleModel &MusMdl = ..MusPar.FlexorDigitorumLongus4Par;
  AnyRefNode &Org = ..Seg.Shank.FlexorDigitorumLongus4Node;
  AnyRefNode &Via1 = ..Seg.Shank.FlexorDigitorumLongusViaNode1;
  AnyRefNode &Via2 = ..Seg.Shank.FlexorDigitorumLongusViaNode2;
  AnyRefNode &Via3 = ..Seg.Shank.FlexorDigitorumLongusViaNode3;
  AnyRefNode &Via4 = ..Seg.Shank.FlexorDigitorumLongusViaNode4;
  AnyRefNode &Via5 = ..Seg.Shank.FlexorDigitorumLongusViaNode5;
//  AnyRefNode &Via6 = ..Seg.Shank.FlexorDigitorumLongusViaNode6;
  AnyRefNode &Via7 = ..Seg.Foot.FlexorDigitorumLongusViaNode7;
  AnyRefNode &Via8 = ..Seg.Foot.FlexorDigitorumLongusViaNode8;
  //AnyRefNode &Via9 = ..Seg.Foot.FlexorDigitorumLongusViaNode12;
  AnyRefNode &Ins = ..Seg.Foot.FlexorDigitorumLongus4Node;
  AnyDrawMuscle DrwMus = {
    #include "../DrawSettings/MusDrawSettings.any"};
};
#endif

#if BM_LEG_MORPHOLOGY == 1
AnyViaPointMuscle FlexorHallucisLongus1 = {
  AnyMuscleModel &MusMdl = ..MusPar.FlexorHallucisLongus1Par;
  AnyRefNode &Org = ..Seg.Shank.FlexorHallucisLongus1Node;
  AnyRefNode &Via1 = ..Seg.Shank.FlexorHallucisLongusViaNode1;
  //AnyRefNode &Via2 = ..Seg.Shank.FlexorHallucisLongusViaNode2;
  //AnyRefNode &Via3 = ..Seg.Shank.FlexorHallucisLongusViaNode3;
  //AnyRefNode &Via4 = ..Seg.Shank.FlexorHallucisLongusViaNode4;
  AnyRefNode &Via5 = ..Seg.Shank.FlexorHallucisLongusViaNode5;
  AnyRefNode &Via6 = ..Seg.Shank.FlexorHallucisLongusViaNode6;
  AnyRefNode &Via7 = ..Seg.Foot.FlexorHallucisLongusViaNode7;
  AnyRefNode &Via8 = ..Seg.Foot.FlexorHallucisLongusViaNode8;
  AnyRefNode &Ins = ..Seg.Foot.FlexorHallucisLongus1Node;
  AnyDrawMuscle DrwMus = { #include "../DrawSettings/MusDrawSettings.any"};
};
AnyViaPointMuscle FlexorHallucisLongus2 = {
  AnyMuscleModel &MusMdl = ..MusPar.FlexorHallucisLongus2Par;
  AnyRefNode &Org = ..Seg.Shank.FlexorHallucisLongus2Node;
  AnyRefNode &Via1 = ..Seg.Shank.FlexorHallucisLongusViaNode1;
  //AnyRefNode &Via2 = ..Seg.Shank.FlexorHallucisLongusViaNode2;
  //AnyRefNode &Via3 = ..Seg.Shank.FlexorHallucisLongusViaNode3;
  //AnyRefNode &Via4 = ..Seg.Shank.FlexorHallucisLongusViaNode4;
  AnyRefNode &Via5 = ..Seg.Shank.FlexorHallucisLongusViaNode5;
  AnyRefNode &Via6 = ..Seg.Shank.FlexorHallucisLongusViaNode6;
  AnyRefNode &Via7 = ..Seg.Foot.FlexorHallucisLongusViaNode7;
  AnyRefNode &Via8 = ..Seg.Foot.FlexorHallucisLongusViaNode8;
  AnyRefNode &Ins = ..Seg.Foot.FlexorHallucisLongus2Node;
  AnyDrawMuscle DrwMus = {#include "../DrawSettings/MusDrawSettings.any"
  };
};
AnyViaPointMuscle FlexorHallucisLongus3 = {
  AnyMuscleModel &MusMdl = ..MusPar.FlexorHallucisLongus3Par;
  AnyRefNode &Org = ..Seg.Shank.FlexorHallucisLongus3Node;
  AnyRefNode &Via1 = ..Seg.Shank.FlexorHallucisLongusViaNode1;
  // AnyRefNode &Via2 = ..Seg.Shank.FlexorHallucisLongusViaNode2;
  // AnyRefNode &Via3 = ..Seg.Shank.FlexorHallucisLongusViaNode3;
  //AnyRefNode &Via4 = ..Seg.Shank.FlexorHallucisLongusViaNode4;
  AnyRefNode &Via5 = ..Seg.Shank.FlexorHallucisLongusViaNode5;
  AnyRefNode &Via6 = ..Seg.Shank.FlexorHallucisLongusViaNode6;
  AnyRefNode &Via7 = ..Seg.Foot.FlexorHallucisLongusViaNode7;
  AnyRefNode &Via8 = ..Seg.Foot.FlexorHallucisLongusViaNode8;
  AnyRefNode &Ins = ..Seg.Foot.FlexorHallucisLongus3Node;
  AnyDrawMuscle DrwMus = {#include "../DrawSettings/MusDrawSettings.any"};
};
#endif

#if BM_LEG_MORPHOLOGY == 2
AnyViaPointMuscle FlexorHallucisLongus1 = {
  AnyMuscleModel &MusMdl = ..MusPar.FlexorHallucisLongus1Par;
  AnyRefNode &Org = ..Seg.Shank.FlexorHallucisLongus1Node;
  AnyRefNode &Via1 = ..Seg.Shank.FlexorHallucisLongusViaNode1;
  AnyRefNode &Via2 = ..Seg.Shank.FlexorHallucisLongusViaNode2;
  AnyRefNode &Via3 = ..Seg.Shank.FlexorHallucisLongusViaNode3;
  AnyRefNode &Via4 = ..Seg.Shank.FlexorHallucisLongusViaNode4;
//  AnyRefNode &Via5 = ..Seg.Shank.FlexorHallucisLongusViaNode5;
//  AnyRefNode &Via6 = ..Seg.Shank.FlexorHallucisLongusViaNode6;
  AnyRefNode &Via7 = ..Seg.Foot.FlexorHallucisLongusViaNode7;
//  AnyRefNode &Via8 = ..Seg.Foot.FlexorHallucisLongusViaNode8;
  AnyRefNode &Ins = ..Seg.Foot.FlexorHallucisLongus1Node;
  AnyDrawMuscle DrwMus = { #include "../DrawSettings/MusDrawSettings.any"};
};
AnyViaPointMuscle FlexorHallucisLongus2 = {
  AnyMuscleModel &MusMdl = ..MusPar.FlexorHallucisLongus2Par;
  AnyRefNode &Org = ..Seg.Shank.FlexorHallucisLongus2Node;
  AnyRefNode &Via1 = ..Seg.Shank.FlexorHallucisLongusViaNode1;
  AnyRefNode &Via2 = ..Seg.Shank.FlexorHallucisLongusViaNode2;
  AnyRefNode &Via3 = ..Seg.Shank.FlexorHallucisLongusViaNode3;
  AnyRefNode &Via4 = ..Seg.Shank.FlexorHallucisLongusViaNode4;
//  AnyRefNode &Via5 = ..Seg.Shank.FlexorHallucisLongusViaNode5;
//  AnyRefNode &Via6 = ..Seg.Shank.FlexorHallucisLongusViaNode6;
  AnyRefNode &Via7 = ..Seg.Foot.FlexorHallucisLongusViaNode7;
 // AnyRefNode &Via8 = ..Seg.Foot.FlexorHallucisLongusViaNode8;
  AnyRefNode &Ins = ..Seg.Foot.FlexorHallucisLongus2Node;
  AnyDrawMuscle DrwMus = { #include "../DrawSettings/MusDrawSettings.any"};
};
AnyViaPointMuscle FlexorHallucisLongus3 = {
  AnyMuscleModel &MusMdl = ..MusPar.FlexorHallucisLongus3Par;
  AnyRefNode &Org = ..Seg.Shank.FlexorHallucisLongus3Node;
  AnyRefNode &Via1 = ..Seg.Shank.FlexorHallucisLongusViaNode1;
  AnyRefNode &Via2 = ..Seg.Shank.FlexorHallucisLongusViaNode2;
  AnyRefNode &Via3 = ..Seg.Shank.FlexorHallucisLongusViaNode3;
  AnyRefNode &Via4 = ..Seg.Shank.FlexorHallucisLongusViaNode4;
//  AnyRefNode &Via5 = ..Seg.Shank.FlexorHallucisLongusViaNode5;
//  AnyRefNode &Via6 = ..Seg.Shank.FlexorHallucisLongusViaNode6;
  AnyRefNode &Via7 = ..Seg.Foot.FlexorHallucisLongusViaNode7;
 // AnyRefNode &Via8 = ..Seg.Foot.FlexorHallucisLongusViaNode8;
  AnyRefNode &Ins = ..Seg.Foot.FlexorHallucisLongus3Node;
  AnyDrawMuscle DrwMus = { #include "../DrawSettings/MusDrawSettings.any"};
};
#endif

AnyViaPointMuscle TibialisPosteriorLateralis1 = {
  AnyMuscleModel &MusMdl = ..MusPar.TibialisPosteriorLateralis1Par;
  AnyRefNode &Org = ..Seg.Shank.TibialisPosteriorLateralis1Node;
  #if BM_LEG_MORPHOLOGY == 1
  AnyRefNode &Via1 = ..Seg.Shank.TibialisPosteriorLateralisViaNode1;
  AnyRefNode &Via2 = ..Seg.Shank.TibialisPosteriorLateralisViaNode2;
  AnyRefNode &Via3 = ..Seg.Shank.TibialisPosteriorLateralisViaNode3;
  AnyRefNode &Via4 = ..Seg.Shank.TibialisPosteriorLateralisViaNode4;
  AnyRefNode &Via5 = ..Seg.Shank.TibialisPosteriorLateralisViaNode5;
  AnyRefNode &Via6 = ..Seg.Shank.TibialisPosteriorLateralisViaNode6;
  AnyRefNode &Via7 = ..Seg.Shank.TibialisPosteriorLateralisViaNode7;
  AnyRefNode &Via8 = ..Seg.Shank.TibialisPosteriorLateralisViaNode8;
  AnyRefNode &Via9 = ..Seg.Shank.TibialisPosteriorLateralisViaNode9;
  //AnyRefNode &Via10 = ..Seg.Shank.TibialisPosteriorLateralisViaNode10;
  AnyRefNode &Via10 = ..Seg.Foot.TibialisPosteriorLateralisViaNode10;
  #endif
  #if BM_LEG_MORPHOLOGY == 2
  AnyRefNode &Via1 = ..Seg.Shank.TibialisPosteriorViaNode1;
//  AnyRefNode &Via2 = ..Seg.Shank.TibialisPosteriorViaNode2;
//  AnyRefNode &Via3 = ..Seg.Shank.TibialisPosteriorViaNode3;
  //AnyRefNode &Via4 = ..Seg.Shank.TibialisPosteriorViaNode4;
//  AnyRefNode &Via5 = ..Seg.Foot.TibialisPosteriorViaNode5;
  AnyRefNode &Via6 = ..Seg.Foot.TibialisPosteriorViaNode6;
  AnyRefNode &Via7 = ..Seg.Foot.TibialisPosteriorViaNode7;
  #endif
  AnyRefNode &Ins = ..Seg.Foot.TibialisPosteriorLateralis1Node;
  AnyDrawMuscle DrwMus = {#include "../DrawSettings/MusDrawSettings.any"
  };
};

AnyViaPointMuscle TibialisPosteriorLateralis2 = {
  AnyMuscleModel &MusMdl = ..MusPar.TibialisPosteriorLateralis2Par;
  AnyRefNode &Org = ..Seg.Shank.TibialisPosteriorLateralis2Node;
  #if BM_LEG_MORPHOLOGY == 1
  AnyRefNode &Via1 = ..Seg.Shank.TibialisPosteriorLateralisViaNode1;
  AnyRefNode &Via2 = ..Seg.Shank.TibialisPosteriorLateralisViaNode2;
  AnyRefNode &Via3 = ..Seg.Shank.TibialisPosteriorLateralisViaNode3;
  AnyRefNode &Via4 = ..Seg.Shank.TibialisPosteriorLateralisViaNode4;
  AnyRefNode &Via5 = ..Seg.Shank.TibialisPosteriorLateralisViaNode5;
  AnyRefNode &Via6 = ..Seg.Shank.TibialisPosteriorLateralisViaNode6;
  AnyRefNode &Via7 = ..Seg.Shank.TibialisPosteriorLateralisViaNode7;
  AnyRefNode &Via8 = ..Seg.Shank.TibialisPosteriorLateralisViaNode8;
  AnyRefNode &Via9 = ..Seg.Shank.TibialisPosteriorLateralisViaNode9;
  AnyRefNode &Via10 = ..Seg.Foot.TibialisPosteriorLateralisViaNode10;
  #endif
  #if BM_LEG_MORPHOLOGY == 2
  AnyRefNode &Via1 = ..Seg.Shank.TibialisPosteriorViaNode1;
//  AnyRefNode &Via2 = ..Seg.Shank.TibialisPosteriorViaNode2;
//  AnyRefNode &Via3 = ..Seg.Shank.TibialisPosteriorViaNode3;
  //AnyRefNode &Via4 = ..Seg.Shank.TibialisPosteriorViaNode4;
//  AnyRefNode &Via5 = ..Seg.Foot.TibialisPosteriorViaNode5;
  AnyRefNode &Via6 = ..Seg.Foot.TibialisPosteriorViaNode6;
  AnyRefNode &Via7 = ..Seg.Foot.TibialisPosteriorViaNode7;
  #endif
  AnyRefNode &Ins = ..Seg.Foot.TibialisPosteriorLateralis2Node;
  AnyDrawMuscle DrwMus = {#include "../DrawSettings/MusDrawSettings.any"
  };
};

AnyViaPointMuscle TibialisPosteriorLateralis3 = {
  AnyMuscleModel &MusMdl = ..MusPar.TibialisPosteriorLateralis3Par;
  AnyRefNode &Org = ..Seg.Shank.TibialisPosteriorLateralis3Node;
  #if BM_LEG_MORPHOLOGY == 1
  AnyRefNode &Via1 = ..Seg.Shank.TibialisPosteriorLateralisViaNode1;
  AnyRefNode &Via2 = ..Seg.Shank.TibialisPosteriorLateralisViaNode2;
  AnyRefNode &Via3 = ..Seg.Shank.TibialisPosteriorLateralisViaNode3;
  AnyRefNode &Via4 = ..Seg.Shank.TibialisPosteriorLateralisViaNode4;
  AnyRefNode &Via5 = ..Seg.Shank.TibialisPosteriorLateralisViaNode5;
  AnyRefNode &Via6 = ..Seg.Shank.TibialisPosteriorLateralisViaNode6;
  AnyRefNode &Via7 = ..Seg.Shank.TibialisPosteriorLateralisViaNode7;
  AnyRefNode &Via8 = ..Seg.Shank.TibialisPosteriorLateralisViaNode8;
  AnyRefNode &Via9 = ..Seg.Shank.TibialisPosteriorLateralisViaNode9;
  AnyRefNode &Via10 = ..Seg.Foot.TibialisPosteriorLateralisViaNode10;
  #endif
  #if BM_LEG_MORPHOLOGY == 2
  AnyRefNode &Via1 = ..Seg.Shank.TibialisPosteriorViaNode1;
//  AnyRefNode &Via2 = ..Seg.Shank.TibialisPosteriorViaNode2;
//  AnyRefNode &Via3 = ..Seg.Shank.TibialisPosteriorViaNode3;
  //AnyRefNode &Via4 = ..Seg.Shank.TibialisPosteriorViaNode4;
//  AnyRefNode &Via5 = ..Seg.Foot.TibialisPosteriorViaNode5;
  AnyRefNode &Via6 = ..Seg.Foot.TibialisPosteriorViaNode6;
  AnyRefNode &Via7 = ..Seg.Foot.TibialisPosteriorViaNode7;
  #endif
  AnyRefNode &Ins = ..Seg.Foot.TibialisPosteriorLateralis3Node;
  AnyDrawMuscle DrwMus = {#include "../DrawSettings/MusDrawSettings.any"
  };
};

AnyViaPointMuscle TibialisPosteriorMedialis1 = {
  AnyMuscleModel &MusMdl = ..MusPar.TibialisPosteriorMedialis1Par;
  AnyRefNode &Org = ..Seg.Shank.TibialisPosteriorMedialis1Node;
  #if BM_LEG_MORPHOLOGY == 1
  AnyRefNode &Via1 = ..Seg.Shank.TibialisPosteriorMedialisViaNode1;
  AnyRefNode &Via2 = ..Seg.Shank.TibialisPosteriorMedialisViaNode2;
  AnyRefNode &Via3 = ..Seg.Shank.TibialisPosteriorMedialisViaNode3;
  AnyRefNode &Via4 = ..Seg.Shank.TibialisPosteriorMedialisViaNode4;
  AnyRefNode &Via5 = ..Seg.Shank.TibialisPosteriorMedialisViaNode5;
  AnyRefNode &Via6 = ..Seg.Shank.TibialisPosteriorMedialisViaNode6;
  AnyRefNode &Via7 = ..Seg.Shank.TibialisPosteriorMedialisViaNode7;
  AnyRefNode &Via8 = ..Seg.Shank.TibialisPosteriorMedialisViaNode8;
  AnyRefNode &Via9 = ..Seg.Shank.TibialisPosteriorMedialisViaNode9;
  AnyRefNode &Via10 = ..Seg.Shank.TibialisPosteriorMedialisViaNode10;
  AnyRefNode &Via11 = ..Seg.Foot.TibialisPosteriorMedialisViaNode11;
  #endif
  #if BM_LEG_MORPHOLOGY == 2
  AnyRefNode &Via1 = ..Seg.Shank.TibialisPosteriorViaNode1;
//  AnyRefNode &Via2 = ..Seg.Shank.TibialisPosteriorViaNode2;
//  AnyRefNode &Via3 = ..Seg.Shank.TibialisPosteriorViaNode3;
  //AnyRefNode &Via4 = ..Seg.Shank.TibialisPosteriorViaNode4;
//  AnyRefNode &Via5 = ..Seg.Foot.TibialisPosteriorViaNode5;
  AnyRefNode &Via6 = ..Seg.Foot.TibialisPosteriorViaNode6;
  AnyRefNode &Via7 = ..Seg.Foot.TibialisPosteriorViaNode7;
  #endif
  AnyRefNode &Ins = ..Seg.Foot.TibialisPosteriorMedialis1Node;
  AnyDrawMuscle DrwMus = {#include "../DrawSettings/MusDrawSettings.any"
  };
};

AnyViaPointMuscle TibialisPosteriorMedialis2 = {
  AnyMuscleModel &MusMdl = ..MusPar.TibialisPosteriorMedialis2Par;
  AnyRefNode &Org = ..Seg.Shank.TibialisPosteriorMedialis2Node;
  #if BM_LEG_MORPHOLOGY == 1
  AnyRefNode &Via1 = ..Seg.Shank.TibialisPosteriorMedialisViaNode1;
  AnyRefNode &Via2 = ..Seg.Shank.TibialisPosteriorMedialisViaNode2;
  AnyRefNode &Via3 = ..Seg.Shank.TibialisPosteriorMedialisViaNode3;
  AnyRefNode &Via4 = ..Seg.Shank.TibialisPosteriorMedialisViaNode4;
  AnyRefNode &Via5 = ..Seg.Shank.TibialisPosteriorMedialisViaNode5;
  AnyRefNode &Via6 = ..Seg.Shank.TibialisPosteriorMedialisViaNode6;
  AnyRefNode &Via7 = ..Seg.Shank.TibialisPosteriorMedialisViaNode7;
  AnyRefNode &Via8 = ..Seg.Shank.TibialisPosteriorMedialisViaNode8;
  AnyRefNode &Via9 = ..Seg.Shank.TibialisPosteriorMedialisViaNode9;
  AnyRefNode &Via10 = ..Seg.Shank.TibialisPosteriorMedialisViaNode10;
  AnyRefNode &Via11 = ..Seg.Foot.TibialisPosteriorMedialisViaNode11;
  #endif
  #if BM_LEG_MORPHOLOGY == 2
  AnyRefNode &Via1 = ..Seg.Shank.TibialisPosteriorViaNode1;
  AnyRefNode &Via2 = ..Seg.Shank.TibialisPosteriorViaNode2;
//  AnyRefNode &Via3 = ..Seg.Shank.TibialisPosteriorViaNode3;
  //AnyRefNode &Via4 = ..Seg.Shank.TibialisPosteriorViaNode4;
//  AnyRefNode &Via5 = ..Seg.Foot.TibialisPosteriorViaNode5;
  AnyRefNode &Via6 = ..Seg.Foot.TibialisPosteriorViaNode6;
  AnyRefNode &Via7 = ..Seg.Foot.TibialisPosteriorViaNode7;
  #endif
  AnyRefNode &Ins = ..Seg.Foot.TibialisPosteriorMedialis2Node;
  AnyDrawMuscle DrwMus = {#include "../DrawSettings/MusDrawSettings.any"
  };
};

AnyViaPointMuscle TibialisPosteriorMedialis3 = {
  AnyMuscleModel &MusMdl = ..MusPar.TibialisPosteriorMedialis3Par;
  AnyRefNode &Org = ..Seg.Shank.TibialisPosteriorMedialis3Node;
  #if BM_LEG_MORPHOLOGY == 1
  AnyRefNode &Via1 = ..Seg.Shank.TibialisPosteriorMedialisViaNode1;
  AnyRefNode &Via2 = ..Seg.Shank.TibialisPosteriorMedialisViaNode2;
  AnyRefNode &Via3 = ..Seg.Shank.TibialisPosteriorMedialisViaNode3;
  AnyRefNode &Via4 = ..Seg.Shank.TibialisPosteriorMedialisViaNode4;
  AnyRefNode &Via5 = ..Seg.Shank.TibialisPosteriorMedialisViaNode5;
  AnyRefNode &Via6 = ..Seg.Shank.TibialisPosteriorMedialisViaNode6;
  AnyRefNode &Via7 = ..Seg.Shank.TibialisPosteriorMedialisViaNode7;
  AnyRefNode &Via8 = ..Seg.Shank.TibialisPosteriorMedialisViaNode8;
  AnyRefNode &Via9 = ..Seg.Shank.TibialisPosteriorMedialisViaNode9;
  AnyRefNode &Via10 = ..Seg.Shank.TibialisPosteriorMedialisViaNode10;
  AnyRefNode &Via11 = ..Seg.Foot.TibialisPosteriorMedialisViaNode11;
  #endif
  #if BM_LEG_MORPHOLOGY == 2
  AnyRefNode &Via1 = ..Seg.Shank.TibialisPosteriorViaNode1;
  AnyRefNode &Via2 = ..Seg.Shank.TibialisPosteriorViaNode2;
//  AnyRefNode &Via3 = ..Seg.Shank.TibialisPosteriorViaNode3;
  //AnyRefNode &Via4 = ..Seg.Shank.TibialisPosteriorViaNode4;
//  AnyRefNode &Via5 = ..Seg.Foot.TibialisPosteriorViaNode5;
  AnyRefNode &Via6 = ..Seg.Foot.TibialisPosteriorViaNode6;
  AnyRefNode &Via7 = ..Seg.Foot.TibialisPosteriorViaNode7;
  #endif
  AnyRefNode &Ins = ..Seg.Foot.TibialisPosteriorMedialis3Node;
  AnyDrawMuscle DrwMus = {#include "../DrawSettings/MusDrawSettings.any"
  };
};

AnyViaPointMuscle TibialisAnterior1 = {
  AnyMuscleModel &MusMdl = ..MusPar.TibialisAnterior1Par;
  AnyRefNode &Org = ..Seg.Shank.TibialisAnterior1Node;
  AnyRefNode &Via1 = ..Seg.Shank.TibialisAnteriorViaNode1;
    #if BM_LEG_MORPHOLOGY == 1
  AnyRefNode &Via2 = ..Seg.Foot.TibialisAnteriorViaNode2;
#endif
  #if BM_LEG_MORPHOLOGY == 2
  AnyRefNode &Via3 = ..Seg.Foot.TibialisAnteriorViaNode3;
  #endif
  AnyRefNode &Ins = ..Seg.Foot.TibialisAnterior1Node;
  AnyDrawMuscle DrwMus = {#include "../DrawSettings/MusDrawSettings.any"
  };
};

AnyViaPointMuscle TibialisAnterior2 = {
  AnyMuscleModel &MusMdl = ..MusPar.TibialisAnterior2Par;
  AnyRefNode &Org = ..Seg.Shank.TibialisAnterior2Node;
  AnyRefNode &Via1 = ..Seg.Shank.TibialisAnteriorViaNode1;
      #if BM_LEG_MORPHOLOGY == 1
  AnyRefNode &Via2 = ..Seg.Foot.TibialisAnteriorViaNode2;
  #endif
  #if BM_LEG_MORPHOLOGY == 2
  AnyRefNode &Via3 = ..Seg.Foot.TibialisAnteriorViaNode3;
  #endif
  AnyRefNode &Ins = ..Seg.Foot.TibialisAnterior2Node;
  AnyDrawMuscle DrwMus = {#include "../DrawSettings/MusDrawSettings.any"
  };
};

AnyViaPointMuscle TibialisAnterior3 = {
  AnyMuscleModel &MusMdl = ..MusPar.TibialisAnterior3Par;
  AnyRefNode &Org = ..Seg.Shank.TibialisAnterior3Node;
  AnyRefNode &Via1 = ..Seg.Shank.TibialisAnteriorViaNode1;
      #if BM_LEG_MORPHOLOGY == 1
  AnyRefNode &Via2 = ..Seg.Foot.TibialisAnteriorViaNode2;
  #endif
  #if BM_LEG_MORPHOLOGY == 2
  AnyRefNode &Via3 = ..Seg.Foot.TibialisAnteriorViaNode3;
  #endif
  AnyRefNode &Ins = ..Seg.Foot.TibialisAnterior1Node;
  AnyDrawMuscle DrwMus = {#include "../DrawSettings/MusDrawSettings.any"
  };
};

AnyViaPointMuscle PeroneusBrevis1 = {
  AnyMuscleModel &MusMdl = ..MusPar.PeroneusBrevis1Par;
  AnyRefNode &Org = ..Seg.Shank.PeroneusBrevis1Node;
  AnyRefNode &Via1 = ..Seg.Shank.PeroneusBrevisViaNode1;
  AnyRefNode &Via2 = ..Seg.Shank.PeroneusBrevisViaNode2;
  AnyRefNode &Via3 = ..Seg.Shank.PeroneusBrevisViaNode3;
  AnyRefNode &Via4 = ..Seg.Foot.PeroneusBrevisViaNode4;
  #if BM_LEG_MORPHOLOGY == 2
  AnyRefNode &Via6 = ..Seg.Foot.PeroneusBrevisSplitPoint1Node;
  #endif
  AnyRefNode &Ins = ..Seg.Foot.PeroneusBrevis1Node;
  AnyDrawMuscle DrwMus = {#include "../DrawSettings/MusDrawSettings.any"
  };
};

AnyViaPointMuscle PeroneusBrevis2 = {
  AnyMuscleModel &MusMdl = ..MusPar.PeroneusBrevis2Par;
  AnyRefNode &Org = ..Seg.Shank.PeroneusBrevis2Node;
  AnyRefNode &Via1 = ..Seg.Shank.PeroneusBrevisViaNode1;
  AnyRefNode &Via2 = ..Seg.Shank.PeroneusBrevisViaNode2;
  AnyRefNode &Via3 = ..Seg.Shank.PeroneusBrevisViaNode3;
  AnyRefNode &Via4 = ..Seg.Foot.PeroneusBrevisViaNode4;
  #if BM_LEG_MORPHOLOGY == 2
  AnyRefNode &Via6 = ..Seg.Foot.PeroneusBrevisSplitPoint1Node;
  #endif
  AnyRefNode &Ins = ..Seg.Foot.PeroneusBrevis2Node;
  AnyDrawMuscle DrwMus = {#include "../DrawSettings/MusDrawSettings.any"
  };
};

AnyViaPointMuscle PeroneusBrevis3 = {
  AnyMuscleModel &MusMdl = ..MusPar.PeroneusBrevis3Par;
  AnyRefNode &Org = ..Seg.Shank.PeroneusBrevis3Node;
  AnyRefNode &Via1 = ..Seg.Shank.PeroneusBrevisViaNode1;
  AnyRefNode &Via2 = ..Seg.Shank.PeroneusBrevisViaNode2;
  AnyRefNode &Via3 = ..Seg.Shank.PeroneusBrevisViaNode3;
  AnyRefNode &Via4 = ..Seg.Foot.PeroneusBrevisViaNode4;
  #if BM_LEG_MORPHOLOGY == 2
  AnyRefNode &Via5 = ..Seg.Foot.PeroneusBrevisSplitPoint1Node;
  #endif
  AnyRefNode &Ins = ..Seg.Foot.PeroneusBrevis2Node;
  AnyDrawMuscle DrwMus = {#include "../DrawSettings/MusDrawSettings.any"
  };
};

AnyViaPointMuscle PeroneusLongus1 = {
  AnyMuscleModel &MusMdl = ..MusPar.PeroneusLongus1Par;
  AnyRefNode &Org = ..Seg.Shank.PeroneusLongus1Node;
  AnyRefNode &Via1 = ..Seg.Shank.PeroneusLongusViaNode1;
  AnyRefNode &Via2 = ..Seg.Shank.PeroneusLongusViaNode2;
  AnyRefNode &Via3 = ..Seg.Shank.PeroneusLongusViaNode3;
  #if BM_LEG_MORPHOLOGY == 1
  AnyRefNode &Via4 = ..Seg.Foot.PeroneusLongusViaNode4;
  #endif
  #if BM_LEG_MORPHOLOGY == 2
//  AnyRefNode &Via4 = ..Seg.Shank.PeroneusLongusViaNode4;
  AnyRefNode &Via5 = ..Seg.Foot.PeroneusLongusViaNode5;
  AnyRefNode &Via6 = ..Seg.Foot.PeroneusLongusViaNode6;
  AnyRefNode &Via7 = ..Seg.Foot.PeroneusLongusViaNode7;
  #endif
  AnyRefNode &Ins = ..Seg.Foot.PeroneusLongus1Node;
  AnyDrawMuscle DrwMus = { #include "../DrawSettings/MusDrawSettings.any"
  };
};

AnyViaPointMuscle PeroneusLongus2 = {
  AnyMuscleModel &MusMdl = ..MusPar.PeroneusLongus2Par;
  AnyRefNode &Org = ..Seg.Shank.PeroneusLongus2Node;
  AnyRefNode &Via1 = ..Seg.Shank.PeroneusLongusViaNode1;
  AnyRefNode &Via2 = ..Seg.Shank.PeroneusLongusViaNode2;
  AnyRefNode &Via3 = ..Seg.Shank.PeroneusLongusViaNode3;
  #if BM_LEG_MORPHOLOGY == 1
  AnyRefNode &Via4 = ..Seg.Foot.PeroneusLongusViaNode4;
  #endif
  #if BM_LEG_MORPHOLOGY == 2
//  AnyRefNode &Via4 = ..Seg.Shank.PeroneusLongusViaNode4;
  AnyRefNode &Via5 = ..Seg.Foot.PeroneusLongusViaNode5;
  AnyRefNode &Via6 = ..Seg.Foot.PeroneusLongusViaNode6;
  AnyRefNode &Via7 = ..Seg.Foot.PeroneusLongusViaNode7;
  #endif
  AnyRefNode &Ins = ..Seg.Foot.PeroneusLongus2Node;
  AnyDrawMuscle DrwMus = {#include "../DrawSettings/MusDrawSettings.any"
  };
};

AnyViaPointMuscle PeroneusLongus3 = {
  AnyMuscleModel &MusMdl = ..MusPar.PeroneusLongus3Par;
  AnyRefNode &Org = ..Seg.Shank.PeroneusLongus3Node;
  AnyRefNode &Via1 = ..Seg.Shank.PeroneusLongusViaNode1;
  AnyRefNode &Via2 = ..Seg.Shank.PeroneusLongusViaNode2;
  AnyRefNode &Via3 = ..Seg.Shank.PeroneusLongusViaNode3;
  #if BM_LEG_MORPHOLOGY == 1
  AnyRefNode &Via4 = ..Seg.Foot.PeroneusLongusViaNode4;
  #endif
  #if BM_LEG_MORPHOLOGY == 2
//  AnyRefNode &Via4 = ..Seg.Shank.PeroneusLongusViaNode4;
  AnyRefNode &Via5 = ..Seg.Foot.PeroneusLongusViaNode5;
  AnyRefNode &Via6 = ..Seg.Foot.PeroneusLongusViaNode6;
  AnyRefNode &Via7 = ..Seg.Foot.PeroneusLongusViaNode7;
  #endif
  AnyRefNode &Ins = ..Seg.Foot.PeroneusLongus3Node;
  AnyDrawMuscle DrwMus = {#include "../DrawSettings/MusDrawSettings.any"
  };
};

#if BM_LEG_MORPHOLOGY == 1

AnyViaPointMuscle PeroneusTertius1 = {
  AnyMuscleModel &MusMdl = ..MusPar.PeroneusTertius1Par;
  AnyRefNode &Org = ..Seg.Shank.PeroneusTertius1Node;
  AnyRefNode &Via1 = ..Seg.Shank.PeroneusTertiusViaNode1;
  AnyRefNode &Via2 = ..Seg.Shank.PeroneusTertiusViaNode2;
  AnyRefNode &Via3 = ..Seg.Shank.PeroneusTertiusViaNode3;
  AnyRefNode &Ins = ..Seg.Foot.PeroneusTertius1Node;
  AnyDrawMuscle DrwMus = {#include "../DrawSettings/MusDrawSettings.any"
  };
};

AnyViaPointMuscle PeroneusTertius2 = {
  AnyMuscleModel &MusMdl = ..MusPar.PeroneusTertius2Par;
  AnyRefNode &Org = ..Seg.Shank.PeroneusTertius2Node;
  AnyRefNode &Via1 = ..Seg.Shank.PeroneusTertiusViaNode1;
  AnyRefNode &Via2 = ..Seg.Shank.PeroneusTertiusViaNode2;
  AnyRefNode &Via3 = ..Seg.Shank.PeroneusTertiusViaNode3;
  AnyRefNode &Ins = ..Seg.Foot.PeroneusTertius2Node;
  AnyDrawMuscle DrwMus = {#include "../DrawSettings/MusDrawSettings.any"
  };
};

AnyViaPointMuscle PeroneusTertius3 = {
  AnyMuscleModel &MusMdl = ..MusPar.PeroneusTertius3Par;
  AnyRefNode &Org = ..Seg.Shank.PeroneusTertius3Node;
  AnyRefNode &Via1 = ..Seg.Shank.PeroneusTertiusViaNode1;
  AnyRefNode &Via2 = ..Seg.Shank.PeroneusTertiusViaNode2;
  AnyRefNode &Via3 = ..Seg.Shank.PeroneusTertiusViaNode3;
  AnyRefNode &Ins = ..Seg.Foot.PeroneusTertius3Node;
  AnyDrawMuscle DrwMus = {#include "../DrawSettings/MusDrawSettings.any"
  };
};
#endif

AnyViaPointMuscle ExtensorDigitorumLongus1 = {
  AnyMuscleModel &MusMdl = ..MusPar.ExtensorDigitorumLongus1Par;
  AnyRefNode &Org = ..Seg.Shank.ExtensorDigitorumLongus1Node;
  AnyRefNode &Via1 = ..Seg.Shank.ExtensorDigitorumLongusViaNode1;
  AnyRefNode &Via2 = ..Seg.Shank.ExtensorDigitorumLongusViaNode2;
  AnyRefNode &Via3 = ..Seg.Shank.ExtensorDigitorumLongusViaNode3;
//  AnyRefNode &Via4 = ..Seg.Shank.ExtensorDigitorumLongusViaNode4;
  //AnyRefNode &Via5 = ..Seg.Foot.ExtensorDigitorumLongusViaNode5; //Commented out in TLEMsafe2.0-trunk as the node has been removed there. Needs review.
  #if BM_LEG_MORPHOLOGY == 2
  AnyRefNode &Via7 = ..Seg.Foot.  ExtensorDigitorumSplitPoint1Node;
  AnyRefNode &Via6 = ..Seg.Foot.ExtensorDigitorumLongusViaNode1;
  #endif
  AnyRefNode&Ins = ..Seg.Foot.ExtensorDigitorumLongus1Node;
  AnyDrawMuscle DrwMus = {#include "../DrawSettings/MusDrawSettings.any"
  };
};
AnyViaPointMuscle ExtensorDigitorumLongus2 = {
  AnyMuscleModel &MusMdl = ..MusPar.ExtensorDigitorumLongus2Par;
  AnyRefNode &Org = ..Seg.Shank.ExtensorDigitorumLongus2Node;
  AnyRefNode &Via1 = ..Seg.Shank.ExtensorDigitorumLongusViaNode1;
  AnyRefNode &Via2 = ..Seg.Shank.ExtensorDigitorumLongusViaNode2;
  AnyRefNode &Via3 = ..Seg.Shank.ExtensorDigitorumLongusViaNode3;
//  AnyRefNode &Via4 = ..Seg.Shank.ExtensorDigitorumLongusViaNode4;
  //AnyRefNode &Via5 = ..Seg.Foot.ExtensorDigitorumLongusViaNode5; //Commented out in TLEMsafe2.0-trunk as the node has been removed there. Needs review.
  #if BM_LEG_MORPHOLOGY == 2
  AnyRefNode &Via7 = ..Seg.Foot.  ExtensorDigitorumSplitPoint1Node;
  AnyRefNode &Via6 = ..Seg.Foot.ExtensorDigitorumLongusViaNode2;
  #endif
  AnyRefNode &Ins = ..Seg.Foot.ExtensorDigitorumLongus2Node;
  AnyDrawMuscle DrwMus = {#include "../DrawSettings/MusDrawSettings.any"
  };
};
AnyViaPointMuscle ExtensorDigitorumLongus3 = {
  AnyMuscleModel &MusMdl = ..MusPar.ExtensorDigitorumLongus3Par;
  AnyRefNode &Org = ..Seg.Shank.ExtensorDigitorumLongus3Node;
  AnyRefNode &Via1 = ..Seg.Shank.ExtensorDigitorumLongusViaNode1;
  AnyRefNode &Via2 = ..Seg.Shank.ExtensorDigitorumLongusViaNode2;
  AnyRefNode &Via3 = ..Seg.Shank.ExtensorDigitorumLongusViaNode3;
//  AnyRefNode &Via4 = ..Seg.Shank.ExtensorDigitorumLongusViaNode4;
  //AnyRefNode &Via5 = ..Seg.Foot.ExtensorDigitorumLongusViaNode5; //Commented out in TLEMsafe2.0-trunk as the node has been removed there. Needs review.
  #if BM_LEG_MORPHOLOGY == 2
    AnyRefNode &Via7 = ..Seg.Foot.  ExtensorDigitorumSplitPoint1Node;
  AnyRefNode &Via6 = ..Seg.Foot.ExtensorDigitorumLongusViaNode3;
  #endif
  AnyRefNode &Ins = ..Seg.Foot.ExtensorDigitorumLongus3Node;
  AnyDrawMuscle DrwMus = {#include "../DrawSettings/MusDrawSettings.any"
  };
};
#if BM_LEG_MORPHOLOGY == 2
AnyViaPointMuscle ExtensorDigitorumLongus4 = {
  AnyMuscleModel &MusMdl = ..MusPar.ExtensorDigitorumLongus4Par;
  AnyRefNode &Org = ..Seg.Shank.ExtensorDigitorumLongus4Node;
  AnyRefNode &Via1 = ..Seg.Shank.ExtensorDigitorumLongusViaNode1;
  AnyRefNode &Via2 = ..Seg.Shank.ExtensorDigitorumLongusViaNode2;
  AnyRefNode &Via3 = ..Seg.Shank.ExtensorDigitorumLongusViaNode3;
//  AnyRefNode &Via4 = ..Seg.Shank.ExtensorDigitorumLongusViaNode4;
  //AnyRefNode &Via5 = ..Seg.Foot.ExtensorDigitorumLongusViaNode5;
  AnyRefNode &Via7 = ..Seg.Foot.  ExtensorDigitorumSplitPoint1Node;
  AnyRefNode &Via6 = ..Seg.Foot.ExtensorDigitorumLongusViaNode4;
  AnyRefNode &Ins = ..Seg.Foot.ExtensorDigitorumLongus4Node;
  AnyDrawMuscle DrwMus = {#include "../DrawSettings/MusDrawSettings.any"
  };
};
#endif

AnyViaPointMuscle ExtensorHallucisLongus1 = {
  AnyMuscleModel &MusMdl = ..MusPar.ExtensorHallucisLongus1Par;
  AnyRefNode &Org = ..Seg.Shank.ExtensorHallucisLongus1Node;
  AnyRefNode &Via1 = ..Seg.Shank.ExtensorHallucisLongusViaNode1;
  AnyRefNode &Via2 = ..Seg.Shank.ExtensorHallucisLongusViaNode2;
  #if BM_LEG_MORPHOLOGY == 2
//  AnyRefNode &Via3 = ..Seg.Shank.ExtensorHallucisLongusViaNode3;
  AnyRefNode &Via4 = ..Seg.Foot.ExtensorHallucisLongusViaNode4;
// AnyRefNode &Via5 = ..Seg.Foot.ExtensorHallucisLongusViaNode5;
  #endif
  #if BM_LEG_MORPHOLOGY == 1
  AnyRefNode &Via6 = ..Seg.Shank.ExtensorHallucisLongusViaNode6;
  AnyRefNode &Via7 = ..Seg.Foot.ExtensorHallucisLongusViaNode7;
  AnyRefNode &Via8 = ..Seg.Foot.ExtensorHallucisLongusViaNode8;
  #endif
  //  AnyRefNode &Via9 = ..Seg.Foot.ExtensorHallucisLongusViaNode9;
  //  AnyRefNode &Via10 = ..Seg.Foot.ExtensorHallucisLongusViaNode10;
  //  AnyRefNode &Via11 = ..Seg.Foot.ExtensorHallucisLongusViaNode11;
  //  AnyRefNode &Via12 = ..Seg.Foot.ExtensorHallucisLongusViaNode12;
  //  AnyRefNode &Via13 = ..Seg.Foot.ExtensorHallucisLongusViaNode13;
  AnyRefNode &Ins = ..Seg.Foot.ExtensorHallucisLongus1Node;
  AnyDrawMuscle DrwMus = {#include "../DrawSettings/MusDrawSettings.any"
  };
};

AnyViaPointMuscle ExtensorHallucisLongus2 = {
  AnyMuscleModel &MusMdl = ..MusPar.ExtensorHallucisLongus2Par;
  AnyRefNode &Org = ..Seg.Shank.ExtensorHallucisLongus2Node;
  AnyRefNode &Via1 = ..Seg.Shank.ExtensorHallucisLongusViaNode1;
  AnyRefNode &Via2 = ..Seg.Shank.ExtensorHallucisLongusViaNode2;
  #if BM_LEG_MORPHOLOGY == 2
//  AnyRefNode &Via3 = ..Seg.Shank.ExtensorHallucisLongusViaNode3;
  AnyRefNode &Via4 = ..Seg.Foot.ExtensorHallucisLongusViaNode4;
 // AnyRefNode &Via5 = ..Seg.Foot.ExtensorHallucisLongusViaNode5;
  #endif
  #if BM_LEG_MORPHOLOGY == 1
  //AnyRefNode &Via4 = ..Seg.Shank.ExtensorHallucisLongusViaNode4;
  //AnyRefNode &Via5 = ..Seg.Shank.ExtensorHallucisLongusViaNode5;
  AnyRefNode &Via6 = ..Seg.Shank.ExtensorHallucisLongusViaNode6;
  AnyRefNode &Via7 = ..Seg.Foot.ExtensorHallucisLongusViaNode7;
  AnyRefNode &Via8 = ..Seg.Foot.ExtensorHallucisLongusViaNode8;
  //  AnyRefNode &Via9 = ..Seg.Foot.ExtensorHallucisLongusViaNode9;
  //  AnyRefNode &Via10 = ..Seg.Foot.ExtensorHallucisLongusViaNode10;
  //  AnyRefNode &Via11 = ..Seg.Foot.ExtensorHallucisLongusViaNode11;
  //  AnyRefNode &Via12 = ..Seg.Foot.ExtensorHallucisLongusViaNode12;
  //  AnyRefNode &Via13 = ..Seg.Foot.ExtensorHallucisLongusViaNode13;
  #endif
  AnyRefNode &Ins = ..Seg.Foot.ExtensorHallucisLongus2Node;
  AnyDrawMuscle DrwMus = {#include "../DrawSettings/MusDrawSettings.any"
  };
};

AnyViaPointMuscle ExtensorHallucisLongus3 = {
  AnyMuscleModel &MusMdl = ..MusPar.ExtensorHallucisLongus3Par;
  AnyRefNode &Org = ..Seg.Shank.ExtensorHallucisLongus3Node;
  AnyRefNode &Via1 = ..Seg.Shank.ExtensorHallucisLongusViaNode1;
  AnyRefNode &Via2 = ..Seg.Shank.ExtensorHallucisLongusViaNode2;
  #if BM_LEG_MORPHOLOGY == 2
//  AnyRefNode &Via3 = ..Seg.Shank.ExtensorHallucisLongusViaNode3;
  AnyRefNode &Via4 = ..Seg.Foot.ExtensorHallucisLongusViaNode4;
 // AnyRefNode &Via5 = ..Seg.Foot.ExtensorHallucisLongusViaNode5;
  #endif
  #if BM_LEG_MORPHOLOGY == 1
  // AnyRefNode &Via4 = ..Seg.Shank.ExtensorHallucisLongusViaNode4;
  // AnyRefNode &Via5 = ..Seg.Shank.ExtensorHallucisLongusViaNode5;
  AnyRefNode &Via6 = ..Seg.Shank.ExtensorHallucisLongusViaNode6;
  AnyRefNode &Via7 = ..Seg.Foot.ExtensorHallucisLongusViaNode7;
  AnyRefNode &Via8 = ..Seg.Foot.ExtensorHallucisLongusViaNode8;
  //  AnyRefNode &Via9 = ..Seg.Foot.ExtensorHallucisLongusViaNode9;
  //  AnyRefNode &Via10 = ..Seg.Foot.ExtensorHallucisLongusViaNode10;
  //  AnyRefNode &Via11 = ..Seg.Foot.ExtensorHallucisLongusViaNode11;
  //  AnyRefNode &Via12 = ..Seg.Foot.ExtensorHallucisLongusViaNode12;
  //  AnyRefNode &Via13 = ..Seg.Foot.ExtensorHallucisLongusViaNode13;
  #endif
  AnyRefNode &Ins = ..Seg.Foot.ExtensorHallucisLongus3Node;
  AnyDrawMuscle DrwMus = {#include "../DrawSettings/MusDrawSettings.any"
  };
};

// Start Quadriceps
// Note that all Vastus muscles have their insertion on the patella. The patella has
// been defined as a segment in the file seg.any.
// The Rectus Femoris has its origin on the Pelvis and its insertion on the patella.
// Also the Pelvis has been defined in the seg.any file.


#ifndef QUADRICEPS_WRAPPING
#define QUADRICEPS_WRAPPING 1
#endif

#if QUADRICEPS_WRAPPING == 0

//VASTUS LATERALIS INFERIOR NOT WRAPPING
AnyViaPointMuscle VastusLateralisInferior1 = {
  AnyMuscleModel &MusMdl = ..MusPar.VastusLateralisInferior1Par;
  AnyRefNode &Org = ..Seg.Thigh.VastusLateralisInferior1Node;
  AnyRefNode &Ins = ..Seg.Patella.VastusLateralisInferior1Node;
    AnyDrawMuscle DrwMus = {#include "../DrawSettings/MusDrawSettings.any"
  };
};

AnyViaPointMuscle VastusLateralisInferior2 = {
  AnyMuscleModel &MusMdl = ..MusPar.VastusLateralisInferior2Par;
  AnyRefNode &Org = ..Seg.Thigh.VastusLateralisInferior2Node;
  AnyRefNode &Ins = ..Seg.Patella.VastusLateralisInferior2Node;
    AnyDrawMuscle DrwMus = {#include "../DrawSettings/MusDrawSettings.any"
  };
};

AnyViaPointMuscle VastusLateralisInferior3 = {
  AnyMuscleModel &MusMdl = ..MusPar.VastusLateralisInferior3Par;
  AnyRefNode &Org = ..Seg.Thigh.VastusLateralisInferior3Node;
  AnyRefNode &Ins = ..Seg.Patella.VastusLateralisInferior3Node;
    AnyDrawMuscle DrwMus = {#include "../DrawSettings/MusDrawSettings.any"
  };
};

AnyViaPointMuscle VastusLateralisInferior4 = {
  AnyMuscleModel &MusMdl = ..MusPar.VastusLateralisInferior4Par;
  AnyRefNode &Org = ..Seg.Thigh.VastusLateralisInferior4Node;
  AnyRefNode &Ins = ..Seg.Patella.VastusLateralisInferior4Node;
    AnyDrawMuscle DrwMus = {#include "../DrawSettings/MusDrawSettings.any"
  };
};

AnyViaPointMuscle VastusLateralisInferior5 = {
  AnyMuscleModel &MusMdl = ..MusPar.VastusLateralisInferior5Par;
  AnyRefNode &Org = ..Seg.Thigh.VastusLateralisInferior5Node;
  AnyRefNode &Ins = ..Seg.Patella.VastusLateralisInferior5Node;
    AnyDrawMuscle DrwMus = {#include "../DrawSettings/MusDrawSettings.any"
  };
};

AnyViaPointMuscle VastusLateralisInferior6 = {
  AnyMuscleModel &MusMdl = ..MusPar.VastusLateralisInferior6Par;
  AnyRefNode &Org = ..Seg.Thigh.VastusLateralisInferior6Node;
  AnyRefNode &Ins = ..Seg.Patella.VastusLateralisInferior6Node;
    AnyDrawMuscle DrwMus = {#include "../DrawSettings/MusDrawSettings.any"
  };
};

//VASTUS LATERALIS SUPERIOR NOT WRAPPING

AnyViaPointMuscle VastusLateralisSuperior1 = {
  AnyMuscleModel &MusMdl = ..MusPar.VastusLateralisSuperior1Par;
  AnyRefNode &Org = ..Seg.Thigh.VastusLateralisSuperior1Node;
  AnyRefNode &Ins = ..Seg.Patella.VastusLateralisSuperior1Node;
    AnyDrawMuscle DrwMus = {#include "../DrawSettings/MusDrawSettings.any"
  };
};

AnyViaPointMuscle VastusLateralisSuperior2 = {
  AnyMuscleModel &MusMdl = ..MusPar.VastusLateralisSuperior2Par;
  AnyRefNode &Org = ..Seg.Thigh.VastusLateralisSuperior2Node;
  AnyRefNode &Ins = ..Seg.Patella.VastusLateralisSuperior2Node;
    AnyDrawMuscle DrwMus = {#include "../DrawSettings/MusDrawSettings.any"
  };
};

//VASTUS MEDIALIS INFERIOR NOT WRAPPING

AnyViaPointMuscle VastusMedialisInferior1 = {
  AnyMuscleModel &MusMdl = ..MusPar.VastusMedialisInferior1Par;
  AnyRefNode &Org = ..Seg.Thigh.VastusMedialisInferior1Node;
  AnyRefNode &Ins = ..Seg.Patella.VastusMedialisInferior1Node;
    AnyDrawMuscle DrwMus = {#include "../DrawSettings/MusDrawSettings.any"
  };
};

AnyViaPointMuscle VastusMedialisInferior2 = {
  AnyMuscleModel &MusMdl = ..MusPar.VastusMedialisInferior2Par;
  AnyRefNode &Org = ..Seg.Thigh.VastusMedialisInferior2Node;
  AnyRefNode &Ins = ..Seg.Patella.VastusMedialisInferior2Node;
    AnyDrawMuscle DrwMus = {#include "../DrawSettings/MusDrawSettings.any"
  };
};

//VASTUS MEDIALIS MID NOT WRAPPING

AnyViaPointMuscle VastusMedialisMid1 = {
  AnyMuscleModel &MusMdl = ..MusPar.VastusMedialisMid1Par;
  AnyRefNode &Org = ..Seg.Thigh.VastusMedialisMid1Node;
  AnyRefNode &Ins = ..Seg.Patella.VastusMedialisMid1Node;
    AnyDrawMuscle DrwMus = {#include "../DrawSettings/MusDrawSettings.any"
  };
};

AnyViaPointMuscle VastusMedialisMid2 = {
  AnyMuscleModel &MusMdl = ..MusPar.VastusMedialisMid2Par;
  AnyRefNode &Org = ..Seg.Thigh.VastusMedialisMid2Node;
  AnyRefNode &Ins = ..Seg.Patella.VastusMedialisMid2Node;
    AnyDrawMuscle DrwMus = {#include "../DrawSettings/MusDrawSettings.any"
  };
};

//VASTUS MEDIALIS SUPERIOR NOT WRAPPING

AnyViaPointMuscle VastusMedialisSuperior1 = {
  AnyMuscleModel &MusMdl = ..MusPar.VastusMedialisSuperior1Par;
  AnyRefNode &Org = ..Seg.Thigh.VastusMedialisSuperior1Node;
  AnyRefNode &Ins = ..Seg.Patella.VastusMedialisSuperior1Node;
    AnyDrawMuscle DrwMus = {#include "../DrawSettings/MusDrawSettings.any"
  };
};

AnyViaPointMuscle VastusMedialisSuperior2 = {
  AnyMuscleModel &MusMdl = ..MusPar.VastusMedialisSuperior2Par;
  AnyRefNode &Org = ..Seg.Thigh.VastusMedialisSuperior2Node;
  AnyRefNode &Ins = ..Seg.Patella.VastusMedialisSuperior2Node;
    AnyDrawMuscle DrwMus = {#include "../DrawSettings/MusDrawSettings.any"
  };
};

AnyViaPointMuscle VastusMedialisSuperior3 = {
  AnyMuscleModel &MusMdl = ..MusPar.VastusMedialisSuperior3Par;
  AnyRefNode &Org = ..Seg.Thigh.VastusMedialisSuperior3Node;
  AnyRefNode &Ins = ..Seg.Patella.VastusMedialisSuperior3Node;
    AnyDrawMuscle DrwMus = {#include "../DrawSettings/MusDrawSettings.any"
  };
};

AnyViaPointMuscle VastusMedialisSuperior4 = {
  AnyMuscleModel &MusMdl = ..MusPar.VastusMedialisSuperior4Par;
  AnyRefNode &Org = ..Seg.Thigh.VastusMedialisSuperior4Node;
  AnyRefNode &Ins = ..Seg.Patella.VastusMedialisSuperior4Node;
    AnyDrawMuscle DrwMus = {#include "../DrawSettings/MusDrawSettings.any"
  };
};

#if BM_LEG_MORPHOLOGY == 1
AnyViaPointMuscle VastusMedialisSuperior5 = {
  AnyMuscleModel &MusMdl = ..MusPar.VastusMedialisSuperior5Par;
  AnyRefNode &Org = ..Seg.Thigh.VastusMedialisSuperior5Node;
  AnyRefNode &Ins = ..Seg.Patella.VastusMedialisSuperior5Node;
    AnyDrawMuscle DrwMus = {#include "../DrawSettings/MusDrawSettings.any"
  };
};

AnyViaPointMuscle VastusMedialisSuperior6 = {
  AnyMuscleModel &MusMdl = ..MusPar.VastusMedialisSuperior6Par;
  AnyRefNode &Org = ..Seg.Thigh.VastusMedialisSuperior6Node;
  AnyRefNode &Ins = ..Seg.Patella.VastusMedialisSuperior6Node;
    AnyDrawMuscle DrwMus = {#include "../DrawSettings/MusDrawSettings.any"
  };
};
#endif

//VASTUS INTERMEDIUS NOT WRAPPING

AnyViaPointMuscle VastusIntermedius1 = {
  AnyMuscleModel &MusMdl = ..MusPar.VastusIntermedius1Par;
  AnyRefNode &Org = ..Seg.Thigh.VastusIntermedius1Node;
  AnyRefNode &Ins = ..Seg.Patella.VastusIntermedius1Node;
    AnyDrawMuscle DrwMus = {#include "../DrawSettings/MusDrawSettings.any"
  };
};

AnyViaPointMuscle VastusIntermedius2 = {
  AnyMuscleModel &MusMdl = ..MusPar.VastusIntermedius2Par;
  AnyRefNode &Org = ..Seg.Thigh.VastusIntermedius2Node;
  AnyRefNode &Ins = ..Seg.Patella.VastusIntermedius2Node;
    AnyDrawMuscle DrwMus = {#include "../DrawSettings/MusDrawSettings.any"
  };
};

AnyViaPointMuscle VastusIntermedius3 = {
  AnyMuscleModel &MusMdl = ..MusPar.VastusIntermedius3Par;
  AnyRefNode &Org = ..Seg.Thigh.VastusIntermedius3Node;
  AnyRefNode &Ins = ..Seg.Patella.VastusIntermedius3Node;
    AnyDrawMuscle DrwMus = {#include "../DrawSettings/MusDrawSettings.any"
  };
};

AnyViaPointMuscle VastusIntermedius4 = {
  AnyMuscleModel &MusMdl = ..MusPar.VastusIntermedius4Par;
  AnyRefNode &Org = ..Seg.Thigh.VastusIntermedius4Node;
  AnyRefNode &Ins = ..Seg.Patella.VastusIntermedius4Node;
    AnyDrawMuscle DrwMus = {#include "../DrawSettings/MusDrawSettings.any"
  };
};

AnyViaPointMuscle VastusIntermedius5 = {
  AnyMuscleModel &MusMdl = ..MusPar.VastusIntermedius5Par;
  AnyRefNode &Org = ..Seg.Thigh.VastusIntermedius5Node;
  AnyRefNode &Ins = ..Seg.Patella.VastusIntermedius5Node;
    AnyDrawMuscle DrwMus = {#include "../DrawSettings/MusDrawSettings.any"
  };
};

AnyViaPointMuscle VastusIntermedius6 = {
  AnyMuscleModel &MusMdl = ..MusPar.VastusIntermedius6Par;
  AnyRefNode &Org = ..Seg.Thigh.VastusIntermedius6Node;
  AnyRefNode &Ins = ..Seg.Patella.VastusIntermedius6Node;
    AnyDrawMuscle DrwMus = {#include "../DrawSettings/MusDrawSettings.any"
  };
};

//RECTUS FEMORIS NOT WRAPPING
#if BM_LEG_MORPHOLOGY == 1
AnyViaPointMuscle RectusFemoris1 = {
  AnyMuscleModel &MusMdl = ..MusPar.RectusFemoris1Par;
  AnyRefNode &Org = ..Seg.Pelvis.Muscles.RectusFemoris1Node;
  AnyRefNode &Ins = ..Seg.Patella.RectusFemoris1Node;
  SPLine.StringMesh = 45;
    AnyDrawMuscle DrwMus = {#include "../DrawSettings/MusDrawSettings.any"
  };
};

AnyViaPointMuscle RectusFemoris2 = {
  AnyMuscleModel &MusMdl = ..MusPar.RectusFemoris2Par;
  AnyRefNode &Org = ..Seg.Pelvis.Muscles.RectusFemoris2Node;
  AnyRefNode &Ins = ..Seg.Patella.RectusFemoris2Node;
  SPLine.StringMesh = 45;
    AnyDrawMuscle DrwMus = {#include "../DrawSettings/MusDrawSettings.any"
  };
};
#endif
#if BM_LEG_MORPHOLOGY == 2
AnyViaPointMuscle RectusFemorisLateralis1 = {
  AnyMuscleModel &MusMdl = ..MusPar.RectusFemorisLateralis1Par;
  AnyRefNode &Org = ..Seg.Pelvis.Muscles.RectusFemorisLateralis1Node;
  AnyRefNode &Ins = ..Seg.Patella.RectusFemorisLateralis1Node;
  AnyDrawMuscle DrwMus = {#include "../DrawSettings/MusDrawSettings.any"
  };
};
AnyViaPointMuscle RectusFemorisMedialis1 = {
  AnyMuscleModel &MusMdl = ..MusPar.RectusFemorisMedialis1Par;
  AnyRefNode &Org = ..Seg.Pelvis.Muscles.RectusFemorisMedialis1Node;
  AnyRefNode &Ins = ..Seg.Patella.RectusFemorisMedialis1Node;
  AnyDrawMuscle DrwMus = {#include "../DrawSettings/MusDrawSettings.any"
  };
};
#endif

#else

//VASTUS LATERALIS INFERIOR WRAPPING

AnyShortestPathMuscle VastusLateralisInferior1 = {
  AnyMuscleModel &MusMdl = ..MusPar.VastusLateralisInferior1Par;
  AnyRefNode &Org = ..Seg.Thigh.VastusLateralisInferior1Node;
  AnySurface &srf = ..Seg.Thigh.RectusVastiiWrapSurf.cyl;
  AnyRefNode &Ins = ..Seg.Patella.VastusLateralisInferior1Node;
  SPLine = {
    StringMesh = 45;
    //AnyMatrix InitWrap1 = {.Org.r + {0.8 * vnorm(.Org.r-.Ins.r),-0.4 * vnorm(.Org.r-.Ins.r),0}* .Org.Axes', .Ins.r +{0.8*vnorm(.Org.r-.Ins.r),0.4*vnorm(.Org.r-.Ins.r),0} * .Ins.Axes'};
    AnyMatrix InitWrapPos = {
        transf3D({1.4*.srf.Radius, ...Sign*1.4*.srf.Radius, 0.5*.srf.Length }, &.srf ) ,
        transf3D({2*.srf.Radius, ...Sign*0*.srf.Radius, 0.5*.srf.Length }, &.srf ),
        transf3D({1.4*.srf.Radius, ...Sign*-1.4*.srf.Radius, 0.5*.srf.Length }, &.srf )
    };
    InitWrapPosVecArr = { &InitWrapPos};
  };


  AnyDrawMuscle DrwMus = {#include "../DrawSettings/MusDrawSettings.any"
  };
};

AnyShortestPathMuscle VastusLateralisInferior2 = {
  AnyMuscleModel &MusMdl = ..MusPar.VastusLateralisInferior2Par;
  AnyRefNode &Org = ..Seg.Thigh.VastusLateralisInferior2Node;
  AnySurface &srf = ..Seg.Thigh.RectusVastiiWrapSurf.cyl;
  AnyRefNode &Ins = ..Seg.Patella.VastusLateralisInferior2Node;
  SPLine =   {
    StringMesh = 45;
    InitWrapPosVecArr =  ..VastusLateralisInferior1.SPLine.InitWrapPosVecArr;
  };
  AnyDrawMuscle DrwMus = {#include "../DrawSettings/MusDrawSettings.any"
  };
};

AnyShortestPathMuscle VastusLateralisInferior3 = {
  AnyMuscleModel &MusMdl = ..MusPar.VastusLateralisInferior3Par;
  AnyRefNode &Org = ..Seg.Thigh.VastusLateralisInferior3Node;
  AnySurface &srf = ..Seg.Thigh.RectusVastiiWrapSurf.cyl;
  AnyRefNode &Ins = ..Seg.Patella.VastusLateralisInferior3Node;
  SPLine =   {
    StringMesh = 45;
    InitWrapPosVecArr =  ..VastusLateralisInferior1.SPLine.InitWrapPosVecArr;
  };
  AnyDrawMuscle DrwMus = {#include "../DrawSettings/MusDrawSettings.any"
  };
};

AnyShortestPathMuscle VastusLateralisInferior4 = {
  AnyMuscleModel &MusMdl = ..MusPar.VastusLateralisInferior4Par;
  AnyRefNode &Org = ..Seg.Thigh.VastusLateralisInferior4Node;
  AnySurface &srf = ..Seg.Thigh.RectusVastiiWrapSurf.cyl;
  AnyRefNode &Ins = ..Seg.Patella.VastusLateralisInferior4Node;
  SPLine =   {
    StringMesh = 45;
    InitWrapPosVecArr =  ..VastusLateralisInferior1.SPLine.InitWrapPosVecArr;
  };
  AnyDrawMuscle DrwMus = {#include "../DrawSettings/MusDrawSettings.any"
  };
};

AnyShortestPathMuscle VastusLateralisInferior5 = {
  AnyMuscleModel &MusMdl = ..MusPar.VastusLateralisInferior5Par;
  AnyRefNode &Org = ..Seg.Thigh.VastusLateralisInferior5Node;
  AnySurface &srf = ..Seg.Thigh.RectusVastiiWrapSurf.cyl;
  AnyRefNode &Ins = ..Seg.Patella.VastusLateralisInferior5Node;
  SPLine =   {
    StringMesh = 45;
    InitWrapPosVecArr =  ..VastusLateralisInferior1.SPLine.InitWrapPosVecArr;
  };
  AnyDrawMuscle DrwMus = {#include "../DrawSettings/MusDrawSettings.any"
  };
};

AnyShortestPathMuscle VastusLateralisInferior6 = {
  AnyMuscleModel &MusMdl = ..MusPar.VastusLateralisInferior6Par;
  AnyRefNode &Org = ..Seg.Thigh.VastusLateralisInferior6Node;
  AnySurface &srf = ..Seg.Thigh.RectusVastiiWrapSurf.cyl;
  AnyRefNode &Ins = ..Seg.Patella.VastusLateralisInferior6Node;
  SPLine =   {
    StringMesh = 45;
    InitWrapPosVecArr =  ..VastusLateralisInferior1.SPLine.InitWrapPosVecArr;
  };
  AnyDrawMuscle DrwMus = {#include "../DrawSettings/MusDrawSettings.any"
  };
};

//VASTUS LATERALIS SUPERIOR WRAPPING

AnyShortestPathMuscle VastusLateralisSuperior1 = {
  AnyMuscleModel &MusMdl = ..MusPar.VastusLateralisSuperior1Par;
  AnyRefNode &Org = ..Seg.Thigh.VastusLateralisSuperior1Node;
  AnySurface &srf = ..Seg.Thigh.RectusVastiiWrapSurf.cyl;
  AnyRefNode &Ins = ..Seg.Patella.VastusLateralisSuperior1Node;
  SPLine =   {
    StringMesh = 45;
    InitWrapPosVecArr =  ..VastusLateralisInferior1.SPLine.InitWrapPosVecArr;
  };
  AnyDrawMuscle DrwMus = {#include "../DrawSettings/MusDrawSettings.any"
  };
};

AnyShortestPathMuscle VastusLateralisSuperior2 = {
  AnyMuscleModel &MusMdl = ..MusPar.VastusLateralisSuperior2Par;
  AnyRefNode &Org = ..Seg.Thigh.VastusLateralisSuperior2Node;
  AnySurface &srf = ..Seg.Thigh.RectusVastiiWrapSurf.cyl;
  AnyRefNode &Ins = ..Seg.Patella.VastusLateralisSuperior2Node;
  SPLine =   {
    StringMesh = 45;
    InitWrapPosVecArr =  ..VastusLateralisInferior1.SPLine.InitWrapPosVecArr;
  };
  AnyDrawMuscle DrwMus = {#include "../DrawSettings/MusDrawSettings.any"
  };
};

//VASTUS MEDIALIS INFERIOR WRAPPING

AnyShortestPathMuscle VastusMedialisInferior1 = {
  AnyMuscleModel &MusMdl = ..MusPar.VastusMedialisInferior1Par;
  AnyRefNode &Org = ..Seg.Thigh.VastusMedialisInferior1Node;
  AnySurface &srf = ..Seg.Thigh.RectusVastiiWrapSurf.cyl;
  AnyRefNode &Ins = ..Seg.Patella.VastusMedialisInferior1Node;
  SPLine =   {
    StringMesh = 45;
    InitWrapPosVecArr =  ..VastusLateralisInferior1.SPLine.InitWrapPosVecArr;
  };
  AnyDrawMuscle DrwMus = {#include "../DrawSettings/MusDrawSettings.any"
  };
};

AnyShortestPathMuscle VastusMedialisInferior2 = {
  AnyMuscleModel &MusMdl = ..MusPar.VastusMedialisInferior2Par;
  AnyRefNode &Org = ..Seg.Thigh.VastusMedialisInferior2Node;
  AnySurface &srf = ..Seg.Thigh.RectusVastiiWrapSurf.cyl;
  AnyRefNode &Ins = ..Seg.Patella.VastusMedialisInferior2Node;
  SPLine =   {
    StringMesh = 45;
    InitWrapPosVecArr =  ..VastusLateralisInferior1.SPLine.InitWrapPosVecArr;
  };
  AnyDrawMuscle DrwMus = {#include "../DrawSettings/MusDrawSettings.any"
  };
};

//VASTUS MEDIALIS MID WRAPPING

AnyShortestPathMuscle VastusMedialisMid1 = {
  AnyMuscleModel &MusMdl = ..MusPar.VastusMedialisMid1Par;
  AnyRefNode &Org = ..Seg.Thigh.VastusMedialisMid1Node;
  AnySurface &srf = ..Seg.Thigh.RectusVastiiWrapSurf.cyl;
  AnyRefNode &Ins = ..Seg.Patella.VastusMedialisMid1Node;
  SPLine =   {
    StringMesh = 45;
    InitWrapPosVecArr =  ..VastusLateralisInferior1.SPLine.InitWrapPosVecArr;
  };
  AnyDrawMuscle DrwMus = {#include "../DrawSettings/MusDrawSettings.any"
  };
};

AnyShortestPathMuscle VastusMedialisMid2 = {
  AnyMuscleModel &MusMdl = ..MusPar.VastusMedialisMid2Par;
  AnyRefNode &Org = ..Seg.Thigh.VastusMedialisMid2Node;
  AnySurface &srf = ..Seg.Thigh.RectusVastiiWrapSurf.cyl;
  AnyRefNode &Ins = ..Seg.Patella.VastusMedialisMid2Node;
  SPLine =   {
    StringMesh = 45;
    InitWrapPosVecArr =  ..VastusLateralisInferior1.SPLine.InitWrapPosVecArr;
  };
  AnyDrawMuscle DrwMus = {#include "../DrawSettings/MusDrawSettings.any"};
};

//VASTUS MEDIALIS SUPERIOR WRAPPING

AnyShortestPathMuscle VastusMedialisSuperior1 = {
  AnyMuscleModel &MusMdl = ..MusPar.VastusMedialisSuperior1Par;
  AnyRefNode &Org = ..Seg.Thigh.VastusMedialisSuperior1Node;
  AnySurface &srf = ..Seg.Thigh.RectusVastiiWrapSurf.cyl;
  AnyRefNode &Ins = ..Seg.Patella.VastusMedialisSuperior1Node;
  SPLine =   {
    StringMesh = 45;
    InitWrapPosVecArr =  ..VastusLateralisInferior1.SPLine.InitWrapPosVecArr;
  };
  AnyDrawMuscle DrwMus = {#include "../DrawSettings/MusDrawSettings.any"
  };
};

AnyShortestPathMuscle VastusMedialisSuperior2 = {
  AnyMuscleModel &MusMdl = ..MusPar.VastusMedialisSuperior2Par;
  AnyRefNode &Org = ..Seg.Thigh.VastusMedialisSuperior2Node;
  AnySurface &srf = ..Seg.Thigh.RectusVastiiWrapSurf.cyl;
  AnyRefNode &Ins = ..Seg.Patella.VastusMedialisSuperior2Node;
  SPLine =   {
    StringMesh = 45;
    InitWrapPosVecArr =  ..VastusLateralisInferior1.SPLine.InitWrapPosVecArr;
  };
  AnyDrawMuscle DrwMus = {#include "../DrawSettings/MusDrawSettings.any"
  };
};

AnyShortestPathMuscle VastusMedialisSuperior3 = {
  AnyMuscleModel &MusMdl = ..MusPar.VastusMedialisSuperior3Par;
  AnyRefNode &Org = ..Seg.Thigh.VastusMedialisSuperior3Node;
  AnySurface &srf = ..Seg.Thigh.RectusVastiiWrapSurf.cyl;
  AnyRefNode &Ins = ..Seg.Patella.VastusMedialisSuperior3Node;
  SPLine =   {
    StringMesh = 45;
    InitWrapPosVecArr =  ..VastusLateralisInferior1.SPLine.InitWrapPosVecArr;
  };
  AnyDrawMuscle DrwMus = {#include "../DrawSettings/MusDrawSettings.any"
  };
};

AnyShortestPathMuscle VastusMedialisSuperior4 = {
  AnyMuscleModel &MusMdl = ..MusPar.VastusMedialisSuperior4Par;
  AnyRefNode &Org = ..Seg.Thigh.VastusMedialisSuperior4Node;
  AnySurface &srf = ..Seg.Thigh.RectusVastiiWrapSurf.cyl;
  AnyRefNode &Ins = ..Seg.Patella.VastusMedialisSuperior4Node;
  SPLine =   {
    StringMesh = 45;
    InitWrapPosVecArr =  ..VastusLateralisInferior1.SPLine.InitWrapPosVecArr;
  };
  AnyDrawMuscle DrwMus = {#include "../DrawSettings/MusDrawSettings.any"
  };
};

#if BM_LEG_MORPHOLOGY == 1
AnyShortestPathMuscle VastusMedialisSuperior5 = {
  AnyMuscleModel &MusMdl = ..MusPar.VastusMedialisSuperior5Par;
  AnyRefNode &Org = ..Seg.Thigh.VastusMedialisSuperior5Node;
  AnySurface &srf = ..Seg.Thigh.RectusVastiiWrapSurf.cyl;
  AnyRefNode &Ins = ..Seg.Patella.VastusMedialisSuperior5Node;
  SPLine =   {
    StringMesh = 45;
    InitWrapPosVecArr =  ..VastusLateralisInferior1.SPLine.InitWrapPosVecArr;
  };
  AnyDrawMuscle DrwMus = {#include "../DrawSettings/MusDrawSettings.any"
  };
};

AnyShortestPathMuscle VastusMedialisSuperior6 = {
  AnyMuscleModel &MusMdl = ..MusPar.VastusMedialisSuperior6Par;
  AnyRefNode &Org = ..Seg.Thigh.VastusMedialisSuperior6Node;
  AnySurface &srf = ..Seg.Thigh.RectusVastiiWrapSurf.cyl;
  AnyRefNode &Ins = ..Seg.Patella.VastusMedialisSuperior6Node;
  SPLine =   {
    StringMesh = 45;
    InitWrapPosVecArr =  ..VastusLateralisInferior1.SPLine.InitWrapPosVecArr;
  };
  AnyDrawMuscle DrwMus = {#include "../DrawSettings/MusDrawSettings.any"
  };
};
#endif

//VASTUS INTERMEDIUS WRAPPING

AnyShortestPathMuscle VastusIntermedius1 = {
  AnyMuscleModel &MusMdl = ..MusPar.VastusIntermedius1Par;
  AnyRefNode &Org = ..Seg.Thigh.VastusIntermedius1Node;
  AnySurface &srf = ..Seg.Thigh.RectusVastiiWrapSurf.cyl;
  AnyRefNode &Ins = ..Seg.Patella.VastusIntermedius1Node;
  SPLine =   {
    StringMesh = 45;
    InitWrapPosVecArr =  ..VastusLateralisInferior1.SPLine.InitWrapPosVecArr;
  };
  AnyDrawMuscle DrwMus = {#include "../DrawSettings/MusDrawSettings.any"
  };
};

AnyShortestPathMuscle VastusIntermedius2 = {
  AnyMuscleModel &MusMdl = ..MusPar.VastusIntermedius2Par;
  AnyRefNode &Org = ..Seg.Thigh.VastusIntermedius2Node;
  AnySurface &srf = ..Seg.Thigh.RectusVastiiWrapSurf.cyl;
  AnyRefNode &Ins = ..Seg.Patella.VastusIntermedius2Node;
  SPLine =   {
    StringMesh = 45;
    InitWrapPosVecArr =  ..VastusLateralisInferior1.SPLine.InitWrapPosVecArr;
  };
  AnyDrawMuscle DrwMus = {#include "../DrawSettings/MusDrawSettings.any"
  };
};

AnyShortestPathMuscle VastusIntermedius3 = {
  AnyMuscleModel &MusMdl = ..MusPar.VastusIntermedius3Par;
  AnyRefNode &Org = ..Seg.Thigh.VastusIntermedius3Node;
  AnySurface &srf = ..Seg.Thigh.RectusVastiiWrapSurf.cyl;
  AnyRefNode &Ins = ..Seg.Patella.VastusIntermedius3Node;
  SPLine =   {
    StringMesh = 45;
    InitWrapPosVecArr =  ..VastusLateralisInferior1.SPLine.InitWrapPosVecArr;
  };
  AnyDrawMuscle DrwMus = {#include "../DrawSettings/MusDrawSettings.any"
  };
};

AnyShortestPathMuscle VastusIntermedius4 = {
  AnyMuscleModel &MusMdl = ..MusPar.VastusIntermedius4Par;
  AnyRefNode &Org = ..Seg.Thigh.VastusIntermedius4Node;
  AnySurface &srf = ..Seg.Thigh.RectusVastiiWrapSurf.cyl;
  AnyRefNode &Ins = ..Seg.Patella.VastusIntermedius4Node;
  SPLine =   {
    StringMesh = 45;
    InitWrapPosVecArr =  ..VastusLateralisInferior1.SPLine.InitWrapPosVecArr;
  };
  AnyDrawMuscle DrwMus = {#include "../DrawSettings/MusDrawSettings.any"
  };
};

AnyShortestPathMuscle VastusIntermedius5 = {
  AnyMuscleModel &MusMdl = ..MusPar.VastusIntermedius5Par;
  AnyRefNode &Org = ..Seg.Thigh.VastusIntermedius5Node;
  AnySurface &srf = ..Seg.Thigh.RectusVastiiWrapSurf.cyl;
  AnyRefNode &Ins = ..Seg.Patella.VastusIntermedius5Node;
  SPLine =   {
    StringMesh = 45;
    InitWrapPosVecArr =  ..VastusLateralisInferior1.SPLine.InitWrapPosVecArr;
  };
  AnyDrawMuscle DrwMus = {#include "../DrawSettings/MusDrawSettings.any"
  };
};

AnyShortestPathMuscle VastusIntermedius6 = {
  AnyMuscleModel &MusMdl = ..MusPar.VastusIntermedius6Par;
  AnyRefNode &Org = ..Seg.Thigh.VastusIntermedius6Node;
  AnySurface &srf = ..Seg.Thigh.RectusVastiiWrapSurf.cyl;
  AnyRefNode &Ins = ..Seg.Patella.VastusIntermedius6Node;
  SPLine =   {
    StringMesh = 45;
    InitWrapPosVecArr =  ..VastusLateralisInferior1.SPLine.InitWrapPosVecArr;
  };
  AnyDrawMuscle DrwMus = {#include "../DrawSettings/MusDrawSettings.any"
  };
};

//RECTUS FEMORIS WRAPPING

AnyShortestPathMuscle RectusFemoris1 = {
  AnyMuscleModel &MusMdl = ..MusPar.RectusFemoris1Par;
  AnyRefNode &Org = ..Seg.Pelvis.Muscles.RectusFemoris1Node;
  #if BM_LEG_MORPHOLOGY == 2
  AnySurface &srf1 = ..Seg.Thigh.IliacusWrapSurf.cyl;
  #endif
  AnySurface &srf2 = ..Seg.Thigh.RectusVastiiWrapSurf.cyl;
  AnyRefNode &Ins = ..Seg.Patella.RectusFemoris1Node;
  SPLine = {
     StringMesh = 45;
    AnyMatrix InitWrapPos = {
  #if BM_LEG_MORPHOLOGY == 2
        transf3D({1.5*.srf1.Radius, 0 , ...Sign*1*.srf1.Radius}, &...Seg.Thigh.HipJoint),
  #endif
        transf3D({1*.srf2.Radius, ...Sign*1*.srf2.Radius, 0.5*.srf2.Length }, &.srf2 ) ,
        transf3D({1.4*.srf2.Radius, ...Sign*0*.srf2.Radius, 0.5*.srf2.Length }, &.srf2 )
    };
    InitWrapPosVecArr = { &InitWrapPos};
  };
  AnyDrawMuscle DrwMus = {#include "../DrawSettings/MusDrawSettings.any"
  };
};

AnyShortestPathMuscle RectusFemoris2 = {
  AnyMuscleModel &MusMdl = ..MusPar.RectusFemoris2Par;
  AnyRefNode &Org = ..Seg.Pelvis.Muscles.RectusFemoris2Node;
  #if BM_LEG_MORPHOLOGY == 2
  AnySurface &srf1 = ..Seg.Thigh.IliacusWrapSurf.cyl;
  #endif
  AnySurface &srf2 = ..Seg.Thigh.RectusVastiiWrapSurf.cyl;
  AnyRefNode &Ins = ..Seg.Patella.RectusFemoris2Node;

SPLine = {
     StringMesh = 45;
    InitWrapPosVecArr = ..RectusFemoris1.SPLine.InitWrapPosVecArr;
  };

  AnyDrawMuscle DrwMus = {#include "../DrawSettings/MusDrawSettings.any"
  };
};


#endif //QUADRICEPS_WRAPPING == 0

// End Quadriceps.

// Start of Hamstrings
#if BM_LEG_MORPHOLOGY == 2

AnyShortestPathMuscle Semitendinosus1 = {
  AnyMuscleModel &MusMdl = ..MusPar.Semitendinosus1Par;
  AnyRefNode &Org = ..Seg.Pelvis.Muscles.Semitendinosus1Node;
  AnySurface &srf = ..Seg.Thigh.HamstringWrapSurf.cyl;
  AnyRefNode &Via1 = ..Seg.Shank.SemitendinosusViaNode1;
  AnyRefNode &Ins = ..Seg.Shank.Semitendinosus1Node;
  SPLine.StringMesh = 45;
  SPLine =
  {
    AnyMatrix InitWrapPos = {
        transf3D({...Sign*(-1)*.srf.Radius, -1*.srf.Radius, 0.5*.srf.Length }, &.srf )
    };
    InitWrapPosVecArr = { &InitWrapPos, None};
  };
  AnyDrawMuscle DrwMus = {#include "../DrawSettings/MusDrawSettings.any"};
};

AnyShortestPathMuscle Semimembranosus1 = {
  AnyMuscleModel &MusMdl = ..MusPar.Semimembranosus1Par;
  AnyRefNode &Org = ..Seg.Pelvis.Muscles.Semimembranosus1Node;
  AnySurface &srf = ..Seg.Thigh.HamstringWrapSurf.cyl;
  AnyRefNode &Ins = ..Seg.Shank.Semimembranosus1Node;
  SPLine.StringMesh = 45;
  SPLine.InitWrapPosVecArr = .Semitendinosus1.SPLine.InitWrapPosVecArr;
  AnyDrawMuscle DrwMus = {
    #include "../DrawSettings/MusDrawSettings.any"
  };
};
AnyShortestPathMuscle Semimembranosus2 = {
  AnyMuscleModel &MusMdl = ..MusPar.Semimembranosus2Par;
  AnyRefNode &Org = ..Seg.Pelvis.Muscles.Semimembranosus2Node;
  AnySurface &srf = ..Seg.Thigh.HamstringWrapSurf.cyl;
  AnyRefNode &Ins = ..Seg.Shank.Semimembranosus2Node;
  SPLine.StringMesh = 45;
  SPLine.InitWrapPosVecArr = .Semitendinosus1.SPLine.InitWrapPosVecArr;
  AnyDrawMuscle DrwMus = {
    #include "../DrawSettings/MusDrawSettings.any"
  };
};

AnyShortestPathMuscle Semimembranosus3 = {
  AnyMuscleModel &MusMdl = ..MusPar.Semimembranosus3Par;
  AnyRefNode &Org = ..Seg.Pelvis.Muscles.Semimembranosus3Node;
  AnySurface &srf = ..Seg.Thigh.HamstringWrapSurf.cyl;
  AnyRefNode &Ins = ..Seg.Shank.Semimembranosus3Node;
  SPLine.StringMesh = 45;
  SPLine.InitWrapPosVecArr = .Semitendinosus1.SPLine.InitWrapPosVecArr;
  AnyDrawMuscle DrwMus = {
    #include "../DrawSettings/MusDrawSettings.any"
  };
};

AnyViaPointMuscle BicepsFemorisCaputLongum1 = {
  AnyMuscleModel &MusMdl = ..MusPar.BicepsFemorisCaputLongum1Par;
  AnyRefNode &Org = ..Seg.Pelvis.Muscles.BicepsFemorisCaputLongum1Node;
  AnyRefNode &Ins = ..Seg.Shank.BicepsFemorisCaputLongum1Node;
  AnyDrawMuscle DrwMus = {
    #include "../DrawSettings/MusDrawSettings.any"
  };
};

AnyShortestPathMuscle BicepsFemorisCaputBreve1 = {
  AnyMuscleModel &MusMdl = ..MusPar.BicepsFemorisCaputBreve1Par;
  AnyRefNode &Org = ..Seg.Thigh.BicepsFemorisCaputBreve1Node;
  AnySurface &srf = ..Seg.Thigh.HamstringWrapSurf.cyl;
  AnyRefNode &Ins = ..Seg.Shank.BicepsFemorisCaputBreve1Node;
  SPLine.StringMesh = 45;
  SPLine.InitWrapPosVecArr = .Semitendinosus1.SPLine.InitWrapPosVecArr;
  AnyDrawMuscle DrwMus = {#include "../DrawSettings/MusDrawSettings.any"
  };
};

AnyShortestPathMuscle BicepsFemorisCaputBreve2 = {
  AnyMuscleModel &MusMdl = ..MusPar.BicepsFemorisCaputBreve2Par;
  AnyRefNode &Org = ..Seg.Thigh.BicepsFemorisCaputBreve2Node;
  AnySurface &srf = ..Seg.Thigh.HamstringWrapSurf.cyl;
  AnyRefNode &Ins = ..Seg.Shank.BicepsFemorisCaputBreve2Node;
  SPLine.StringMesh = 45;
  SPLine.InitWrapPosVecArr = .Semitendinosus1.SPLine.InitWrapPosVecArr;
  AnyDrawMuscle DrwMus = {#include "../DrawSettings/MusDrawSettings.any"
  };
};

AnyShortestPathMuscle BicepsFemorisCaputBreve3 = {
  AnyMuscleModel &MusMdl = ..MusPar.BicepsFemorisCaputBreve3Par;
  AnyRefNode &Org = ..Seg.Thigh.BicepsFemorisCaputBreve3Node;
  AnySurface &srf = ..Seg.Thigh.HamstringWrapSurf.cyl;
  AnyRefNode &Ins = ..Seg.Shank.BicepsFemorisCaputBreve3Node;
  SPLine.StringMesh = 45;
  SPLine.InitWrapPosVecArr = .Semitendinosus1.SPLine.InitWrapPosVecArr;
  AnyDrawMuscle DrwMus = {#include "../DrawSettings/MusDrawSettings.any"
  };
};


#else

AnyViaPointMuscle Semitendinosus1 = {
  AnyMuscleModel &MusMdl = ..MusPar.Semitendinosus1Par;
  AnyRefNode &Org = ..Seg.Pelvis.Muscles.Semitendinosus1Node;
  AnyRefNode &Via1 = ..Seg.Shank.SemitendinosusViaNode1;
  #if BM_LEG_MORPHOLOGY == 1
  AnyRefNode &Via2 = ..Seg.Shank.SemitendinosusViaNode2;
  AnyRefNode &Via3 = ..Seg.Shank.SemitendinosusViaNode3;
  AnyRefNode &Via4 = ..Seg.Shank.SemitendinosusViaNode4;
  AnyRefNode &Via5 = ..Seg.Shank.SemitendinosusViaNode5;
  AnyRefNode &Via6 = ..Seg.Shank.SemitendinosusViaNode6;
  AnyRefNode &Via7 = ..Seg.Shank.SemitendinosusViaNode7;
  #endif
  AnyRefNode &Ins = ..Seg.Shank.Semitendinosus1Node;
  AnyDrawMuscle DrwMus = {#include "../DrawSettings/MusDrawSettings.any"
  };
};

AnyViaPointMuscle Semimembranosus1 = {
  AnyMuscleModel &MusMdl = ..MusPar.Semimembranosus1Par;
  AnyRefNode &Org = ..Seg.Pelvis.Muscles.Semimembranosus1Node;
  AnyRefNode &Ins = ..Seg.Shank.Semimembranosus1Node;
  AnyDrawMuscle DrwMus = {
    #include "../DrawSettings/MusDrawSettings.any"
  };
};
#if BM_LEG_MORPHOLOGY == 2
AnyViaPointMuscle Semimembranosus2 = {
  AnyMuscleModel &MusMdl = ..MusPar.Semimembranosus2Par;
  AnyRefNode &Org = ..Seg.Pelvis.Muscles.Semimembranosus2Node;
  AnyRefNode &Ins = ..Seg.Shank.Semimembranosus2Node;
  AnyDrawMuscle DrwMus = {
    #include "../DrawSettings/MusDrawSettings.any"
  };
};

AnyViaPointMuscle Semimembranosus3 = {
  AnyMuscleModel &MusMdl = ..MusPar.Semimembranosus3Par;
  AnyRefNode &Org = ..Seg.Pelvis.Muscles.Semimembranosus3Node;
  AnyRefNode &Ins = ..Seg.Shank.Semimembranosus3Node;
  AnyDrawMuscle DrwMus = {
    #include "../DrawSettings/MusDrawSettings.any"
  };
};
#endif

AnyViaPointMuscle BicepsFemorisCaputLongum1 = {
  AnyMuscleModel &MusMdl = ..MusPar.BicepsFemorisCaputLongum1Par;
  AnyRefNode &Org = ..Seg.Pelvis.Muscles.BicepsFemorisCaputLongum1Node;
  AnyRefNode &Ins = ..Seg.Shank.BicepsFemorisCaputLongum1Node;
  AnyDrawMuscle DrwMus = {
    #include "../DrawSettings/MusDrawSettings.any"
  };
};

AnyViaPointMuscle BicepsFemorisCaputBreve1 = {
  AnyMuscleModel &MusMdl = ..MusPar.BicepsFemorisCaputBreve1Par;
  AnyRefNode &Org = ..Seg.Thigh.BicepsFemorisCaputBreve1Node;
  AnyRefNode &Ins = ..Seg.Shank.BicepsFemorisCaputBreve1Node;
  AnyDrawMuscle DrwMus = {#include "../DrawSettings/MusDrawSettings.any"
  };
};

AnyViaPointMuscle BicepsFemorisCaputBreve2 = {
  AnyMuscleModel &MusMdl = ..MusPar.BicepsFemorisCaputBreve2Par;
  AnyRefNode &Org = ..Seg.Thigh.BicepsFemorisCaputBreve2Node;
  AnyRefNode &Ins = ..Seg.Shank.BicepsFemorisCaputBreve2Node;
  AnyDrawMuscle DrwMus = {#include "../DrawSettings/MusDrawSettings.any"
  };
};

AnyViaPointMuscle BicepsFemorisCaputBreve3 = {
  AnyMuscleModel &MusMdl = ..MusPar.BicepsFemorisCaputBreve3Par;
  AnyRefNode &Org = ..Seg.Thigh.BicepsFemorisCaputBreve3Node;
  AnyRefNode &Ins = ..Seg.Shank.BicepsFemorisCaputBreve3Node;
  AnyDrawMuscle DrwMus = {#include "../DrawSettings/MusDrawSettings.any"
  };
};

#endif
// End of Hamstrings


// Start hip muscles
#if BM_LEG_MORPHOLOGY == 1
AnyViaPointMuscle SartoriusProximal1 = {
  AnyMuscleModel &MusMdl = ..MusPar.SartoriusProximal1Par;
  AnyRefNode &Org = ..Seg.Pelvis.Muscles.SartoriusProximal1Node;
  AnyRefNode &Via1 = ..Seg.Thigh.SartoriusProximalViaNode1;
  AnyRefNode &Via2 = ..Seg.Thigh.SartoriusProximalViaNode2;
  AnyRefNode &Via3 = ..Seg.Thigh.SartoriusProximalViaNode3;
  AnyRefNode &Via4 = ..Seg.Thigh.SartoriusProximalViaNode4;
  AnyRefNode &Via5 = ..Seg.Thigh.SartoriusProximalViaNode5;
  AnyRefNode &Via6 = ..Seg.Thigh.SartoriusProximalViaNode6;
  AnyRefNode &Via7 = ..Seg.Thigh.SartoriusProximalViaNode7;
  AnyRefNode &Via8 = ..Seg.Thigh.SartoriusProximalViaNode8;
  AnyRefNode &Via9 = ..Seg.Thigh.SartoriusProximalViaNode9;
  AnyRefNode &Via10 = ..Seg.Thigh.SartoriusProximalViaNode10;
  AnyRefNode &Via11 = ..Seg.Thigh.SartoriusProximalViaNode11;
  AnyRefNode &Via12 = ..Seg.Thigh.SartoriusProximalViaNode12;
  AnyRefNode &Via13 = ..Seg.Thigh.SartoriusProximalViaNode13;
  AnyRefNode &Ins = ..Seg.Shank.SartoriusProximal1Node;
  AnyDrawMuscle DrwMus = {
    #include "../DrawSettings/MusDrawSettings.any"
  };
};

AnyViaPointMuscle SartoriusDistal1 = {
  AnyMuscleModel &MusMdl = ..MusPar.SartoriusDistal1Par;
  AnyRefNode &Org = ..Seg.Pelvis.Muscles.SartoriusDistal1Node;
  AnyRefNode &Via1 = ..Seg.Thigh.SartoriusDistalViaNode1;
  AnyRefNode &Ins = ..Seg.Shank.SartoriusDistal1Node;
  AnyDrawMuscle DrwMus = {
    #include "../DrawSettings/MusDrawSettings.any"
  };
};
#endif

#if BM_LEG_MORPHOLOGY == 2
AnyViaPointMuscle Sartorius1 = {
  AnyMuscleModel &MusMdl = ..MusPar.Sartorius1Par;
  AnyRefNode &Org = ..Seg.Pelvis.Muscles.Sartorius1Node;
  //AnyRefNode &Via1 = ..Seg.Thigh.SartoriusVia1Node;
  AnyRefNode &Via2 = ..Seg.Thigh.SartoriusVia2Node;
  AnyRefNode &Via3 = ..Seg.Thigh.SartoriusVia3Node;
  AnyRefNode &Via4 = ..Seg.Thigh.SartoriusVia4Node;
  AnyRefNode &Via5 = ..Seg.Thigh.SartoriusVia5Node;
  AnyRefNode &Via6 = ..Seg.Thigh.SartoriusVia6Node;
  AnyRefNode &Via7 = ..Seg.Shank.SartoriusVia1Node;
  AnyRefNode &Via8 = ..Seg.Shank.SartoriusVia2Node;
  AnyRefNode &Via9 = ..Seg.Shank.SartoriusVia3Node;
  AnyRefNode &Ins = ..Seg.Shank.Sartorius1Node;
  AnyDrawMuscle DrwMus = {
    #include "../DrawSettings/MusDrawSettings.any"
  };
};
#endif

#if BM_LEG_MORPHOLOGY == 1
AnyShortestPathMuscle IliacusLateralis1 = {
  AnyMuscleModel &MusMdl = ..MusPar.IliacusLateralis1Par;
  AnyRefNode &Org = ..Seg.Pelvis.Muscles.IliacusLateralis1Node;
  AnyRefNode &Via1 = ..Seg.Pelvis.Muscles.IliacusLateralisViaNode1;
  AnySurface &srf = ..Seg.Pelvis.Muscles.IliacusWrapSurf.cyl;
  AnyRefNode &Ins = ..Seg.Thigh.IliacusLateralis1Node;
    SPLine = {
     StringMesh = 45;
    AnyMatrix InitWrapPos = {
        transf3D({...Sign*-0.8*.srf.Radius, 0.8*.srf.Radius , 0.65*.srf.Length}, &.srf),
        transf3D({...Sign*0*.srf.Radius, 1.1*.srf.Radius , 0.65*.srf.Length}, &.srf)
    };
    InitWrapPosVecArr = {None, &InitWrapPos};
  };


  AnyDrawMuscle DrwMus = {
    #include "../DrawSettings/MusDrawSettings.any"
  };
};


AnyShortestPathMuscle IliacusLateralis2 = {
  AnyMuscleModel &MusMdl = ..MusPar.IliacusLateralis2Par;
  AnyRefNode &Org = ..Seg.Pelvis.Muscles.IliacusLateralis2Node;
  AnyRefNode &Via1 = ..Seg.Pelvis.Muscles.IliacusLateralisViaNode1;
  //  AnySurface &srf = ..Seg.Pelvis.Muscles.pecent_ossis_pubis.Translate.cyl;
  AnySurface &srf = ..Seg.Pelvis.Muscles.IliacusWrapSurf.cyl;
  AnyRefNode &Ins = ..Seg.Thigh.IliacusLateralis2Node;
  SPLine.InitWrapPosVecArr = .IliacusLateralis1.SPLine.InitWrapPosVecArr;
  SPLine.StringMesh = 45;
  AnyDrawMuscle DrwMus = {
    #include "../DrawSettings/MusDrawSettings.any"
  };
};


AnyShortestPathMuscle IliacusLateralis3 = {
  AnyMuscleModel &MusMdl = ..MusPar.IliacusLateralis3Par;
  AnyRefNode &Org = ..Seg.Pelvis.Muscles.IliacusLateralis3Node;
  AnyRefNode &Via1 = ..Seg.Pelvis.Muscles.IliacusLateralisViaNode1;
  //  AnySurface &srf = ..Seg.Pelvis.Muscles.pecent_ossis_pubis.Translate.cyl;
  AnySurface &srf = ..Seg.Pelvis.Muscles.IliacusWrapSurf.cyl;
  AnyRefNode &Ins = ..Seg.Thigh.IliacusLateralis3Node;
  SPLine.InitWrapPosVecArr = .IliacusLateralis1.SPLine.InitWrapPosVecArr;
  SPLine.StringMesh = 45;
  AnyDrawMuscle DrwMus = {
    #include "../DrawSettings/MusDrawSettings.any"
  };
};


AnyShortestPathMuscle IliacusMid1 = {
  AnyMuscleModel &MusMdl = ..MusPar.IliacusMid1Par;
  AnyRefNode &Org = ..Seg.Pelvis.Muscles.IliacusMid1Node;
  AnyRefNode &Via1 = ..Seg.Pelvis.Muscles.IliacusMidViaNode1;
  //  AnySurface &srf = ..Seg.Pelvis.Muscles.pecent_ossis_pubis.Translate.cyl;
  AnySurface &srf = ..Seg.Pelvis.Muscles.IliacusWrapSurf.cyl;
  AnyRefNode &Ins = ..Seg.Thigh.IliacusMid1Node;
  SPLine.InitWrapPosVecArr = .IliacusLateralis1.SPLine.InitWrapPosVecArr;
  SPLine.StringMesh = 45;
  AnyDrawMuscle DrwMus = {
    #include "../DrawSettings/MusDrawSettings.any"
  };
};


AnyShortestPathMuscle IliacusMid2 = {
  AnyMuscleModel &MusMdl = ..MusPar.IliacusMid2Par;
  AnyRefNode &Org = ..Seg.Pelvis.Muscles.IliacusMid2Node;
  AnyRefNode &Via1 = ..Seg.Pelvis.Muscles.IliacusMidViaNode1;
  //  AnySurface &srf = ..Seg.Pelvis.Muscles.pecent_ossis_pubis.Translate.cyl;
  AnySurface &srf = ..Seg.Pelvis.Muscles.IliacusWrapSurf.cyl;
  AnyRefNode &Ins = ..Seg.Thigh.IliacusMid2Node;
  SPLine.InitWrapPosVecArr = .IliacusLateralis1.SPLine.InitWrapPosVecArr;
  SPLine.StringMesh = 45;
  AnyDrawMuscle DrwMus = {
    #include "../DrawSettings/MusDrawSettings.any"
  };
};


AnyShortestPathMuscle IliacusMid3 = {
  AnyMuscleModel &MusMdl = ..MusPar.IliacusMid3Par;
  AnyRefNode &Org = ..Seg.Pelvis.Muscles.IliacusMid3Node;
  AnyRefNode &Via1 = ..Seg.Pelvis.Muscles.IliacusMidViaNode1;
  //  AnySurface &srf = ..Seg.Pelvis.Muscles.pecent_ossis_pubis.Translate.cyl;
  AnySurface &srf = ..Seg.Pelvis.Muscles.IliacusWrapSurf.cyl;
  AnyRefNode &Ins = ..Seg.Thigh.IliacusMid3Node;
  SPLine.InitWrapPosVecArr = .IliacusLateralis1.SPLine.InitWrapPosVecArr;
  SPLine.StringMesh = 45;
  AnyDrawMuscle DrwMus = {
    #include "../DrawSettings/MusDrawSettings.any"
  };
};


AnyShortestPathMuscle IliacusMedialis1 = {
  AnyMuscleModel &MusMdl = ..MusPar.IliacusMedialis1Par;
  AnyRefNode &Org = ..Seg.Pelvis.Muscles.IliacusMedialis1Node;
  AnyRefNode &Via1 = ..Seg.Pelvis.Muscles.IliacusMedialisViaNode1;
  //  AnySurface &srf = ..Seg.Pelvis.Muscles.pecent_ossis_pubis.Translate.cyl;
  AnySurface &srf = ..Seg.Pelvis.Muscles.IliacusWrapSurf.cyl;
  AnyRefNode &Ins = ..Seg.Thigh.IliacusMedialis1Node;
  SPLine.InitWrapPosVecArr = .IliacusLateralis1.SPLine.InitWrapPosVecArr;
  SPLine.StringMesh = 45;
  AnyDrawMuscle DrwMus = {
    #include "../DrawSettings/MusDrawSettings.any"
  };
};


AnyShortestPathMuscle IliacusMedialis2 = {
  AnyMuscleModel &MusMdl = ..MusPar.IliacusMedialis2Par;
  AnyRefNode &Org = ..Seg.Pelvis.Muscles.IliacusMedialis2Node;
  AnyRefNode &Via1 = ..Seg.Pelvis.Muscles.IliacusMedialisViaNode1;
  //  AnySurface &srf = ..Seg.Pelvis.Muscles.pecent_ossis_pubis.Translate.cyl;
  AnySurface &srf = ..Seg.Pelvis.Muscles.IliacusWrapSurf.cyl;
  AnyRefNode &Ins = ..Seg.Thigh.IliacusMedialis2Node;
  SPLine.InitWrapPosVecArr = .IliacusLateralis1.SPLine.InitWrapPosVecArr;
  SPLine.StringMesh = 45;
  AnyDrawMuscle DrwMus = {
    #include "../DrawSettings/MusDrawSettings.any"
  };
};


AnyShortestPathMuscle IliacusMedialis3 = {
  AnyMuscleModel &MusMdl = ..MusPar.IliacusMedialis3Par;
  AnyRefNode &Org = ..Seg.Pelvis.Muscles.IliacusMedialis3Node;
  AnyRefNode &Via1 = ..Seg.Pelvis.Muscles.IliacusMedialisViaNode1;
  //  AnySurface &srf = ..Seg.Pelvis.Muscles.pecent_ossis_pubis.Translate.cyl;
  AnySurface &srf = ..Seg.Pelvis.Muscles.IliacusWrapSurf.cyl;
  AnyRefNode &Ins = ..Seg.Thigh.IliacusMedialis3Node;
  SPLine.InitWrapPosVecArr = .IliacusLateralis1.SPLine.InitWrapPosVecArr;
  SPLine.StringMesh = 45;
  AnyDrawMuscle DrwMus = {
    #include "../DrawSettings/MusDrawSettings.any"
  };
};
#endif

#if BM_LEG_MORPHOLOGY == 2
AnyShortestPathMuscle IliacusLateralis1 = {
  AnyMuscleModel &MusMdl = ..MusPar.IliacusLateralis1Par;
  AnyRefNode &Org = ..Seg.Pelvis.Muscles.IliacusLateralis1Node;
  AnyRefNode &Via1 = ..Seg.Pelvis.Muscles.IliacusLateralisViaNode1;
  AnySurface &srf = ..Seg.Thigh.IliacusWrapSurf.cyl;
  AnyRefNode &Ins = ..Seg.Thigh.Iliopsoas3Node;
  SPLine = {
    StringMesh = 45;
    AnyMatrix InitWrapPos = {
        transf3D({...Sign*0.8*.srf.Radius, 0.8*.srf.Radius, 1.2*.srf.Length }, &.srf ) ,
        transf3D({...Sign*0*.srf.Radius, 1.2*.srf.Radius, 1*.srf.Length }, &.srf ) ,
        transf3D({...Sign*(-1)*0.8*.srf.Radius, 0.8*.srf.Radius, 0.6*.srf.Length }, &.srf )
    };
    InitWrapPosVecArr = {None, &InitWrapPos};
  };
    AnyDrawMuscle DrwMus = {
    #include "../DrawSettings/MusDrawSettings.any"
  };
};


AnyShortestPathMuscle IliacusLateralis2 = {
  AnyMuscleModel &MusMdl = ..MusPar.IliacusLateralis2Par;
  AnyRefNode &Org = ..Seg.Pelvis.Muscles.IliacusLateralis2Node;
  AnyRefNode &Via1 = ..Seg.Pelvis.Muscles.IliacusLateralisViaNode2;
  AnySurface &srf = ..Seg.Thigh.IliacusWrapSurf.cyl;
  AnyRefNode &Ins = ..Seg.Thigh.Iliopsoas3Node;
  SPLine.StringMesh = .IliacusLateralis1.SPLine.StringMesh ;
  SPLine.InitWrapPosVecArr = .IliacusLateralis1.SPLine.InitWrapPosVecArr;
  AnyDrawMuscle DrwMus = {
    #include "../DrawSettings/MusDrawSettings.any"
  };
};


AnyShortestPathMuscle IliacusMid1 = {
  AnyMuscleModel &MusMdl = ..MusPar.IliacusMid1Par;
  AnyRefNode &Org = ..Seg.Pelvis.Muscles.IliacusMid1Node;
  AnyRefNode &Via1 = ..Seg.Pelvis.Muscles.IliacusMidViaNode1;
  AnySurface &srf = ..Seg.Thigh.IliacusWrapSurf.cyl;
  AnyRefNode &Ins = ..Seg.Thigh.Iliopsoas2Node;
  SPLine.StringMesh = .IliacusLateralis1.SPLine.StringMesh ;
  SPLine.InitWrapPosVecArr = .IliacusLateralis1.SPLine.InitWrapPosVecArr;
  AnyDrawMuscle DrwMus = {
    #include "../DrawSettings/MusDrawSettings.any"
  };
};


AnyShortestPathMuscle IliacusMid2 = {
  AnyMuscleModel &MusMdl = ..MusPar.IliacusMid2Par;
  AnyRefNode &Org = ..Seg.Pelvis.Muscles.IliacusMid2Node;
  AnyRefNode &Via1 = ..Seg.Pelvis.Muscles.IliacusMidViaNode2;
  AnySurface &srf = ..Seg.Thigh.IliacusWrapSurf.cyl;
  AnyRefNode &Ins = ..Seg.Thigh.Iliopsoas2Node;
  SPLine.StringMesh = .IliacusLateralis1.SPLine.StringMesh ;
  SPLine.InitWrapPosVecArr = .IliacusLateralis1.SPLine.InitWrapPosVecArr;
  AnyDrawMuscle DrwMus = {
    #include "../DrawSettings/MusDrawSettings.any"
  };
};


AnyShortestPathMuscle IliacusMedialis1 = {
  AnyMuscleModel &MusMdl = ..MusPar.IliacusMedialis1Par;
  AnyRefNode &Org = ..Seg.Pelvis.Muscles.IliacusMedialis1Node;
  AnyRefNode &Via1 = ..Seg.Pelvis.Muscles.IliacusMedialisViaNode2;
  AnySurface &srf = ..Seg.Thigh.IliacusWrapSurf.cyl;
  AnyRefNode &Ins = ..Seg.Thigh.Iliopsoas1Node;
  SPLine.StringMesh = .IliacusLateralis1.SPLine.StringMesh ;
  SPLine.InitWrapPosVecArr = .IliacusLateralis1.SPLine.InitWrapPosVecArr;
  AnyDrawMuscle DrwMus = {
    #include "../DrawSettings/MusDrawSettings.any"
  };
};


AnyShortestPathMuscle IliacusMedialis2 = {
  AnyMuscleModel &MusMdl = ..MusPar.IliacusMedialis2Par;
  AnyRefNode &Org = ..Seg.Pelvis.Muscles.IliacusMedialis2Node;
  AnyRefNode &Via1 = ..Seg.Pelvis.Muscles.IliacusMedialisViaNode1;
  AnySurface &srf = ..Seg.Thigh.IliacusWrapSurf.cyl;
  AnyRefNode &Ins = ..Seg.Thigh.Iliopsoas1Node;
  SPLine.StringMesh = .IliacusLateralis1.SPLine.StringMesh ;
  SPLine.InitWrapPosVecArr = .IliacusLateralis1.SPLine.InitWrapPosVecArr;
  AnyDrawMuscle DrwMus = {
    #include "../DrawSettings/MusDrawSettings.any"
  };
};

#endif

AnyMuscle &PsoasMajor_PMT12I_TM = .TrunkMuscles.PsoasMajor.PMT12I_TM;//< Psoas muscles are created by the Trunk model
AnyMuscle &PsoasMajor_PML1I_TM = .TrunkMuscles.PsoasMajor.PML1I_TM;//< Psoas muscles are created by the Trunk model
AnyMuscle &PsoasMajor_PML1T_TM = .TrunkMuscles.PsoasMajor.PML1T_TM;//< Psoas muscles are created by the Trunk model
AnyMuscle &PsoasMajor_PML2I_TM= .TrunkMuscles.PsoasMajor.PML2I_TM;//< Psoas muscles are created by the Trunk model
AnyMuscle &PsoasMajor_PML2T_TM = .TrunkMuscles.PsoasMajor.PML2T_TM;//< Psoas muscles are created by the Trunk model
AnyMuscle &PsoasMajor_PML3I_TM = .TrunkMuscles.PsoasMajor.PML3I_TM;//< Psoas muscles are created by the Trunk model
AnyMuscle &PsoasMajor_PML3T_TM = .TrunkMuscles.PsoasMajor.PML3T_TM;//< Psoas muscles are created by the Trunk model
AnyMuscle &PsoasMajor_PML4I_TM = .TrunkMuscles.PsoasMajor.PML4I_TM;//< Psoas muscles are created by the Trunk model
AnyMuscle &PsoasMajor_PML4T_TM = .TrunkMuscles.PsoasMajor.PML4T_TM;//< Psoas muscles are created by the Trunk model
AnyMuscle &PsoasMajor_PML5_TM = .TrunkMuscles.PsoasMajor.PML5_TM;//< Psoas muscles are created by the Trunk model
AnyMuscle &PsoasMajor_PML5T_TM = .TrunkMuscles.PsoasMajor.PML5T_TM;//< Psoas muscles are created by the Trunk model


AnyViaPointMuscle GluteusMinimusAnterior1 = {
  AnyMuscleModel &MusMdl = ..MusPar.GluteusMinimusAnterior1Par;
  AnyRefNode &Org = ..Seg.Pelvis.Muscles.GluteusMinimusAnterior1Node;
  AnyRefNode &Ins = ..Seg.Thigh.GluteusMinimusAnterior1Node;
  AnyDrawMuscle DrwMus = {#include "../DrawSettings/MusDrawSettings.any"
  };
};
#if BM_LEG_MORPHOLOGY == 2
AnyViaPointMuscle GluteusMinimusAnterior2 = {
  AnyMuscleModel &MusMdl = ..MusPar.GluteusMinimusAnterior2Par;
  AnyRefNode &Org = ..Seg.Pelvis.Muscles.GluteusMinimusAnterior2Node;
  AnyRefNode &Ins = ..Seg.Thigh.GluteusMinimusAnterior1Node;
  AnyDrawMuscle DrwMus = {#include "../DrawSettings/MusDrawSettings.any"
  };
};
#endif

AnyViaPointMuscle GluteusMinimusMid1 = {
  AnyMuscleModel &MusMdl = ..MusPar.GluteusMinimusMid1Par;
  AnyRefNode &Org = ..Seg.Pelvis.Muscles.GluteusMinimusMid1Node;
  AnyRefNode &Ins = ..Seg.Thigh.GluteusMinimusMid1Node;
  AnyDrawMuscle DrwMus = {#include "../DrawSettings/MusDrawSettings.any"
  };
};
#if BM_LEG_MORPHOLOGY == 2
AnyViaPointMuscle GluteusMinimusMid2 = {
  AnyMuscleModel &MusMdl = ..MusPar.GluteusMinimusMid2Par;
  AnyRefNode &Org = ..Seg.Pelvis.Muscles.GluteusMinimusMid2Node;
  AnyRefNode &Ins = ..Seg.Thigh.GluteusMinimusMid1Node;
  AnyDrawMuscle DrwMus = {#include "../DrawSettings/MusDrawSettings.any"
  };
};
#endif
AnyViaPointMuscle GluteusMinimusPosterior1 = {
  AnyMuscleModel &MusMdl = ..MusPar.GluteusMinimusPosterior1Par;
  AnyRefNode &Org = ..Seg.Pelvis.Muscles.GluteusMinimusPosterior1Node;
  AnyRefNode &Ins = ..Seg.Thigh.GluteusMinimusPosterior1Node;
  AnyDrawMuscle DrwMus = {#include "../DrawSettings/MusDrawSettings.any"
  };
};
#if BM_LEG_MORPHOLOGY == 2
AnyViaPointMuscle GluteusMinimusPosterior2 = {
  AnyMuscleModel &MusMdl = ..MusPar.GluteusMinimusPosterior2Par;
  AnyRefNode &Org = ..Seg.Pelvis.Muscles.GluteusMinimusPosterior2Node;
  AnyRefNode &Ins = ..Seg.Thigh.GluteusMinimusPosterior1Node;
  AnyDrawMuscle DrwMus = {#include "../DrawSettings/MusDrawSettings.any"
  };
};
#endif

AnyViaPointMuscle GluteusMediusAnterior1 = {
  AnyMuscleModel &MusMdl = ..MusPar.GluteusMediusAnterior1Par;
  AnyRefNode &Org = ..Seg.Pelvis.Muscles.GluteusMediusAnterior1Node;
  AnyRefNode &Ins = ..Seg.Thigh.GluteusMediusAnterior1Node;
  AnyDrawMuscle DrwMus = {#include "../DrawSettings/MusDrawSettings.any"
  };
};

AnyViaPointMuscle GluteusMediusAnterior2 = {
  AnyMuscleModel &MusMdl = ..MusPar.GluteusMediusAnterior2Par;
  AnyRefNode &Org = ..Seg.Pelvis.Muscles.GluteusMediusAnterior2Node;
  AnyRefNode &Ins = ..Seg.Thigh.GluteusMediusAnterior2Node;
  AnyDrawMuscle DrwMus = {#include "../DrawSettings/MusDrawSettings.any"
  };
};

AnyViaPointMuscle GluteusMediusAnterior3 = {
  AnyMuscleModel &MusMdl = ..MusPar.GluteusMediusAnterior3Par;
  AnyRefNode &Org = ..Seg.Pelvis.Muscles.GluteusMediusAnterior3Node;
  AnyRefNode &Ins = ..Seg.Thigh.GluteusMediusAnterior3Node;
  AnyDrawMuscle DrwMus = {#include "../DrawSettings/MusDrawSettings.any"
  };
};

AnyViaPointMuscle GluteusMediusAnterior4 = {
  AnyMuscleModel &MusMdl = ..MusPar.GluteusMediusAnterior4Par;
  AnyRefNode &Org = ..Seg.Pelvis.Muscles.GluteusMediusAnterior4Node;
  AnyRefNode &Ins = ..Seg.Thigh.GluteusMediusAnterior4Node;
  AnyDrawMuscle DrwMus = {#include "../DrawSettings/MusDrawSettings.any"
  };
};

AnyViaPointMuscle GluteusMediusAnterior5 = {
  AnyMuscleModel &MusMdl = ..MusPar.GluteusMediusAnterior5Par;
  AnyRefNode &Org = ..Seg.Pelvis.Muscles.GluteusMediusAnterior5Node;
  AnyRefNode &Ins = ..Seg.Thigh.GluteusMediusAnterior5Node;
  AnyDrawMuscle DrwMus = {#include "../DrawSettings/MusDrawSettings.any"
  };
};

AnyViaPointMuscle GluteusMediusAnterior6 = {
  AnyMuscleModel &MusMdl = ..MusPar.GluteusMediusAnterior6Par;
  AnyRefNode &Org = ..Seg.Pelvis.Muscles.GluteusMediusAnterior6Node;
  AnyRefNode &Ins = ..Seg.Thigh.GluteusMediusAnterior6Node;
  AnyDrawMuscle DrwMus = {#include "../DrawSettings/MusDrawSettings.any"
  };
};

AnyViaPointMuscle GluteusMediusPosterior1 = {
  AnyMuscleModel &MusMdl = ..MusPar.GluteusMediusPosterior1Par;
  AnyRefNode &Org = ..Seg.Pelvis.Muscles.GluteusMediusPosterior1Node;
  AnyRefNode &Ins = ..Seg.Thigh.GluteusMediusPosterior1Node;
  AnyDrawMuscle DrwMus = {#include "../DrawSettings/MusDrawSettings.any"
  };
};

AnyViaPointMuscle GluteusMediusPosterior2 = {
  AnyMuscleModel &MusMdl = ..MusPar.GluteusMediusPosterior2Par;
  AnyRefNode &Org = ..Seg.Pelvis.Muscles.GluteusMediusPosterior2Node;
  AnyRefNode &Ins = ..Seg.Thigh.GluteusMediusPosterior2Node;
  AnyDrawMuscle DrwMus = {#include "../DrawSettings/MusDrawSettings.any"
  };
};

AnyViaPointMuscle GluteusMediusPosterior3 = {
  AnyMuscleModel &MusMdl = ..MusPar.GluteusMediusPosterior3Par;
  AnyRefNode &Org = ..Seg.Pelvis.Muscles.GluteusMediusPosterior3Node;
  AnyRefNode &Ins = ..Seg.Thigh.GluteusMediusPosterior3Node;
  AnyDrawMuscle DrwMus = {#include "../DrawSettings/MusDrawSettings.any"
  };
};

AnyViaPointMuscle GluteusMediusPosterior4 = {
  AnyMuscleModel &MusMdl = ..MusPar.GluteusMediusPosterior4Par;
  AnyRefNode &Org = ..Seg.Pelvis.Muscles.GluteusMediusPosterior4Node;
  AnyRefNode &Ins = ..Seg.Thigh.GluteusMediusPosterior4Node;
  AnyDrawMuscle DrwMus = {#include "../DrawSettings/MusDrawSettings.any"
  };
};

AnyViaPointMuscle GluteusMediusPosterior5 = {
  AnyMuscleModel &MusMdl = ..MusPar.GluteusMediusPosterior5Par;
  AnyRefNode &Org = ..Seg.Pelvis.Muscles.GluteusMediusPosterior5Node;
  AnyRefNode &Ins = ..Seg.Thigh.GluteusMediusPosterior5Node;
  AnyDrawMuscle DrwMus = {#include "../DrawSettings/MusDrawSettings.any"
  };
};

AnyViaPointMuscle GluteusMediusPosterior6 = {
  AnyMuscleModel &MusMdl = ..MusPar.GluteusMediusPosterior6Par;
  AnyRefNode &Org = ..Seg.Pelvis.Muscles.GluteusMediusPosterior6Node;
  AnyRefNode &Ins = ..Seg.Thigh.GluteusMediusPosterior6Node;
  AnyDrawMuscle DrwMus = {#include "../DrawSettings/MusDrawSettings.any"
  };
};


#if BM_LEG_MORPHOLOGY >= 2

AnyShortestPathMuscle GluteusMaximusSuperior1 = {
  AnyMuscleModel &MusMdl = ..MusPar.GluteusMaximusSuperior1Par;
  AnyRefNode &Org = ..Seg.Pelvis.Muscles.GluteusMaximusSuperior1Node;
   AnySurface &srf = ..Seg.Pelvis.Muscles.GlueteusMaximusWrapSurfaces.Superior1.cyl;
  AnyRefNode &Ins = ..Seg.Thigh.GluteusMaximusSuperior1Node;
  SPLine = {
    StringMesh = 15;
    AnyMatrix InitWrapPos = {
        transf3D({ ...Sign*.srf.Radius, ...Sign*0.38*.srf.Radius, 0.6*.srf.Length }, &.srf ) ,
        transf3D({ 0.78*.srf.Radius, ...Sign*0.78*.srf.Radius, 0.6*.srf.Length }, &.srf ) ,
        transf3D({ 0.37*.srf.Radius, ...Sign*1.04*.srf.Radius, 0.6*.srf.Length }, &.srf )  ,
          transf3D({ -0.37*.srf.Radius, ...Sign*1.04*.srf.Radius, 0.6*.srf.Length }, &.srf ),
       transf3D({ -0.78*.srf.Radius, ...Sign*0.78*.srf.Radius, 0.6*.srf.Length }, &.srf ),
        transf3D({ -.srf.Radius, ...Sign*0.38*.srf.Radius, 0.6*.srf.Length }, &.srf )


    };
    InitWrapPosVecArr = { &InitWrapPos};
  };
  AnyDrawMuscle DrwMus = {#include "../DrawSettings/MusDrawSettings.any"
  };
};

AnyShortestPathMuscle GluteusMaximusSuperior2 = {
  AnyMuscleModel &MusMdl = ..MusPar.GluteusMaximusSuperior2Par;
  AnyRefNode &Org = ..Seg.Pelvis.Muscles.GluteusMaximusSuperior2Node;
   AnySurface &srf = ..Seg.Pelvis.Muscles.GlueteusMaximusWrapSurfaces.Superior2.cyl;
  AnyRefNode &Ins = ..Seg.Thigh.GluteusMaximusSuperior2Node;
  SPLine = {
    StringMesh = 15;
    AnyMatrix InitWrapPos = {
        transf3D({ .srf.Radius, ...Sign*0.38*.srf.Radius, 0.6*.srf.Length }, &.srf ) ,
        transf3D({ 0.78*.srf.Radius, ...Sign*0.78*.srf.Radius, 0.6*.srf.Length }, &.srf ) ,
        transf3D({ 0.37*.srf.Radius, ...Sign*1.04*.srf.Radius, 0.6*.srf.Length }, &.srf ) ,
         transf3D({ -0.37*.srf.Radius, ...Sign*1.04*.srf.Radius, 0.6*.srf.Length }, &.srf ),
       transf3D({ -0.78*.srf.Radius, ...Sign*0.78*.srf.Radius, 0.6*.srf.Length }, &.srf ),
        transf3D({ -.srf.Radius, ...Sign*0.38*.srf.Radius, 0.6*.srf.Length }, &.srf )


    };
    InitWrapPosVecArr = { &InitWrapPos};
  };
  AnyDrawMuscle DrwMus = {#include "../DrawSettings/MusDrawSettings.any"
  };
};

AnyShortestPathMuscle GluteusMaximusSuperior3 = {
  AnyMuscleModel &MusMdl = ..MusPar.GluteusMaximusSuperior3Par;
  AnyRefNode &Org = ..Seg.Pelvis.Muscles.GluteusMaximusSuperior3Node;
   AnySurface &srf = ..Seg.Pelvis.Muscles.GlueteusMaximusWrapSurfaces.Superior3.cyl;
  AnyRefNode &Ins = ..Seg.Thigh.GluteusMaximusSuperior3Node;
  SPLine = {
    StringMesh = 15;
    AnyMatrix InitWrapPos = {
        transf3D({ .srf.Radius, ...Sign* 0.38*.srf.Radius, 0.6*.srf.Length }, &.srf ) ,
        transf3D({ 0.78*.srf.Radius, ...Sign*0.78*.srf.Radius, 0.6*.srf.Length }, &.srf ),
        transf3D({ 0.37*.srf.Radius, ...Sign*1.04*.srf.Radius, 0.6*.srf.Length }, &.srf ),
         transf3D({ -0.37*.srf.Radius, ...Sign*1.04*.srf.Radius, 0.6*.srf.Length }, &.srf ),
        transf3D({ -0.78*.srf.Radius, ...Sign*0.78*.srf.Radius, 0.6*.srf.Length }, &.srf ),
        transf3D({ -.srf.Radius, ...Sign*0.38*.srf.Radius, 0.6*.srf.Length }, &.srf )


    };
    InitWrapPosVecArr = { &InitWrapPos};
  };
  AnyDrawMuscle DrwMus = {#include "../DrawSettings/MusDrawSettings.any"
  };
};

AnyShortestPathMuscle GluteusMaximusSuperior4 = {
  AnyMuscleModel &MusMdl = ..MusPar.GluteusMaximusSuperior4Par;
  AnyRefNode &Org = ..Seg.Pelvis.Muscles.GluteusMaximusSuperior4Node;
  AnySurface &srf = ..Seg.Pelvis.Muscles.GlueteusMaximusWrapSurfaces.Superior4.cyl;
  AnyRefNode &Ins = ..Seg.Thigh.GluteusMaximusSuperior4Node;
  SPLine = {
    StringMesh = 15;
    AnyMatrix InitWrapPos = {
        transf3D({ .srf.Radius, ...Sign*0.38*.srf.Radius, 0.6*.srf.Length }, &.srf ) ,
        transf3D({ 0.78*.srf.Radius, ...Sign*0.78*.srf.Radius, 0.6*.srf.Length }, &.srf ) ,
        transf3D({ 0.37*.srf.Radius, ...Sign*1.04*.srf.Radius, 0.6*.srf.Length }, &.srf ) ,
   transf3D({ -0.37*.srf.Radius, ...Sign*1.04*.srf.Radius, 0.6*.srf.Length }, &.srf ),
        transf3D({ -0.78*.srf.Radius, ...Sign*0.78*.srf.Radius, 0.6*.srf.Length }, &.srf ),
        transf3D({ -.srf.Radius, ...Sign*0.38*.srf.Radius, 0.6*.srf.Length }, &.srf )

  };
    InitWrapPosVecArr = { &InitWrapPos};
  };
  AnyDrawMuscle DrwMus = {#include "../DrawSettings/MusDrawSettings.any"
  };
};

AnyShortestPathMuscle GluteusMaximusSuperior5 = {
  AnyMuscleModel &MusMdl = ..MusPar.GluteusMaximusSuperior5Par;
  AnyRefNode &Org = ..Seg.Pelvis.Muscles.GluteusMaximusSuperior5Node;
   AnySurface &srf = ..Seg.Pelvis.Muscles.GlueteusMaximusWrapSurfaces.Superior5.cyl;
  AnyRefNode &Ins = ..Seg.Thigh.GluteusMaximusSuperior5Node;
  SPLine = {
    StringMesh = 15;
    AnyMatrix InitWrapPos = {
        transf3D({ 1.1*.srf.Radius, ...Sign*0*.srf.Radius, 0.6*.srf.Length }, &.srf ) ,
        transf3D({ .srf.Radius, ...Sign*0.38*.srf.Radius, 0.6*.srf.Length }, &.srf ) ,
        transf3D({ 0.78*.srf.Radius, ...Sign*0.78*.srf.Radius, 0.6*.srf.Length }, &.srf ) ,
        transf3D({ 0.37*.srf.Radius, ...Sign*1.04*.srf.Radius, 0.6*.srf.Length }, &.srf ) ,
         transf3D({ -0.37*.srf.Radius, ...Sign*1.04*.srf.Radius, 0.6*.srf.Length }, &.srf ),
        transf3D({ -0.78*.srf.Radius, ...Sign*0.78*.srf.Radius, 0.6*.srf.Length }, &.srf ),
        transf3D({ -.srf.Radius, ...Sign*0.38*.srf.Radius, 0.6*.srf.Length }, &.srf )


    };
    InitWrapPosVecArr = { &InitWrapPos};
  };
  AnyDrawMuscle DrwMus = {#include "../DrawSettings/MusDrawSettings.any"
  };
};

AnyShortestPathMuscle GluteusMaximusSuperior6 = {
  AnyMuscleModel &MusMdl = ..MusPar.GluteusMaximusSuperior6Par;
  AnyRefNode &Org = ..Seg.Pelvis.Muscles.GluteusMaximusSuperior6Node;
   AnySurface &srf = ..Seg.Pelvis.Muscles.GlueteusMaximusWrapSurfaces.Superior6.cyl;
  //AnySurface &srf2 = ..Seg.Thigh.IliacusWrapSurf.cyl;
  AnyRefNode &Ins = ..Seg.Thigh.GluteusMaximusSuperior6Node;
  SPLine = {
    StringMesh = 15;
    AnyMatrix InitWrapPos = {
        transf3D({ 1.1*.srf.Radius, ...Sign*0*.srf.Radius, 0.6*.srf.Length }, &.srf ) ,
        transf3D({ .srf.Radius, ...Sign*0.38*.srf.Radius, 0.6*.srf.Length }, &.srf ) ,
        transf3D({ 0.78*.srf.Radius, ...Sign*0.78*.srf.Radius, 0.6*.srf.Length }, &.srf ) ,
        transf3D({ 0.37*.srf.Radius, ...Sign*1.04*.srf.Radius, 0.6*.srf.Length }, &.srf ) ,
         transf3D({ -0.37*.srf.Radius, ...Sign*1.04*.srf.Radius, 0.6*.srf.Length }, &.srf ),
        transf3D({ -0.78*.srf.Radius, ...Sign*0.78*.srf.Radius, 0.6*.srf.Length }, &.srf ),
        transf3D({ -.srf.Radius, ...Sign*0.38*.srf.Radius, 0.6*.srf.Length }, &.srf )

    };
    InitWrapPosVecArr = { &InitWrapPos};
  };
  AnyDrawMuscle DrwMus = {#include "../DrawSettings/MusDrawSettings.any"};
};

AnyShortestPathMuscle GluteusMaximusInferior1 = {
  AnyMuscleModel &MusMdl = ..MusPar.GluteusMaximusInferior1Par;
  AnyRefNode &Org = ..Seg.Sacrum.LegAttachmentNodes.GluteusMaximusInferior1Node;
  AnySurface &srf = ..Seg.Pelvis.Muscles.GlueteusMaximusWrapSurfaces.Inferior1.cyl;
  //AnySurface &srf2 = ..Seg.Thigh.IliacusWrapSurf.cyl;
  AnyRefNode &Ins = ..Seg.Thigh.GluteusMaximusInferior1Node;


//  srf ={AnyDrawParamSurf drw2 ={};};
//  srf2 ={AnyDrawParamSurf drw2 ={};};


  SPLine = {
    StringMesh = 15;
    AnyMatrix InitWrapPos = {
        transf3D({ .srf.Radius, ...Sign*0.38*.srf.Radius, 0.6*.srf.Length }, &.srf ) ,
        transf3D({ 0.78*.srf.Radius, ...Sign*0.78*.srf.Radius, 0.6*.srf.Length }, &.srf ) ,
        transf3D({ 0.37*.srf.Radius, ...Sign*1.04*.srf.Radius, 0.6*.srf.Length }, &.srf ) ,
        transf3D({ -0.37*.srf.Radius, ...Sign*1.04*.srf.Radius, 0.6*.srf.Length }, &.srf ),
        transf3D({ -0.78*.srf.Radius, ...Sign*0.78*.srf.Radius, 0.6*.srf.Length }, &.srf ),
        transf3D({ -.srf.Radius, ...Sign*0.38*.srf.Radius, 0.6*.srf.Length }, &.srf )
    };
    InitWrapPosVecArr = { &InitWrapPos};
  };
  AnyDrawMuscle DrwMus = {#include "../DrawSettings/MusDrawSettings.any"
  };
};

AnyShortestPathMuscle GluteusMaximusInferior2 = {
  AnyMuscleModel &MusMdl = ..MusPar.GluteusMaximusInferior2Par;
  AnyRefNode &Org = ..Seg.Sacrum.LegAttachmentNodes.GluteusMaximusInferior2Node;
  AnySurface &srf = ..Seg.Pelvis.Muscles.GlueteusMaximusWrapSurfaces.Inferior2.cyl;
//  AnySurface &srf2 = ..Seg.Thigh.IliacusWrapSurf.cyl;
  AnyRefNode &Ins = ..Seg.Thigh.GluteusMaximusInferior2Node;
  SPLine = {
    StringMesh = 15;
    AnyMatrix InitWrapPos = {
        transf3D({ .srf.Radius, ...Sign*0.38*.srf.Radius, 0.6*.srf.Length }, &.srf ) ,
        transf3D({ 0.78*.srf.Radius, ...Sign*0.78*.srf.Radius, 0.6*.srf.Length }, &.srf ) ,
        transf3D({ 0.37*.srf.Radius, ...Sign*1.04*.srf.Radius, 0.6*.srf.Length }, &.srf ) ,
        transf3D({ -0.37*.srf.Radius, ...Sign*1.04*.srf.Radius, 0.6*.srf.Length }, &.srf ),
        transf3D({ -0.78*.srf.Radius, ...Sign*0.78*.srf.Radius, 0.6*.srf.Length }, &.srf ),
        transf3D({ -.srf.Radius, ...Sign*0.38*.srf.Radius, 0.6*.srf.Length }, &.srf )
    };
    InitWrapPosVecArr = { &InitWrapPos};
  };
  AnyDrawMuscle DrwMus = {#include "../DrawSettings/MusDrawSettings.any"
  };
};

AnyShortestPathMuscle GluteusMaximusInferior3 = {
  AnyMuscleModel &MusMdl = ..MusPar.GluteusMaximusInferior3Par;
  AnyRefNode &Org = ..Seg.Sacrum.LegAttachmentNodes.GluteusMaximusInferior3Node;
  AnySurface &srf = ..Seg.Pelvis.Muscles.GlueteusMaximusWrapSurfaces.Inferior3.cyl;
//  AnySurface &srf2 = ..Seg.Thigh.IliacusWrapSurf.cyl;
  AnyRefNode &Ins = ..Seg.Thigh.GluteusMaximusInferior3Node;
  SPLine = {
    StringMesh = 15;
    AnyMatrix InitWrapPos = {
        transf3D({ .srf.Radius, ...Sign*0.38*.srf.Radius, 0.6*.srf.Length }, &.srf ) ,
        transf3D({ 0.78*.srf.Radius, ...Sign*0.78*.srf.Radius, 0.6*.srf.Length }, &.srf ) ,
        transf3D({ 0.37*.srf.Radius, ...Sign*1.04*.srf.Radius, 0.6*.srf.Length }, &.srf ) ,
        transf3D({ -0.37*.srf.Radius, ...Sign*1.04*.srf.Radius, 0.6*.srf.Length }, &.srf ),
        transf3D({ -0.78*.srf.Radius, ...Sign*0.78*.srf.Radius, 0.6*.srf.Length }, &.srf ),
        transf3D({ -.srf.Radius, ...Sign*0.38*.srf.Radius, 0.6*.srf.Length }, &.srf )
    };
    InitWrapPosVecArr = { &InitWrapPos};
  };
  AnyDrawMuscle DrwMus = {#include "../DrawSettings/MusDrawSettings.any"
  };
};
AnyShortestPathMuscle GluteusMaximusInferior4 = {
  AnyMuscleModel &MusMdl = ..MusPar.GluteusMaximusInferior4Par;
  AnyRefNode &Org = ..Seg.Sacrum.LegAttachmentNodes.GluteusMaximusInferior4Node;
  AnySurface &srf = ..Seg.Pelvis.Muscles.GlueteusMaximusWrapSurfaces.Inferior4.cyl;
  //AnySurface &srf2 = ..Seg.Thigh.IliacusWrapSurf.cyl;
  AnyRefNode &Ins = ..Seg.Thigh.GluteusMaximusInferior4Node;
  SPLine = {
    StringMesh = 20;
    AnyMatrix InitWrapPos = {
        transf3D({ .srf.Radius, ...Sign*0.38*.srf.Radius, 0.6*.srf.Length }, &.srf ) ,
        transf3D({ 0.78*.srf.Radius, ...Sign*0.78*.srf.Radius, 0.6*.srf.Length }, &.srf ) ,
        transf3D({ 0.37*.srf.Radius, ...Sign*1.04*.srf.Radius, 0.6*.srf.Length }, &.srf ) ,
        transf3D({ -0.37*.srf.Radius, ...Sign*1.04*.srf.Radius, 0.6*.srf.Length }, &.srf ),
        transf3D({ -0.78*.srf.Radius, ...Sign*0.78*.srf.Radius, 0.6*.srf.Length }, &.srf ),
        transf3D({ -.srf.Radius, ...Sign*0.38*.srf.Radius, 0.6*.srf.Length }, &.srf )

    };
    InitWrapPosVecArr = { &InitWrapPos};
  };
  AnyDrawMuscle DrwMus = {#include "../DrawSettings/MusDrawSettings.any"
  };
};

AnyShortestPathMuscle GluteusMaximusInferior5 = {
  AnyMuscleModel &MusMdl = ..MusPar.GluteusMaximusInferior5Par;
  AnyRefNode &Org = ..Seg.Sacrum.LegAttachmentNodes.GluteusMaximusInferior5Node;
  AnySurface &srf = ..Seg.Pelvis.Muscles.GlueteusMaximusWrapSurfaces.Inferior5.cyl;
  //AnySurface &srf2 = ..Seg.Thigh.IliacusWrapSurf.cyl;
  AnyRefNode &Ins = ..Seg.Thigh.GluteusMaximusInferior5Node;
  SPLine = {
    StringMesh = 20;
    AnyMatrix InitWrapPos = {
        transf3D({ .srf.Radius, ...Sign*0.38*.srf.Radius, 0.6*.srf.Length }, &.srf ) ,
        transf3D({ 0.78*.srf.Radius, ...Sign*0.78*.srf.Radius, 0.6*.srf.Length }, &.srf ) ,
        transf3D({ 0.37*.srf.Radius, ...Sign*1.04*.srf.Radius, 0.6*.srf.Length }, &.srf ) ,
        transf3D({ -0.37*.srf.Radius, ...Sign*1.04*.srf.Radius, 0.6*.srf.Length }, &.srf ),
        transf3D({ -0.78*.srf.Radius, ...Sign*0.78*.srf.Radius, 0.6*.srf.Length }, &.srf ),
        transf3D({ -.srf.Radius, ...Sign*0.38*.srf.Radius, 0.6*.srf.Length }, &.srf )
    };
    InitWrapPosVecArr = { &InitWrapPos};
  };
  AnyDrawMuscle DrwMus = {#include "../DrawSettings/MusDrawSettings.any"
  };
};

AnyShortestPathMuscle GluteusMaximusInferior6 = {
  AnyMuscleModel &MusMdl = ..MusPar.GluteusMaximusInferior6Par;
  AnyRefNode &Org = ..Seg.Sacrum.LegAttachmentNodes.GluteusMaximusInferior6Node;
  AnySurface &srf = ..Seg.Pelvis.Muscles.GlueteusMaximusWrapSurfaces.Inferior6.cyl;
 // AnySurface &srf2 = ..Seg.Thigh.IliacusWrapSurf.cyl;
  AnyRefNode &Ins = ..Seg.Thigh.GluteusMaximusInferior6Node;
  SPLine = {
    StringMesh = 20;
    AnyMatrix InitWrapPos = {
        transf3D({ .srf.Radius, ...Sign*0.38*.srf.Radius, 0.6*.srf.Length }, &.srf ) ,
        transf3D({ 0.78*.srf.Radius, ...Sign*0.78*.srf.Radius, 0.6*.srf.Length }, &.srf ) ,
        transf3D({ 0.37*.srf.Radius, ...Sign*1.04*.srf.Radius, 0.6*.srf.Length }, &.srf ) ,
        transf3D({ -0.37*.srf.Radius, ...Sign*1.04*.srf.Radius, 0.6*.srf.Length }, &.srf ),
        transf3D({ -0.78*.srf.Radius, ...Sign*0.78*.srf.Radius, 0.6*.srf.Length }, &.srf ),
        transf3D({ -.srf.Radius, ...Sign*0.38*.srf.Radius, 0.6*.srf.Length }, &.srf )
    };
    InitWrapPosVecArr = { &InitWrapPos};
  };
  AnyDrawMuscle DrwMus = {#include "../DrawSettings/MusDrawSettings.any" };
};

#else

#ifdef GLUTEUS_MAX_WRAPPING_BETA


AnyShortestPathMuscle GluteusMaximusSuperior1 = {
  AnyMuscleModel &MusMdl = ..MusPar.GluteusMaximusSuperior1Par;
  AnyRefNode &Org = ..Seg.Pelvis.Muscles.GluteusMaximusSuperior1Node;
  AnySurface &srf = ..Seg.Pelvis.Muscles.GluteusCylSuperior.cyl;
  AnyRefNode &Ins = ..Seg.Thigh.GluteusMaximusSuperior1Node;
  SPLine.StringMesh = 45;
  SPLine.InitWrapPosVectors = {{0,0,0},{-0.5, 0.5 ,0}};
  AnyDrawMuscle DrwMus = {#include "../DrawSettings/MusDrawSettings.any"
  };
};

AnyShortestPathMuscle GluteusMaximusSuperior2 = {
  AnyMuscleModel &MusMdl = ..MusPar.GluteusMaximusSuperior2Par;
  AnyRefNode &Org = ..Seg.Pelvis.Muscles.GluteusMaximusSuperior2Node;
  AnySurface &srf = ..Seg.Pelvis.Muscles.GluteusCylSuperior.cyl;
  AnyRefNode &Ins = ..Seg.Thigh.GluteusMaximusSuperior2Node;
  SPLine.StringMesh = 45;
  SPLine.InitWrapPosVectors = {{0,0,0},{-0.5, 0.5 ,0}};
  AnyDrawMuscle DrwMus = {#include "../DrawSettings/MusDrawSettings.any"
  };
};

AnyShortestPathMuscle GluteusMaximusSuperior3 = {
  AnyMuscleModel &MusMdl = ..MusPar.GluteusMaximusSuperior3Par;
  AnyRefNode &Org = ..Seg.Pelvis.Muscles.GluteusMaximusSuperior3Node;
  AnySurface &srf = ..Seg.Pelvis.Muscles.GluteusCylSuperior.cyl;
  AnyRefNode &Ins = ..Seg.Thigh.GluteusMaximusSuperior3Node;
  SPLine.StringMesh = 45;
  SPLine.InitWrapPosVectors = {{0,0,0},{-0.5, 0.5 ,0}};
  AnyDrawMuscle DrwMus = {#include "../DrawSettings/MusDrawSettings.any"
  };
};

AnyShortestPathMuscle GluteusMaximusSuperior4 = {
  AnyMuscleModel &MusMdl = ..MusPar.GluteusMaximusSuperior4Par;
  AnyRefNode &Org = ..Seg.Pelvis.Muscles.GluteusMaximusSuperior4Node;
  AnySurface &srf = ..Seg.Pelvis.Muscles.GluteusCylSuperior.cyl;
  AnyRefNode &Ins = ..Seg.Thigh.GluteusMaximusSuperior4Node;
  SPLine.StringMesh = 45;
  SPLine.InitWrapPosVectors = {{0,0,0},{-0.5, 0.5 ,0}};
  AnyDrawMuscle DrwMus = {#include "../DrawSettings/MusDrawSettings.any"
  };
};

AnyShortestPathMuscle GluteusMaximusSuperior5 = {
  AnyMuscleModel &MusMdl = ..MusPar.GluteusMaximusSuperior5Par;
  AnyRefNode &Org = ..Seg.Pelvis.Muscles.GluteusMaximusSuperior5Node;
  AnySurface &srf = ..Seg.Pelvis.Muscles.GluteusCylSuperior.cyl;
  AnyRefNode &Ins = ..Seg.Thigh.GluteusMaximusSuperior5Node;
  SPLine.StringMesh = 45;
  SPLine.InitWrapPosVectors = {{0,0,0},{-0.5, 0.5 ,0}};
  AnyDrawMuscle DrwMus = {#include "../DrawSettings/MusDrawSettings.any"
  };
};

AnyShortestPathMuscle GluteusMaximusSuperior6 = {
  AnyMuscleModel &MusMdl = ..MusPar.GluteusMaximusSuperior6Par;
  AnyRefNode &Org = ..Seg.Pelvis.Muscles.GluteusMaximusSuperior6Node;
  AnySurface &srf = ..Seg.Pelvis.Muscles.GluteusCylSuperior.cyl;
  AnyRefNode &Ins = ..Seg.Thigh.GluteusMaximusSuperior6Node;
  SPLine.StringMesh = 100;
  SPLine.InitWrapPosVectors = {{0,0,0},{-0.5, 0.5 ,0}};
  AnyDrawMuscle DrwMus = {#include "../DrawSettings/MusDrawSettings.any"};
};

AnyShortestPathMuscle GluteusMaximusInferior1 = {
  AnyMuscleModel &MusMdl = ..MusPar.GluteusMaximusInferior1Par;
  AnySurface &srf = ..Seg.Pelvis.Muscles.GluteusCylInferior.cyl;
  AnyRefNode &Org = ..Seg.Pelvis.Muscles.GluteusMaximusInferior1Node;
  AnyRefNode &Ins = ..Seg.Thigh.GluteusMaximusInferior1Node;
  SPLine.StringMesh = 45;
  SPLine.InitWrapPosVectors = {{0,0,0},{-0.5, 0.5 ,0}};
  AnyDrawMuscle DrwMus = {#include "../DrawSettings/MusDrawSettings.any"
  };
};

AnyShortestPathMuscle GluteusMaximusInferior2 = {
  AnyMuscleModel &MusMdl = ..MusPar.GluteusMaximusInferior2Par;
  AnyRefNode &Org = ..Seg.Pelvis.Muscles.GluteusMaximusInferior2Node;
  AnySurface &srf = ..Seg.Pelvis.Muscles.GluteusCylInferior.cyl;
  AnyRefNode &Ins = ..Seg.Thigh.GluteusMaximusInferior2Node;
  SPLine.StringMesh = 45;
  SPLine.InitWrapPosVectors = {{0,0,0},{-0.5, 0.5 ,0}};
  AnyDrawMuscle DrwMus = {#include "../DrawSettings/MusDrawSettings.any"
  };
};

AnyShortestPathMuscle GluteusMaximusInferior3 = {
  AnyMuscleModel &MusMdl = ..MusPar.GluteusMaximusInferior3Par;
  AnyRefNode &Org = ..Seg.Pelvis.Muscles.GluteusMaximusInferior3Node;
  AnySurface &srf = ..Seg.Pelvis.Muscles.GluteusCylInferior.cyl;
  AnyRefNode &Ins = ..Seg.Thigh.GluteusMaximusInferior3Node;
  SPLine.StringMesh = 45;
  SPLine.InitWrapPosVectors = {{0,0,0},{-0.5, 0.5 ,0}};
  AnyDrawMuscle DrwMus = {#include "../DrawSettings/MusDrawSettings.any"
  };
};

AnyShortestPathMuscle GluteusMaximusInferior4 = {
  AnyMuscleModel &MusMdl = ..MusPar.GluteusMaximusInferior4Par;
  AnySurface &srf = ..Seg.Pelvis.Muscles.GluteusCylInferior.cyl;
  AnyRefNode &Org = ..Seg.Pelvis.Muscles.GluteusMaximusInferior4Node;
  AnyRefNode &Ins = ..Seg.Thigh.GluteusMaximusInferior4Node;
  SPLine.StringMesh = 45;
  SPLine.InitWrapPosVectors = {{0,0,0},{-0.5, 0.5 ,0}};
  AnyDrawMuscle DrwMus = {#include "../DrawSettings/MusDrawSettings.any"
  };
};

AnyShortestPathMuscle GluteusMaximusInferior5 = {
  AnyMuscleModel &MusMdl = ..MusPar.GluteusMaximusInferior5Par;
  AnyRefNode &Org = ..Seg.Pelvis.Muscles.GluteusMaximusInferior5Node;
  AnySurface &srf = ..Seg.Pelvis.Muscles.GluteusCylInferior.cyl;
  AnyRefNode &Ins = ..Seg.Thigh.GluteusMaximusInferior5Node;
  SPLine.StringMesh = 45;
  SPLine.InitWrapPosVectors = {{0,0,0},{-0.5, 0.5 ,0}};
  AnyDrawMuscle DrwMus = {#include "../DrawSettings/MusDrawSettings.any"
  };
};

AnyShortestPathMuscle GluteusMaximusInferior6 = {
  AnyMuscleModel &MusMdl = ..MusPar.GluteusMaximusInferior6Par;
  AnyRefNode &Org = ..Seg.Pelvis.Muscles.GluteusMaximusInferior6Node;
  AnySurface &srf = ..Seg.Pelvis.Muscles.GluteusCylInferior.cyl;
  AnyRefNode &Ins = ..Seg.Thigh.GluteusMaximusInferior6Node;
  SPLine.StringMesh = 45;
  SPLine.InitWrapPosVectors = {{0,0,0},{-0.5, 0.5 ,0}};
  AnyDrawMuscle DrwMus = {#include "../DrawSettings/MusDrawSettings.any"
  };
};

#else

AnyViaPointMuscle GluteusMaximusSuperior1 = {
  AnyMuscleModel &MusMdl = ..MusPar.GluteusMaximusSuperior1Par;
  AnyRefNode &Org = ..Seg.Pelvis.Muscles.GluteusMaximusSuperior1Node;
  AnyRefNode &Ins = ..Seg.Thigh.GluteusMaximusSuperior1Node;
  AnyDrawMuscle DrwMus = {#include "../DrawSettings/MusDrawSettings.any"
  };
};

AnyViaPointMuscle GluteusMaximusSuperior2 = {
  AnyMuscleModel &MusMdl = ..MusPar.GluteusMaximusSuperior2Par;
  AnyRefNode &Org = ..Seg.Pelvis.Muscles.GluteusMaximusSuperior2Node;
  AnyRefNode &Ins = ..Seg.Thigh.GluteusMaximusSuperior2Node;
  AnyDrawMuscle DrwMus = {#include "../DrawSettings/MusDrawSettings.any"
  };
};

AnyViaPointMuscle GluteusMaximusSuperior3 = {
  AnyMuscleModel &MusMdl = ..MusPar.GluteusMaximusSuperior3Par;
  AnyRefNode &Org = ..Seg.Pelvis.Muscles.GluteusMaximusSuperior3Node;
  AnyRefNode &Ins = ..Seg.Thigh.GluteusMaximusSuperior3Node;
  AnyDrawMuscle DrwMus = {#include "../DrawSettings/MusDrawSettings.any"
  };
};

AnyViaPointMuscle GluteusMaximusSuperior4 = {
  AnyMuscleModel &MusMdl = ..MusPar.GluteusMaximusSuperior4Par;
  AnyRefNode &Org = ..Seg.Pelvis.Muscles.GluteusMaximusSuperior4Node;
  AnyRefNode &Ins = ..Seg.Thigh.GluteusMaximusSuperior4Node;
  AnyDrawMuscle DrwMus = {#include "../DrawSettings/MusDrawSettings.any"
  };
};

AnyViaPointMuscle GluteusMaximusSuperior5 = {
  AnyMuscleModel &MusMdl = ..MusPar.GluteusMaximusSuperior5Par;
  AnyRefNode &Org = ..Seg.Pelvis.Muscles.GluteusMaximusSuperior5Node;
  AnyRefNode &Ins = ..Seg.Thigh.GluteusMaximusSuperior5Node;
  AnyDrawMuscle DrwMus = {#include "../DrawSettings/MusDrawSettings.any"
  };
};

AnyViaPointMuscle GluteusMaximusSuperior6 = {
  AnyMuscleModel &MusMdl = ..MusPar.GluteusMaximusSuperior6Par;
  AnyRefNode &Org = ..Seg.Pelvis.Muscles.GluteusMaximusSuperior6Node;
  AnyRefNode &Ins = ..Seg.Thigh.GluteusMaximusSuperior6Node;
  AnyDrawMuscle DrwMus = {#include "../DrawSettings/MusDrawSettings.any"};

};

AnyViaPointMuscle GluteusMaximusInferior1 = {
  AnyMuscleModel &MusMdl = ..MusPar.GluteusMaximusInferior1Par;
  AnyRefNode &Org = ..Seg.Pelvis.Muscles.GluteusMaximusInferior1Node;
  AnyRefNode &Ins = ..Seg.Thigh.GluteusMaximusInferior1Node;
  AnyDrawMuscle DrwMus = {#include "../DrawSettings/MusDrawSettings.any"
  };
};

AnyViaPointMuscle GluteusMaximusInferior2 = {
  AnyMuscleModel &MusMdl = ..MusPar.GluteusMaximusInferior2Par;
  AnyRefNode &Org = ..Seg.Pelvis.Muscles.GluteusMaximusInferior2Node;
  AnyRefNode &Ins = ..Seg.Thigh.GluteusMaximusInferior2Node;
  AnyDrawMuscle DrwMus = {#include "../DrawSettings/MusDrawSettings.any"
  };
};

AnyViaPointMuscle GluteusMaximusInferior3 = {
  AnyMuscleModel &MusMdl = ..MusPar.GluteusMaximusInferior3Par;
  AnyRefNode &Org = ..Seg.Pelvis.Muscles.GluteusMaximusInferior3Node;
  AnyRefNode &Ins = ..Seg.Thigh.GluteusMaximusInferior3Node;
  AnyDrawMuscle DrwMus = {#include "../DrawSettings/MusDrawSettings.any"
  };
};


AnyViaPointMuscle GluteusMaximusInferior4 = {
  AnyMuscleModel &MusMdl = ..MusPar.GluteusMaximusInferior4Par;
  AnyRefNode &Org = ..Seg.Pelvis.Muscles.GluteusMaximusInferior4Node;
  AnyRefNode &Ins = ..Seg.Thigh.GluteusMaximusInferior4Node;
  AnyDrawMuscle DrwMus = {#include "../DrawSettings/MusDrawSettings.any"
  };
};

AnyViaPointMuscle GluteusMaximusInferior5 = {
  AnyMuscleModel &MusMdl = ..MusPar.GluteusMaximusInferior5Par;
  AnyRefNode &Org = ..Seg.Pelvis.Muscles.GluteusMaximusInferior5Node;
  AnyRefNode &Ins = ..Seg.Thigh.GluteusMaximusInferior5Node;
  AnyDrawMuscle DrwMus = {#include "../DrawSettings/MusDrawSettings.any"
  };
};

AnyViaPointMuscle GluteusMaximusInferior6 = {
  AnyMuscleModel &MusMdl = ..MusPar.GluteusMaximusInferior6Par;
  AnyRefNode &Org = ..Seg.Pelvis.Muscles.GluteusMaximusInferior6Node;
  AnyRefNode &Ins = ..Seg.Thigh.GluteusMaximusInferior6Node;
  AnyDrawMuscle DrwMus = {#include "../DrawSettings/MusDrawSettings.any"
  };
};

#endif

#endif

AnyViaPointMuscle TensorFasciaeLatae1 = {
  AnyMuscleModel &MusMdl = ..MusPar.TensorFasciaeLatae1Par;
  AnyRefNode &Org = ..Seg.Pelvis.Muscles.TensorFasciaeLatae1Node;
  #if BM_LEG_MORPHOLOGY >= 2
  AnyRefNode &Via = ..Seg.Thigh.TensorFasciaeLatae1ViaNode;
  #endif
  AnyRefNode &Ins = ..Seg.Shank.TensorFasciaeLatae1Node;
  AnyDrawMuscle DrwMus = {#include "../DrawSettings/MusDrawSettings.any"
  };
};

AnyViaPointMuscle TensorFasciaeLatae2 = {
  AnyMuscleModel &MusMdl = ..MusPar.TensorFasciaeLatae2Par;
  AnyRefNode &Org = ..Seg.Pelvis.Muscles.TensorFasciaeLatae2Node;
  #if BM_LEG_MORPHOLOGY >= 2
  AnyRefNode &Via = ..Seg.Thigh.TensorFasciaeLatae2ViaNode;
  #endif
  AnyRefNode &Ins = ..Seg.Shank.TensorFasciaeLatae2Node;
  AnyDrawMuscle DrwMus = {#include "../DrawSettings/MusDrawSettings.any"
  };
};

AnyViaPointMuscle Piriformis1 = {
  AnyMuscleModel &MusMdl = ..MusPar.Piriformis1Par;
  AnyRefNode &Org = ..Seg.Pelvis.Muscles.Piriformis1Node;
  AnyRefNode &Ins = ..Seg.Thigh.Piriformis1Node;
  AnyDrawMuscle DrwMus = {#include "../DrawSettings/MusDrawSettings.any"
  };
};

AnyViaPointMuscle Gracilis1 = {
  AnyMuscleModel &MusMdl = ..MusPar.Gracilis1Par;
  AnyRefNode &Org = ..Seg.Pelvis.Muscles.Gracilis1Node;
  AnyRefNode &Via1 = ..Seg.Shank.GracilisViaNode1;
  AnyRefNode &Via2 = ..Seg.Shank.GracilisViaNode2;
  #if BM_LEG_MORPHOLOGY == 2
  AnyRefNode &Via3 = ..Seg.Shank.GracilisViaNode3;
  #endif
  #if BM_LEG_MORPHOLOGY == 1
  //AnyRefNode &Via4 = ..Seg.Shank.GracilisViaNode4;
  //AnyRefNode &Via5 = ..Seg.Shank.GracilisViaNode5;
  AnyRefNode &Via6 = ..Seg.Shank.GracilisViaNode6;
  AnyRefNode &Via7 = ..Seg.Shank.GracilisViaNode7;
  AnyRefNode &Via8 = ..Seg.Shank.GracilisViaNode8;
  AnyRefNode &Ins = ..Seg.Shank.Gracilis1Node;
  #endif
  AnyDrawMuscle DrwMus = {
    #include "../DrawSettings/MusDrawSettings.any"
  };
};

AnyViaPointMuscle Gracilis2 = {
  AnyMuscleModel &MusMdl = ..MusPar.Gracilis2Par;
  AnyRefNode &Org = ..Seg.Pelvis.Muscles.Gracilis2Node;
  AnyRefNode &Via1 = ..Seg.Shank.GracilisViaNode1;
  AnyRefNode &Via2 = ..Seg.Shank.GracilisViaNode2;
  #if BM_LEG_MORPHOLOGY == 2
  AnyRefNode &Via3 = ..Seg.Shank.GracilisViaNode3;
  #endif
  #if BM_LEG_MORPHOLOGY == 1
  //AnyRefNode &Via4 = ..Seg.Shank.GracilisViaNode4;
  //AnyRefNode &Via5 = ..Seg.Shank.GracilisViaNode5;
  AnyRefNode &Via6 = ..Seg.Shank.GracilisViaNode6;
  AnyRefNode &Via7 = ..Seg.Shank.GracilisViaNode7;
  AnyRefNode &Via8 = ..Seg.Shank.GracilisViaNode8;
  #endif
  AnyRefNode &Ins = ..Seg.Shank.Gracilis2Node;
  AnyDrawMuscle DrwMus = {
    #include "../DrawSettings/MusDrawSettings.any"
  };
};


AnyViaPointMuscle AdductorLongus1 = {
  AnyMuscleModel &MusMdl = ..MusPar.AdductorLongus1Par;
  AnyRefNode &Org = ..Seg.Pelvis.Muscles.AdductorLongus1Node;
  AnyRefNode &Ins = ..Seg.Thigh.AdductorLongus1Node;
  AnyDrawMuscle DrwMus = {#include "../DrawSettings/MusDrawSettings.any"
  };
};

AnyViaPointMuscle AdductorLongus2 = {
  AnyMuscleModel &MusMdl = ..MusPar.AdductorLongus2Par;
  AnyRefNode &Org = ..Seg.Pelvis.Muscles.AdductorLongus2Node;
  AnyRefNode &Ins = ..Seg.Thigh.AdductorLongus2Node;
  AnyDrawMuscle DrwMus = {#include "../DrawSettings/MusDrawSettings.any"
  };
};

AnyViaPointMuscle AdductorLongus3 = {
  AnyMuscleModel &MusMdl = ..MusPar.AdductorLongus3Par;
  AnyRefNode &Org = ..Seg.Pelvis.Muscles.AdductorLongus3Node;
  AnyRefNode &Ins = ..Seg.Thigh.AdductorLongus3Node;
  AnyDrawMuscle DrwMus = {#include "../DrawSettings/MusDrawSettings.any"
  };
};

AnyViaPointMuscle AdductorLongus4 = {
  AnyMuscleModel &MusMdl = ..MusPar.AdductorLongus4Par;
  AnyRefNode &Org = ..Seg.Pelvis.Muscles.AdductorLongus4Node;
  AnyRefNode &Ins = ..Seg.Thigh.AdductorLongus4Node;
  AnyDrawMuscle DrwMus = {#include "../DrawSettings/MusDrawSettings.any"
  };
};

AnyViaPointMuscle AdductorLongus5 = {
  AnyMuscleModel &MusMdl = ..MusPar.AdductorLongus5Par;
  AnyRefNode &Org = ..Seg.Pelvis.Muscles.AdductorLongus5Node;
  AnyRefNode &Ins = ..Seg.Thigh.AdductorLongus5Node;
  AnyDrawMuscle DrwMus = {#include "../DrawSettings/MusDrawSettings.any"
  };
};

AnyViaPointMuscle AdductorLongus6 = {
  AnyMuscleModel &MusMdl = ..MusPar.AdductorLongus6Par;
  AnyRefNode &Org = ..Seg.Pelvis.Muscles.AdductorLongus6Node;
  AnyRefNode &Ins = ..Seg.Thigh.AdductorLongus6Node;
  AnyDrawMuscle DrwMus = {#include "../DrawSettings/MusDrawSettings.any"
  };
};

//muscle changed to insert on thigh
AnyViaPointMuscle AdductorMagnusDistal1 = {
  AnyMuscleModel &MusMdl = ..MusPar.AdductorMagnusDistal1Par;
  AnyRefNode &Org = ..Seg.Pelvis.Muscles.AdductorMagnusDistal1Node;
  AnyRefNode &Ins = ..Seg.Thigh.AdductorMagnusDistal1Node;
  AnyDrawMuscle DrwMus = {#include "../DrawSettings/MusDrawSettings.any"
  };
};


//muscle changed to insert on thigh
AnyViaPointMuscle AdductorMagnusDistal2 = {
  AnyMuscleModel &MusMdl = ..MusPar.AdductorMagnusDistal2Par;
  AnyRefNode &Org = ..Seg.Pelvis.Muscles.AdductorMagnusDistal2Node;
  AnyRefNode &Ins = ..Seg.Thigh.AdductorMagnusDistal2Node;
  AnyDrawMuscle DrwMus = {#include "../DrawSettings/MusDrawSettings.any"
  };
};
//muscle changed to insert on thigh
AnyViaPointMuscle AdductorMagnusDistal3 = {
  AnyMuscleModel &MusMdl = ..MusPar.AdductorMagnusDistal3Par;
  AnyRefNode &Org = ..Seg.Pelvis.Muscles.AdductorMagnusDistal3Node;
  AnyRefNode &Ins = ..Seg.Thigh.AdductorMagnusDistal3Node;
  AnyDrawMuscle DrwMus = {#include "../DrawSettings/MusDrawSettings.any"
  };
};


AnyViaPointMuscle AdductorMagnusMid1 = {
  AnyMuscleModel &MusMdl = ..MusPar.AdductorMagnusMid1Par;
  AnyRefNode &Org = ..Seg.Pelvis.Muscles.AdductorMagnusMid1Node;
  AnyRefNode &Ins = ..Seg.Thigh.AdductorMagnusMid1Node;
  AnyDrawMuscle DrwMus = {#include "../DrawSettings/MusDrawSettings.any"
  };
};

AnyViaPointMuscle AdductorMagnusMid2 = {
  AnyMuscleModel &MusMdl = ..MusPar.AdductorMagnusMid2Par;
  AnyRefNode &Org = ..Seg.Pelvis.Muscles.AdductorMagnusMid2Node;
  AnyRefNode &Ins = ..Seg.Thigh.AdductorMagnusMid2Node;
  AnyDrawMuscle DrwMus = {#include "../DrawSettings/MusDrawSettings.any"
  };
};

AnyViaPointMuscle AdductorMagnusMid3 = {
  AnyMuscleModel &MusMdl = ..MusPar.AdductorMagnusMid3Par;
  AnyRefNode &Org = ..Seg.Pelvis.Muscles.AdductorMagnusMid3Node;
  AnyRefNode &Ins = ..Seg.Thigh.AdductorMagnusMid3Node;
  AnyDrawMuscle DrwMus = {#include "../DrawSettings/MusDrawSettings.any"
  };
};

AnyViaPointMuscle AdductorMagnusMid4 = {
  AnyMuscleModel &MusMdl = ..MusPar.AdductorMagnusMid4Par;
  AnyRefNode &Org = ..Seg.Pelvis.Muscles.AdductorMagnusMid4Node;
  AnyRefNode &Ins = ..Seg.Thigh.AdductorMagnusMid4Node;
  AnyDrawMuscle DrwMus = {#include "../DrawSettings/MusDrawSettings.any"
  };
};

AnyViaPointMuscle AdductorMagnusMid5 = {
  AnyMuscleModel &MusMdl = ..MusPar.AdductorMagnusMid5Par;
  AnyRefNode &Org = ..Seg.Pelvis.Muscles.AdductorMagnusMid5Node;
  AnyRefNode &Ins = ..Seg.Thigh.AdductorMagnusMid5Node;
  AnyDrawMuscle DrwMus = {#include "../DrawSettings/MusDrawSettings.any"
  };
};

AnyViaPointMuscle AdductorMagnusMid6 = {
  AnyMuscleModel &MusMdl = ..MusPar.AdductorMagnusMid6Par;
  AnyRefNode &Org = ..Seg.Pelvis.Muscles.AdductorMagnusMid6Node;
  AnyRefNode &Ins = ..Seg.Thigh.AdductorMagnusMid6Node;
  AnyDrawMuscle DrwMus = {#include "../DrawSettings/MusDrawSettings.any"
  };
};

AnyViaPointMuscle AdductorMagnusProximal1 = {
  AnyMuscleModel &MusMdl = ..MusPar.AdductorMagnusProximal1Par;
  AnyRefNode &Org = ..Seg.Pelvis.Muscles.AdductorMagnusProximal1Node;
  AnyRefNode &Ins = ..Seg.Thigh.AdductorMagnusProximal1Node;
  AnyDrawMuscle DrwMus = {#include "../DrawSettings/MusDrawSettings.any"
  };
};

AnyViaPointMuscle AdductorMagnusProximal2 = {
  AnyMuscleModel &MusMdl = ..MusPar.AdductorMagnusProximal2Par;
  AnyRefNode &Org = ..Seg.Pelvis.Muscles.AdductorMagnusProximal2Node;
  AnyRefNode &Ins = ..Seg.Thigh.AdductorMagnusProximal2Node;
  AnyDrawMuscle DrwMus = {#include "../DrawSettings/MusDrawSettings.any"
  };
};

AnyViaPointMuscle AdductorMagnusProximal3 = {
  AnyMuscleModel &MusMdl = ..MusPar.AdductorMagnusProximal3Par;
  AnyRefNode &Org = ..Seg.Pelvis.Muscles.AdductorMagnusProximal3Node;
  AnyRefNode &Ins = ..Seg.Thigh.AdductorMagnusProximal3Node;
  AnyDrawMuscle DrwMus = {#include "../DrawSettings/MusDrawSettings.any"
  };
};

AnyViaPointMuscle AdductorMagnusProximal4 = {
  AnyMuscleModel &MusMdl = ..MusPar.AdductorMagnusProximal4Par;
  AnyRefNode &Org = ..Seg.Pelvis.Muscles.AdductorMagnusProximal4Node;
  AnyRefNode &Ins = ..Seg.Thigh.AdductorMagnusProximal4Node;
  AnyDrawMuscle DrwMus = {#include "../DrawSettings/MusDrawSettings.any"
  };
};

AnyViaPointMuscle AdductorBrevisProximal1 = {
  AnyMuscleModel &MusMdl = ..MusPar.AdductorBrevisProximal1Par;
  AnyRefNode &Org = ..Seg.Pelvis.Muscles.AdductorBrevisProximal1Node;
  AnyRefNode &Ins = ..Seg.Thigh.AdductorBrevisProximal1Node;
  AnyDrawMuscle DrwMus = {#include "../DrawSettings/MusDrawSettings.any"
  };
};

AnyViaPointMuscle AdductorBrevisProximal2 = {
  AnyMuscleModel &MusMdl = ..MusPar.AdductorBrevisProximal2Par;
  AnyRefNode &Org = ..Seg.Pelvis.Muscles.AdductorBrevisProximal2Node;
  AnyRefNode &Ins = ..Seg.Thigh.AdductorBrevisProximal2Node;
  AnyDrawMuscle DrwMus = {#include "../DrawSettings/MusDrawSettings.any"
  };
};

AnyViaPointMuscle AdductorBrevisMid1 = {
  AnyMuscleModel &MusMdl = ..MusPar.AdductorBrevisMid1Par;
  AnyRefNode &Org = ..Seg.Pelvis.Muscles.AdductorBrevisMid1Node;
  AnyRefNode &Ins = ..Seg.Thigh.AdductorBrevisMid1Node;
  AnyDrawMuscle DrwMus = {#include "../DrawSettings/MusDrawSettings.any"
  };
};

AnyViaPointMuscle AdductorBrevisMid2 = {
  AnyMuscleModel &MusMdl = ..MusPar.AdductorBrevisMid2Par;
  AnyRefNode &Org = ..Seg.Pelvis.Muscles.AdductorBrevisMid2Node;
  AnyRefNode &Ins = ..Seg.Thigh.AdductorBrevisMid2Node;
  AnyDrawMuscle DrwMus = {#include "../DrawSettings/MusDrawSettings.any"
  };
};

AnyViaPointMuscle AdductorBrevisDistal1 = {
  AnyMuscleModel &MusMdl = ..MusPar.AdductorBrevisDistal1Par;
  AnyRefNode &Org = ..Seg.Pelvis.Muscles.AdductorBrevisDistal1Node;
  AnyRefNode &Ins = ..Seg.Thigh.AdductorBrevisDistal1Node;
  AnyDrawMuscle DrwMus = {#include "../DrawSettings/MusDrawSettings.any"
  };
};

AnyViaPointMuscle AdductorBrevisDistal2 = {
  AnyMuscleModel &MusMdl = ..MusPar.AdductorBrevisDistal2Par;
  AnyRefNode &Org = ..Seg.Pelvis.Muscles.AdductorBrevisDistal2Node;
  AnyRefNode &Ins = ..Seg.Thigh.AdductorBrevisDistal2Node;
  AnyDrawMuscle DrwMus = {#include "../DrawSettings/MusDrawSettings.any"
  };
};

AnyViaPointMuscle GemellusInferior1 = {
  AnyMuscleModel &MusMdl = ..MusPar.GemellusInferior1Par;
  AnyRefNode &Org = ..Seg.Pelvis.Muscles.GemellusInferior1Node;
  AnyRefNode &Ins = ..Seg.Thigh.GemellusInferior1Node;
  AnyDrawMuscle DrwMus = {#include "../DrawSettings/MusDrawSettings.any"
  };
};

AnyViaPointMuscle GemellusSuperior1 = {
  AnyMuscleModel &MusMdl = ..MusPar.GemellusSuperior1Par;
  AnyRefNode &Org = ..Seg.Pelvis.Muscles.GemellusSuperior1Node;
  AnyRefNode &Ins = ..Seg.Thigh.GemellusSuperior1Node;
  AnyDrawMuscle DrwMus = {#include "../DrawSettings/MusDrawSettings.any"
  };
};

#if BM_LEG_MORPHOLOGY == 1

AnyViaPointMuscle ObturatorExternusSuperior1 = {
  AnyMuscleModel &MusMdl = ..MusPar.ObturatorExternusSuperior1Par;
  AnyRefNode &Org = ..Seg.Pelvis.Muscles.ObturatorExternusSuperior1Node;
  AnyRefNode &Via1 = ..Seg.Pelvis.Muscles.ObturatorExternusSuperiorViaNode1;
  AnyRefNode &Ins = ..Seg.Thigh.ObturatorExternusSuperior1Node;
  AnyDrawMuscle DrwMus = {#include "../DrawSettings/MusDrawSettings.any"
  };
};

AnyViaPointMuscle ObturatorExternusSuperior2 = {
  AnyMuscleModel &MusMdl = ..MusPar.ObturatorExternusSuperior2Par;
  AnyRefNode &Org = ..Seg.Pelvis.Muscles.ObturatorExternusSuperior2Node;
  AnyRefNode &Via1 = ..Seg.Pelvis.Muscles.ObturatorExternusSuperiorViaNode1;
  AnyRefNode &Ins = ..Seg.Thigh.ObturatorExternusSuperior2Node;
  AnyDrawMuscle DrwMus = {#include "../DrawSettings/MusDrawSettings.any"
  };
};

AnyViaPointMuscle ObturatorExternusSuperior3 = {
  AnyMuscleModel &MusMdl = ..MusPar.ObturatorExternusSuperior3Par;
  AnyRefNode &Org = ..Seg.Pelvis.Muscles.ObturatorExternusSuperior3Node;
  AnyRefNode &Via1 = ..Seg.Pelvis.Muscles.ObturatorExternusSuperiorViaNode1;
  AnyRefNode &Ins = ..Seg.Thigh.ObturatorExternusSuperior3Node;
  AnyDrawMuscle DrwMus = {#include "../DrawSettings/MusDrawSettings.any"
  };
};

AnyViaPointMuscle ObturatorExternusInferior1 = {
  AnyMuscleModel &MusMdl = ..MusPar.ObturatorExternusInferior1Par;
  AnyRefNode &Org = ..Seg.Pelvis.Muscles.ObturatorExternusInferior1Node;
  AnyRefNode &Ins = ..Seg.Thigh.ObturatorExternusInferior1Node;
  AnyDrawMuscle DrwMus = {#include "../DrawSettings/MusDrawSettings.any"
  };
};

AnyViaPointMuscle ObturatorExternusInferior2 = {
  AnyMuscleModel &MusMdl = ..MusPar.ObturatorExternusInferior2Par;
  AnyRefNode &Org = ..Seg.Pelvis.Muscles.ObturatorExternusInferior2Node;
  AnyRefNode &Ins = ..Seg.Thigh.ObturatorExternusInferior2Node;
  AnyDrawMuscle DrwMus = {#include "../DrawSettings/MusDrawSettings.any"
  };
};

AnyViaPointMuscle ObturatorInternus1 = {
  AnyMuscleModel &MusMdl = ..MusPar.ObturatorInternus1Par;
  AnyRefNode &Org = ..Seg.Pelvis.Muscles.ObturatorInternus1Node;
  AnyRefNode &Via1 = ..Seg.Pelvis.Muscles.ObturatorInternusViaNode1; //Commented in again by MJ in AMMR 1.7. Needs testing for both TLEM 1 and 2
  AnyRefNode &Ins = ..Seg.Thigh.ObturatorInternus1Node;
  AnyDrawMuscle DrwMus = {#include "../DrawSettings/MusDrawSettings.any"
  };
};


AnyViaPointMuscle ObturatorInternus2 = {
  AnyMuscleModel &MusMdl = ..MusPar.ObturatorInternus2Par;
  AnyRefNode &Org = ..Seg.Pelvis.Muscles.ObturatorInternus2Node;
  AnyRefNode &Via1 = ..Seg.Pelvis.Muscles.ObturatorInternusViaNode1; //Commented in again by MJ in AMMR 1.7. Needs testing for both TLEM 1 and 2
  AnyRefNode &Ins =  ..Seg.Thigh.ObturatorInternus1Node;
  AnyDrawMuscle DrwMus = {#include "../DrawSettings/MusDrawSettings.any"
  };
};

AnyViaPointMuscle ObturatorInternus3 = {
  AnyMuscleModel &MusMdl = ..MusPar.ObturatorInternus3Par;
  AnyRefNode &Org = ..Seg.Pelvis.Muscles.ObturatorInternus3Node;
  AnyRefNode &Via1 = ..Seg.Pelvis.Muscles.ObturatorInternusViaNode1; //Commented in again by MJ in AMMR 1.7. Needs testing for both TLEM 1 and 2
  AnyRefNode &Ins = ..Seg.Thigh.ObturatorInternus3Node;
  AnyDrawMuscle DrwMus = {#include "../DrawSettings/MusDrawSettings.any"
  };
};
#endif

#if BM_LEG_MORPHOLOGY == 2
AnyViaPointMuscle ObturatorExternusSuperior1 = {
  AnyMuscleModel &MusMdl = ..MusPar.ObturatorExternusSuperior1Par;
  AnyRefNode &Org = ..Seg.Pelvis.Muscles.ObturatorExternusSuperior1Node;
  AnyRefNode &Via1 = ..Seg.Thigh.ObturatorExternusVia1Node;
  AnyRefNode &Ins =  ..Seg.Thigh.ObturatorExternus1Node;
  AnyDrawMuscle DrwMus = {#include "../DrawSettings/MusDrawSettings.any"
  };
};

AnyViaPointMuscle ObturatorExternusSuperior2 = {
  AnyMuscleModel &MusMdl = ..MusPar.ObturatorExternusSuperior2Par;
  AnyRefNode &Org = ..Seg.Pelvis.Muscles.ObturatorExternusSuperior2Node;
  AnyRefNode &Via1 = ..Seg.Thigh.ObturatorExternusVia1Node;
  AnyRefNode &Ins =  ..Seg.Thigh.ObturatorExternus1Node;
  AnyDrawMuscle DrwMus = {#include "../DrawSettings/MusDrawSettings.any"
  };
};

AnyViaPointMuscle ObturatorExternusSuperior3 = {
  AnyMuscleModel &MusMdl = ..MusPar.ObturatorExternusSuperior3Par;
  AnyRefNode &Org = ..Seg.Pelvis.Muscles.ObturatorExternusSuperior3Node;
  AnyRefNode &Via1 = ..Seg.Thigh.ObturatorExternusVia1Node;
  AnyRefNode &Ins =  ..Seg.Thigh.ObturatorExternus1Node;
  AnyDrawMuscle DrwMus = {#include "../DrawSettings/MusDrawSettings.any"
  };
};

AnyViaPointMuscle ObturatorExternusInferior1 = {
  AnyMuscleModel &MusMdl = ..MusPar.ObturatorExternusInferior1Par;
  AnyRefNode &Org = ..Seg.Pelvis.Muscles.ObturatorExternusInferior1Node;
  AnyRefNode &Via1 = ..Seg.Thigh.ObturatorExternusVia1Node;
  AnyRefNode &Ins =  ..Seg.Thigh.ObturatorExternus1Node;
  AnyDrawMuscle DrwMus = {#include "../DrawSettings/MusDrawSettings.any"
  };
};

AnyViaPointMuscle ObturatorExternusInferior2 = {
  AnyMuscleModel &MusMdl = ..MusPar.ObturatorExternusInferior2Par;
  AnyRefNode &Org = ..Seg.Pelvis.Muscles.ObturatorExternusInferior2Node;
  AnyRefNode &Via1 = ..Seg.Thigh.ObturatorExternusVia1Node;
  AnyRefNode &Ins =  ..Seg.Thigh.ObturatorExternus1Node;
  AnyDrawMuscle DrwMus = {#include "../DrawSettings/MusDrawSettings.any"
  };
};

AnyViaPointMuscle ObturatorInternus1 = {
  AnyMuscleModel &MusMdl = ..MusPar.ObturatorInternus1Par;
  AnyRefNode &Org = ..Seg.Pelvis.Muscles.ObturatorInternus1Node;
  AnyRefNode &Via1 = ..Seg.Pelvis.Muscles.ObturatorInternusViaNode1;
  AnyRefNode &Ins = ..Seg.Thigh.ObturatorInternus1Node;
  AnyDrawMuscle DrwMus = {#include "../DrawSettings/MusDrawSettings.any"
  };
};

AnyViaPointMuscle ObturatorInternus2 = {
  AnyMuscleModel &MusMdl = ..MusPar.ObturatorInternus2Par;
  AnyRefNode &Org = ..Seg.Pelvis.Muscles.ObturatorInternus2Node;
  AnyRefNode &Via1 = ..Seg.Pelvis.Muscles.ObturatorInternusViaNode1;
  AnyRefNode &Ins = ..Seg.Thigh.ObturatorInternus1Node;
  AnyDrawMuscle DrwMus = {#include "../DrawSettings/MusDrawSettings.any"
  };
};

AnyViaPointMuscle ObturatorInternus3 = {
  AnyMuscleModel &MusMdl = ..MusPar.ObturatorInternus3Par;
  AnyRefNode &Org = ..Seg.Pelvis.Muscles.ObturatorInternus3Node;
  AnyRefNode &Via1 = ..Seg.Pelvis.Muscles.ObturatorInternusViaNode1;
  AnyRefNode &Ins = ..Seg.Thigh.ObturatorInternus1Node;
  AnyDrawMuscle DrwMus = {#include "../DrawSettings/MusDrawSettings.any"
  };
};

AnyViaPointMuscle ObturatorInternus4 = {
  AnyMuscleModel &MusMdl = ..MusPar.ObturatorInternus4Par;
  AnyRefNode &Org = ..Seg.Pelvis.Muscles.ObturatorInternus4Node;
  AnyRefNode &Via1 = ..Seg.Pelvis.Muscles.ObturatorInternusViaNode1;
  AnyRefNode &Ins = ..Seg.Thigh.ObturatorInternus1Node;
  AnyDrawMuscle DrwMus = {#include "../DrawSettings/MusDrawSettings.any"
  };
};

AnyViaPointMuscle ObturatorInternus5 = {
  AnyMuscleModel &MusMdl = ..MusPar.ObturatorInternus5Par;
  AnyRefNode &Org = ..Seg.Pelvis.Muscles.ObturatorInternus5Node;
  AnyRefNode &Via1 = ..Seg.Pelvis.Muscles.ObturatorInternusViaNode1;
  AnyRefNode &Ins = ..Seg.Thigh.ObturatorInternus1Node;
  AnyDrawMuscle DrwMus = {#include "../DrawSettings/MusDrawSettings.any"
  };
};

AnyViaPointMuscle ObturatorInternus6 = {
  AnyMuscleModel &MusMdl = ..MusPar.ObturatorInternus6Par;
  AnyRefNode &Org = ..Seg.Pelvis.Muscles.ObturatorInternus6Node;
  AnyRefNode &Via1 = ..Seg.Pelvis.Muscles.ObturatorInternusViaNode1;
  AnyRefNode &Ins = ..Seg.Thigh.ObturatorInternus1Node;
  AnyDrawMuscle DrwMus = {#include "../DrawSettings/MusDrawSettings.any"
  };
};

#endif

#if BM_LEG_MORPHOLOGY == 1
AnyViaPointMuscle Pectineus1 =
{
  AnyMuscleModel &MusMdl = ..MusPar.Pectineus1Par;
  AnyRefNode &Org = ..Seg.Pelvis.Muscles.Pectineus1Node;
  AnyRefNode &Ins = ..Seg.Thigh.Pectineus1Node;
  AnyDrawMuscle DrwMus = {#include "../DrawSettings/MusDrawSettings.any"
  };
};

AnyViaPointMuscle Pectineus2 = {
  AnyMuscleModel &MusMdl = ..MusPar.Pectineus2Par;
  AnyRefNode &Org = ..Seg.Pelvis.Muscles.Pectineus2Node;
  AnyRefNode &Ins = ..Seg.Thigh.Pectineus2Node;
  AnyDrawMuscle DrwMus = {#include "../DrawSettings/MusDrawSettings.any"
  };
};

AnyViaPointMuscle Pectineus3 = {
  AnyMuscleModel &MusMdl = ..MusPar.Pectineus3Par;
  AnyRefNode &Org = ..Seg.Pelvis.Muscles.Pectineus3Node;
  AnyRefNode &Ins = ..Seg.Thigh.Pectineus3Node;
  AnyDrawMuscle DrwMus = {#include "../DrawSettings/MusDrawSettings.any"
  };
};

AnyViaPointMuscle Pectineus4 = {
  AnyMuscleModel &MusMdl = ..MusPar.Pectineus4Par;
  AnyRefNode &Org = ..Seg.Pelvis.Muscles.Pectineus4Node;
  AnyRefNode &Ins = ..Seg.Thigh.Pectineus4Node;
  AnyDrawMuscle DrwMus = {#include "../DrawSettings/MusDrawSettings.any"
  };
};
#endif
#if BM_LEG_MORPHOLOGY == 2
AnyShortestPathMuscle Pectineus1 =
{
  AnyMuscleModel &MusMdl = ..MusPar.Pectineus1Par;
  AnyRefNode &Org = ..Seg.Pelvis.Muscles.Pectineus1Node;
  AnySurface &srf = ..Seg.Thigh.IliacusWrapSurf.cyl;
  AnyRefNode &Ins = ..Seg.Thigh.Pectineus1Node;
  SPLine.StringMesh = 45;
  AnyDrawMuscle DrwMus = {#include "../DrawSettings/MusDrawSettings.any"
  };
};

AnyShortestPathMuscle Pectineus2 = {
  AnyMuscleModel &MusMdl = ..MusPar.Pectineus2Par;
  AnyRefNode &Org = ..Seg.Pelvis.Muscles.Pectineus2Node;
  AnySurface &srf = ..Seg.Thigh.IliacusWrapSurf.cyl;
  AnyRefNode &Ins = ..Seg.Thigh.Pectineus2Node;
  SPLine.StringMesh = 45;
  AnyDrawMuscle DrwMus = {#include "../DrawSettings/MusDrawSettings.any"
  };
};

AnyShortestPathMuscle Pectineus3 = {
  AnyMuscleModel &MusMdl = ..MusPar.Pectineus3Par;
  AnyRefNode &Org = ..Seg.Pelvis.Muscles.Pectineus3Node;
  AnySurface &srf = ..Seg.Thigh.IliacusWrapSurf.cyl;
  AnyRefNode &Ins = ..Seg.Thigh.Pectineus3Node;
  SPLine.StringMesh = 45;
  AnyDrawMuscle DrwMus = {#include "../DrawSettings/MusDrawSettings.any"
  };
};

AnyShortestPathMuscle Pectineus4 = {
  AnyMuscleModel &MusMdl = ..MusPar.Pectineus4Par;
  AnyRefNode &Org = ..Seg.Pelvis.Muscles.Pectineus4Node;
  AnySurface &srf = ..Seg.Thigh.IliacusWrapSurf.cyl;
  AnyRefNode &Ins = ..Seg.Thigh.Pectineus4Node;
  SPLine.StringMesh = 45;
  AnyDrawMuscle DrwMus = {#include "../DrawSettings/MusDrawSettings.any"
  };
};
#endif

#if BM_LEG_MORPHOLOGY == 1
AnyViaPointMuscle Plantaris1 = {
  AnyMuscleModel &MusMdl = ..MusPar.Plantaris1Par;
  AnyRefNode &Org = ..Seg.Thigh.Plantaris1Node;
  AnyRefNode &Ins = ..Seg.Foot.Plantaris1Node;
  AnyDrawMuscle DrwMus = {#include "../DrawSettings/MusDrawSettings.any"
  };
};
#endif
#if BM_LEG_MORPHOLOGY == 2
AnyShortestPathMuscle Plantaris1 = {
  AnyMuscleModel &MusMdl = ..MusPar.Plantaris1Par;
  AnyRefNode &Org = ..Seg.Thigh.Plantaris1Node;
  AnySurface &srf = ..Seg.Thigh.GastroWrapSurf.cyl;
  AnyRefNode &Ins = ..Seg.Foot.Plantaris1Node;
  SPLine.StringMesh = 45;
  AnyDrawMuscle DrwMus = {#include "../DrawSettings/MusDrawSettings.any"
  };
};
#endif

AnyViaPointMuscle Popliteus1 = {
  AnyMuscleModel &MusMdl = ..MusPar.Popliteus1Par;
  AnyRefNode &Org = ..Seg.Thigh.Popliteus1Node;
  AnyRefNode &Via1 = ..Seg.Shank.PopliteusViaNode1;
  AnyRefNode &Ins = ..Seg.Shank.Popliteus1Node;
  AnyDrawMuscle DrwMus = {#include "../DrawSettings/MusDrawSettings.any"
  };
};

AnyViaPointMuscle Popliteus2 = {
  AnyMuscleModel &MusMdl = ..MusPar.Popliteus2Par;
  AnyRefNode &Org = ..Seg.Thigh.Popliteus2Node;
  AnyRefNode &Via1 = ..Seg.Shank.PopliteusViaNode1;
  AnyRefNode &Ins = ..Seg.Shank.Popliteus2Node;
  AnyDrawMuscle DrwMus = {#include "../DrawSettings/MusDrawSettings.any"
  };
};

//-->ABT_MJ
#if BM_LEG_MORPHOLOGY == 2
AnyViaPointMuscle Popliteus3 = {
  AnyMuscleModel &MusMdl = ..MusPar.Popliteus3Par;
  AnyRefNode &Org = ..Seg.Thigh.Popliteus3Node;
  AnyRefNode &Via1 = ..Seg.Shank.PopliteusViaNode1;
  AnyRefNode &Ins = ..Seg.Shank.Popliteus3Node;
  AnyDrawMuscle DrwMus = {#include "../DrawSettings/MusDrawSettings.any"
  };
};
#endif

AnyViaPointMuscle QuadratusFemoris1 = {
  AnyMuscleModel &MusMdl = ..MusPar.QuadratusFemoris1Par;
  AnyRefNode &Org = ..Seg.Pelvis.Muscles.QuadratusFemoris1Node;
  AnyRefNode &Ins = ..Seg.Thigh.QuadratusFemoris1Node;
  AnyDrawMuscle DrwMus = {#include "../DrawSettings/MusDrawSettings.any"
  };
};

AnyViaPointMuscle QuadratusFemoris2 = {
  AnyMuscleModel &MusMdl = ..MusPar.QuadratusFemoris2Par;
  AnyRefNode &Org = ..Seg.Pelvis.Muscles.QuadratusFemoris2Node;
  AnyRefNode &Ins = ..Seg.Thigh.QuadratusFemoris2Node;
  AnyDrawMuscle DrwMus = {#include "../DrawSettings/MusDrawSettings.any"
  };
};

AnyViaPointMuscle QuadratusFemoris3 = {
  AnyMuscleModel &MusMdl = ..MusPar.QuadratusFemoris3Par;
  AnyRefNode &Org = ..Seg.Pelvis.Muscles.QuadratusFemoris3Node;
  AnyRefNode &Ins = ..Seg.Thigh.QuadratusFemoris3Node;
  AnyDrawMuscle DrwMus = {#include "../DrawSettings/MusDrawSettings.any"
  };
};

AnyViaPointMuscle QuadratusFemoris4 = {
  AnyMuscleModel &MusMdl = ..MusPar.QuadratusFemoris4Par;
  AnyRefNode &Org = ..Seg.Pelvis.Muscles.QuadratusFemoris4Node;
  AnyRefNode &Ins = ..Seg.Thigh.QuadratusFemoris4Node;
  AnyDrawMuscle DrwMus = {#include "../DrawSettings/MusDrawSettings.any"
  };
};
