/**^This folder implements the muscle models for the TLEM 2 model.

Anatomical muscles from the TLEM data set are in many cases split into
several branches (elements). Strength parameters are split between the branches,
typically by uniform split.
*/


SubjectMusclePar_template SubjectMusPar = {
    //Jt = DesignVar(3.0); // Shape parameter for the tendon stiffness
    //Jpe = DesignVar(3.0); // Shape parameter for the parallel stiffness
    //PEFactor = DesignVar(1.5); // Parameter for influence of parallel stiffness
    //SpecificStrength = 90; // (N/cm^2)
    //Klein Horsman used a PCSAfactor of 27 N/cm^2 this is now changed to 90 N/cm^2
    AnyVar PCSAfactor = SpecificStrength * ......HumanModel.StrengthParameters.StrengthIndexLeg; // = PCSAfactor in N/cm^2 , the PCSA itself is given in cm^2 so F0 is in Newton`s.
    #include "SubjectMusPar_1.any"
};


/////////////////////////////////////////////////
//     AdductorBrevisProximal (2 elements)     //
/////////////////////////////////////////////////
AnyMuscleModel3E AdductorBrevisProximal1Par =
{
  AnyFolder& MuscleParameters = .SubjectMusPar.AdductorBrevisProximal;
  AnyIntVar MuscleElemNo = 1; ///< The number of this element of the muscle
  AnyIntVar MuscleElemAmount = 2; ///< The total amount of elements for this muscle
  F0 = .SubjectMusPar.PCSAfactor*PCSA; ///< Maximum force output at optimum fiber length
  Lf0 = MuscleParameters.OptimalFiberlength; ///< Optimum fiber length
  Vol0 = 1e-6*MuscleParameters.MuscleVolume/MuscleElemAmount; /// Muscle volume in (m3)
  AnyVar PCSA = 1e4*Vol0/Lf0;///< PCSA (cm2) is calculated as muscle volume divided between muscle branches and divided by fiber length
  Lt0 = max({MuscleParameters.TotalTendonLength, 0.001}); ///< Tendon slack length (Cannot be zero)
  Gamma0 = MuscleParameters.Pennationangle*(pi/180); ///< Pennation angle in radian
  Epsilon0 = MuscleParameters.Epsilon0; ///< Tendon strain at F0
  K1 = MuscleParameters.K1; ///< Factor for determining shortening speed at optimum length
  K2 = MuscleParameters.K2; ///< Factor for determining shortening speed at optimum length
  Fcfast = MuscleParameters.Fcfast; ///< Factor for determining shortening speed at optimum length
  Jt = .SubjectMusPar.Jt; ///< Shape parameter for the tendon stiffness
  Jpe = .SubjectMusPar.Jpe; ///< Shape parameter for the parallel stiffness
  PEFactor = .SubjectMusPar.PEFactor; ///< Parameter for influence of parallel stiffness
};

AnyMuscleModel3E AdductorBrevisProximal2Par =
{
  AnyFolder& MuscleParameters = .SubjectMusPar.AdductorBrevisProximal;
  AnyIntVar MuscleElemNo = 2; ///< The number of this element of the muscle
  AnyIntVar MuscleElemAmount = 2; ///< The total amount of elements for this muscle
  F0 = .SubjectMusPar.PCSAfactor*PCSA; ///< Maximum force output at optimum fiber length
  Lf0 = MuscleParameters.OptimalFiberlength; ///< Optimum fiber length
  Vol0 = 1e-6*MuscleParameters.MuscleVolume/MuscleElemAmount; /// Muscle volume in (m3)
  AnyVar PCSA = 1e4*Vol0/Lf0;///< PCSA (cm2) is calculated as muscle volume divided between muscle branches and divided by fiber length
  Lt0 = max({MuscleParameters.TotalTendonLength, 0.001}); ///< Tendon slack length (Cannot be zero)
  Gamma0 = MuscleParameters.Pennationangle*(pi/180); ///< Pennation angle in radian
  Epsilon0 = MuscleParameters.Epsilon0; ///< Tendon strain at F0
  K1 = MuscleParameters.K1; ///< Factor for determining shortening speed at optimum length
  K2 = MuscleParameters.K2; ///< Factor for determining shortening speed at optimum length
  Fcfast = MuscleParameters.Fcfast; ///< Factor for determining shortening speed at optimum length
  Jt = .SubjectMusPar.Jt; ///< Shape parameter for the tendon stiffness
  Jpe = .SubjectMusPar.Jpe; ///< Shape parameter for the parallel stiffness
  PEFactor = .SubjectMusPar.PEFactor; ///< Parameter for influence of parallel stiffness
};


////////////////////////////////////////////
//     AdductorBrevisMid (2 elements)     //
////////////////////////////////////////////
AnyMuscleModel3E AdductorBrevisMid1Par =
{
  AnyFolder& MuscleParameters = .SubjectMusPar.AdductorBrevisMid;
  AnyIntVar MuscleElemNo = 1; ///< The number of this element of the muscle
  AnyIntVar MuscleElemAmount = 2; ///< The total amount of elements for this muscle
  F0 = .SubjectMusPar.PCSAfactor*PCSA; ///< Maximum force output at optimum fiber length
  Lf0 = MuscleParameters.OptimalFiberlength; ///< Optimum fiber length
  Vol0 = 1e-6*MuscleParameters.MuscleVolume/MuscleElemAmount; /// Muscle volume in (m3)
  AnyVar PCSA = 1e4*Vol0/Lf0;///< PCSA (cm2) is calculated as muscle volume divided between muscle branches and divided by fiber length
  Lt0 = max({MuscleParameters.TotalTendonLength, 0.001}); ///< Tendon slack length (Cannot be zero)
  Gamma0 = MuscleParameters.Pennationangle*(pi/180); ///< Pennation angle in radian
  Epsilon0 = MuscleParameters.Epsilon0; ///< Tendon strain at F0
  K1 = MuscleParameters.K1; ///< Factor for determining shortening speed at optimum length
  K2 = MuscleParameters.K2; ///< Factor for determining shortening speed at optimum length
  Fcfast = MuscleParameters.Fcfast; ///< Factor for determining shortening speed at optimum length
  Jt = .SubjectMusPar.Jt; ///< Shape parameter for the tendon stiffness
  Jpe = .SubjectMusPar.Jpe; ///< Shape parameter for the parallel stiffness
  PEFactor = .SubjectMusPar.PEFactor; ///< Parameter for influence of parallel stiffness
};

AnyMuscleModel3E AdductorBrevisMid2Par =
{
  AnyFolder& MuscleParameters = .SubjectMusPar.AdductorBrevisMid;
  AnyIntVar MuscleElemNo = 2; ///< The number of this element of the muscle
  AnyIntVar MuscleElemAmount = 2; ///< The total amount of elements for this muscle
  F0 = .SubjectMusPar.PCSAfactor*PCSA; ///< Maximum force output at optimum fiber length
  Lf0 = MuscleParameters.OptimalFiberlength; ///< Optimum fiber length
  Vol0 = 1e-6*MuscleParameters.MuscleVolume/MuscleElemAmount; /// Muscle volume in (m3)
  AnyVar PCSA = 1e4*Vol0/Lf0;///< PCSA (cm2) is calculated as muscle volume divided between muscle branches and divided by fiber length
  Lt0 = max({MuscleParameters.TotalTendonLength, 0.001}); ///< Tendon slack length (Cannot be zero)
  Gamma0 = MuscleParameters.Pennationangle*(pi/180); ///< Pennation angle in radian
  Epsilon0 = MuscleParameters.Epsilon0; ///< Tendon strain at F0
  K1 = MuscleParameters.K1; ///< Factor for determining shortening speed at optimum length
  K2 = MuscleParameters.K2; ///< Factor for determining shortening speed at optimum length
  Fcfast = MuscleParameters.Fcfast; ///< Factor for determining shortening speed at optimum length
  Jt = .SubjectMusPar.Jt; ///< Shape parameter for the tendon stiffness
  Jpe = .SubjectMusPar.Jpe; ///< Shape parameter for the parallel stiffness
  PEFactor = .SubjectMusPar.PEFactor; ///< Parameter for influence of parallel stiffness
};


///////////////////////////////////////////////
//     AdductorBrevisDistal (2 elements)     //
///////////////////////////////////////////////
AnyMuscleModel3E AdductorBrevisDistal1Par =
{
  AnyFolder& MuscleParameters = .SubjectMusPar.AdductorBrevisDistal;
  AnyIntVar MuscleElemNo = 1; ///< The number of this element of the muscle
  AnyIntVar MuscleElemAmount = 2; ///< The total amount of elements for this muscle
  F0 = .SubjectMusPar.PCSAfactor*PCSA; ///< Maximum force output at optimum fiber length
  Lf0 = MuscleParameters.OptimalFiberlength; ///< Optimum fiber length
  Vol0 = 1e-6*MuscleParameters.MuscleVolume/MuscleElemAmount; /// Muscle volume in (m3)
  AnyVar PCSA = 1e4*Vol0/Lf0;///< PCSA (cm2) is calculated as muscle volume divided between muscle branches and divided by fiber length
  Lt0 = max({MuscleParameters.TotalTendonLength, 0.001}); ///< Tendon slack length (Cannot be zero)
  Gamma0 = MuscleParameters.Pennationangle*(pi/180); ///< Pennation angle in radian
  Epsilon0 = MuscleParameters.Epsilon0; ///< Tendon strain at F0
  K1 = MuscleParameters.K1; ///< Factor for determining shortening speed at optimum length
  K2 = MuscleParameters.K2; ///< Factor for determining shortening speed at optimum length
  Fcfast = MuscleParameters.Fcfast; ///< Factor for determining shortening speed at optimum length
  Jt = .SubjectMusPar.Jt; ///< Shape parameter for the tendon stiffness
  Jpe = .SubjectMusPar.Jpe; ///< Shape parameter for the parallel stiffness
  PEFactor = .SubjectMusPar.PEFactor; ///< Parameter for influence of parallel stiffness
};

AnyMuscleModel3E AdductorBrevisDistal2Par =
{
  AnyFolder& MuscleParameters = .SubjectMusPar.AdductorBrevisDistal;
  AnyIntVar MuscleElemNo = 2; ///< The number of this element of the muscle
  AnyIntVar MuscleElemAmount = 2; ///< The total amount of elements for this muscle
  F0 = .SubjectMusPar.PCSAfactor*PCSA; ///< Maximum force output at optimum fiber length
  Lf0 = MuscleParameters.OptimalFiberlength; ///< Optimum fiber length
  Vol0 = 1e-6*MuscleParameters.MuscleVolume/MuscleElemAmount; /// Muscle volume in (m3)
  AnyVar PCSA = 1e4*Vol0/Lf0;///< PCSA (cm2) is calculated as muscle volume divided between muscle branches and divided by fiber length
  Lt0 = max({MuscleParameters.TotalTendonLength, 0.001}); ///< Tendon slack length (Cannot be zero)
  Gamma0 = MuscleParameters.Pennationangle*(pi/180); ///< Pennation angle in radian
  Epsilon0 = MuscleParameters.Epsilon0; ///< Tendon strain at F0
  K1 = MuscleParameters.K1; ///< Factor for determining shortening speed at optimum length
  K2 = MuscleParameters.K2; ///< Factor for determining shortening speed at optimum length
  Fcfast = MuscleParameters.Fcfast; ///< Factor for determining shortening speed at optimum length
  Jt = .SubjectMusPar.Jt; ///< Shape parameter for the tendon stiffness
  Jpe = .SubjectMusPar.Jpe; ///< Shape parameter for the parallel stiffness
  PEFactor = .SubjectMusPar.PEFactor; ///< Parameter for influence of parallel stiffness
};


/////////////////////////////////////////
//     AdductorLongus (6 elements)     //
/////////////////////////////////////////
AnyMuscleModel3E AdductorLongus1Par =
{
  AnyFolder& MuscleParameters = .SubjectMusPar.AdductorLongus;
  AnyIntVar MuscleElemNo = 1; ///< The number of this element of the muscle
  AnyIntVar MuscleElemAmount = 6; ///< The total amount of elements for this muscle
  F0 = .SubjectMusPar.PCSAfactor*PCSA; ///< Maximum force output at optimum fiber length
  Lf0 = MuscleParameters.OptimalFiberlength; ///< Optimum fiber length
  Vol0 = 1e-6*MuscleParameters.MuscleVolume/MuscleElemAmount; /// Muscle volume in (m3)
  AnyVar PCSA = 1e4*Vol0/Lf0;///< PCSA (cm2) is calculated as muscle volume divided between muscle branches and divided by fiber length
  Lt0 = max({MuscleParameters.TotalTendonLength, 0.001}); ///< Tendon slack length (Cannot be zero)
  Gamma0 = MuscleParameters.Pennationangle*(pi/180); ///< Pennation angle in radian
  Epsilon0 = MuscleParameters.Epsilon0; ///< Tendon strain at F0
  K1 = MuscleParameters.K1; ///< Factor for determining shortening speed at optimum length
  K2 = MuscleParameters.K2; ///< Factor for determining shortening speed at optimum length
  Fcfast = MuscleParameters.Fcfast; ///< Factor for determining shortening speed at optimum length
  Jt = .SubjectMusPar.Jt; ///< Shape parameter for the tendon stiffness
  Jpe = .SubjectMusPar.Jpe; ///< Shape parameter for the parallel stiffness
  PEFactor = .SubjectMusPar.PEFactor; ///< Parameter for influence of parallel stiffness
};

AnyMuscleModel3E AdductorLongus2Par =
{
  AnyFolder& MuscleParameters = .SubjectMusPar.AdductorLongus;
  AnyIntVar MuscleElemNo = 2; ///< The number of this element of the muscle
  AnyIntVar MuscleElemAmount = 6; ///< The total amount of elements for this muscle
  F0 = .SubjectMusPar.PCSAfactor*PCSA; ///< Maximum force output at optimum fiber length
  Lf0 = MuscleParameters.OptimalFiberlength; ///< Optimum fiber length
  Vol0 = 1e-6*MuscleParameters.MuscleVolume/MuscleElemAmount; /// Muscle volume in (m3)
  AnyVar PCSA = 1e4*Vol0/Lf0;///< PCSA (cm2) is calculated as muscle volume divided between muscle branches and divided by fiber length
  Lt0 = max({MuscleParameters.TotalTendonLength, 0.001}); ///< Tendon slack length (Cannot be zero)
  Gamma0 = MuscleParameters.Pennationangle*(pi/180); ///< Pennation angle in radian
  Epsilon0 = MuscleParameters.Epsilon0; ///< Tendon strain at F0
  K1 = MuscleParameters.K1; ///< Factor for determining shortening speed at optimum length
  K2 = MuscleParameters.K2; ///< Factor for determining shortening speed at optimum length
  Fcfast = MuscleParameters.Fcfast; ///< Factor for determining shortening speed at optimum length
  Jt = .SubjectMusPar.Jt; ///< Shape parameter for the tendon stiffness
  Jpe = .SubjectMusPar.Jpe; ///< Shape parameter for the parallel stiffness
  PEFactor = .SubjectMusPar.PEFactor; ///< Parameter for influence of parallel stiffness
};

AnyMuscleModel3E AdductorLongus3Par =
{
  AnyFolder& MuscleParameters = .SubjectMusPar.AdductorLongus;
  AnyIntVar MuscleElemNo = 3; ///< The number of this element of the muscle
  AnyIntVar MuscleElemAmount = 6; ///< The total amount of elements for this muscle
  F0 = .SubjectMusPar.PCSAfactor*PCSA; ///< Maximum force output at optimum fiber length
  Lf0 = MuscleParameters.OptimalFiberlength; ///< Optimum fiber length
  Vol0 = 1e-6*MuscleParameters.MuscleVolume/MuscleElemAmount; /// Muscle volume in (m3)
  AnyVar PCSA = 1e4*Vol0/Lf0;///< PCSA (cm2) is calculated as muscle volume divided between muscle branches and divided by fiber length
  Lt0 = max({MuscleParameters.TotalTendonLength, 0.001}); ///< Tendon slack length (Cannot be zero)
  Gamma0 = MuscleParameters.Pennationangle*(pi/180); ///< Pennation angle in radian
  Epsilon0 = MuscleParameters.Epsilon0; ///< Tendon strain at F0
  K1 = MuscleParameters.K1; ///< Factor for determining shortening speed at optimum length
  K2 = MuscleParameters.K2; ///< Factor for determining shortening speed at optimum length
  Fcfast = MuscleParameters.Fcfast; ///< Factor for determining shortening speed at optimum length
  Jt = .SubjectMusPar.Jt; ///< Shape parameter for the tendon stiffness
  Jpe = .SubjectMusPar.Jpe; ///< Shape parameter for the parallel stiffness
  PEFactor = .SubjectMusPar.PEFactor; ///< Parameter for influence of parallel stiffness
};

AnyMuscleModel3E AdductorLongus4Par =
{
  AnyFolder& MuscleParameters = .SubjectMusPar.AdductorLongus;
  AnyIntVar MuscleElemNo = 4; ///< The number of this element of the muscle
  AnyIntVar MuscleElemAmount = 6; ///< The total amount of elements for this muscle
  F0 = .SubjectMusPar.PCSAfactor*PCSA; ///< Maximum force output at optimum fiber length
  Lf0 = MuscleParameters.OptimalFiberlength; ///< Optimum fiber length
  Vol0 = 1e-6*MuscleParameters.MuscleVolume/MuscleElemAmount; /// Muscle volume in (m3)
  AnyVar PCSA = 1e4*Vol0/Lf0;///< PCSA (cm2) is calculated as muscle volume divided between muscle branches and divided by fiber length
  Lt0 = max({MuscleParameters.TotalTendonLength, 0.001}); ///< Tendon slack length (Cannot be zero)
  Gamma0 = MuscleParameters.Pennationangle*(pi/180); ///< Pennation angle in radian
  Epsilon0 = MuscleParameters.Epsilon0; ///< Tendon strain at F0
  K1 = MuscleParameters.K1; ///< Factor for determining shortening speed at optimum length
  K2 = MuscleParameters.K2; ///< Factor for determining shortening speed at optimum length
  Fcfast = MuscleParameters.Fcfast; ///< Factor for determining shortening speed at optimum length
  Jt = .SubjectMusPar.Jt; ///< Shape parameter for the tendon stiffness
  Jpe = .SubjectMusPar.Jpe; ///< Shape parameter for the parallel stiffness
  PEFactor = .SubjectMusPar.PEFactor; ///< Parameter for influence of parallel stiffness
};

AnyMuscleModel3E AdductorLongus5Par =
{
  AnyFolder& MuscleParameters = .SubjectMusPar.AdductorLongus;
  AnyIntVar MuscleElemNo = 5; ///< The number of this element of the muscle
  AnyIntVar MuscleElemAmount = 6; ///< The total amount of elements for this muscle
  F0 = .SubjectMusPar.PCSAfactor*PCSA; ///< Maximum force output at optimum fiber length
  Lf0 = MuscleParameters.OptimalFiberlength; ///< Optimum fiber length
  Vol0 = 1e-6*MuscleParameters.MuscleVolume/MuscleElemAmount; /// Muscle volume in (m3)
  AnyVar PCSA = 1e4*Vol0/Lf0;///< PCSA (cm2) is calculated as muscle volume divided between muscle branches and divided by fiber length
  Lt0 = max({MuscleParameters.TotalTendonLength, 0.001}); ///< Tendon slack length (Cannot be zero)
  Gamma0 = MuscleParameters.Pennationangle*(pi/180); ///< Pennation angle in radian
  Epsilon0 = MuscleParameters.Epsilon0; ///< Tendon strain at F0
  K1 = MuscleParameters.K1; ///< Factor for determining shortening speed at optimum length
  K2 = MuscleParameters.K2; ///< Factor for determining shortening speed at optimum length
  Fcfast = MuscleParameters.Fcfast; ///< Factor for determining shortening speed at optimum length
  Jt = .SubjectMusPar.Jt; ///< Shape parameter for the tendon stiffness
  Jpe = .SubjectMusPar.Jpe; ///< Shape parameter for the parallel stiffness
  PEFactor = .SubjectMusPar.PEFactor; ///< Parameter for influence of parallel stiffness
};

AnyMuscleModel3E AdductorLongus6Par =
{
  AnyFolder& MuscleParameters = .SubjectMusPar.AdductorLongus;
  AnyIntVar MuscleElemNo = 6; ///< The number of this element of the muscle
  AnyIntVar MuscleElemAmount = 6; ///< The total amount of elements for this muscle
  F0 = .SubjectMusPar.PCSAfactor*PCSA; ///< Maximum force output at optimum fiber length
  Lf0 = MuscleParameters.OptimalFiberlength; ///< Optimum fiber length
  Vol0 = 1e-6*MuscleParameters.MuscleVolume/MuscleElemAmount; /// Muscle volume in (m3)
  AnyVar PCSA = 1e4*Vol0/Lf0;///< PCSA (cm2) is calculated as muscle volume divided between muscle branches and divided by fiber length
  Lt0 = max({MuscleParameters.TotalTendonLength, 0.001}); ///< Tendon slack length (Cannot be zero)
  Gamma0 = MuscleParameters.Pennationangle*(pi/180); ///< Pennation angle in radian
  Epsilon0 = MuscleParameters.Epsilon0; ///< Tendon strain at F0
  K1 = MuscleParameters.K1; ///< Factor for determining shortening speed at optimum length
  K2 = MuscleParameters.K2; ///< Factor for determining shortening speed at optimum length
  Fcfast = MuscleParameters.Fcfast; ///< Factor for determining shortening speed at optimum length
  Jt = .SubjectMusPar.Jt; ///< Shape parameter for the tendon stiffness
  Jpe = .SubjectMusPar.Jpe; ///< Shape parameter for the parallel stiffness
  PEFactor = .SubjectMusPar.PEFactor; ///< Parameter for influence of parallel stiffness
};


///////////////////////////////////////////////
//     AdductorMagnusDistal (3 elements)     //
///////////////////////////////////////////////
AnyMuscleModel3E AdductorMagnusDistal1Par =
{
  AnyFolder& MuscleParameters = .SubjectMusPar.AdductorMagnusDistal;
  AnyIntVar MuscleElemNo = 1; ///< The number of this element of the muscle
  AnyIntVar MuscleElemAmount = 3; ///< The total amount of elements for this muscle
  F0 = .SubjectMusPar.PCSAfactor*PCSA; ///< Maximum force output at optimum fiber length
  Lf0 = MuscleParameters.OptimalFiberlength; ///< Optimum fiber length
  Vol0 = 1e-6*MuscleParameters.MuscleVolume/MuscleElemAmount; /// Muscle volume in (m3)
  AnyVar PCSA = 1e4*Vol0/Lf0;///< PCSA (cm2) is calculated as muscle volume divided between muscle branches and divided by fiber length
  Lt0 = max({MuscleParameters.TotalTendonLength, 0.001}); ///< Tendon slack length (Cannot be zero)
  Gamma0 = MuscleParameters.Pennationangle*(pi/180); ///< Pennation angle in radian
  Epsilon0 = MuscleParameters.Epsilon0; ///< Tendon strain at F0
  K1 = MuscleParameters.K1; ///< Factor for determining shortening speed at optimum length
  K2 = MuscleParameters.K2; ///< Factor for determining shortening speed at optimum length
  Fcfast = MuscleParameters.Fcfast; ///< Factor for determining shortening speed at optimum length
  Jt = .SubjectMusPar.Jt; ///< Shape parameter for the tendon stiffness
  Jpe = .SubjectMusPar.Jpe; ///< Shape parameter for the parallel stiffness
  PEFactor = .SubjectMusPar.PEFactor; ///< Parameter for influence of parallel stiffness
};

AnyMuscleModel3E AdductorMagnusDistal2Par =
{
  AnyFolder& MuscleParameters = .SubjectMusPar.AdductorMagnusDistal;
  AnyIntVar MuscleElemNo = 2; ///< The number of this element of the muscle
  AnyIntVar MuscleElemAmount = 3; ///< The total amount of elements for this muscle
  F0 = .SubjectMusPar.PCSAfactor*PCSA; ///< Maximum force output at optimum fiber length
  Lf0 = MuscleParameters.OptimalFiberlength; ///< Optimum fiber length
  Vol0 = 1e-6*MuscleParameters.MuscleVolume/MuscleElemAmount; /// Muscle volume in (m3)
  AnyVar PCSA = 1e4*Vol0/Lf0;///< PCSA (cm2) is calculated as muscle volume divided between muscle branches and divided by fiber length
  Lt0 = max({MuscleParameters.TotalTendonLength, 0.001}); ///< Tendon slack length (Cannot be zero)
  Gamma0 = MuscleParameters.Pennationangle*(pi/180); ///< Pennation angle in radian
  Epsilon0 = MuscleParameters.Epsilon0; ///< Tendon strain at F0
  K1 = MuscleParameters.K1; ///< Factor for determining shortening speed at optimum length
  K2 = MuscleParameters.K2; ///< Factor for determining shortening speed at optimum length
  Fcfast = MuscleParameters.Fcfast; ///< Factor for determining shortening speed at optimum length
  Jt = .SubjectMusPar.Jt; ///< Shape parameter for the tendon stiffness
  Jpe = .SubjectMusPar.Jpe; ///< Shape parameter for the parallel stiffness
  PEFactor = .SubjectMusPar.PEFactor; ///< Parameter for influence of parallel stiffness
};

AnyMuscleModel3E AdductorMagnusDistal3Par =
{
  AnyFolder& MuscleParameters = .SubjectMusPar.AdductorMagnusDistal;
  AnyIntVar MuscleElemNo = 3; ///< The number of this element of the muscle
  AnyIntVar MuscleElemAmount = 3; ///< The total amount of elements for this muscle
  F0 = .SubjectMusPar.PCSAfactor*PCSA; ///< Maximum force output at optimum fiber length
  Lf0 = MuscleParameters.OptimalFiberlength; ///< Optimum fiber length
  Vol0 = 1e-6*MuscleParameters.MuscleVolume/MuscleElemAmount; /// Muscle volume in (m3)
  AnyVar PCSA = 1e4*Vol0/Lf0;///< PCSA (cm2) is calculated as muscle volume divided between muscle branches and divided by fiber length
  Lt0 = max({MuscleParameters.TotalTendonLength, 0.001}); ///< Tendon slack length (Cannot be zero)
  Gamma0 = MuscleParameters.Pennationangle*(pi/180); ///< Pennation angle in radian
  Epsilon0 = MuscleParameters.Epsilon0; ///< Tendon strain at F0
  K1 = MuscleParameters.K1; ///< Factor for determining shortening speed at optimum length
  K2 = MuscleParameters.K2; ///< Factor for determining shortening speed at optimum length
  Fcfast = MuscleParameters.Fcfast; ///< Factor for determining shortening speed at optimum length
  Jt = .SubjectMusPar.Jt; ///< Shape parameter for the tendon stiffness
  Jpe = .SubjectMusPar.Jpe; ///< Shape parameter for the parallel stiffness
  PEFactor = .SubjectMusPar.PEFactor; ///< Parameter for influence of parallel stiffness
};


////////////////////////////////////////////
//     AdductorMagnusMid (6 elements)     //
////////////////////////////////////////////
AnyMuscleModel3E AdductorMagnusMid1Par =
{
  AnyFolder& MuscleParameters = .SubjectMusPar.AdductorMagnusMid;
  AnyIntVar MuscleElemNo = 1; ///< The number of this element of the muscle
  AnyIntVar MuscleElemAmount = 6; ///< The total amount of elements for this muscle
  F0 = .SubjectMusPar.PCSAfactor*PCSA; ///< Maximum force output at optimum fiber length
  Lf0 = MuscleParameters.OptimalFiberlength; ///< Optimum fiber length
  Vol0 = 1e-6*MuscleParameters.MuscleVolume/MuscleElemAmount; /// Muscle volume in (m3)
  AnyVar PCSA = 1e4*Vol0/Lf0;///< PCSA (cm2) is calculated as muscle volume divided between muscle branches and divided by fiber length
  Lt0 = max({MuscleParameters.TotalTendonLength, 0.001}); ///< Tendon slack length (Cannot be zero)
  Gamma0 = MuscleParameters.Pennationangle*(pi/180); ///< Pennation angle in radian
  Epsilon0 = MuscleParameters.Epsilon0; ///< Tendon strain at F0
  K1 = MuscleParameters.K1; ///< Factor for determining shortening speed at optimum length
  K2 = MuscleParameters.K2; ///< Factor for determining shortening speed at optimum length
  Fcfast = MuscleParameters.Fcfast; ///< Factor for determining shortening speed at optimum length
  Jt = .SubjectMusPar.Jt; ///< Shape parameter for the tendon stiffness
  Jpe = .SubjectMusPar.Jpe; ///< Shape parameter for the parallel stiffness
  PEFactor = .SubjectMusPar.PEFactor; ///< Parameter for influence of parallel stiffness
};

AnyMuscleModel3E AdductorMagnusMid2Par =
{
  AnyFolder& MuscleParameters = .SubjectMusPar.AdductorMagnusMid;
  AnyIntVar MuscleElemNo = 2; ///< The number of this element of the muscle
  AnyIntVar MuscleElemAmount = 6; ///< The total amount of elements for this muscle
  F0 = .SubjectMusPar.PCSAfactor*PCSA; ///< Maximum force output at optimum fiber length
  Lf0 = MuscleParameters.OptimalFiberlength; ///< Optimum fiber length
  Vol0 = 1e-6*MuscleParameters.MuscleVolume/MuscleElemAmount; /// Muscle volume in (m3)
  AnyVar PCSA = 1e4*Vol0/Lf0;///< PCSA (cm2) is calculated as muscle volume divided between muscle branches and divided by fiber length
  Lt0 = max({MuscleParameters.TotalTendonLength, 0.001}); ///< Tendon slack length (Cannot be zero)
  Gamma0 = MuscleParameters.Pennationangle*(pi/180); ///< Pennation angle in radian
  Epsilon0 = MuscleParameters.Epsilon0; ///< Tendon strain at F0
  K1 = MuscleParameters.K1; ///< Factor for determining shortening speed at optimum length
  K2 = MuscleParameters.K2; ///< Factor for determining shortening speed at optimum length
  Fcfast = MuscleParameters.Fcfast; ///< Factor for determining shortening speed at optimum length
  Jt = .SubjectMusPar.Jt; ///< Shape parameter for the tendon stiffness
  Jpe = .SubjectMusPar.Jpe; ///< Shape parameter for the parallel stiffness
  PEFactor = .SubjectMusPar.PEFactor; ///< Parameter for influence of parallel stiffness
};

AnyMuscleModel3E AdductorMagnusMid3Par =
{
  AnyFolder& MuscleParameters = .SubjectMusPar.AdductorMagnusMid;
  AnyIntVar MuscleElemNo = 3; ///< The number of this element of the muscle
  AnyIntVar MuscleElemAmount = 6; ///< The total amount of elements for this muscle
  F0 = .SubjectMusPar.PCSAfactor*PCSA; ///< Maximum force output at optimum fiber length
  Lf0 = MuscleParameters.OptimalFiberlength; ///< Optimum fiber length
  Vol0 = 1e-6*MuscleParameters.MuscleVolume/MuscleElemAmount; /// Muscle volume in (m3)
  AnyVar PCSA = 1e4*Vol0/Lf0;///< PCSA (cm2) is calculated as muscle volume divided between muscle branches and divided by fiber length
  Lt0 = max({MuscleParameters.TotalTendonLength, 0.001}); ///< Tendon slack length (Cannot be zero)
  Gamma0 = MuscleParameters.Pennationangle*(pi/180); ///< Pennation angle in radian
  Epsilon0 = MuscleParameters.Epsilon0; ///< Tendon strain at F0
  K1 = MuscleParameters.K1; ///< Factor for determining shortening speed at optimum length
  K2 = MuscleParameters.K2; ///< Factor for determining shortening speed at optimum length
  Fcfast = MuscleParameters.Fcfast; ///< Factor for determining shortening speed at optimum length
  Jt = .SubjectMusPar.Jt; ///< Shape parameter for the tendon stiffness
  Jpe = .SubjectMusPar.Jpe; ///< Shape parameter for the parallel stiffness
  PEFactor = .SubjectMusPar.PEFactor; ///< Parameter for influence of parallel stiffness
};

AnyMuscleModel3E AdductorMagnusMid4Par =
{
  AnyFolder& MuscleParameters = .SubjectMusPar.AdductorMagnusMid;
  AnyIntVar MuscleElemNo = 4; ///< The number of this element of the muscle
  AnyIntVar MuscleElemAmount = 6; ///< The total amount of elements for this muscle
  F0 = .SubjectMusPar.PCSAfactor*PCSA; ///< Maximum force output at optimum fiber length
  Lf0 = MuscleParameters.OptimalFiberlength; ///< Optimum fiber length
  Vol0 = 1e-6*MuscleParameters.MuscleVolume/MuscleElemAmount; /// Muscle volume in (m3)
  AnyVar PCSA = 1e4*Vol0/Lf0;///< PCSA (cm2) is calculated as muscle volume divided between muscle branches and divided by fiber length
  Lt0 = max({MuscleParameters.TotalTendonLength, 0.001}); ///< Tendon slack length (Cannot be zero)
  Gamma0 = MuscleParameters.Pennationangle*(pi/180); ///< Pennation angle in radian
  Epsilon0 = MuscleParameters.Epsilon0; ///< Tendon strain at F0
  K1 = MuscleParameters.K1; ///< Factor for determining shortening speed at optimum length
  K2 = MuscleParameters.K2; ///< Factor for determining shortening speed at optimum length
  Fcfast = MuscleParameters.Fcfast; ///< Factor for determining shortening speed at optimum length
  Jt = .SubjectMusPar.Jt; ///< Shape parameter for the tendon stiffness
  Jpe = .SubjectMusPar.Jpe; ///< Shape parameter for the parallel stiffness
  PEFactor = .SubjectMusPar.PEFactor; ///< Parameter for influence of parallel stiffness
};

AnyMuscleModel3E AdductorMagnusMid5Par =
{
  AnyFolder& MuscleParameters = .SubjectMusPar.AdductorMagnusMid;
  AnyIntVar MuscleElemNo = 5; ///< The number of this element of the muscle
  AnyIntVar MuscleElemAmount = 6; ///< The total amount of elements for this muscle
  F0 = .SubjectMusPar.PCSAfactor*PCSA; ///< Maximum force output at optimum fiber length
  Lf0 = MuscleParameters.OptimalFiberlength; ///< Optimum fiber length
  Vol0 = 1e-6*MuscleParameters.MuscleVolume/MuscleElemAmount; /// Muscle volume in (m3)
  AnyVar PCSA = 1e4*Vol0/Lf0;///< PCSA (cm2) is calculated as muscle volume divided between muscle branches and divided by fiber length
  Lt0 = max({MuscleParameters.TotalTendonLength, 0.001}); ///< Tendon slack length (Cannot be zero)
  Gamma0 = MuscleParameters.Pennationangle*(pi/180); ///< Pennation angle in radian
  Epsilon0 = MuscleParameters.Epsilon0; ///< Tendon strain at F0
  K1 = MuscleParameters.K1; ///< Factor for determining shortening speed at optimum length
  K2 = MuscleParameters.K2; ///< Factor for determining shortening speed at optimum length
  Fcfast = MuscleParameters.Fcfast; ///< Factor for determining shortening speed at optimum length
  Jt = .SubjectMusPar.Jt; ///< Shape parameter for the tendon stiffness
  Jpe = .SubjectMusPar.Jpe; ///< Shape parameter for the parallel stiffness
  PEFactor = .SubjectMusPar.PEFactor; ///< Parameter for influence of parallel stiffness
};

AnyMuscleModel3E AdductorMagnusMid6Par =
{
  AnyFolder& MuscleParameters = .SubjectMusPar.AdductorMagnusMid;
  AnyIntVar MuscleElemNo = 6; ///< The number of this element of the muscle
  AnyIntVar MuscleElemAmount = 6; ///< The total amount of elements for this muscle
  F0 = .SubjectMusPar.PCSAfactor*PCSA; ///< Maximum force output at optimum fiber length
  Lf0 = MuscleParameters.OptimalFiberlength; ///< Optimum fiber length
  Vol0 = 1e-6*MuscleParameters.MuscleVolume/MuscleElemAmount; /// Muscle volume in (m3)
  AnyVar PCSA = 1e4*Vol0/Lf0;///< PCSA (cm2) is calculated as muscle volume divided between muscle branches and divided by fiber length
  Lt0 = max({MuscleParameters.TotalTendonLength, 0.001}); ///< Tendon slack length (Cannot be zero)
  Gamma0 = MuscleParameters.Pennationangle*(pi/180); ///< Pennation angle in radian
  Epsilon0 = MuscleParameters.Epsilon0; ///< Tendon strain at F0
  K1 = MuscleParameters.K1; ///< Factor for determining shortening speed at optimum length
  K2 = MuscleParameters.K2; ///< Factor for determining shortening speed at optimum length
  Fcfast = MuscleParameters.Fcfast; ///< Factor for determining shortening speed at optimum length
  Jt = .SubjectMusPar.Jt; ///< Shape parameter for the tendon stiffness
  Jpe = .SubjectMusPar.Jpe; ///< Shape parameter for the parallel stiffness
  PEFactor = .SubjectMusPar.PEFactor; ///< Parameter for influence of parallel stiffness
};


/////////////////////////////////////////////////
//     AdductorMagnusProximal (4 elements)     //
/////////////////////////////////////////////////
AnyMuscleModel3E AdductorMagnusProximal1Par =
{
  AnyFolder& MuscleParameters = .SubjectMusPar.AdductorMagnusProximal;
  AnyIntVar MuscleElemNo = 1; ///< The number of this element of the muscle
  AnyIntVar MuscleElemAmount = 4; ///< The total amount of elements for this muscle
  F0 = .SubjectMusPar.PCSAfactor*PCSA; ///< Maximum force output at optimum fiber length
  Lf0 = MuscleParameters.OptimalFiberlength; ///< Optimum fiber length
  Vol0 = 1e-6*MuscleParameters.MuscleVolume/MuscleElemAmount; /// Muscle volume in (m3)
  AnyVar PCSA = 1e4*Vol0/Lf0;///< PCSA (cm2) is calculated as muscle volume divided between muscle branches and divided by fiber length
  Lt0 = max({MuscleParameters.TotalTendonLength, 0.001}); ///< Tendon slack length (Cannot be zero)
  Gamma0 = MuscleParameters.Pennationangle*(pi/180); ///< Pennation angle in radian
  Epsilon0 = MuscleParameters.Epsilon0; ///< Tendon strain at F0
  K1 = MuscleParameters.K1; ///< Factor for determining shortening speed at optimum length
  K2 = MuscleParameters.K2; ///< Factor for determining shortening speed at optimum length
  Fcfast = MuscleParameters.Fcfast; ///< Factor for determining shortening speed at optimum length
  Jt = .SubjectMusPar.Jt; ///< Shape parameter for the tendon stiffness
  Jpe = .SubjectMusPar.Jpe; ///< Shape parameter for the parallel stiffness
  PEFactor = .SubjectMusPar.PEFactor; ///< Parameter for influence of parallel stiffness
};

AnyMuscleModel3E AdductorMagnusProximal2Par =
{
  AnyFolder& MuscleParameters = .SubjectMusPar.AdductorMagnusProximal;
  AnyIntVar MuscleElemNo = 2; ///< The number of this element of the muscle
  AnyIntVar MuscleElemAmount = 4; ///< The total amount of elements for this muscle
  F0 = .SubjectMusPar.PCSAfactor*PCSA; ///< Maximum force output at optimum fiber length
  Lf0 = MuscleParameters.OptimalFiberlength; ///< Optimum fiber length
  Vol0 = 1e-6*MuscleParameters.MuscleVolume/MuscleElemAmount; /// Muscle volume in (m3)
  AnyVar PCSA = 1e4*Vol0/Lf0;///< PCSA (cm2) is calculated as muscle volume divided between muscle branches and divided by fiber length
  Lt0 = max({MuscleParameters.TotalTendonLength, 0.001}); ///< Tendon slack length (Cannot be zero)
  Gamma0 = MuscleParameters.Pennationangle*(pi/180); ///< Pennation angle in radian
  Epsilon0 = MuscleParameters.Epsilon0; ///< Tendon strain at F0
  K1 = MuscleParameters.K1; ///< Factor for determining shortening speed at optimum length
  K2 = MuscleParameters.K2; ///< Factor for determining shortening speed at optimum length
  Fcfast = MuscleParameters.Fcfast; ///< Factor for determining shortening speed at optimum length
  Jt = .SubjectMusPar.Jt; ///< Shape parameter for the tendon stiffness
  Jpe = .SubjectMusPar.Jpe; ///< Shape parameter for the parallel stiffness
  PEFactor = .SubjectMusPar.PEFactor; ///< Parameter for influence of parallel stiffness
};

AnyMuscleModel3E AdductorMagnusProximal3Par =
{
  AnyFolder& MuscleParameters = .SubjectMusPar.AdductorMagnusProximal;
  AnyIntVar MuscleElemNo = 3; ///< The number of this element of the muscle
  AnyIntVar MuscleElemAmount = 4; ///< The total amount of elements for this muscle
  F0 = .SubjectMusPar.PCSAfactor*PCSA; ///< Maximum force output at optimum fiber length
  Lf0 = MuscleParameters.OptimalFiberlength; ///< Optimum fiber length
  Vol0 = 1e-6*MuscleParameters.MuscleVolume/MuscleElemAmount; /// Muscle volume in (m3)
  AnyVar PCSA = 1e4*Vol0/Lf0;///< PCSA (cm2) is calculated as muscle volume divided between muscle branches and divided by fiber length
  Lt0 = max({MuscleParameters.TotalTendonLength, 0.001}); ///< Tendon slack length (Cannot be zero)
  Gamma0 = MuscleParameters.Pennationangle*(pi/180); ///< Pennation angle in radian
  Epsilon0 = MuscleParameters.Epsilon0; ///< Tendon strain at F0
  K1 = MuscleParameters.K1; ///< Factor for determining shortening speed at optimum length
  K2 = MuscleParameters.K2; ///< Factor for determining shortening speed at optimum length
  Fcfast = MuscleParameters.Fcfast; ///< Factor for determining shortening speed at optimum length
  Jt = .SubjectMusPar.Jt; ///< Shape parameter for the tendon stiffness
  Jpe = .SubjectMusPar.Jpe; ///< Shape parameter for the parallel stiffness
  PEFactor = .SubjectMusPar.PEFactor; ///< Parameter for influence of parallel stiffness
};

AnyMuscleModel3E AdductorMagnusProximal4Par =
{
  AnyFolder& MuscleParameters = .SubjectMusPar.AdductorMagnusProximal;
  AnyIntVar MuscleElemNo = 4; ///< The number of this element of the muscle
  AnyIntVar MuscleElemAmount = 4; ///< The total amount of elements for this muscle
  F0 = .SubjectMusPar.PCSAfactor*PCSA; ///< Maximum force output at optimum fiber length
  Lf0 = MuscleParameters.OptimalFiberlength; ///< Optimum fiber length
  Vol0 = 1e-6*MuscleParameters.MuscleVolume/MuscleElemAmount; /// Muscle volume in (m3)
  AnyVar PCSA = 1e4*Vol0/Lf0;///< PCSA (cm2) is calculated as muscle volume divided between muscle branches and divided by fiber length
  Lt0 = max({MuscleParameters.TotalTendonLength, 0.001}); ///< Tendon slack length (Cannot be zero)
  Gamma0 = MuscleParameters.Pennationangle*(pi/180); ///< Pennation angle in radian
  Epsilon0 = MuscleParameters.Epsilon0; ///< Tendon strain at F0
  K1 = MuscleParameters.K1; ///< Factor for determining shortening speed at optimum length
  K2 = MuscleParameters.K2; ///< Factor for determining shortening speed at optimum length
  Fcfast = MuscleParameters.Fcfast; ///< Factor for determining shortening speed at optimum length
  Jt = .SubjectMusPar.Jt; ///< Shape parameter for the tendon stiffness
  Jpe = .SubjectMusPar.Jpe; ///< Shape parameter for the parallel stiffness
  PEFactor = .SubjectMusPar.PEFactor; ///< Parameter for influence of parallel stiffness
};


///////////////////////////////////////////////////
//     BicepsFemorisCaputLongum (1 element )     //
///////////////////////////////////////////////////
AnyMuscleModel3E BicepsFemorisCaputLongum1Par =
{
  AnyFolder& MuscleParameters = .SubjectMusPar.BicepsFemorisCaputLongum;
  AnyIntVar MuscleElemNo = 1; ///< The number of this element of the muscle
  AnyIntVar MuscleElemAmount = 1; ///< The total amount of elements for this muscle
  F0 = .SubjectMusPar.PCSAfactor*PCSA; ///< Maximum force output at optimum fiber length
  Lf0 = MuscleParameters.OptimalFiberlength; ///< Optimum fiber length
  Vol0 = 1e-6*MuscleParameters.MuscleVolume/MuscleElemAmount; /// Muscle volume in (m3)
  AnyVar PCSA = 1e4*Vol0/Lf0;///< PCSA (cm2) is calculated as muscle volume divided between muscle branches and divided by fiber length
  Lt0 = max({MuscleParameters.TotalTendonLength, 0.001}); ///< Tendon slack length (Cannot be zero)
  Gamma0 = MuscleParameters.Pennationangle*(pi/180); ///< Pennation angle in radian
  Epsilon0 = MuscleParameters.Epsilon0; ///< Tendon strain at F0
  K1 = MuscleParameters.K1; ///< Factor for determining shortening speed at optimum length
  K2 = MuscleParameters.K2; ///< Factor for determining shortening speed at optimum length
  Fcfast = MuscleParameters.Fcfast; ///< Factor for determining shortening speed at optimum length
  Jt = .SubjectMusPar.Jt; ///< Shape parameter for the tendon stiffness
  Jpe = .SubjectMusPar.Jpe; ///< Shape parameter for the parallel stiffness
  PEFactor = .SubjectMusPar.PEFactor; ///< Parameter for influence of parallel stiffness
};


//////////////////////////////////////////////////
//     BicepsFemorisCaputBreve (3 elements)     //
//////////////////////////////////////////////////
AnyMuscleModel3E BicepsFemorisCaputBreve1Par =
{
  AnyFolder& MuscleParameters = .SubjectMusPar.BicepsFemorisCaputBreve;
  AnyIntVar MuscleElemNo = 1; ///< The number of this element of the muscle
  AnyIntVar MuscleElemAmount = 3; ///< The total amount of elements for this muscle
  F0 = .SubjectMusPar.PCSAfactor*PCSA; ///< Maximum force output at optimum fiber length
  Lf0 = MuscleParameters.OptimalFiberlength; ///< Optimum fiber length
  Vol0 = 1e-6*MuscleParameters.MuscleVolume/MuscleElemAmount; /// Muscle volume in (m3)
  AnyVar PCSA = 1e4*Vol0/Lf0;///< PCSA (cm2) is calculated as muscle volume divided between muscle branches and divided by fiber length
  Lt0 = max({MuscleParameters.TotalTendonLength, 0.001}); ///< Tendon slack length (Cannot be zero)
  Gamma0 = MuscleParameters.Pennationangle*(pi/180); ///< Pennation angle in radian
  Epsilon0 = MuscleParameters.Epsilon0; ///< Tendon strain at F0
  K1 = MuscleParameters.K1; ///< Factor for determining shortening speed at optimum length
  K2 = MuscleParameters.K2; ///< Factor for determining shortening speed at optimum length
  Fcfast = MuscleParameters.Fcfast; ///< Factor for determining shortening speed at optimum length
  Jt = .SubjectMusPar.Jt; ///< Shape parameter for the tendon stiffness
  Jpe = .SubjectMusPar.Jpe; ///< Shape parameter for the parallel stiffness
  PEFactor = .SubjectMusPar.PEFactor; ///< Parameter for influence of parallel stiffness
};

AnyMuscleModel3E BicepsFemorisCaputBreve2Par =
{
  AnyFolder& MuscleParameters = .SubjectMusPar.BicepsFemorisCaputBreve;
  AnyIntVar MuscleElemNo = 2; ///< The number of this element of the muscle
  AnyIntVar MuscleElemAmount = 3; ///< The total amount of elements for this muscle
  F0 = .SubjectMusPar.PCSAfactor*PCSA; ///< Maximum force output at optimum fiber length
  Lf0 = MuscleParameters.OptimalFiberlength; ///< Optimum fiber length
  Vol0 = 1e-6*MuscleParameters.MuscleVolume/MuscleElemAmount; /// Muscle volume in (m3)
  AnyVar PCSA = 1e4*Vol0/Lf0;///< PCSA (cm2) is calculated as muscle volume divided between muscle branches and divided by fiber length
  Lt0 = max({MuscleParameters.TotalTendonLength, 0.001}); ///< Tendon slack length (Cannot be zero)
  Gamma0 = MuscleParameters.Pennationangle*(pi/180); ///< Pennation angle in radian
  Epsilon0 = MuscleParameters.Epsilon0; ///< Tendon strain at F0
  K1 = MuscleParameters.K1; ///< Factor for determining shortening speed at optimum length
  K2 = MuscleParameters.K2; ///< Factor for determining shortening speed at optimum length
  Fcfast = MuscleParameters.Fcfast; ///< Factor for determining shortening speed at optimum length
  Jt = .SubjectMusPar.Jt; ///< Shape parameter for the tendon stiffness
  Jpe = .SubjectMusPar.Jpe; ///< Shape parameter for the parallel stiffness
  PEFactor = .SubjectMusPar.PEFactor; ///< Parameter for influence of parallel stiffness
};

AnyMuscleModel3E BicepsFemorisCaputBreve3Par =
{
  AnyFolder& MuscleParameters = .SubjectMusPar.BicepsFemorisCaputBreve;
  AnyIntVar MuscleElemNo = 3; ///< The number of this element of the muscle
  AnyIntVar MuscleElemAmount = 3; ///< The total amount of elements for this muscle
  F0 = .SubjectMusPar.PCSAfactor*PCSA; ///< Maximum force output at optimum fiber length
  Lf0 = MuscleParameters.OptimalFiberlength; ///< Optimum fiber length
  Vol0 = 1e-6*MuscleParameters.MuscleVolume/MuscleElemAmount; /// Muscle volume in (m3)
  AnyVar PCSA = 1e4*Vol0/Lf0;///< PCSA (cm2) is calculated as muscle volume divided between muscle branches and divided by fiber length
  Lt0 = max({MuscleParameters.TotalTendonLength, 0.001}); ///< Tendon slack length (Cannot be zero)
  Gamma0 = MuscleParameters.Pennationangle*(pi/180); ///< Pennation angle in radian
  Epsilon0 = MuscleParameters.Epsilon0; ///< Tendon strain at F0
  K1 = MuscleParameters.K1; ///< Factor for determining shortening speed at optimum length
  K2 = MuscleParameters.K2; ///< Factor for determining shortening speed at optimum length
  Fcfast = MuscleParameters.Fcfast; ///< Factor for determining shortening speed at optimum length
  Jt = .SubjectMusPar.Jt; ///< Shape parameter for the tendon stiffness
  Jpe = .SubjectMusPar.Jpe; ///< Shape parameter for the parallel stiffness
  PEFactor = .SubjectMusPar.PEFactor; ///< Parameter for influence of parallel stiffness
};


//////////////////////////////////////////////////
//     ExtensorDigitorumLongus (3 elements)     //
//////////////////////////////////////////////////
AnyMuscleModel3E ExtensorDigitorumLongus1Par =
{
  AnyFolder& MuscleParameters = .SubjectMusPar.ExtensorDigitorumLongus;
  AnyIntVar MuscleElemNo = 1; ///< The number of this element of the muscle
  AnyIntVar MuscleElemAmount = 3; ///< The total amount of elements for this muscle
  F0 = .SubjectMusPar.PCSAfactor*PCSA; ///< Maximum force output at optimum fiber length
  Lf0 = MuscleParameters.OptimalFiberlength; ///< Optimum fiber length
  Vol0 = 1e-6*MuscleParameters.MuscleVolume/MuscleElemAmount; /// Muscle volume in (m3)
  AnyVar PCSA = 1e4*Vol0/Lf0;///< PCSA (cm2) is calculated as muscle volume divided between muscle branches and divided by fiber length
  Lt0 = max({MuscleParameters.TotalTendonLength, 0.001}); ///< Tendon slack length (Cannot be zero)
  Gamma0 = MuscleParameters.Pennationangle*(pi/180); ///< Pennation angle in radian
  Epsilon0 = MuscleParameters.Epsilon0; ///< Tendon strain at F0
  K1 = MuscleParameters.K1; ///< Factor for determining shortening speed at optimum length
  K2 = MuscleParameters.K2; ///< Factor for determining shortening speed at optimum length
  Fcfast = MuscleParameters.Fcfast; ///< Factor for determining shortening speed at optimum length
  Jt = .SubjectMusPar.Jt; ///< Shape parameter for the tendon stiffness
  Jpe = .SubjectMusPar.Jpe; ///< Shape parameter for the parallel stiffness
  PEFactor = .SubjectMusPar.PEFactor; ///< Parameter for influence of parallel stiffness
};

AnyMuscleModel3E ExtensorDigitorumLongus2Par =
{
  AnyFolder& MuscleParameters = .SubjectMusPar.ExtensorDigitorumLongus;
  AnyIntVar MuscleElemNo = 2; ///< The number of this element of the muscle
  AnyIntVar MuscleElemAmount = 3; ///< The total amount of elements for this muscle
  F0 = .SubjectMusPar.PCSAfactor*PCSA; ///< Maximum force output at optimum fiber length
  Lf0 = MuscleParameters.OptimalFiberlength; ///< Optimum fiber length
  Vol0 = 1e-6*MuscleParameters.MuscleVolume/MuscleElemAmount; /// Muscle volume in (m3)
  AnyVar PCSA = 1e4*Vol0/Lf0;///< PCSA (cm2) is calculated as muscle volume divided between muscle branches and divided by fiber length
  Lt0 = max({MuscleParameters.TotalTendonLength, 0.001}); ///< Tendon slack length (Cannot be zero)
  Gamma0 = MuscleParameters.Pennationangle*(pi/180); ///< Pennation angle in radian
  Epsilon0 = MuscleParameters.Epsilon0; ///< Tendon strain at F0
  K1 = MuscleParameters.K1; ///< Factor for determining shortening speed at optimum length
  K2 = MuscleParameters.K2; ///< Factor for determining shortening speed at optimum length
  Fcfast = MuscleParameters.Fcfast; ///< Factor for determining shortening speed at optimum length
  Jt = .SubjectMusPar.Jt; ///< Shape parameter for the tendon stiffness
  Jpe = .SubjectMusPar.Jpe; ///< Shape parameter for the parallel stiffness
  PEFactor = .SubjectMusPar.PEFactor; ///< Parameter for influence of parallel stiffness
};

AnyMuscleModel3E ExtensorDigitorumLongus3Par =
{
  AnyFolder& MuscleParameters = .SubjectMusPar.ExtensorDigitorumLongus;
  AnyIntVar MuscleElemNo = 3; ///< The number of this element of the muscle
  AnyIntVar MuscleElemAmount = 3; ///< The total amount of elements for this muscle
  F0 = .SubjectMusPar.PCSAfactor*PCSA; ///< Maximum force output at optimum fiber length
  Lf0 = MuscleParameters.OptimalFiberlength; ///< Optimum fiber length
  Vol0 = 1e-6*MuscleParameters.MuscleVolume/MuscleElemAmount; /// Muscle volume in (m3)
  AnyVar PCSA = 1e4*Vol0/Lf0;///< PCSA (cm2) is calculated as muscle volume divided between muscle branches and divided by fiber length
  Lt0 = max({MuscleParameters.TotalTendonLength, 0.001}); ///< Tendon slack length (Cannot be zero)
  Gamma0 = MuscleParameters.Pennationangle*(pi/180); ///< Pennation angle in radian
  Epsilon0 = MuscleParameters.Epsilon0; ///< Tendon strain at F0
  K1 = MuscleParameters.K1; ///< Factor for determining shortening speed at optimum length
  K2 = MuscleParameters.K2; ///< Factor for determining shortening speed at optimum length
  Fcfast = MuscleParameters.Fcfast; ///< Factor for determining shortening speed at optimum length
  Jt = .SubjectMusPar.Jt; ///< Shape parameter for the tendon stiffness
  Jpe = .SubjectMusPar.Jpe; ///< Shape parameter for the parallel stiffness
  PEFactor = .SubjectMusPar.PEFactor; ///< Parameter for influence of parallel stiffness
};


/////////////////////////////////////////////////
//     ExtensorHallucisLongus (3 elements)     //
/////////////////////////////////////////////////
AnyMuscleModel3E ExtensorHallucisLongus1Par =
{
  AnyFolder& MuscleParameters = .SubjectMusPar.ExtensorHallucisLongus;
  AnyIntVar MuscleElemNo = 1; ///< The number of this element of the muscle
  AnyIntVar MuscleElemAmount = 3; ///< The total amount of elements for this muscle
  F0 = .SubjectMusPar.PCSAfactor*PCSA; ///< Maximum force output at optimum fiber length
  Lf0 = MuscleParameters.OptimalFiberlength; ///< Optimum fiber length
  Vol0 = 1e-6*MuscleParameters.MuscleVolume/MuscleElemAmount; /// Muscle volume in (m3)
  AnyVar PCSA = 1e4*Vol0/Lf0;///< PCSA (cm2) is calculated as muscle volume divided between muscle branches and divided by fiber length
  Lt0 = max({MuscleParameters.TotalTendonLength, 0.001}); ///< Tendon slack length (Cannot be zero)
  Gamma0 = MuscleParameters.Pennationangle*(pi/180); ///< Pennation angle in radian
  Epsilon0 = MuscleParameters.Epsilon0; ///< Tendon strain at F0
  K1 = MuscleParameters.K1; ///< Factor for determining shortening speed at optimum length
  K2 = MuscleParameters.K2; ///< Factor for determining shortening speed at optimum length
  Fcfast = MuscleParameters.Fcfast; ///< Factor for determining shortening speed at optimum length
  Jt = .SubjectMusPar.Jt; ///< Shape parameter for the tendon stiffness
  Jpe = .SubjectMusPar.Jpe; ///< Shape parameter for the parallel stiffness
  PEFactor = .SubjectMusPar.PEFactor; ///< Parameter for influence of parallel stiffness
};

AnyMuscleModel3E ExtensorHallucisLongus2Par =
{
  AnyFolder& MuscleParameters = .SubjectMusPar.ExtensorHallucisLongus;
  AnyIntVar MuscleElemNo = 2; ///< The number of this element of the muscle
  AnyIntVar MuscleElemAmount = 3; ///< The total amount of elements for this muscle
  F0 = .SubjectMusPar.PCSAfactor*PCSA; ///< Maximum force output at optimum fiber length
  Lf0 = MuscleParameters.OptimalFiberlength; ///< Optimum fiber length
  Vol0 = 1e-6*MuscleParameters.MuscleVolume/MuscleElemAmount; /// Muscle volume in (m3)
  AnyVar PCSA = 1e4*Vol0/Lf0;///< PCSA (cm2) is calculated as muscle volume divided between muscle branches and divided by fiber length
  Lt0 = max({MuscleParameters.TotalTendonLength, 0.001}); ///< Tendon slack length (Cannot be zero)
  Gamma0 = MuscleParameters.Pennationangle*(pi/180); ///< Pennation angle in radian
  Epsilon0 = MuscleParameters.Epsilon0; ///< Tendon strain at F0
  K1 = MuscleParameters.K1; ///< Factor for determining shortening speed at optimum length
  K2 = MuscleParameters.K2; ///< Factor for determining shortening speed at optimum length
  Fcfast = MuscleParameters.Fcfast; ///< Factor for determining shortening speed at optimum length
  Jt = .SubjectMusPar.Jt; ///< Shape parameter for the tendon stiffness
  Jpe = .SubjectMusPar.Jpe; ///< Shape parameter for the parallel stiffness
  PEFactor = .SubjectMusPar.PEFactor; ///< Parameter for influence of parallel stiffness
};

AnyMuscleModel3E ExtensorHallucisLongus3Par =
{
  AnyFolder& MuscleParameters = .SubjectMusPar.ExtensorHallucisLongus;
  AnyIntVar MuscleElemNo = 3; ///< The number of this element of the muscle
  AnyIntVar MuscleElemAmount = 3; ///< The total amount of elements for this muscle
  F0 = .SubjectMusPar.PCSAfactor*PCSA; ///< Maximum force output at optimum fiber length
  Lf0 = MuscleParameters.OptimalFiberlength; ///< Optimum fiber length
  Vol0 = 1e-6*MuscleParameters.MuscleVolume/MuscleElemAmount; /// Muscle volume in (m3)
  AnyVar PCSA = 1e4*Vol0/Lf0;///< PCSA (cm2) is calculated as muscle volume divided between muscle branches and divided by fiber length
  Lt0 = max({MuscleParameters.TotalTendonLength, 0.001}); ///< Tendon slack length (Cannot be zero)
  Gamma0 = MuscleParameters.Pennationangle*(pi/180); ///< Pennation angle in radian
  Epsilon0 = MuscleParameters.Epsilon0; ///< Tendon strain at F0
  K1 = MuscleParameters.K1; ///< Factor for determining shortening speed at optimum length
  K2 = MuscleParameters.K2; ///< Factor for determining shortening speed at optimum length
  Fcfast = MuscleParameters.Fcfast; ///< Factor for determining shortening speed at optimum length
  Jt = .SubjectMusPar.Jt; ///< Shape parameter for the tendon stiffness
  Jpe = .SubjectMusPar.Jpe; ///< Shape parameter for the parallel stiffness
  PEFactor = .SubjectMusPar.PEFactor; ///< Parameter for influence of parallel stiffness
};


////////////////////////////////////////////////
//     FlexorDigitorumLongus (3 elements)     //
////////////////////////////////////////////////
AnyMuscleModel3E FlexorDigitorumLongus1Par =
{
  AnyFolder& MuscleParameters = .SubjectMusPar.FlexorDigitorumLongus;
  AnyIntVar MuscleElemNo = 1; ///< The number of this element of the muscle
  AnyIntVar MuscleElemAmount = 3; ///< The total amount of elements for this muscle
  F0 = .SubjectMusPar.PCSAfactor*PCSA; ///< Maximum force output at optimum fiber length
  Lf0 = MuscleParameters.OptimalFiberlength; ///< Optimum fiber length
  Vol0 = 1e-6*MuscleParameters.MuscleVolume/MuscleElemAmount; /// Muscle volume in (m3)
  AnyVar PCSA = 1e4*Vol0/Lf0;///< PCSA (cm2) is calculated as muscle volume divided between muscle branches and divided by fiber length
  Lt0 = max({MuscleParameters.TotalTendonLength, 0.001}); ///< Tendon slack length (Cannot be zero)
  Gamma0 = MuscleParameters.Pennationangle*(pi/180); ///< Pennation angle in radian
  Epsilon0 = MuscleParameters.Epsilon0; ///< Tendon strain at F0
  K1 = MuscleParameters.K1; ///< Factor for determining shortening speed at optimum length
  K2 = MuscleParameters.K2; ///< Factor for determining shortening speed at optimum length
  Fcfast = MuscleParameters.Fcfast; ///< Factor for determining shortening speed at optimum length
  Jt = .SubjectMusPar.Jt; ///< Shape parameter for the tendon stiffness
  Jpe = .SubjectMusPar.Jpe; ///< Shape parameter for the parallel stiffness
  PEFactor = .SubjectMusPar.PEFactor; ///< Parameter for influence of parallel stiffness
};

AnyMuscleModel3E FlexorDigitorumLongus2Par =
{
  AnyFolder& MuscleParameters = .SubjectMusPar.FlexorDigitorumLongus;
  AnyIntVar MuscleElemNo = 2; ///< The number of this element of the muscle
  AnyIntVar MuscleElemAmount = 3; ///< The total amount of elements for this muscle
  F0 = .SubjectMusPar.PCSAfactor*PCSA; ///< Maximum force output at optimum fiber length
  Lf0 = MuscleParameters.OptimalFiberlength; ///< Optimum fiber length
  Vol0 = 1e-6*MuscleParameters.MuscleVolume/MuscleElemAmount; /// Muscle volume in (m3)
  AnyVar PCSA = 1e4*Vol0/Lf0;///< PCSA (cm2) is calculated as muscle volume divided between muscle branches and divided by fiber length
  Lt0 = max({MuscleParameters.TotalTendonLength, 0.001}); ///< Tendon slack length (Cannot be zero)
  Gamma0 = MuscleParameters.Pennationangle*(pi/180); ///< Pennation angle in radian
  Epsilon0 = MuscleParameters.Epsilon0; ///< Tendon strain at F0
  K1 = MuscleParameters.K1; ///< Factor for determining shortening speed at optimum length
  K2 = MuscleParameters.K2; ///< Factor for determining shortening speed at optimum length
  Fcfast = MuscleParameters.Fcfast; ///< Factor for determining shortening speed at optimum length
  Jt = .SubjectMusPar.Jt; ///< Shape parameter for the tendon stiffness
  Jpe = .SubjectMusPar.Jpe; ///< Shape parameter for the parallel stiffness
  PEFactor = .SubjectMusPar.PEFactor; ///< Parameter for influence of parallel stiffness
};

AnyMuscleModel3E FlexorDigitorumLongus3Par =
{
  AnyFolder& MuscleParameters = .SubjectMusPar.FlexorDigitorumLongus;
  AnyIntVar MuscleElemNo = 3; ///< The number of this element of the muscle
  AnyIntVar MuscleElemAmount = 3; ///< The total amount of elements for this muscle
  F0 = .SubjectMusPar.PCSAfactor*PCSA; ///< Maximum force output at optimum fiber length
  Lf0 = MuscleParameters.OptimalFiberlength; ///< Optimum fiber length
  Vol0 = 1e-6*MuscleParameters.MuscleVolume/MuscleElemAmount; /// Muscle volume in (m3)
  AnyVar PCSA = 1e4*Vol0/Lf0;///< PCSA (cm2) is calculated as muscle volume divided between muscle branches and divided by fiber length
  Lt0 = max({MuscleParameters.TotalTendonLength, 0.001}); ///< Tendon slack length (Cannot be zero)
  Gamma0 = MuscleParameters.Pennationangle*(pi/180); ///< Pennation angle in radian
  Epsilon0 = MuscleParameters.Epsilon0; ///< Tendon strain at F0
  K1 = MuscleParameters.K1; ///< Factor for determining shortening speed at optimum length
  K2 = MuscleParameters.K2; ///< Factor for determining shortening speed at optimum length
  Fcfast = MuscleParameters.Fcfast; ///< Factor for determining shortening speed at optimum length
  Jt = .SubjectMusPar.Jt; ///< Shape parameter for the tendon stiffness
  Jpe = .SubjectMusPar.Jpe; ///< Shape parameter for the parallel stiffness
  PEFactor = .SubjectMusPar.PEFactor; ///< Parameter for influence of parallel stiffness
};


///////////////////////////////////////////////
//     FlexorHallucisLongus (3 elements)     //
///////////////////////////////////////////////
AnyMuscleModel3E FlexorHallucisLongus1Par =
{
  AnyFolder& MuscleParameters = .SubjectMusPar.FlexorHallucisLongus;
  AnyIntVar MuscleElemNo = 1; ///< The number of this element of the muscle
  AnyIntVar MuscleElemAmount = 3; ///< The total amount of elements for this muscle
  F0 = .SubjectMusPar.PCSAfactor*PCSA; ///< Maximum force output at optimum fiber length
  Lf0 = MuscleParameters.OptimalFiberlength; ///< Optimum fiber length
  Vol0 = 1e-6*MuscleParameters.MuscleVolume/MuscleElemAmount; /// Muscle volume in (m3)
  AnyVar PCSA = 1e4*Vol0/Lf0;///< PCSA (cm2) is calculated as muscle volume divided between muscle branches and divided by fiber length
  Lt0 = max({MuscleParameters.TotalTendonLength, 0.001}); ///< Tendon slack length (Cannot be zero)
  Gamma0 = MuscleParameters.Pennationangle*(pi/180); ///< Pennation angle in radian
  Epsilon0 = MuscleParameters.Epsilon0; ///< Tendon strain at F0
  K1 = MuscleParameters.K1; ///< Factor for determining shortening speed at optimum length
  K2 = MuscleParameters.K2; ///< Factor for determining shortening speed at optimum length
  Fcfast = MuscleParameters.Fcfast; ///< Factor for determining shortening speed at optimum length
  Jt = .SubjectMusPar.Jt; ///< Shape parameter for the tendon stiffness
  Jpe = .SubjectMusPar.Jpe; ///< Shape parameter for the parallel stiffness
  PEFactor = .SubjectMusPar.PEFactor; ///< Parameter for influence of parallel stiffness
};

AnyMuscleModel3E FlexorHallucisLongus2Par =
{
  AnyFolder& MuscleParameters = .SubjectMusPar.FlexorHallucisLongus;
  AnyIntVar MuscleElemNo = 2; ///< The number of this element of the muscle
  AnyIntVar MuscleElemAmount = 3; ///< The total amount of elements for this muscle
  F0 = .SubjectMusPar.PCSAfactor*PCSA; ///< Maximum force output at optimum fiber length
  Lf0 = MuscleParameters.OptimalFiberlength; ///< Optimum fiber length
  Vol0 = 1e-6*MuscleParameters.MuscleVolume/MuscleElemAmount; /// Muscle volume in (m3)
  AnyVar PCSA = 1e4*Vol0/Lf0;///< PCSA (cm2) is calculated as muscle volume divided between muscle branches and divided by fiber length
  Lt0 = max({MuscleParameters.TotalTendonLength, 0.001}); ///< Tendon slack length (Cannot be zero)
  Gamma0 = MuscleParameters.Pennationangle*(pi/180); ///< Pennation angle in radian
  Epsilon0 = MuscleParameters.Epsilon0; ///< Tendon strain at F0
  K1 = MuscleParameters.K1; ///< Factor for determining shortening speed at optimum length
  K2 = MuscleParameters.K2; ///< Factor for determining shortening speed at optimum length
  Fcfast = MuscleParameters.Fcfast; ///< Factor for determining shortening speed at optimum length
  Jt = .SubjectMusPar.Jt; ///< Shape parameter for the tendon stiffness
  Jpe = .SubjectMusPar.Jpe; ///< Shape parameter for the parallel stiffness
  PEFactor = .SubjectMusPar.PEFactor; ///< Parameter for influence of parallel stiffness
};

AnyMuscleModel3E FlexorHallucisLongus3Par =
{
  AnyFolder& MuscleParameters = .SubjectMusPar.FlexorHallucisLongus;
  AnyIntVar MuscleElemNo = 3; ///< The number of this element of the muscle
  AnyIntVar MuscleElemAmount = 3; ///< The total amount of elements for this muscle
  F0 = .SubjectMusPar.PCSAfactor*PCSA; ///< Maximum force output at optimum fiber length
  Lf0 = MuscleParameters.OptimalFiberlength; ///< Optimum fiber length
  Vol0 = 1e-6*MuscleParameters.MuscleVolume/MuscleElemAmount; /// Muscle volume in (m3)
  AnyVar PCSA = 1e4*Vol0/Lf0;///< PCSA (cm2) is calculated as muscle volume divided between muscle branches and divided by fiber length
  Lt0 = max({MuscleParameters.TotalTendonLength, 0.001}); ///< Tendon slack length (Cannot be zero)
  Gamma0 = MuscleParameters.Pennationangle*(pi/180); ///< Pennation angle in radian
  Epsilon0 = MuscleParameters.Epsilon0; ///< Tendon strain at F0
  K1 = MuscleParameters.K1; ///< Factor for determining shortening speed at optimum length
  K2 = MuscleParameters.K2; ///< Factor for determining shortening speed at optimum length
  Fcfast = MuscleParameters.Fcfast; ///< Factor for determining shortening speed at optimum length
  Jt = .SubjectMusPar.Jt; ///< Shape parameter for the tendon stiffness
  Jpe = .SubjectMusPar.Jpe; ///< Shape parameter for the parallel stiffness
  PEFactor = .SubjectMusPar.PEFactor; ///< Parameter for influence of parallel stiffness
};


/////////////////////////////////////////////////
//     GastrocnemiusLateralis (1 element )     //
/////////////////////////////////////////////////
AnyMuscleModel3E GastrocnemiusLateralis1Par =
{
  AnyFolder& MuscleParameters = .SubjectMusPar.GastrocnemiusLateralis;
  AnyIntVar MuscleElemNo = 1; ///< The number of this element of the muscle
  AnyIntVar MuscleElemAmount = 1; ///< The total amount of elements for this muscle
  F0 = .SubjectMusPar.PCSAfactor*PCSA; ///< Maximum force output at optimum fiber length
  Lf0 = MuscleParameters.OptimalFiberlength; ///< Optimum fiber length
  Vol0 = 1e-6*MuscleParameters.MuscleVolume/MuscleElemAmount; /// Muscle volume in (m3)
  AnyVar PCSA = 1e4*Vol0/Lf0;///< PCSA (cm2) is calculated as muscle volume divided between muscle branches and divided by fiber length
  Lt0 = max({MuscleParameters.TotalTendonLength, 0.001}); ///< Tendon slack length (Cannot be zero)
  Gamma0 = MuscleParameters.Pennationangle*(pi/180); ///< Pennation angle in radian
  Epsilon0 = MuscleParameters.Epsilon0; ///< Tendon strain at F0
  K1 = MuscleParameters.K1; ///< Factor for determining shortening speed at optimum length
  K2 = MuscleParameters.K2; ///< Factor for determining shortening speed at optimum length
  Fcfast = MuscleParameters.Fcfast; ///< Factor for determining shortening speed at optimum length
  Jt = .SubjectMusPar.Jt; ///< Shape parameter for the tendon stiffness
  Jpe = .SubjectMusPar.Jpe; ///< Shape parameter for the parallel stiffness
  PEFactor = .SubjectMusPar.PEFactor; ///< Parameter for influence of parallel stiffness
};


////////////////////////////////////////////////
//     GastrocnemiusMedialis (1 element )     //
////////////////////////////////////////////////
AnyMuscleModel3E GastrocnemiusMedialis1Par =
{
  AnyFolder& MuscleParameters = .SubjectMusPar.GastrocnemiusMedialis;
  AnyIntVar MuscleElemNo = 1; ///< The number of this element of the muscle
  AnyIntVar MuscleElemAmount = 1; ///< The total amount of elements for this muscle
  F0 = .SubjectMusPar.PCSAfactor*PCSA; ///< Maximum force output at optimum fiber length
  Lf0 = MuscleParameters.OptimalFiberlength; ///< Optimum fiber length
  Vol0 = 1e-6*MuscleParameters.MuscleVolume/MuscleElemAmount; /// Muscle volume in (m3)
  AnyVar PCSA = 1e4*Vol0/Lf0;///< PCSA (cm2) is calculated as muscle volume divided between muscle branches and divided by fiber length
  Lt0 = max({MuscleParameters.TotalTendonLength, 0.001}); ///< Tendon slack length (Cannot be zero)
  Gamma0 = MuscleParameters.Pennationangle*(pi/180); ///< Pennation angle in radian
  Epsilon0 = MuscleParameters.Epsilon0; ///< Tendon strain at F0
  K1 = MuscleParameters.K1; ///< Factor for determining shortening speed at optimum length
  K2 = MuscleParameters.K2; ///< Factor for determining shortening speed at optimum length
  Fcfast = MuscleParameters.Fcfast; ///< Factor for determining shortening speed at optimum length
  Jt = .SubjectMusPar.Jt; ///< Shape parameter for the tendon stiffness
  Jpe = .SubjectMusPar.Jpe; ///< Shape parameter for the parallel stiffness
  PEFactor = .SubjectMusPar.PEFactor; ///< Parameter for influence of parallel stiffness
};


///////////////////////////////////////////
//     GemellusInferior (1 element )     //
///////////////////////////////////////////
AnyMuscleModel3E GemellusInferior1Par =
{
  AnyFolder& MuscleParameters = .SubjectMusPar.GemellusInferior;
  AnyIntVar MuscleElemNo = 1; ///< The number of this element of the muscle
  AnyIntVar MuscleElemAmount = 1; ///< The total amount of elements for this muscle
  F0 = .SubjectMusPar.PCSAfactor*PCSA; ///< Maximum force output at optimum fiber length
  Lf0 = MuscleParameters.OptimalFiberlength; ///< Optimum fiber length
  Vol0 = 1e-6*MuscleParameters.MuscleVolume/MuscleElemAmount; /// Muscle volume in (m3)
  AnyVar PCSA = 1e4*Vol0/Lf0;///< PCSA (cm2) is calculated as muscle volume divided between muscle branches and divided by fiber length
  Lt0 = max({MuscleParameters.TotalTendonLength, 0.001}); ///< Tendon slack length (Cannot be zero)
  Gamma0 = MuscleParameters.Pennationangle*(pi/180); ///< Pennation angle in radian
  Epsilon0 = MuscleParameters.Epsilon0; ///< Tendon strain at F0
  K1 = MuscleParameters.K1; ///< Factor for determining shortening speed at optimum length
  K2 = MuscleParameters.K2; ///< Factor for determining shortening speed at optimum length
  Fcfast = MuscleParameters.Fcfast; ///< Factor for determining shortening speed at optimum length
  Jt = .SubjectMusPar.Jt; ///< Shape parameter for the tendon stiffness
  Jpe = .SubjectMusPar.Jpe; ///< Shape parameter for the parallel stiffness
  PEFactor = .SubjectMusPar.PEFactor; ///< Parameter for influence of parallel stiffness
};


///////////////////////////////////////////
//     GemellusSuperior (1 element )     //
///////////////////////////////////////////
AnyMuscleModel3E GemellusSuperior1Par =
{
  AnyFolder& MuscleParameters = .SubjectMusPar.GemellusSuperior;
  AnyIntVar MuscleElemNo = 1; ///< The number of this element of the muscle
  AnyIntVar MuscleElemAmount = 1; ///< The total amount of elements for this muscle
  F0 = .SubjectMusPar.PCSAfactor*PCSA; ///< Maximum force output at optimum fiber length
  Lf0 = MuscleParameters.OptimalFiberlength; ///< Optimum fiber length
  Vol0 = 1e-6*MuscleParameters.MuscleVolume/MuscleElemAmount; /// Muscle volume in (m3)
  AnyVar PCSA = 1e4*Vol0/Lf0;///< PCSA (cm2) is calculated as muscle volume divided between muscle branches and divided by fiber length
  Lt0 = max({MuscleParameters.TotalTendonLength, 0.001}); ///< Tendon slack length (Cannot be zero)
  Gamma0 = MuscleParameters.Pennationangle*(pi/180); ///< Pennation angle in radian
  Epsilon0 = MuscleParameters.Epsilon0; ///< Tendon strain at F0
  K1 = MuscleParameters.K1; ///< Factor for determining shortening speed at optimum length
  K2 = MuscleParameters.K2; ///< Factor for determining shortening speed at optimum length
  Fcfast = MuscleParameters.Fcfast; ///< Factor for determining shortening speed at optimum length
  Jt = .SubjectMusPar.Jt; ///< Shape parameter for the tendon stiffness
  Jpe = .SubjectMusPar.Jpe; ///< Shape parameter for the parallel stiffness
  PEFactor = .SubjectMusPar.PEFactor; ///< Parameter for influence of parallel stiffness
};


/////////////////////////////////////////////////
//     GluteusMaximusSuperior (6 elements)     //
/////////////////////////////////////////////////
AnyMuscleModel3E GluteusMaximusSuperior1Par =
{
  AnyFolder& MuscleParameters = .SubjectMusPar.GluteusMaximusSuperior;
  AnyIntVar MuscleElemNo = 1; ///< The number of this element of the muscle
  AnyIntVar MuscleElemAmount = 6; ///< The total amount of elements for this muscle
  F0 = .SubjectMusPar.PCSAfactor*PCSA; ///< Maximum force output at optimum fiber length
  Lf0 = MuscleParameters.OptimalFiberlength; ///< Optimum fiber length
  Vol0 = 1e-6*MuscleParameters.MuscleVolume/MuscleElemAmount; /// Muscle volume in (m3)
  AnyVar PCSA = 1e4*Vol0/Lf0;///< PCSA (cm2) is calculated as muscle volume divided between muscle branches and divided by fiber length
  Lt0 = max({MuscleParameters.TotalTendonLength, 0.001}); ///< Tendon slack length (Cannot be zero)
  Gamma0 = MuscleParameters.Pennationangle*(pi/180); ///< Pennation angle in radian
  Epsilon0 = MuscleParameters.Epsilon0; ///< Tendon strain at F0
  K1 = MuscleParameters.K1; ///< Factor for determining shortening speed at optimum length
  K2 = MuscleParameters.K2; ///< Factor for determining shortening speed at optimum length
  Fcfast = MuscleParameters.Fcfast; ///< Factor for determining shortening speed at optimum length
  Jt = .SubjectMusPar.Jt; ///< Shape parameter for the tendon stiffness
  Jpe = .SubjectMusPar.Jpe; ///< Shape parameter for the parallel stiffness
  PEFactor = .SubjectMusPar.PEFactor; ///< Parameter for influence of parallel stiffness
};

AnyMuscleModel3E GluteusMaximusSuperior2Par =
{
  AnyFolder& MuscleParameters = .SubjectMusPar.GluteusMaximusSuperior;
  AnyIntVar MuscleElemNo = 2; ///< The number of this element of the muscle
  AnyIntVar MuscleElemAmount = 6; ///< The total amount of elements for this muscle
  F0 = .SubjectMusPar.PCSAfactor*PCSA; ///< Maximum force output at optimum fiber length
  Lf0 = MuscleParameters.OptimalFiberlength; ///< Optimum fiber length
  Vol0 = 1e-6*MuscleParameters.MuscleVolume/MuscleElemAmount; /// Muscle volume in (m3)
  AnyVar PCSA = 1e4*Vol0/Lf0;///< PCSA (cm2) is calculated as muscle volume divided between muscle branches and divided by fiber length
  Lt0 = max({MuscleParameters.TotalTendonLength, 0.001}); ///< Tendon slack length (Cannot be zero)
  Gamma0 = MuscleParameters.Pennationangle*(pi/180); ///< Pennation angle in radian
  Epsilon0 = MuscleParameters.Epsilon0; ///< Tendon strain at F0
  K1 = MuscleParameters.K1; ///< Factor for determining shortening speed at optimum length
  K2 = MuscleParameters.K2; ///< Factor for determining shortening speed at optimum length
  Fcfast = MuscleParameters.Fcfast; ///< Factor for determining shortening speed at optimum length
  Jt = .SubjectMusPar.Jt; ///< Shape parameter for the tendon stiffness
  Jpe = .SubjectMusPar.Jpe; ///< Shape parameter for the parallel stiffness
  PEFactor = .SubjectMusPar.PEFactor; ///< Parameter for influence of parallel stiffness
};

AnyMuscleModel3E GluteusMaximusSuperior3Par =
{
  AnyFolder& MuscleParameters = .SubjectMusPar.GluteusMaximusSuperior;
  AnyIntVar MuscleElemNo = 3; ///< The number of this element of the muscle
  AnyIntVar MuscleElemAmount = 6; ///< The total amount of elements for this muscle
  F0 = .SubjectMusPar.PCSAfactor*PCSA; ///< Maximum force output at optimum fiber length
  Lf0 = MuscleParameters.OptimalFiberlength; ///< Optimum fiber length
  Vol0 = 1e-6*MuscleParameters.MuscleVolume/MuscleElemAmount; /// Muscle volume in (m3)
  AnyVar PCSA = 1e4*Vol0/Lf0;///< PCSA (cm2) is calculated as muscle volume divided between muscle branches and divided by fiber length
  Lt0 = max({MuscleParameters.TotalTendonLength, 0.001}); ///< Tendon slack length (Cannot be zero)
  Gamma0 = MuscleParameters.Pennationangle*(pi/180); ///< Pennation angle in radian
  Epsilon0 = MuscleParameters.Epsilon0; ///< Tendon strain at F0
  K1 = MuscleParameters.K1; ///< Factor for determining shortening speed at optimum length
  K2 = MuscleParameters.K2; ///< Factor for determining shortening speed at optimum length
  Fcfast = MuscleParameters.Fcfast; ///< Factor for determining shortening speed at optimum length
  Jt = .SubjectMusPar.Jt; ///< Shape parameter for the tendon stiffness
  Jpe = .SubjectMusPar.Jpe; ///< Shape parameter for the parallel stiffness
  PEFactor = .SubjectMusPar.PEFactor; ///< Parameter for influence of parallel stiffness
};

AnyMuscleModel3E GluteusMaximusSuperior4Par =
{
  AnyFolder& MuscleParameters = .SubjectMusPar.GluteusMaximusSuperior;
  AnyIntVar MuscleElemNo = 4; ///< The number of this element of the muscle
  AnyIntVar MuscleElemAmount = 6; ///< The total amount of elements for this muscle
  F0 = .SubjectMusPar.PCSAfactor*PCSA; ///< Maximum force output at optimum fiber length
  Lf0 = MuscleParameters.OptimalFiberlength; ///< Optimum fiber length
  Vol0 = 1e-6*MuscleParameters.MuscleVolume/MuscleElemAmount; /// Muscle volume in (m3)
  AnyVar PCSA = 1e4*Vol0/Lf0;///< PCSA (cm2) is calculated as muscle volume divided between muscle branches and divided by fiber length
  Lt0 = max({MuscleParameters.TotalTendonLength, 0.001}); ///< Tendon slack length (Cannot be zero)
  Gamma0 = MuscleParameters.Pennationangle*(pi/180); ///< Pennation angle in radian
  Epsilon0 = MuscleParameters.Epsilon0; ///< Tendon strain at F0
  K1 = MuscleParameters.K1; ///< Factor for determining shortening speed at optimum length
  K2 = MuscleParameters.K2; ///< Factor for determining shortening speed at optimum length
  Fcfast = MuscleParameters.Fcfast; ///< Factor for determining shortening speed at optimum length
  Jt = .SubjectMusPar.Jt; ///< Shape parameter for the tendon stiffness
  Jpe = .SubjectMusPar.Jpe; ///< Shape parameter for the parallel stiffness
  PEFactor = .SubjectMusPar.PEFactor; ///< Parameter for influence of parallel stiffness
};

AnyMuscleModel3E GluteusMaximusSuperior5Par =
{
  AnyFolder& MuscleParameters = .SubjectMusPar.GluteusMaximusSuperior;
  AnyIntVar MuscleElemNo = 5; ///< The number of this element of the muscle
  AnyIntVar MuscleElemAmount = 6; ///< The total amount of elements for this muscle
  F0 = .SubjectMusPar.PCSAfactor*PCSA; ///< Maximum force output at optimum fiber length
  Lf0 = MuscleParameters.OptimalFiberlength; ///< Optimum fiber length
  Vol0 = 1e-6*MuscleParameters.MuscleVolume/MuscleElemAmount; /// Muscle volume in (m3)
  AnyVar PCSA = 1e4*Vol0/Lf0;///< PCSA (cm2) is calculated as muscle volume divided between muscle branches and divided by fiber length
  Lt0 = max({MuscleParameters.TotalTendonLength, 0.001}); ///< Tendon slack length (Cannot be zero)
  Gamma0 = MuscleParameters.Pennationangle*(pi/180); ///< Pennation angle in radian
  Epsilon0 = MuscleParameters.Epsilon0; ///< Tendon strain at F0
  K1 = MuscleParameters.K1; ///< Factor for determining shortening speed at optimum length
  K2 = MuscleParameters.K2; ///< Factor for determining shortening speed at optimum length
  Fcfast = MuscleParameters.Fcfast; ///< Factor for determining shortening speed at optimum length
  Jt = .SubjectMusPar.Jt; ///< Shape parameter for the tendon stiffness
  Jpe = .SubjectMusPar.Jpe; ///< Shape parameter for the parallel stiffness
  PEFactor = .SubjectMusPar.PEFactor; ///< Parameter for influence of parallel stiffness
};

AnyMuscleModel3E GluteusMaximusSuperior6Par =
{
  AnyFolder& MuscleParameters = .SubjectMusPar.GluteusMaximusSuperior;
  AnyIntVar MuscleElemNo = 6; ///< The number of this element of the muscle
  AnyIntVar MuscleElemAmount = 6; ///< The total amount of elements for this muscle
  F0 = .SubjectMusPar.PCSAfactor*PCSA; ///< Maximum force output at optimum fiber length
  Lf0 = MuscleParameters.OptimalFiberlength; ///< Optimum fiber length
  Vol0 = 1e-6*MuscleParameters.MuscleVolume/MuscleElemAmount; /// Muscle volume in (m3)
  AnyVar PCSA = 1e4*Vol0/Lf0;///< PCSA (cm2) is calculated as muscle volume divided between muscle branches and divided by fiber length
  Lt0 = max({MuscleParameters.TotalTendonLength, 0.001}); ///< Tendon slack length (Cannot be zero)
  Gamma0 = MuscleParameters.Pennationangle*(pi/180); ///< Pennation angle in radian
  Epsilon0 = MuscleParameters.Epsilon0; ///< Tendon strain at F0
  K1 = MuscleParameters.K1; ///< Factor for determining shortening speed at optimum length
  K2 = MuscleParameters.K2; ///< Factor for determining shortening speed at optimum length
  Fcfast = MuscleParameters.Fcfast; ///< Factor for determining shortening speed at optimum length
  Jt = .SubjectMusPar.Jt; ///< Shape parameter for the tendon stiffness
  Jpe = .SubjectMusPar.Jpe; ///< Shape parameter for the parallel stiffness
  PEFactor = .SubjectMusPar.PEFactor; ///< Parameter for influence of parallel stiffness
};


/////////////////////////////////////////////////
//     GluteusMaximusInferior (6 elements)     //
/////////////////////////////////////////////////
AnyMuscleModel3E GluteusMaximusInferior1Par =
{
  AnyFolder& MuscleParameters = .SubjectMusPar.GluteusMaximusInferior;
  AnyIntVar MuscleElemNo = 1; ///< The number of this element of the muscle
  AnyIntVar MuscleElemAmount = 6; ///< The total amount of elements for this muscle
  F0 = .SubjectMusPar.PCSAfactor*PCSA; ///< Maximum force output at optimum fiber length
  Lf0 = MuscleParameters.OptimalFiberlength; ///< Optimum fiber length
  Vol0 = 1e-6*MuscleParameters.MuscleVolume/MuscleElemAmount; /// Muscle volume in (m3)
  AnyVar PCSA = 1e4*Vol0/Lf0;///< PCSA (cm2) is calculated as muscle volume divided between muscle branches and divided by fiber length
  Lt0 = max({MuscleParameters.TotalTendonLength, 0.001}); ///< Tendon slack length (Cannot be zero)
  Gamma0 = MuscleParameters.Pennationangle*(pi/180); ///< Pennation angle in radian
  Epsilon0 = MuscleParameters.Epsilon0; ///< Tendon strain at F0
  K1 = MuscleParameters.K1; ///< Factor for determining shortening speed at optimum length
  K2 = MuscleParameters.K2; ///< Factor for determining shortening speed at optimum length
  Fcfast = MuscleParameters.Fcfast; ///< Factor for determining shortening speed at optimum length
  Jt = .SubjectMusPar.Jt; ///< Shape parameter for the tendon stiffness
  Jpe = .SubjectMusPar.Jpe; ///< Shape parameter for the parallel stiffness
  PEFactor = .SubjectMusPar.PEFactor; ///< Parameter for influence of parallel stiffness
};

AnyMuscleModel3E GluteusMaximusInferior2Par =
{
  AnyFolder& MuscleParameters = .SubjectMusPar.GluteusMaximusInferior;
  AnyIntVar MuscleElemNo = 2; ///< The number of this element of the muscle
  AnyIntVar MuscleElemAmount = 6; ///< The total amount of elements for this muscle
  F0 = .SubjectMusPar.PCSAfactor*PCSA; ///< Maximum force output at optimum fiber length
  Lf0 = MuscleParameters.OptimalFiberlength; ///< Optimum fiber length
  Vol0 = 1e-6*MuscleParameters.MuscleVolume/MuscleElemAmount; /// Muscle volume in (m3)
  AnyVar PCSA = 1e4*Vol0/Lf0;///< PCSA (cm2) is calculated as muscle volume divided between muscle branches and divided by fiber length
  Lt0 = max({MuscleParameters.TotalTendonLength, 0.001}); ///< Tendon slack length (Cannot be zero)
  Gamma0 = MuscleParameters.Pennationangle*(pi/180); ///< Pennation angle in radian
  Epsilon0 = MuscleParameters.Epsilon0; ///< Tendon strain at F0
  K1 = MuscleParameters.K1; ///< Factor for determining shortening speed at optimum length
  K2 = MuscleParameters.K2; ///< Factor for determining shortening speed at optimum length
  Fcfast = MuscleParameters.Fcfast; ///< Factor for determining shortening speed at optimum length
  Jt = .SubjectMusPar.Jt; ///< Shape parameter for the tendon stiffness
  Jpe = .SubjectMusPar.Jpe; ///< Shape parameter for the parallel stiffness
  PEFactor = .SubjectMusPar.PEFactor; ///< Parameter for influence of parallel stiffness
};

AnyMuscleModel3E GluteusMaximusInferior3Par =
{
  AnyFolder& MuscleParameters = .SubjectMusPar.GluteusMaximusInferior;
  AnyIntVar MuscleElemNo = 3; ///< The number of this element of the muscle
  AnyIntVar MuscleElemAmount = 6; ///< The total amount of elements for this muscle
  F0 = .SubjectMusPar.PCSAfactor*PCSA; ///< Maximum force output at optimum fiber length
  Lf0 = MuscleParameters.OptimalFiberlength; ///< Optimum fiber length
  Vol0 = 1e-6*MuscleParameters.MuscleVolume/MuscleElemAmount; /// Muscle volume in (m3)
  AnyVar PCSA = 1e4*Vol0/Lf0;///< PCSA (cm2) is calculated as muscle volume divided between muscle branches and divided by fiber length
  Lt0 = max({MuscleParameters.TotalTendonLength, 0.001}); ///< Tendon slack length (Cannot be zero)
  Gamma0 = MuscleParameters.Pennationangle*(pi/180); ///< Pennation angle in radian
  Epsilon0 = MuscleParameters.Epsilon0; ///< Tendon strain at F0
  K1 = MuscleParameters.K1; ///< Factor for determining shortening speed at optimum length
  K2 = MuscleParameters.K2; ///< Factor for determining shortening speed at optimum length
  Fcfast = MuscleParameters.Fcfast; ///< Factor for determining shortening speed at optimum length
  Jt = .SubjectMusPar.Jt; ///< Shape parameter for the tendon stiffness
  Jpe = .SubjectMusPar.Jpe; ///< Shape parameter for the parallel stiffness
  PEFactor = .SubjectMusPar.PEFactor; ///< Parameter for influence of parallel stiffness
};

AnyMuscleModel3E GluteusMaximusInferior4Par =
{
  AnyFolder& MuscleParameters = .SubjectMusPar.GluteusMaximusInferior;
  AnyIntVar MuscleElemNo = 4; ///< The number of this element of the muscle
  AnyIntVar MuscleElemAmount = 6; ///< The total amount of elements for this muscle
  F0 = .SubjectMusPar.PCSAfactor*PCSA; ///< Maximum force output at optimum fiber length
  Lf0 = MuscleParameters.OptimalFiberlength; ///< Optimum fiber length
  Vol0 = 1e-6*MuscleParameters.MuscleVolume/MuscleElemAmount; /// Muscle volume in (m3)
  AnyVar PCSA = 1e4*Vol0/Lf0;///< PCSA (cm2) is calculated as muscle volume divided between muscle branches and divided by fiber length
  Lt0 = max({MuscleParameters.TotalTendonLength, 0.001}); ///< Tendon slack length (Cannot be zero)
  Gamma0 = MuscleParameters.Pennationangle*(pi/180); ///< Pennation angle in radian
  Epsilon0 = MuscleParameters.Epsilon0; ///< Tendon strain at F0
  K1 = MuscleParameters.K1; ///< Factor for determining shortening speed at optimum length
  K2 = MuscleParameters.K2; ///< Factor for determining shortening speed at optimum length
  Fcfast = MuscleParameters.Fcfast; ///< Factor for determining shortening speed at optimum length
  Jt = .SubjectMusPar.Jt; ///< Shape parameter for the tendon stiffness
  Jpe = .SubjectMusPar.Jpe; ///< Shape parameter for the parallel stiffness
  PEFactor = .SubjectMusPar.PEFactor; ///< Parameter for influence of parallel stiffness
};

AnyMuscleModel3E GluteusMaximusInferior5Par =
{
  AnyFolder& MuscleParameters = .SubjectMusPar.GluteusMaximusInferior;
  AnyIntVar MuscleElemNo = 5; ///< The number of this element of the muscle
  AnyIntVar MuscleElemAmount = 6; ///< The total amount of elements for this muscle
  F0 = .SubjectMusPar.PCSAfactor*PCSA; ///< Maximum force output at optimum fiber length
  Lf0 = MuscleParameters.OptimalFiberlength; ///< Optimum fiber length
  Vol0 = 1e-6*MuscleParameters.MuscleVolume/MuscleElemAmount; /// Muscle volume in (m3)
  AnyVar PCSA = 1e4*Vol0/Lf0;///< PCSA (cm2) is calculated as muscle volume divided between muscle branches and divided by fiber length
  Lt0 = max({MuscleParameters.TotalTendonLength, 0.001}); ///< Tendon slack length (Cannot be zero)
  Gamma0 = MuscleParameters.Pennationangle*(pi/180); ///< Pennation angle in radian
  Epsilon0 = MuscleParameters.Epsilon0; ///< Tendon strain at F0
  K1 = MuscleParameters.K1; ///< Factor for determining shortening speed at optimum length
  K2 = MuscleParameters.K2; ///< Factor for determining shortening speed at optimum length
  Fcfast = MuscleParameters.Fcfast; ///< Factor for determining shortening speed at optimum length
  Jt = .SubjectMusPar.Jt; ///< Shape parameter for the tendon stiffness
  Jpe = .SubjectMusPar.Jpe; ///< Shape parameter for the parallel stiffness
  PEFactor = .SubjectMusPar.PEFactor; ///< Parameter for influence of parallel stiffness
};

AnyMuscleModel3E GluteusMaximusInferior6Par =
{
  AnyFolder& MuscleParameters = .SubjectMusPar.GluteusMaximusInferior;
  AnyIntVar MuscleElemNo = 6; ///< The number of this element of the muscle
  AnyIntVar MuscleElemAmount = 6; ///< The total amount of elements for this muscle
  F0 = .SubjectMusPar.PCSAfactor*PCSA; ///< Maximum force output at optimum fiber length
  Lf0 = MuscleParameters.OptimalFiberlength; ///< Optimum fiber length
  Vol0 = 1e-6*MuscleParameters.MuscleVolume/MuscleElemAmount; /// Muscle volume in (m3)
  AnyVar PCSA = 1e4*Vol0/Lf0;///< PCSA (cm2) is calculated as muscle volume divided between muscle branches and divided by fiber length
  Lt0 = max({MuscleParameters.TotalTendonLength, 0.001}); ///< Tendon slack length (Cannot be zero)
  Gamma0 = MuscleParameters.Pennationangle*(pi/180); ///< Pennation angle in radian
  Epsilon0 = MuscleParameters.Epsilon0; ///< Tendon strain at F0
  K1 = MuscleParameters.K1; ///< Factor for determining shortening speed at optimum length
  K2 = MuscleParameters.K2; ///< Factor for determining shortening speed at optimum length
  Fcfast = MuscleParameters.Fcfast; ///< Factor for determining shortening speed at optimum length
  Jt = .SubjectMusPar.Jt; ///< Shape parameter for the tendon stiffness
  Jpe = .SubjectMusPar.Jpe; ///< Shape parameter for the parallel stiffness
  PEFactor = .SubjectMusPar.PEFactor; ///< Parameter for influence of parallel stiffness
};


////////////////////////////////////////////////
//     GluteusMediusAnterior (6 elements)     //
////////////////////////////////////////////////
AnyMuscleModel3E GluteusMediusAnterior1Par =
{
  AnyFolder& MuscleParameters = .SubjectMusPar.GluteusMediusAnterior;
  AnyIntVar MuscleElemNo = 1; ///< The number of this element of the muscle
  AnyIntVar MuscleElemAmount = 6; ///< The total amount of elements for this muscle
  F0 = .SubjectMusPar.PCSAfactor*PCSA; ///< Maximum force output at optimum fiber length
  Lf0 = MuscleParameters.OptimalFiberlength; ///< Optimum fiber length
  Vol0 = 1e-6*MuscleParameters.MuscleVolume/MuscleElemAmount; /// Muscle volume in (m3)
  AnyVar PCSA = 1e4*Vol0/Lf0;///< PCSA (cm2) is calculated as muscle volume divided between muscle branches and divided by fiber length
  Lt0 = max({MuscleParameters.TotalTendonLength, 0.001}); ///< Tendon slack length (Cannot be zero)
  Gamma0 = MuscleParameters.Pennationangle*(pi/180); ///< Pennation angle in radian
  Epsilon0 = MuscleParameters.Epsilon0; ///< Tendon strain at F0
  K1 = MuscleParameters.K1; ///< Factor for determining shortening speed at optimum length
  K2 = MuscleParameters.K2; ///< Factor for determining shortening speed at optimum length
  Fcfast = MuscleParameters.Fcfast; ///< Factor for determining shortening speed at optimum length
  Jt = .SubjectMusPar.Jt; ///< Shape parameter for the tendon stiffness
  Jpe = .SubjectMusPar.Jpe; ///< Shape parameter for the parallel stiffness
  PEFactor = .SubjectMusPar.PEFactor; ///< Parameter for influence of parallel stiffness
};

AnyMuscleModel3E GluteusMediusAnterior2Par =
{
  AnyFolder& MuscleParameters = .SubjectMusPar.GluteusMediusAnterior;
  AnyIntVar MuscleElemNo = 2; ///< The number of this element of the muscle
  AnyIntVar MuscleElemAmount = 6; ///< The total amount of elements for this muscle
  F0 = .SubjectMusPar.PCSAfactor*PCSA; ///< Maximum force output at optimum fiber length
  Lf0 = MuscleParameters.OptimalFiberlength; ///< Optimum fiber length
  Vol0 = 1e-6*MuscleParameters.MuscleVolume/MuscleElemAmount; /// Muscle volume in (m3)
  AnyVar PCSA = 1e4*Vol0/Lf0;///< PCSA (cm2) is calculated as muscle volume divided between muscle branches and divided by fiber length
  Lt0 = max({MuscleParameters.TotalTendonLength, 0.001}); ///< Tendon slack length (Cannot be zero)
  Gamma0 = MuscleParameters.Pennationangle*(pi/180); ///< Pennation angle in radian
  Epsilon0 = MuscleParameters.Epsilon0; ///< Tendon strain at F0
  K1 = MuscleParameters.K1; ///< Factor for determining shortening speed at optimum length
  K2 = MuscleParameters.K2; ///< Factor for determining shortening speed at optimum length
  Fcfast = MuscleParameters.Fcfast; ///< Factor for determining shortening speed at optimum length
  Jt = .SubjectMusPar.Jt; ///< Shape parameter for the tendon stiffness
  Jpe = .SubjectMusPar.Jpe; ///< Shape parameter for the parallel stiffness
  PEFactor = .SubjectMusPar.PEFactor; ///< Parameter for influence of parallel stiffness
};

AnyMuscleModel3E GluteusMediusAnterior3Par =
{
  AnyFolder& MuscleParameters = .SubjectMusPar.GluteusMediusAnterior;
  AnyIntVar MuscleElemNo = 3; ///< The number of this element of the muscle
  AnyIntVar MuscleElemAmount = 6; ///< The total amount of elements for this muscle
  F0 = .SubjectMusPar.PCSAfactor*PCSA; ///< Maximum force output at optimum fiber length
  Lf0 = MuscleParameters.OptimalFiberlength; ///< Optimum fiber length
  Vol0 = 1e-6*MuscleParameters.MuscleVolume/MuscleElemAmount; /// Muscle volume in (m3)
  AnyVar PCSA = 1e4*Vol0/Lf0;///< PCSA (cm2) is calculated as muscle volume divided between muscle branches and divided by fiber length
  Lt0 = max({MuscleParameters.TotalTendonLength, 0.001}); ///< Tendon slack length (Cannot be zero)
  Gamma0 = MuscleParameters.Pennationangle*(pi/180); ///< Pennation angle in radian
  Epsilon0 = MuscleParameters.Epsilon0; ///< Tendon strain at F0
  K1 = MuscleParameters.K1; ///< Factor for determining shortening speed at optimum length
  K2 = MuscleParameters.K2; ///< Factor for determining shortening speed at optimum length
  Fcfast = MuscleParameters.Fcfast; ///< Factor for determining shortening speed at optimum length
  Jt = .SubjectMusPar.Jt; ///< Shape parameter for the tendon stiffness
  Jpe = .SubjectMusPar.Jpe; ///< Shape parameter for the parallel stiffness
  PEFactor = .SubjectMusPar.PEFactor; ///< Parameter for influence of parallel stiffness
};

AnyMuscleModel3E GluteusMediusAnterior4Par =
{
  AnyFolder& MuscleParameters = .SubjectMusPar.GluteusMediusAnterior;
  AnyIntVar MuscleElemNo = 4; ///< The number of this element of the muscle
  AnyIntVar MuscleElemAmount = 6; ///< The total amount of elements for this muscle
  F0 = .SubjectMusPar.PCSAfactor*PCSA; ///< Maximum force output at optimum fiber length
  Lf0 = MuscleParameters.OptimalFiberlength; ///< Optimum fiber length
  Vol0 = 1e-6*MuscleParameters.MuscleVolume/MuscleElemAmount; /// Muscle volume in (m3)
  AnyVar PCSA = 1e4*Vol0/Lf0;///< PCSA (cm2) is calculated as muscle volume divided between muscle branches and divided by fiber length
  Lt0 = max({MuscleParameters.TotalTendonLength, 0.001}); ///< Tendon slack length (Cannot be zero)
  Gamma0 = MuscleParameters.Pennationangle*(pi/180); ///< Pennation angle in radian
  Epsilon0 = MuscleParameters.Epsilon0; ///< Tendon strain at F0
  K1 = MuscleParameters.K1; ///< Factor for determining shortening speed at optimum length
  K2 = MuscleParameters.K2; ///< Factor for determining shortening speed at optimum length
  Fcfast = MuscleParameters.Fcfast; ///< Factor for determining shortening speed at optimum length
  Jt = .SubjectMusPar.Jt; ///< Shape parameter for the tendon stiffness
  Jpe = .SubjectMusPar.Jpe; ///< Shape parameter for the parallel stiffness
  PEFactor = .SubjectMusPar.PEFactor; ///< Parameter for influence of parallel stiffness
};

AnyMuscleModel3E GluteusMediusAnterior5Par =
{
  AnyFolder& MuscleParameters = .SubjectMusPar.GluteusMediusAnterior;
  AnyIntVar MuscleElemNo = 5; ///< The number of this element of the muscle
  AnyIntVar MuscleElemAmount = 6; ///< The total amount of elements for this muscle
  F0 = .SubjectMusPar.PCSAfactor*PCSA; ///< Maximum force output at optimum fiber length
  Lf0 = MuscleParameters.OptimalFiberlength; ///< Optimum fiber length
  Vol0 = 1e-6*MuscleParameters.MuscleVolume/MuscleElemAmount; /// Muscle volume in (m3)
  AnyVar PCSA = 1e4*Vol0/Lf0;///< PCSA (cm2) is calculated as muscle volume divided between muscle branches and divided by fiber length
  Lt0 = max({MuscleParameters.TotalTendonLength, 0.001}); ///< Tendon slack length (Cannot be zero)
  Gamma0 = MuscleParameters.Pennationangle*(pi/180); ///< Pennation angle in radian
  Epsilon0 = MuscleParameters.Epsilon0; ///< Tendon strain at F0
  K1 = MuscleParameters.K1; ///< Factor for determining shortening speed at optimum length
  K2 = MuscleParameters.K2; ///< Factor for determining shortening speed at optimum length
  Fcfast = MuscleParameters.Fcfast; ///< Factor for determining shortening speed at optimum length
  Jt = .SubjectMusPar.Jt; ///< Shape parameter for the tendon stiffness
  Jpe = .SubjectMusPar.Jpe; ///< Shape parameter for the parallel stiffness
  PEFactor = .SubjectMusPar.PEFactor; ///< Parameter for influence of parallel stiffness
};

AnyMuscleModel3E GluteusMediusAnterior6Par =
{
  AnyFolder& MuscleParameters = .SubjectMusPar.GluteusMediusAnterior;
  AnyIntVar MuscleElemNo = 6; ///< The number of this element of the muscle
  AnyIntVar MuscleElemAmount = 6; ///< The total amount of elements for this muscle
  F0 = .SubjectMusPar.PCSAfactor*PCSA; ///< Maximum force output at optimum fiber length
  Lf0 = MuscleParameters.OptimalFiberlength; ///< Optimum fiber length
  Vol0 = 1e-6*MuscleParameters.MuscleVolume/MuscleElemAmount; /// Muscle volume in (m3)
  AnyVar PCSA = 1e4*Vol0/Lf0;///< PCSA (cm2) is calculated as muscle volume divided between muscle branches and divided by fiber length
  Lt0 = max({MuscleParameters.TotalTendonLength, 0.001}); ///< Tendon slack length (Cannot be zero)
  Gamma0 = MuscleParameters.Pennationangle*(pi/180); ///< Pennation angle in radian
  Epsilon0 = MuscleParameters.Epsilon0; ///< Tendon strain at F0
  K1 = MuscleParameters.K1; ///< Factor for determining shortening speed at optimum length
  K2 = MuscleParameters.K2; ///< Factor for determining shortening speed at optimum length
  Fcfast = MuscleParameters.Fcfast; ///< Factor for determining shortening speed at optimum length
  Jt = .SubjectMusPar.Jt; ///< Shape parameter for the tendon stiffness
  Jpe = .SubjectMusPar.Jpe; ///< Shape parameter for the parallel stiffness
  PEFactor = .SubjectMusPar.PEFactor; ///< Parameter for influence of parallel stiffness
};


/////////////////////////////////////////////////
//     GluteusMediusPosterior (6 elements)     //
/////////////////////////////////////////////////
AnyMuscleModel3E GluteusMediusPosterior1Par =
{
  AnyFolder& MuscleParameters = .SubjectMusPar.GluteusMediusPosterior;
  AnyIntVar MuscleElemNo = 1; ///< The number of this element of the muscle
  AnyIntVar MuscleElemAmount = 6; ///< The total amount of elements for this muscle
  F0 = .SubjectMusPar.PCSAfactor*PCSA; ///< Maximum force output at optimum fiber length
  Lf0 = MuscleParameters.OptimalFiberlength; ///< Optimum fiber length
  Vol0 = 1e-6*MuscleParameters.MuscleVolume/MuscleElemAmount; /// Muscle volume in (m3)
  AnyVar PCSA = 1e4*Vol0/Lf0;///< PCSA (cm2) is calculated as muscle volume divided between muscle branches and divided by fiber length
  Lt0 = max({MuscleParameters.TotalTendonLength, 0.001}); ///< Tendon slack length (Cannot be zero)
  Gamma0 = MuscleParameters.Pennationangle*(pi/180); ///< Pennation angle in radian
  Epsilon0 = MuscleParameters.Epsilon0; ///< Tendon strain at F0
  K1 = MuscleParameters.K1; ///< Factor for determining shortening speed at optimum length
  K2 = MuscleParameters.K2; ///< Factor for determining shortening speed at optimum length
  Fcfast = MuscleParameters.Fcfast; ///< Factor for determining shortening speed at optimum length
  Jt = .SubjectMusPar.Jt; ///< Shape parameter for the tendon stiffness
  Jpe = .SubjectMusPar.Jpe; ///< Shape parameter for the parallel stiffness
  PEFactor = .SubjectMusPar.PEFactor; ///< Parameter for influence of parallel stiffness
};

AnyMuscleModel3E GluteusMediusPosterior2Par =
{
  AnyFolder& MuscleParameters = .SubjectMusPar.GluteusMediusPosterior;
  AnyIntVar MuscleElemNo = 2; ///< The number of this element of the muscle
  AnyIntVar MuscleElemAmount = 6; ///< The total amount of elements for this muscle
  F0 = .SubjectMusPar.PCSAfactor*PCSA; ///< Maximum force output at optimum fiber length
  Lf0 = MuscleParameters.OptimalFiberlength; ///< Optimum fiber length
  Vol0 = 1e-6*MuscleParameters.MuscleVolume/MuscleElemAmount; /// Muscle volume in (m3)
  AnyVar PCSA = 1e4*Vol0/Lf0;///< PCSA (cm2) is calculated as muscle volume divided between muscle branches and divided by fiber length
  Lt0 = max({MuscleParameters.TotalTendonLength, 0.001}); ///< Tendon slack length (Cannot be zero)
  Gamma0 = MuscleParameters.Pennationangle*(pi/180); ///< Pennation angle in radian
  Epsilon0 = MuscleParameters.Epsilon0; ///< Tendon strain at F0
  K1 = MuscleParameters.K1; ///< Factor for determining shortening speed at optimum length
  K2 = MuscleParameters.K2; ///< Factor for determining shortening speed at optimum length
  Fcfast = MuscleParameters.Fcfast; ///< Factor for determining shortening speed at optimum length
  Jt = .SubjectMusPar.Jt; ///< Shape parameter for the tendon stiffness
  Jpe = .SubjectMusPar.Jpe; ///< Shape parameter for the parallel stiffness
  PEFactor = .SubjectMusPar.PEFactor; ///< Parameter for influence of parallel stiffness
};

AnyMuscleModel3E GluteusMediusPosterior3Par =
{
  AnyFolder& MuscleParameters = .SubjectMusPar.GluteusMediusPosterior;
  AnyIntVar MuscleElemNo = 3; ///< The number of this element of the muscle
  AnyIntVar MuscleElemAmount = 6; ///< The total amount of elements for this muscle
  F0 = .SubjectMusPar.PCSAfactor*PCSA; ///< Maximum force output at optimum fiber length
  Lf0 = MuscleParameters.OptimalFiberlength; ///< Optimum fiber length
  Vol0 = 1e-6*MuscleParameters.MuscleVolume/MuscleElemAmount; /// Muscle volume in (m3)
  AnyVar PCSA = 1e4*Vol0/Lf0;///< PCSA (cm2) is calculated as muscle volume divided between muscle branches and divided by fiber length
  Lt0 = max({MuscleParameters.TotalTendonLength, 0.001}); ///< Tendon slack length (Cannot be zero)
  Gamma0 = MuscleParameters.Pennationangle*(pi/180); ///< Pennation angle in radian
  Epsilon0 = MuscleParameters.Epsilon0; ///< Tendon strain at F0
  K1 = MuscleParameters.K1; ///< Factor for determining shortening speed at optimum length
  K2 = MuscleParameters.K2; ///< Factor for determining shortening speed at optimum length
  Fcfast = MuscleParameters.Fcfast; ///< Factor for determining shortening speed at optimum length
  Jt = .SubjectMusPar.Jt; ///< Shape parameter for the tendon stiffness
  Jpe = .SubjectMusPar.Jpe; ///< Shape parameter for the parallel stiffness
  PEFactor = .SubjectMusPar.PEFactor; ///< Parameter for influence of parallel stiffness
};

AnyMuscleModel3E GluteusMediusPosterior4Par =
{
  AnyFolder& MuscleParameters = .SubjectMusPar.GluteusMediusPosterior;
  AnyIntVar MuscleElemNo = 4; ///< The number of this element of the muscle
  AnyIntVar MuscleElemAmount = 6; ///< The total amount of elements for this muscle
  F0 = .SubjectMusPar.PCSAfactor*PCSA; ///< Maximum force output at optimum fiber length
  Lf0 = MuscleParameters.OptimalFiberlength; ///< Optimum fiber length
  Vol0 = 1e-6*MuscleParameters.MuscleVolume/MuscleElemAmount; /// Muscle volume in (m3)
  AnyVar PCSA = 1e4*Vol0/Lf0;///< PCSA (cm2) is calculated as muscle volume divided between muscle branches and divided by fiber length
  Lt0 = max({MuscleParameters.TotalTendonLength, 0.001}); ///< Tendon slack length (Cannot be zero)
  Gamma0 = MuscleParameters.Pennationangle*(pi/180); ///< Pennation angle in radian
  Epsilon0 = MuscleParameters.Epsilon0; ///< Tendon strain at F0
  K1 = MuscleParameters.K1; ///< Factor for determining shortening speed at optimum length
  K2 = MuscleParameters.K2; ///< Factor for determining shortening speed at optimum length
  Fcfast = MuscleParameters.Fcfast; ///< Factor for determining shortening speed at optimum length
  Jt = .SubjectMusPar.Jt; ///< Shape parameter for the tendon stiffness
  Jpe = .SubjectMusPar.Jpe; ///< Shape parameter for the parallel stiffness
  PEFactor = .SubjectMusPar.PEFactor; ///< Parameter for influence of parallel stiffness
};
AnyMuscleModel3E GluteusMediusPosterior5Par =
{
  AnyFolder& MuscleParameters = .SubjectMusPar.GluteusMediusPosterior;
  AnyIntVar MuscleElemNo = 5; ///< The number of this element of the muscle
  AnyIntVar MuscleElemAmount = 6; ///< The total amount of elements for this muscle
  F0 = .SubjectMusPar.PCSAfactor*PCSA; ///< Maximum force output at optimum fiber length
  Lf0 = MuscleParameters.OptimalFiberlength; ///< Optimum fiber length
  Vol0 = 1e-6*MuscleParameters.MuscleVolume/MuscleElemAmount; /// Muscle volume in (m3)
  AnyVar PCSA = 1e4*Vol0/Lf0;///< PCSA (cm2) is calculated as muscle volume divided between muscle branches and divided by fiber length
  Lt0 = max({MuscleParameters.TotalTendonLength, 0.001}); ///< Tendon slack length (Cannot be zero)
  Gamma0 = MuscleParameters.Pennationangle*(pi/180); ///< Pennation angle in radian
  Epsilon0 = MuscleParameters.Epsilon0; ///< Tendon strain at F0
  K1 = MuscleParameters.K1; ///< Factor for determining shortening speed at optimum length
  K2 = MuscleParameters.K2; ///< Factor for determining shortening speed at optimum length
  Fcfast = MuscleParameters.Fcfast; ///< Factor for determining shortening speed at optimum length
  Jt = .SubjectMusPar.Jt; ///< Shape parameter for the tendon stiffness
  Jpe = .SubjectMusPar.Jpe; ///< Shape parameter for the parallel stiffness
  PEFactor = .SubjectMusPar.PEFactor; ///< Parameter for influence of parallel stiffness
};

AnyMuscleModel3E GluteusMediusPosterior6Par =
{
  AnyFolder& MuscleParameters = .SubjectMusPar.GluteusMediusPosterior;
  AnyIntVar MuscleElemNo = 6; ///< The number of this element of the muscle
  AnyIntVar MuscleElemAmount = 6; ///< The total amount of elements for this muscle
  F0 = .SubjectMusPar.PCSAfactor*PCSA; ///< Maximum force output at optimum fiber length
  Lf0 = MuscleParameters.OptimalFiberlength; ///< Optimum fiber length
  Vol0 = 1e-6*MuscleParameters.MuscleVolume/MuscleElemAmount; /// Muscle volume in (m3)
  AnyVar PCSA = 1e4*Vol0/Lf0;///< PCSA (cm2) is calculated as muscle volume divided between muscle branches and divided by fiber length
  Lt0 = max({MuscleParameters.TotalTendonLength, 0.001}); ///< Tendon slack length (Cannot be zero)
  Gamma0 = MuscleParameters.Pennationangle*(pi/180); ///< Pennation angle in radian
  Epsilon0 = MuscleParameters.Epsilon0; ///< Tendon strain at F0
  K1 = MuscleParameters.K1; ///< Factor for determining shortening speed at optimum length
  K2 = MuscleParameters.K2; ///< Factor for determining shortening speed at optimum length
  Fcfast = MuscleParameters.Fcfast; ///< Factor for determining shortening speed at optimum length
  Jt = .SubjectMusPar.Jt; ///< Shape parameter for the tendon stiffness
  Jpe = .SubjectMusPar.Jpe; ///< Shape parameter for the parallel stiffness
  PEFactor = .SubjectMusPar.PEFactor; ///< Parameter for influence of parallel stiffness
};


/////////////////////////////////////////////////
//     GluteusMinimusAnterior (1 element )     //
/////////////////////////////////////////////////
AnyMuscleModel3E GluteusMinimusAnterior1Par =
{
  AnyFolder& MuscleParameters = .SubjectMusPar.GluteusMinimusAnterior;
  AnyIntVar MuscleElemNo = 1; ///< The number of this element of the muscle
  AnyIntVar MuscleElemAmount = 1; ///< The total amount of elements for this muscle
  F0 = .SubjectMusPar.PCSAfactor*PCSA; ///< Maximum force output at optimum fiber length
  Lf0 = MuscleParameters.OptimalFiberlength; ///< Optimum fiber length
  Vol0 = 1e-6*MuscleParameters.MuscleVolume/MuscleElemAmount; /// Muscle volume in (m3)
  AnyVar PCSA = 1e4*Vol0/Lf0;///< PCSA (cm2) is calculated as muscle volume divided between muscle branches and divided by fiber length
  Lt0 = max({MuscleParameters.TotalTendonLength, 0.001}); ///< Tendon slack length (Cannot be zero)
  Gamma0 = MuscleParameters.Pennationangle*(pi/180); ///< Pennation angle in radian
  Epsilon0 = MuscleParameters.Epsilon0; ///< Tendon strain at F0
  K1 = MuscleParameters.K1; ///< Factor for determining shortening speed at optimum length
  K2 = MuscleParameters.K2; ///< Factor for determining shortening speed at optimum length
  Fcfast = MuscleParameters.Fcfast; ///< Factor for determining shortening speed at optimum length
  Jt = .SubjectMusPar.Jt; ///< Shape parameter for the tendon stiffness
  Jpe = .SubjectMusPar.Jpe; ///< Shape parameter for the parallel stiffness
  PEFactor = .SubjectMusPar.PEFactor; ///< Parameter for influence of parallel stiffness
};


////////////////////////////////////////////
//     GluteusMinimusMid (1 element )     //
////////////////////////////////////////////
AnyMuscleModel3E GluteusMinimusMid1Par =
{
  AnyFolder& MuscleParameters = .SubjectMusPar.GluteusMinimusMid;
  AnyIntVar MuscleElemNo = 1; ///< The number of this element of the muscle
  AnyIntVar MuscleElemAmount = 1; ///< The total amount of elements for this muscle
  F0 = .SubjectMusPar.PCSAfactor*PCSA; ///< Maximum force output at optimum fiber length
  Lf0 = MuscleParameters.OptimalFiberlength; ///< Optimum fiber length
  Vol0 = 1e-6*MuscleParameters.MuscleVolume/MuscleElemAmount; /// Muscle volume in (m3)
  AnyVar PCSA = 1e4*Vol0/Lf0;///< PCSA (cm2) is calculated as muscle volume divided between muscle branches and divided by fiber length
  Lt0 = max({MuscleParameters.TotalTendonLength, 0.001}); ///< Tendon slack length (Cannot be zero)
  Gamma0 = MuscleParameters.Pennationangle*(pi/180); ///< Pennation angle in radian
  Epsilon0 = MuscleParameters.Epsilon0; ///< Tendon strain at F0
  K1 = MuscleParameters.K1; ///< Factor for determining shortening speed at optimum length
  K2 = MuscleParameters.K2; ///< Factor for determining shortening speed at optimum length
  Fcfast = MuscleParameters.Fcfast; ///< Factor for determining shortening speed at optimum length
  Jt = .SubjectMusPar.Jt; ///< Shape parameter for the tendon stiffness
  Jpe = .SubjectMusPar.Jpe; ///< Shape parameter for the parallel stiffness
  PEFactor = .SubjectMusPar.PEFactor; ///< Parameter for influence of parallel stiffness
};


//////////////////////////////////////////////////
//     GluteusMinimusPosterior (1 element )     //
//////////////////////////////////////////////////
AnyMuscleModel3E GluteusMinimusPosterior1Par =
{
  AnyFolder& MuscleParameters = .SubjectMusPar.GluteusMinimusPosterior;
  AnyIntVar MuscleElemNo = 1; ///< The number of this element of the muscle
  AnyIntVar MuscleElemAmount = 1; ///< The total amount of elements for this muscle
  F0 = .SubjectMusPar.PCSAfactor*PCSA; ///< Maximum force output at optimum fiber length
  Lf0 = MuscleParameters.OptimalFiberlength; ///< Optimum fiber length
  Vol0 = 1e-6*MuscleParameters.MuscleVolume/MuscleElemAmount; /// Muscle volume in (m3)
  AnyVar PCSA = 1e4*Vol0/Lf0;///< PCSA (cm2) is calculated as muscle volume divided between muscle branches and divided by fiber length
  Lt0 = max({MuscleParameters.TotalTendonLength, 0.001}); ///< Tendon slack length (Cannot be zero)
  Gamma0 = MuscleParameters.Pennationangle*(pi/180); ///< Pennation angle in radian
  Epsilon0 = MuscleParameters.Epsilon0; ///< Tendon strain at F0
  K1 = MuscleParameters.K1; ///< Factor for determining shortening speed at optimum length
  K2 = MuscleParameters.K2; ///< Factor for determining shortening speed at optimum length
  Fcfast = MuscleParameters.Fcfast; ///< Factor for determining shortening speed at optimum length
  Jt = .SubjectMusPar.Jt; ///< Shape parameter for the tendon stiffness
  Jpe = .SubjectMusPar.Jpe; ///< Shape parameter for the parallel stiffness
  PEFactor = .SubjectMusPar.PEFactor; ///< Parameter for influence of parallel stiffness
};


///////////////////////////////////
//     Gracilis (2 elements)     //
///////////////////////////////////
AnyMuscleModel3E Gracilis1Par =
{
  AnyFolder& MuscleParameters = .SubjectMusPar.Gracilis;
  AnyIntVar MuscleElemNo = 1; ///< The number of this element of the muscle
  AnyIntVar MuscleElemAmount = 2; ///< The total amount of elements for this muscle
  F0 = .SubjectMusPar.PCSAfactor*PCSA; ///< Maximum force output at optimum fiber length
  Lf0 = MuscleParameters.OptimalFiberlength; ///< Optimum fiber length
  Vol0 = 1e-6*MuscleParameters.MuscleVolume/MuscleElemAmount; /// Muscle volume in (m3)
  AnyVar PCSA = 1e4*Vol0/Lf0;///< PCSA (cm2) is calculated as muscle volume divided between muscle branches and divided by fiber length
  Lt0 = max({MuscleParameters.TotalTendonLength, 0.001}); ///< Tendon slack length (Cannot be zero)
  Gamma0 = MuscleParameters.Pennationangle*(pi/180); ///< Pennation angle in radian
  Epsilon0 = MuscleParameters.Epsilon0; ///< Tendon strain at F0
  K1 = MuscleParameters.K1; ///< Factor for determining shortening speed at optimum length
  K2 = MuscleParameters.K2; ///< Factor for determining shortening speed at optimum length
  Fcfast = MuscleParameters.Fcfast; ///< Factor for determining shortening speed at optimum length
  Jt = .SubjectMusPar.Jt; ///< Shape parameter for the tendon stiffness
  Jpe = .SubjectMusPar.Jpe; ///< Shape parameter for the parallel stiffness
  PEFactor = .SubjectMusPar.PEFactor; ///< Parameter for influence of parallel stiffness
};

AnyMuscleModel3E Gracilis2Par =
{
  AnyFolder& MuscleParameters = .SubjectMusPar.Gracilis;
  AnyIntVar MuscleElemNo = 2; ///< The number of this element of the muscle
  AnyIntVar MuscleElemAmount = 2; ///< The total amount of elements for this muscle
  F0 = .SubjectMusPar.PCSAfactor*PCSA; ///< Maximum force output at optimum fiber length
  Lf0 = MuscleParameters.OptimalFiberlength; ///< Optimum fiber length
  Vol0 = 1e-6*MuscleParameters.MuscleVolume/MuscleElemAmount; /// Muscle volume in (m3)
  AnyVar PCSA = 1e4*Vol0/Lf0;///< PCSA (cm2) is calculated as muscle volume divided between muscle branches and divided by fiber length
  Lt0 = max({MuscleParameters.TotalTendonLength, 0.001}); ///< Tendon slack length (Cannot be zero)
  Gamma0 = MuscleParameters.Pennationangle*(pi/180); ///< Pennation angle in radian
  Epsilon0 = MuscleParameters.Epsilon0; ///< Tendon strain at F0
  K1 = MuscleParameters.K1; ///< Factor for determining shortening speed at optimum length
  K2 = MuscleParameters.K2; ///< Factor for determining shortening speed at optimum length
  Fcfast = MuscleParameters.Fcfast; ///< Factor for determining shortening speed at optimum length
  Jt = .SubjectMusPar.Jt; ///< Shape parameter for the tendon stiffness
  Jpe = .SubjectMusPar.Jpe; ///< Shape parameter for the parallel stiffness
  PEFactor = .SubjectMusPar.PEFactor; ///< Parameter for influence of parallel stiffness
};


///////////////////////////////////////////
//     IliacusLateralis (3 elements)     //
///////////////////////////////////////////
AnyMuscleModel3E IliacusLateralis1Par =
{
  AnyFolder& MuscleParameters = .SubjectMusPar.IliacusLateralis;
  AnyIntVar MuscleElemNo = 1; ///< The number of this element of the muscle
  AnyIntVar MuscleElemAmount = 3; ///< The total amount of elements for this muscle
  F0 = .SubjectMusPar.PCSAfactor*PCSA; ///< Maximum force output at optimum fiber length
  Lf0 = MuscleParameters.OptimalFiberlength; ///< Optimum fiber length
  Vol0 = 1e-6*MuscleParameters.MuscleVolume/MuscleElemAmount; /// Muscle volume in (m3)
  AnyVar PCSA = 1e4*Vol0/Lf0;///< PCSA (cm2) is calculated as muscle volume divided between muscle branches and divided by fiber length
  Lt0 = max({MuscleParameters.TotalTendonLength, 0.001}); ///< Tendon slack length (Cannot be zero)
  Gamma0 = MuscleParameters.Pennationangle*(pi/180); ///< Pennation angle in radian
  Epsilon0 = MuscleParameters.Epsilon0; ///< Tendon strain at F0
  K1 = MuscleParameters.K1; ///< Factor for determining shortening speed at optimum length
  K2 = MuscleParameters.K2; ///< Factor for determining shortening speed at optimum length
  Fcfast = MuscleParameters.Fcfast; ///< Factor for determining shortening speed at optimum length
  Jt = .SubjectMusPar.Jt; ///< Shape parameter for the tendon stiffness
  Jpe = .SubjectMusPar.Jpe; ///< Shape parameter for the parallel stiffness
  PEFactor = .SubjectMusPar.PEFactor; ///< Parameter for influence of parallel stiffness
};

AnyMuscleModel3E IliacusLateralis2Par =
{
  AnyFolder& MuscleParameters = .SubjectMusPar.IliacusLateralis;
  AnyIntVar MuscleElemNo = 2; ///< The number of this element of the muscle
  AnyIntVar MuscleElemAmount = 3; ///< The total amount of elements for this muscle
  F0 = .SubjectMusPar.PCSAfactor*PCSA; ///< Maximum force output at optimum fiber length
  Lf0 = MuscleParameters.OptimalFiberlength; ///< Optimum fiber length
  Vol0 = 1e-6*MuscleParameters.MuscleVolume/MuscleElemAmount; /// Muscle volume in (m3)
  AnyVar PCSA = 1e4*Vol0/Lf0;///< PCSA (cm2) is calculated as muscle volume divided between muscle branches and divided by fiber length
  Lt0 = max({MuscleParameters.TotalTendonLength, 0.001}); ///< Tendon slack length (Cannot be zero)
  Gamma0 = MuscleParameters.Pennationangle*(pi/180); ///< Pennation angle in radian
  Epsilon0 = MuscleParameters.Epsilon0; ///< Tendon strain at F0
  K1 = MuscleParameters.K1; ///< Factor for determining shortening speed at optimum length
  K2 = MuscleParameters.K2; ///< Factor for determining shortening speed at optimum length
  Fcfast = MuscleParameters.Fcfast; ///< Factor for determining shortening speed at optimum length
  Jt = .SubjectMusPar.Jt; ///< Shape parameter for the tendon stiffness
  Jpe = .SubjectMusPar.Jpe; ///< Shape parameter for the parallel stiffness
  PEFactor = .SubjectMusPar.PEFactor; ///< Parameter for influence of parallel stiffness
};

AnyMuscleModel3E IliacusLateralis3Par =
{
  AnyFolder& MuscleParameters = .SubjectMusPar.IliacusLateralis;
  AnyIntVar MuscleElemNo = 3; ///< The number of this element of the muscle
  AnyIntVar MuscleElemAmount = 3; ///< The total amount of elements for this muscle
  F0 = .SubjectMusPar.PCSAfactor*PCSA; ///< Maximum force output at optimum fiber length
  Lf0 = MuscleParameters.OptimalFiberlength; ///< Optimum fiber length
  Vol0 = 1e-6*MuscleParameters.MuscleVolume/MuscleElemAmount; /// Muscle volume in (m3)
  AnyVar PCSA = 1e4*Vol0/Lf0;///< PCSA (cm2) is calculated as muscle volume divided between muscle branches and divided by fiber length
  Lt0 = max({MuscleParameters.TotalTendonLength, 0.001}); ///< Tendon slack length (Cannot be zero)
  Gamma0 = MuscleParameters.Pennationangle*(pi/180); ///< Pennation angle in radian
  Epsilon0 = MuscleParameters.Epsilon0; ///< Tendon strain at F0
  K1 = MuscleParameters.K1; ///< Factor for determining shortening speed at optimum length
  K2 = MuscleParameters.K2; ///< Factor for determining shortening speed at optimum length
  Fcfast = MuscleParameters.Fcfast; ///< Factor for determining shortening speed at optimum length
  Jt = .SubjectMusPar.Jt; ///< Shape parameter for the tendon stiffness
  Jpe = .SubjectMusPar.Jpe; ///< Shape parameter for the parallel stiffness
  PEFactor = .SubjectMusPar.PEFactor; ///< Parameter for influence of parallel stiffness
};


/////////////////////////////////////
//     IliacusMid (3 elements)     //
/////////////////////////////////////
AnyMuscleModel3E IliacusMid1Par =
{
  AnyFolder& MuscleParameters = .SubjectMusPar.IliacusMid;
  AnyIntVar MuscleElemNo = 1; ///< The number of this element of the muscle
  AnyIntVar MuscleElemAmount = 3; ///< The total amount of elements for this muscle
  F0 = .SubjectMusPar.PCSAfactor*PCSA; ///< Maximum force output at optimum fiber length
  Lf0 = MuscleParameters.OptimalFiberlength; ///< Optimum fiber length
  Vol0 = 1e-6*MuscleParameters.MuscleVolume/MuscleElemAmount; /// Muscle volume in (m3)
  AnyVar PCSA = 1e4*Vol0/Lf0;///< PCSA (cm2) is calculated as muscle volume divided between muscle branches and divided by fiber length
  Lt0 = max({MuscleParameters.TotalTendonLength, 0.001}); ///< Tendon slack length (Cannot be zero)
  Gamma0 = MuscleParameters.Pennationangle*(pi/180); ///< Pennation angle in radian
  Epsilon0 = MuscleParameters.Epsilon0; ///< Tendon strain at F0
  K1 = MuscleParameters.K1; ///< Factor for determining shortening speed at optimum length
  K2 = MuscleParameters.K2; ///< Factor for determining shortening speed at optimum length
  Fcfast = MuscleParameters.Fcfast; ///< Factor for determining shortening speed at optimum length
  Jt = .SubjectMusPar.Jt; ///< Shape parameter for the tendon stiffness
  Jpe = .SubjectMusPar.Jpe; ///< Shape parameter for the parallel stiffness
  PEFactor = .SubjectMusPar.PEFactor; ///< Parameter for influence of parallel stiffness
};

AnyMuscleModel3E IliacusMid2Par =
{
  AnyFolder& MuscleParameters = .SubjectMusPar.IliacusMid;
  AnyIntVar MuscleElemNo = 2; ///< The number of this element of the muscle
  AnyIntVar MuscleElemAmount = 3; ///< The total amount of elements for this muscle
  F0 = .SubjectMusPar.PCSAfactor*PCSA; ///< Maximum force output at optimum fiber length
  Lf0 = MuscleParameters.OptimalFiberlength; ///< Optimum fiber length
  Vol0 = 1e-6*MuscleParameters.MuscleVolume/MuscleElemAmount; /// Muscle volume in (m3)
  AnyVar PCSA = 1e4*Vol0/Lf0;///< PCSA (cm2) is calculated as muscle volume divided between muscle branches and divided by fiber length
  Lt0 = max({MuscleParameters.TotalTendonLength, 0.001}); ///< Tendon slack length (Cannot be zero)
  Gamma0 = MuscleParameters.Pennationangle*(pi/180); ///< Pennation angle in radian
  Epsilon0 = MuscleParameters.Epsilon0; ///< Tendon strain at F0
  K1 = MuscleParameters.K1; ///< Factor for determining shortening speed at optimum length
  K2 = MuscleParameters.K2; ///< Factor for determining shortening speed at optimum length
  Fcfast = MuscleParameters.Fcfast; ///< Factor for determining shortening speed at optimum length
  Jt = .SubjectMusPar.Jt; ///< Shape parameter for the tendon stiffness
  Jpe = .SubjectMusPar.Jpe; ///< Shape parameter for the parallel stiffness
  PEFactor = .SubjectMusPar.PEFactor; ///< Parameter for influence of parallel stiffness
};

AnyMuscleModel3E IliacusMid3Par =
{
  AnyFolder& MuscleParameters = .SubjectMusPar.IliacusMid;
  AnyIntVar MuscleElemNo = 3; ///< The number of this element of the muscle
  AnyIntVar MuscleElemAmount = 3; ///< The total amount of elements for this muscle
  F0 = .SubjectMusPar.PCSAfactor*PCSA; ///< Maximum force output at optimum fiber length
  Lf0 = MuscleParameters.OptimalFiberlength; ///< Optimum fiber length
  Vol0 = 1e-6*MuscleParameters.MuscleVolume/MuscleElemAmount; /// Muscle volume in (m3)
  AnyVar PCSA = 1e4*Vol0/Lf0;///< PCSA (cm2) is calculated as muscle volume divided between muscle branches and divided by fiber length
  Lt0 = max({MuscleParameters.TotalTendonLength, 0.001}); ///< Tendon slack length (Cannot be zero)
  Gamma0 = MuscleParameters.Pennationangle*(pi/180); ///< Pennation angle in radian
  Epsilon0 = MuscleParameters.Epsilon0; ///< Tendon strain at F0
  K1 = MuscleParameters.K1; ///< Factor for determining shortening speed at optimum length
  K2 = MuscleParameters.K2; ///< Factor for determining shortening speed at optimum length
  Fcfast = MuscleParameters.Fcfast; ///< Factor for determining shortening speed at optimum length
  Jt = .SubjectMusPar.Jt; ///< Shape parameter for the tendon stiffness
  Jpe = .SubjectMusPar.Jpe; ///< Shape parameter for the parallel stiffness
  PEFactor = .SubjectMusPar.PEFactor; ///< Parameter for influence of parallel stiffness
};


//////////////////////////////////////////
//     IliacusMedialis (3 elements)     //
//////////////////////////////////////////
AnyMuscleModel3E IliacusMedialis1Par =
{
  AnyFolder& MuscleParameters = .SubjectMusPar.IliacusMedialis;
  AnyIntVar MuscleElemNo = 1; ///< The number of this element of the muscle
  AnyIntVar MuscleElemAmount = 3; ///< The total amount of elements for this muscle
  F0 = .SubjectMusPar.PCSAfactor*PCSA; ///< Maximum force output at optimum fiber length
  Lf0 = MuscleParameters.OptimalFiberlength; ///< Optimum fiber length
  Vol0 = 1e-6*MuscleParameters.MuscleVolume/MuscleElemAmount; /// Muscle volume in (m3)
  AnyVar PCSA = 1e4*Vol0/Lf0;///< PCSA (cm2) is calculated as muscle volume divided between muscle branches and divided by fiber length
  Lt0 = max({MuscleParameters.TotalTendonLength, 0.001}); ///< Tendon slack length (Cannot be zero)
  Gamma0 = MuscleParameters.Pennationangle*(pi/180); ///< Pennation angle in radian
  Epsilon0 = MuscleParameters.Epsilon0; ///< Tendon strain at F0
  K1 = MuscleParameters.K1; ///< Factor for determining shortening speed at optimum length
  K2 = MuscleParameters.K2; ///< Factor for determining shortening speed at optimum length
  Fcfast = MuscleParameters.Fcfast; ///< Factor for determining shortening speed at optimum length
  Jt = .SubjectMusPar.Jt; ///< Shape parameter for the tendon stiffness
  Jpe = .SubjectMusPar.Jpe; ///< Shape parameter for the parallel stiffness
  PEFactor = .SubjectMusPar.PEFactor; ///< Parameter for influence of parallel stiffness
};

AnyMuscleModel3E IliacusMedialis2Par =
{
  AnyFolder& MuscleParameters = .SubjectMusPar.IliacusMedialis;
  AnyIntVar MuscleElemNo = 2; ///< The number of this element of the muscle
  AnyIntVar MuscleElemAmount = 3; ///< The total amount of elements for this muscle
  F0 = .SubjectMusPar.PCSAfactor*PCSA; ///< Maximum force output at optimum fiber length
  Lf0 = MuscleParameters.OptimalFiberlength; ///< Optimum fiber length
  Vol0 = 1e-6*MuscleParameters.MuscleVolume/MuscleElemAmount; /// Muscle volume in (m3)
  AnyVar PCSA = 1e4*Vol0/Lf0;///< PCSA (cm2) is calculated as muscle volume divided between muscle branches and divided by fiber length
  Lt0 = max({MuscleParameters.TotalTendonLength, 0.001}); ///< Tendon slack length (Cannot be zero)
  Gamma0 = MuscleParameters.Pennationangle*(pi/180); ///< Pennation angle in radian
  Epsilon0 = MuscleParameters.Epsilon0; ///< Tendon strain at F0
  K1 = MuscleParameters.K1; ///< Factor for determining shortening speed at optimum length
  K2 = MuscleParameters.K2; ///< Factor for determining shortening speed at optimum length
  Fcfast = MuscleParameters.Fcfast; ///< Factor for determining shortening speed at optimum length
  Jt = .SubjectMusPar.Jt; ///< Shape parameter for the tendon stiffness
  Jpe = .SubjectMusPar.Jpe; ///< Shape parameter for the parallel stiffness
  PEFactor = .SubjectMusPar.PEFactor; ///< Parameter for influence of parallel stiffness
};

AnyMuscleModel3E IliacusMedialis3Par =
{
  AnyFolder& MuscleParameters = .SubjectMusPar.IliacusMedialis;
  AnyIntVar MuscleElemNo = 3; ///< The number of this element of the muscle
  AnyIntVar MuscleElemAmount = 3; ///< The total amount of elements for this muscle
  F0 = .SubjectMusPar.PCSAfactor*PCSA; ///< Maximum force output at optimum fiber length
  Lf0 = MuscleParameters.OptimalFiberlength; ///< Optimum fiber length
  Vol0 = 1e-6*MuscleParameters.MuscleVolume/MuscleElemAmount; /// Muscle volume in (m3)
  AnyVar PCSA = 1e4*Vol0/Lf0;///< PCSA (cm2) is calculated as muscle volume divided between muscle branches and divided by fiber length
  Lt0 = max({MuscleParameters.TotalTendonLength, 0.001}); ///< Tendon slack length (Cannot be zero)
  Gamma0 = MuscleParameters.Pennationangle*(pi/180); ///< Pennation angle in radian
  Epsilon0 = MuscleParameters.Epsilon0; ///< Tendon strain at F0
  K1 = MuscleParameters.K1; ///< Factor for determining shortening speed at optimum length
  K2 = MuscleParameters.K2; ///< Factor for determining shortening speed at optimum length
  Fcfast = MuscleParameters.Fcfast; ///< Factor for determining shortening speed at optimum length
  Jt = .SubjectMusPar.Jt; ///< Shape parameter for the tendon stiffness
  Jpe = .SubjectMusPar.Jpe; ///< Shape parameter for the parallel stiffness
  PEFactor = .SubjectMusPar.PEFactor; ///< Parameter for influence of parallel stiffness
};


////////////////////////////////////////////////////
//     ObturatorExternusInferior (2 elements)     //
////////////////////////////////////////////////////
AnyMuscleModel3E ObturatorExternusInferior1Par =
{
  AnyFolder& MuscleParameters = .SubjectMusPar.ObturatorExternusInferior;
  AnyIntVar MuscleElemNo = 1; ///< The number of this element of the muscle
  AnyIntVar MuscleElemAmount = 2; ///< The total amount of elements for this muscle
  F0 = .SubjectMusPar.PCSAfactor*PCSA; ///< Maximum force output at optimum fiber length
  Lf0 = MuscleParameters.OptimalFiberlength; ///< Optimum fiber length
  Vol0 = 1e-6*MuscleParameters.MuscleVolume/MuscleElemAmount; /// Muscle volume in (m3)
  AnyVar PCSA = 1e4*Vol0/Lf0;///< PCSA (cm2) is calculated as muscle volume divided between muscle branches and divided by fiber length
  Lt0 = max({MuscleParameters.TotalTendonLength, 0.001}); ///< Tendon slack length (Cannot be zero)
  Gamma0 = MuscleParameters.Pennationangle*(pi/180); ///< Pennation angle in radian
  Epsilon0 = MuscleParameters.Epsilon0; ///< Tendon strain at F0
  K1 = MuscleParameters.K1; ///< Factor for determining shortening speed at optimum length
  K2 = MuscleParameters.K2; ///< Factor for determining shortening speed at optimum length
  Fcfast = MuscleParameters.Fcfast; ///< Factor for determining shortening speed at optimum length
  Jt = .SubjectMusPar.Jt; ///< Shape parameter for the tendon stiffness
  Jpe = .SubjectMusPar.Jpe; ///< Shape parameter for the parallel stiffness
  PEFactor = .SubjectMusPar.PEFactor; ///< Parameter for influence of parallel stiffness
};

AnyMuscleModel3E ObturatorExternusInferior2Par =
{
  AnyFolder& MuscleParameters = .SubjectMusPar.ObturatorExternusInferior;
  AnyIntVar MuscleElemNo = 2; ///< The number of this element of the muscle
  AnyIntVar MuscleElemAmount = 2; ///< The total amount of elements for this muscle
  F0 = .SubjectMusPar.PCSAfactor*PCSA; ///< Maximum force output at optimum fiber length
  Lf0 = MuscleParameters.OptimalFiberlength; ///< Optimum fiber length
  Vol0 = 1e-6*MuscleParameters.MuscleVolume/MuscleElemAmount; /// Muscle volume in (m3)
  AnyVar PCSA = 1e4*Vol0/Lf0;///< PCSA (cm2) is calculated as muscle volume divided between muscle branches and divided by fiber length
  Lt0 = max({MuscleParameters.TotalTendonLength, 0.001}); ///< Tendon slack length (Cannot be zero)
  Gamma0 = MuscleParameters.Pennationangle*(pi/180); ///< Pennation angle in radian
  Epsilon0 = MuscleParameters.Epsilon0; ///< Tendon strain at F0
  K1 = MuscleParameters.K1; ///< Factor for determining shortening speed at optimum length
  K2 = MuscleParameters.K2; ///< Factor for determining shortening speed at optimum length
  Fcfast = MuscleParameters.Fcfast; ///< Factor for determining shortening speed at optimum length
  Jt = .SubjectMusPar.Jt; ///< Shape parameter for the tendon stiffness
  Jpe = .SubjectMusPar.Jpe; ///< Shape parameter for the parallel stiffness
  PEFactor = .SubjectMusPar.PEFactor; ///< Parameter for influence of parallel stiffness
};


////////////////////////////////////////////////////
//     ObturatorExternusSuperior (3 elements)     //
////////////////////////////////////////////////////
AnyMuscleModel3E ObturatorExternusSuperior1Par =
{
  AnyFolder& MuscleParameters = .SubjectMusPar.ObturatorExternusSuperior;
  AnyIntVar MuscleElemNo = 1; ///< The number of this element of the muscle
  AnyIntVar MuscleElemAmount = 3; ///< The total amount of elements for this muscle
  F0 = .SubjectMusPar.PCSAfactor*PCSA; ///< Maximum force output at optimum fiber length
  Lf0 = MuscleParameters.OptimalFiberlength; ///< Optimum fiber length
  Vol0 = 1e-6*MuscleParameters.MuscleVolume/MuscleElemAmount; /// Muscle volume in (m3)
  AnyVar PCSA = 1e4*Vol0/Lf0;///< PCSA (cm2) is calculated as muscle volume divided between muscle branches and divided by fiber length
  Lt0 = max({MuscleParameters.TotalTendonLength, 0.001}); ///< Tendon slack length (Cannot be zero)
  Gamma0 = MuscleParameters.Pennationangle*(pi/180); ///< Pennation angle in radian
  Epsilon0 = MuscleParameters.Epsilon0; ///< Tendon strain at F0
  K1 = MuscleParameters.K1; ///< Factor for determining shortening speed at optimum length
  K2 = MuscleParameters.K2; ///< Factor for determining shortening speed at optimum length
  Fcfast = MuscleParameters.Fcfast; ///< Factor for determining shortening speed at optimum length
  Jt = .SubjectMusPar.Jt; ///< Shape parameter for the tendon stiffness
  Jpe = .SubjectMusPar.Jpe; ///< Shape parameter for the parallel stiffness
  PEFactor = .SubjectMusPar.PEFactor; ///< Parameter for influence of parallel stiffness
};

AnyMuscleModel3E ObturatorExternusSuperior2Par =
{
  AnyFolder& MuscleParameters = .SubjectMusPar.ObturatorExternusSuperior;
  AnyIntVar MuscleElemNo = 2; ///< The number of this element of the muscle
  AnyIntVar MuscleElemAmount = 3; ///< The total amount of elements for this muscle
  F0 = .SubjectMusPar.PCSAfactor*PCSA; ///< Maximum force output at optimum fiber length
  Lf0 = MuscleParameters.OptimalFiberlength; ///< Optimum fiber length
  Vol0 = 1e-6*MuscleParameters.MuscleVolume/MuscleElemAmount; /// Muscle volume in (m3)
  AnyVar PCSA = 1e4*Vol0/Lf0;///< PCSA (cm2) is calculated as muscle volume divided between muscle branches and divided by fiber length
  Lt0 = max({MuscleParameters.TotalTendonLength, 0.001}); ///< Tendon slack length (Cannot be zero)
  Gamma0 = MuscleParameters.Pennationangle*(pi/180); ///< Pennation angle in radian
  Epsilon0 = MuscleParameters.Epsilon0; ///< Tendon strain at F0
  K1 = MuscleParameters.K1; ///< Factor for determining shortening speed at optimum length
  K2 = MuscleParameters.K2; ///< Factor for determining shortening speed at optimum length
  Fcfast = MuscleParameters.Fcfast; ///< Factor for determining shortening speed at optimum length
  Jt = .SubjectMusPar.Jt; ///< Shape parameter for the tendon stiffness
  Jpe = .SubjectMusPar.Jpe; ///< Shape parameter for the parallel stiffness
  PEFactor = .SubjectMusPar.PEFactor; ///< Parameter for influence of parallel stiffness
};

AnyMuscleModel3E ObturatorExternusSuperior3Par =
{
  AnyFolder& MuscleParameters = .SubjectMusPar.ObturatorExternusSuperior;
  AnyIntVar MuscleElemNo = 3; ///< The number of this element of the muscle
  AnyIntVar MuscleElemAmount = 3; ///< The total amount of elements for this muscle
  F0 = .SubjectMusPar.PCSAfactor*PCSA; ///< Maximum force output at optimum fiber length
  Lf0 = MuscleParameters.OptimalFiberlength; ///< Optimum fiber length
  Vol0 = 1e-6*MuscleParameters.MuscleVolume/MuscleElemAmount; /// Muscle volume in (m3)
  AnyVar PCSA = 1e4*Vol0/Lf0;///< PCSA (cm2) is calculated as muscle volume divided between muscle branches and divided by fiber length
  Lt0 = max({MuscleParameters.TotalTendonLength, 0.001}); ///< Tendon slack length (Cannot be zero)
  Gamma0 = MuscleParameters.Pennationangle*(pi/180); ///< Pennation angle in radian
  Epsilon0 = MuscleParameters.Epsilon0; ///< Tendon strain at F0
  K1 = MuscleParameters.K1; ///< Factor for determining shortening speed at optimum length
  K2 = MuscleParameters.K2; ///< Factor for determining shortening speed at optimum length
  Fcfast = MuscleParameters.Fcfast; ///< Factor for determining shortening speed at optimum length
  Jt = .SubjectMusPar.Jt; ///< Shape parameter for the tendon stiffness
  Jpe = .SubjectMusPar.Jpe; ///< Shape parameter for the parallel stiffness
  PEFactor = .SubjectMusPar.PEFactor; ///< Parameter for influence of parallel stiffness
};


////////////////////////////////////////////
//     ObturatorInternus (3 elements)     //
////////////////////////////////////////////
AnyMuscleModel3E ObturatorInternus1Par =
{
  AnyFolder& MuscleParameters = .SubjectMusPar.ObturatorInternus;
  AnyIntVar MuscleElemNo = 1; ///< The number of this element of the muscle
  AnyIntVar MuscleElemAmount = 3; ///< The total amount of elements for this muscle
  F0 = .SubjectMusPar.PCSAfactor*PCSA; ///< Maximum force output at optimum fiber length
  Lf0 = MuscleParameters.OptimalFiberlength; ///< Optimum fiber length
  Vol0 = 1e-6*MuscleParameters.MuscleVolume/MuscleElemAmount; /// Muscle volume in (m3)
  AnyVar PCSA = 1e4*Vol0/Lf0;///< PCSA (cm2) is calculated as muscle volume divided between muscle branches and divided by fiber length
  Lt0 = max({MuscleParameters.TotalTendonLength, 0.001}); ///< Tendon slack length (Cannot be zero)
  Gamma0 = MuscleParameters.Pennationangle*(pi/180); ///< Pennation angle in radian
  Epsilon0 = MuscleParameters.Epsilon0; ///< Tendon strain at F0
  K1 = MuscleParameters.K1; ///< Factor for determining shortening speed at optimum length
  K2 = MuscleParameters.K2; ///< Factor for determining shortening speed at optimum length
  Fcfast = MuscleParameters.Fcfast; ///< Factor for determining shortening speed at optimum length
  Jt = .SubjectMusPar.Jt; ///< Shape parameter for the tendon stiffness
  Jpe = .SubjectMusPar.Jpe; ///< Shape parameter for the parallel stiffness
  PEFactor = .SubjectMusPar.PEFactor; ///< Parameter for influence of parallel stiffness
};

AnyMuscleModel3E ObturatorInternus2Par =
{
  AnyFolder& MuscleParameters = .SubjectMusPar.ObturatorInternus;
  AnyIntVar MuscleElemNo = 2; ///< The number of this element of the muscle
  AnyIntVar MuscleElemAmount = 3; ///< The total amount of elements for this muscle
  F0 = .SubjectMusPar.PCSAfactor*PCSA; ///< Maximum force output at optimum fiber length
  Lf0 = MuscleParameters.OptimalFiberlength; ///< Optimum fiber length
  Vol0 = 1e-6*MuscleParameters.MuscleVolume/MuscleElemAmount; /// Muscle volume in (m3)
  AnyVar PCSA = 1e4*Vol0/Lf0;///< PCSA (cm2) is calculated as muscle volume divided between muscle branches and divided by fiber length
  Lt0 = max({MuscleParameters.TotalTendonLength, 0.001}); ///< Tendon slack length (Cannot be zero)
  Gamma0 = MuscleParameters.Pennationangle*(pi/180); ///< Pennation angle in radian
  Epsilon0 = MuscleParameters.Epsilon0; ///< Tendon strain at F0
  K1 = MuscleParameters.K1; ///< Factor for determining shortening speed at optimum length
  K2 = MuscleParameters.K2; ///< Factor for determining shortening speed at optimum length
  Fcfast = MuscleParameters.Fcfast; ///< Factor for determining shortening speed at optimum length
  Jt = .SubjectMusPar.Jt; ///< Shape parameter for the tendon stiffness
  Jpe = .SubjectMusPar.Jpe; ///< Shape parameter for the parallel stiffness
  PEFactor = .SubjectMusPar.PEFactor; ///< Parameter for influence of parallel stiffness
};

AnyMuscleModel3E ObturatorInternus3Par =
{
  AnyFolder& MuscleParameters = .SubjectMusPar.ObturatorInternus;
  AnyIntVar MuscleElemNo = 3; ///< The number of this element of the muscle
  AnyIntVar MuscleElemAmount = 3; ///< The total amount of elements for this muscle
  F0 = .SubjectMusPar.PCSAfactor*PCSA; ///< Maximum force output at optimum fiber length
  Lf0 = MuscleParameters.OptimalFiberlength; ///< Optimum fiber length
  Vol0 = 1e-6*MuscleParameters.MuscleVolume/MuscleElemAmount; /// Muscle volume in (m3)
  AnyVar PCSA = 1e4*Vol0/Lf0;///< PCSA (cm2) is calculated as muscle volume divided between muscle branches and divided by fiber length
  Lt0 = max({MuscleParameters.TotalTendonLength, 0.001}); ///< Tendon slack length (Cannot be zero)
  Gamma0 = MuscleParameters.Pennationangle*(pi/180); ///< Pennation angle in radian
  Epsilon0 = MuscleParameters.Epsilon0; ///< Tendon strain at F0
  K1 = MuscleParameters.K1; ///< Factor for determining shortening speed at optimum length
  K2 = MuscleParameters.K2; ///< Factor for determining shortening speed at optimum length
  Fcfast = MuscleParameters.Fcfast; ///< Factor for determining shortening speed at optimum length
  Jt = .SubjectMusPar.Jt; ///< Shape parameter for the tendon stiffness
  Jpe = .SubjectMusPar.Jpe; ///< Shape parameter for the parallel stiffness
  PEFactor = .SubjectMusPar.PEFactor; ///< Parameter for influence of parallel stiffness
};


////////////////////////////////////
//     Pectineus (4 elements)     //
////////////////////////////////////
AnyMuscleModel3E Pectineus1Par =
{
  AnyFolder& MuscleParameters = .SubjectMusPar.Pectineus;
  AnyIntVar MuscleElemNo = 1; ///< The number of this element of the muscle
  AnyIntVar MuscleElemAmount = 4; ///< The total amount of elements for this muscle
  F0 = .SubjectMusPar.PCSAfactor*PCSA; ///< Maximum force output at optimum fiber length
  Lf0 = MuscleParameters.OptimalFiberlength; ///< Optimum fiber length
  Vol0 = 1e-6*MuscleParameters.MuscleVolume/MuscleElemAmount; /// Muscle volume in (m3)
  AnyVar PCSA = 1e4*Vol0/Lf0;///< PCSA (cm2) is calculated as muscle volume divided between muscle branches and divided by fiber length
  Lt0 = max({MuscleParameters.TotalTendonLength, 0.001}); ///< Tendon slack length (Cannot be zero)
  Gamma0 = MuscleParameters.Pennationangle*(pi/180); ///< Pennation angle in radian
  Epsilon0 = MuscleParameters.Epsilon0; ///< Tendon strain at F0
  K1 = MuscleParameters.K1; ///< Factor for determining shortening speed at optimum length
  K2 = MuscleParameters.K2; ///< Factor for determining shortening speed at optimum length
  Fcfast = MuscleParameters.Fcfast; ///< Factor for determining shortening speed at optimum length
  Jt = .SubjectMusPar.Jt; ///< Shape parameter for the tendon stiffness
  Jpe = .SubjectMusPar.Jpe; ///< Shape parameter for the parallel stiffness
  PEFactor = .SubjectMusPar.PEFactor; ///< Parameter for influence of parallel stiffness
};

AnyMuscleModel3E Pectineus2Par =
{
  AnyFolder& MuscleParameters = .SubjectMusPar.Pectineus;
  AnyIntVar MuscleElemNo = 2; ///< The number of this element of the muscle
  AnyIntVar MuscleElemAmount = 4; ///< The total amount of elements for this muscle
  F0 = .SubjectMusPar.PCSAfactor*PCSA; ///< Maximum force output at optimum fiber length
  Lf0 = MuscleParameters.OptimalFiberlength; ///< Optimum fiber length
  Vol0 = 1e-6*MuscleParameters.MuscleVolume/MuscleElemAmount; /// Muscle volume in (m3)
  AnyVar PCSA = 1e4*Vol0/Lf0;///< PCSA (cm2) is calculated as muscle volume divided between muscle branches and divided by fiber length
  Lt0 = max({MuscleParameters.TotalTendonLength, 0.001}); ///< Tendon slack length (Cannot be zero)
  Gamma0 = MuscleParameters.Pennationangle*(pi/180); ///< Pennation angle in radian
  Epsilon0 = MuscleParameters.Epsilon0; ///< Tendon strain at F0
  K1 = MuscleParameters.K1; ///< Factor for determining shortening speed at optimum length
  K2 = MuscleParameters.K2; ///< Factor for determining shortening speed at optimum length
  Fcfast = MuscleParameters.Fcfast; ///< Factor for determining shortening speed at optimum length
  Jt = .SubjectMusPar.Jt; ///< Shape parameter for the tendon stiffness
  Jpe = .SubjectMusPar.Jpe; ///< Shape parameter for the parallel stiffness
  PEFactor = .SubjectMusPar.PEFactor; ///< Parameter for influence of parallel stiffness
};

AnyMuscleModel3E Pectineus3Par =
{
  AnyFolder& MuscleParameters = .SubjectMusPar.Pectineus;
  AnyIntVar MuscleElemNo = 3; ///< The number of this element of the muscle
  AnyIntVar MuscleElemAmount = 4; ///< The total amount of elements for this muscle
  F0 = .SubjectMusPar.PCSAfactor*PCSA; ///< Maximum force output at optimum fiber length
  Lf0 = MuscleParameters.OptimalFiberlength; ///< Optimum fiber length
  Vol0 = 1e-6*MuscleParameters.MuscleVolume/MuscleElemAmount; /// Muscle volume in (m3)
  AnyVar PCSA = 1e4*Vol0/Lf0;///< PCSA (cm2) is calculated as muscle volume divided between muscle branches and divided by fiber length
  Lt0 = max({MuscleParameters.TotalTendonLength, 0.001}); ///< Tendon slack length (Cannot be zero)
  Gamma0 = MuscleParameters.Pennationangle*(pi/180); ///< Pennation angle in radian
  Epsilon0 = MuscleParameters.Epsilon0; ///< Tendon strain at F0
  K1 = MuscleParameters.K1; ///< Factor for determining shortening speed at optimum length
  K2 = MuscleParameters.K2; ///< Factor for determining shortening speed at optimum length
  Fcfast = MuscleParameters.Fcfast; ///< Factor for determining shortening speed at optimum length
  Jt = .SubjectMusPar.Jt; ///< Shape parameter for the tendon stiffness
  Jpe = .SubjectMusPar.Jpe; ///< Shape parameter for the parallel stiffness
  PEFactor = .SubjectMusPar.PEFactor; ///< Parameter for influence of parallel stiffness
};

AnyMuscleModel3E Pectineus4Par =
{
  AnyFolder& MuscleParameters = .SubjectMusPar.Pectineus;
  AnyIntVar MuscleElemNo = 4; ///< The number of this element of the muscle
  AnyIntVar MuscleElemAmount = 4; ///< The total amount of elements for this muscle
  F0 = .SubjectMusPar.PCSAfactor*PCSA; ///< Maximum force output at optimum fiber length
  Lf0 = MuscleParameters.OptimalFiberlength; ///< Optimum fiber length
  Vol0 = 1e-6*MuscleParameters.MuscleVolume/MuscleElemAmount; /// Muscle volume in (m3)
  AnyVar PCSA = 1e4*Vol0/Lf0;///< PCSA (cm2) is calculated as muscle volume divided between muscle branches and divided by fiber length
  Lt0 = max({MuscleParameters.TotalTendonLength, 0.001}); ///< Tendon slack length (Cannot be zero)
  Gamma0 = MuscleParameters.Pennationangle*(pi/180); ///< Pennation angle in radian
  Epsilon0 = MuscleParameters.Epsilon0; ///< Tendon strain at F0
  K1 = MuscleParameters.K1; ///< Factor for determining shortening speed at optimum length
  K2 = MuscleParameters.K2; ///< Factor for determining shortening speed at optimum length
  Fcfast = MuscleParameters.Fcfast; ///< Factor for determining shortening speed at optimum length
  Jt = .SubjectMusPar.Jt; ///< Shape parameter for the tendon stiffness
  Jpe = .SubjectMusPar.Jpe; ///< Shape parameter for the parallel stiffness
  PEFactor = .SubjectMusPar.PEFactor; ///< Parameter for influence of parallel stiffness
};


/////////////////////////////////////////
//     PeroneusBrevis (3 elements)     //
/////////////////////////////////////////
AnyMuscleModel3E PeroneusBrevis1Par =
{
  AnyFolder& MuscleParameters = .SubjectMusPar.PeroneusBrevis;
  AnyIntVar MuscleElemNo = 1; ///< The number of this element of the muscle
  AnyIntVar MuscleElemAmount = 3; ///< The total amount of elements for this muscle
  F0 = .SubjectMusPar.PCSAfactor*PCSA; ///< Maximum force output at optimum fiber length
  Lf0 = MuscleParameters.OptimalFiberlength; ///< Optimum fiber length
  Vol0 = 1e-6*MuscleParameters.MuscleVolume/MuscleElemAmount; /// Muscle volume in (m3)
  AnyVar PCSA = 1e4*Vol0/Lf0;///< PCSA (cm2) is calculated as muscle volume divided between muscle branches and divided by fiber length
  Lt0 = max({MuscleParameters.TotalTendonLength, 0.001}); ///< Tendon slack length (Cannot be zero)
  Gamma0 = MuscleParameters.Pennationangle*(pi/180); ///< Pennation angle in radian
  Epsilon0 = MuscleParameters.Epsilon0; ///< Tendon strain at F0
  K1 = MuscleParameters.K1; ///< Factor for determining shortening speed at optimum length
  K2 = MuscleParameters.K2; ///< Factor for determining shortening speed at optimum length
  Fcfast = MuscleParameters.Fcfast; ///< Factor for determining shortening speed at optimum length
  Jt = .SubjectMusPar.Jt; ///< Shape parameter for the tendon stiffness
  Jpe = .SubjectMusPar.Jpe; ///< Shape parameter for the parallel stiffness
  PEFactor = .SubjectMusPar.PEFactor; ///< Parameter for influence of parallel stiffness
};

AnyMuscleModel3E PeroneusBrevis2Par =
{
  AnyFolder& MuscleParameters = .SubjectMusPar.PeroneusBrevis;
  AnyIntVar MuscleElemNo = 2; ///< The number of this element of the muscle
  AnyIntVar MuscleElemAmount = 3; ///< The total amount of elements for this muscle
  F0 = .SubjectMusPar.PCSAfactor*PCSA; ///< Maximum force output at optimum fiber length
  Lf0 = MuscleParameters.OptimalFiberlength; ///< Optimum fiber length
  Vol0 = 1e-6*MuscleParameters.MuscleVolume/MuscleElemAmount; /// Muscle volume in (m3)
  AnyVar PCSA = 1e4*Vol0/Lf0;///< PCSA (cm2) is calculated as muscle volume divided between muscle branches and divided by fiber length
  Lt0 = max({MuscleParameters.TotalTendonLength, 0.001}); ///< Tendon slack length (Cannot be zero)
  Gamma0 = MuscleParameters.Pennationangle*(pi/180); ///< Pennation angle in radian
  Epsilon0 = MuscleParameters.Epsilon0; ///< Tendon strain at F0
  K1 = MuscleParameters.K1; ///< Factor for determining shortening speed at optimum length
  K2 = MuscleParameters.K2; ///< Factor for determining shortening speed at optimum length
  Fcfast = MuscleParameters.Fcfast; ///< Factor for determining shortening speed at optimum length
  Jt = .SubjectMusPar.Jt; ///< Shape parameter for the tendon stiffness
  Jpe = .SubjectMusPar.Jpe; ///< Shape parameter for the parallel stiffness
  PEFactor = .SubjectMusPar.PEFactor; ///< Parameter for influence of parallel stiffness
};

AnyMuscleModel3E PeroneusBrevis3Par =
{
  AnyFolder& MuscleParameters = .SubjectMusPar.PeroneusBrevis;
  AnyIntVar MuscleElemNo = 3; ///< The number of this element of the muscle
  AnyIntVar MuscleElemAmount = 3; ///< The total amount of elements for this muscle
  F0 = .SubjectMusPar.PCSAfactor*PCSA; ///< Maximum force output at optimum fiber length
  Lf0 = MuscleParameters.OptimalFiberlength; ///< Optimum fiber length
  Vol0 = 1e-6*MuscleParameters.MuscleVolume/MuscleElemAmount; /// Muscle volume in (m3)
  AnyVar PCSA = 1e4*Vol0/Lf0;///< PCSA (cm2) is calculated as muscle volume divided between muscle branches and divided by fiber length
  Lt0 = max({MuscleParameters.TotalTendonLength, 0.001}); ///< Tendon slack length (Cannot be zero)
  Gamma0 = MuscleParameters.Pennationangle*(pi/180); ///< Pennation angle in radian
  Epsilon0 = MuscleParameters.Epsilon0; ///< Tendon strain at F0
  K1 = MuscleParameters.K1; ///< Factor for determining shortening speed at optimum length
  K2 = MuscleParameters.K2; ///< Factor for determining shortening speed at optimum length
  Fcfast = MuscleParameters.Fcfast; ///< Factor for determining shortening speed at optimum length
  Jt = .SubjectMusPar.Jt; ///< Shape parameter for the tendon stiffness
  Jpe = .SubjectMusPar.Jpe; ///< Shape parameter for the parallel stiffness
  PEFactor = .SubjectMusPar.PEFactor; ///< Parameter for influence of parallel stiffness
};


/////////////////////////////////////////
//     PeroneusLongus (3 elements)     //
/////////////////////////////////////////
AnyMuscleModel3E PeroneusLongus1Par =
{
  AnyFolder& MuscleParameters = .SubjectMusPar.PeroneusLongus;
  AnyIntVar MuscleElemNo = 1; ///< The number of this element of the muscle
  AnyIntVar MuscleElemAmount = 3; ///< The total amount of elements for this muscle
  F0 = .SubjectMusPar.PCSAfactor*PCSA; ///< Maximum force output at optimum fiber length
  Lf0 = MuscleParameters.OptimalFiberlength; ///< Optimum fiber length
  Vol0 = 1e-6*MuscleParameters.MuscleVolume/MuscleElemAmount; /// Muscle volume in (m3)
  AnyVar PCSA = 1e4*Vol0/Lf0;///< PCSA (cm2) is calculated as muscle volume divided between muscle branches and divided by fiber length
  Lt0 = max({MuscleParameters.TotalTendonLength, 0.001}); ///< Tendon slack length (Cannot be zero)
  Gamma0 = MuscleParameters.Pennationangle*(pi/180); ///< Pennation angle in radian
  Epsilon0 = MuscleParameters.Epsilon0; ///< Tendon strain at F0
  K1 = MuscleParameters.K1; ///< Factor for determining shortening speed at optimum length
  K2 = MuscleParameters.K2; ///< Factor for determining shortening speed at optimum length
  Fcfast = MuscleParameters.Fcfast; ///< Factor for determining shortening speed at optimum length
  Jt = .SubjectMusPar.Jt; ///< Shape parameter for the tendon stiffness
  Jpe = .SubjectMusPar.Jpe; ///< Shape parameter for the parallel stiffness
  PEFactor = .SubjectMusPar.PEFactor; ///< Parameter for influence of parallel stiffness
};

AnyMuscleModel3E PeroneusLongus2Par =
{
  AnyFolder& MuscleParameters = .SubjectMusPar.PeroneusLongus;
  AnyIntVar MuscleElemNo = 2; ///< The number of this element of the muscle
  AnyIntVar MuscleElemAmount = 3; ///< The total amount of elements for this muscle
  F0 = .SubjectMusPar.PCSAfactor*PCSA; ///< Maximum force output at optimum fiber length
  Lf0 = MuscleParameters.OptimalFiberlength; ///< Optimum fiber length
  Vol0 = 1e-6*MuscleParameters.MuscleVolume/MuscleElemAmount; /// Muscle volume in (m3)
  AnyVar PCSA = 1e4*Vol0/Lf0;///< PCSA (cm2) is calculated as muscle volume divided between muscle branches and divided by fiber length
  Lt0 = max({MuscleParameters.TotalTendonLength, 0.001}); ///< Tendon slack length (Cannot be zero)
  Gamma0 = MuscleParameters.Pennationangle*(pi/180); ///< Pennation angle in radian
  Epsilon0 = MuscleParameters.Epsilon0; ///< Tendon strain at F0
  K1 = MuscleParameters.K1; ///< Factor for determining shortening speed at optimum length
  K2 = MuscleParameters.K2; ///< Factor for determining shortening speed at optimum length
  Fcfast = MuscleParameters.Fcfast; ///< Factor for determining shortening speed at optimum length
  Jt = .SubjectMusPar.Jt; ///< Shape parameter for the tendon stiffness
  Jpe = .SubjectMusPar.Jpe; ///< Shape parameter for the parallel stiffness
  PEFactor = .SubjectMusPar.PEFactor; ///< Parameter for influence of parallel stiffness
};

AnyMuscleModel3E PeroneusLongus3Par =
{
  AnyFolder& MuscleParameters = .SubjectMusPar.PeroneusLongus;
  AnyIntVar MuscleElemNo = 3; ///< The number of this element of the muscle
  AnyIntVar MuscleElemAmount = 3; ///< The total amount of elements for this muscle
  F0 = .SubjectMusPar.PCSAfactor*PCSA; ///< Maximum force output at optimum fiber length
  Lf0 = MuscleParameters.OptimalFiberlength; ///< Optimum fiber length
  Vol0 = 1e-6*MuscleParameters.MuscleVolume/MuscleElemAmount; /// Muscle volume in (m3)
  AnyVar PCSA = 1e4*Vol0/Lf0;///< PCSA (cm2) is calculated as muscle volume divided between muscle branches and divided by fiber length
  Lt0 = max({MuscleParameters.TotalTendonLength, 0.001}); ///< Tendon slack length (Cannot be zero)
  Gamma0 = MuscleParameters.Pennationangle*(pi/180); ///< Pennation angle in radian
  Epsilon0 = MuscleParameters.Epsilon0; ///< Tendon strain at F0
  K1 = MuscleParameters.K1; ///< Factor for determining shortening speed at optimum length
  K2 = MuscleParameters.K2; ///< Factor for determining shortening speed at optimum length
  Fcfast = MuscleParameters.Fcfast; ///< Factor for determining shortening speed at optimum length
  Jt = .SubjectMusPar.Jt; ///< Shape parameter for the tendon stiffness
  Jpe = .SubjectMusPar.Jpe; ///< Shape parameter for the parallel stiffness
  PEFactor = .SubjectMusPar.PEFactor; ///< Parameter for influence of parallel stiffness
};


//////////////////////////////////////////
//     PeroneusTertius (3 elements)     //
//////////////////////////////////////////
AnyMuscleModel3E PeroneusTertius1Par =
{
  AnyFolder& MuscleParameters = .SubjectMusPar.PeroneusTertius;
  AnyIntVar MuscleElemNo = 1; ///< The number of this element of the muscle
  AnyIntVar MuscleElemAmount = 3; ///< The total amount of elements for this muscle
  F0 = .SubjectMusPar.PCSAfactor*PCSA; ///< Maximum force output at optimum fiber length
  Lf0 = MuscleParameters.OptimalFiberlength; ///< Optimum fiber length
  Vol0 = 1e-6*MuscleParameters.MuscleVolume/MuscleElemAmount; /// Muscle volume in (m3)
  AnyVar PCSA = 1e4*Vol0/Lf0;///< PCSA (cm2) is calculated as muscle volume divided between muscle branches and divided by fiber length
  Lt0 = max({MuscleParameters.TotalTendonLength, 0.001}); ///< Tendon slack length (Cannot be zero)
  Gamma0 = MuscleParameters.Pennationangle*(pi/180); ///< Pennation angle in radian
  Epsilon0 = MuscleParameters.Epsilon0; ///< Tendon strain at F0
  K1 = MuscleParameters.K1; ///< Factor for determining shortening speed at optimum length
  K2 = MuscleParameters.K2; ///< Factor for determining shortening speed at optimum length
  Fcfast = MuscleParameters.Fcfast; ///< Factor for determining shortening speed at optimum length
  Jt = .SubjectMusPar.Jt; ///< Shape parameter for the tendon stiffness
  Jpe = .SubjectMusPar.Jpe; ///< Shape parameter for the parallel stiffness
  PEFactor = .SubjectMusPar.PEFactor; ///< Parameter for influence of parallel stiffness
};

AnyMuscleModel3E PeroneusTertius2Par =
{
  AnyFolder& MuscleParameters = .SubjectMusPar.PeroneusTertius;
  AnyIntVar MuscleElemNo = 2; ///< The number of this element of the muscle
  AnyIntVar MuscleElemAmount = 3; ///< The total amount of elements for this muscle
  F0 = .SubjectMusPar.PCSAfactor*PCSA; ///< Maximum force output at optimum fiber length
  Lf0 = MuscleParameters.OptimalFiberlength; ///< Optimum fiber length
  Vol0 = 1e-6*MuscleParameters.MuscleVolume/MuscleElemAmount; /// Muscle volume in (m3)
  AnyVar PCSA = 1e4*Vol0/Lf0;///< PCSA (cm2) is calculated as muscle volume divided between muscle branches and divided by fiber length
  Lt0 = max({MuscleParameters.TotalTendonLength, 0.001}); ///< Tendon slack length (Cannot be zero)
  Gamma0 = MuscleParameters.Pennationangle*(pi/180); ///< Pennation angle in radian
  Epsilon0 = MuscleParameters.Epsilon0; ///< Tendon strain at F0
  K1 = MuscleParameters.K1; ///< Factor for determining shortening speed at optimum length
  K2 = MuscleParameters.K2; ///< Factor for determining shortening speed at optimum length
  Fcfast = MuscleParameters.Fcfast; ///< Factor for determining shortening speed at optimum length
  Jt = .SubjectMusPar.Jt; ///< Shape parameter for the tendon stiffness
  Jpe = .SubjectMusPar.Jpe; ///< Shape parameter for the parallel stiffness
  PEFactor = .SubjectMusPar.PEFactor; ///< Parameter for influence of parallel stiffness
};

AnyMuscleModel3E PeroneusTertius3Par =
{
  AnyFolder& MuscleParameters = .SubjectMusPar.PeroneusTertius;
  AnyIntVar MuscleElemNo = 3; ///< The number of this element of the muscle
  AnyIntVar MuscleElemAmount = 3; ///< The total amount of elements for this muscle
  F0 = .SubjectMusPar.PCSAfactor*PCSA; ///< Maximum force output at optimum fiber length
  Lf0 = MuscleParameters.OptimalFiberlength; ///< Optimum fiber length
  Vol0 = 1e-6*MuscleParameters.MuscleVolume/MuscleElemAmount; /// Muscle volume in (m3)
  AnyVar PCSA = 1e4*Vol0/Lf0;///< PCSA (cm2) is calculated as muscle volume divided between muscle branches and divided by fiber length
  Lt0 = max({MuscleParameters.TotalTendonLength, 0.001}); ///< Tendon slack length (Cannot be zero)
  Gamma0 = MuscleParameters.Pennationangle*(pi/180); ///< Pennation angle in radian
  Epsilon0 = MuscleParameters.Epsilon0; ///< Tendon strain at F0
  K1 = MuscleParameters.K1; ///< Factor for determining shortening speed at optimum length
  K2 = MuscleParameters.K2; ///< Factor for determining shortening speed at optimum length
  Fcfast = MuscleParameters.Fcfast; ///< Factor for determining shortening speed at optimum length
  Jt = .SubjectMusPar.Jt; ///< Shape parameter for the tendon stiffness
  Jpe = .SubjectMusPar.Jpe; ///< Shape parameter for the parallel stiffness
  PEFactor = .SubjectMusPar.PEFactor; ///< Parameter for influence of parallel stiffness
};


/////////////////////////////////////
//     Piriformis (1 element )     //
/////////////////////////////////////
AnyMuscleModel3E Piriformis1Par =
{
  AnyFolder& MuscleParameters = .SubjectMusPar.Piriformis;
  AnyIntVar MuscleElemNo = 1; ///< The number of this element of the muscle
  AnyIntVar MuscleElemAmount = 1; ///< The total amount of elements for this muscle
  F0 = .SubjectMusPar.PCSAfactor*PCSA; ///< Maximum force output at optimum fiber length
  Lf0 = MuscleParameters.OptimalFiberlength; ///< Optimum fiber length
  Vol0 = 1e-6*MuscleParameters.MuscleVolume/MuscleElemAmount; /// Muscle volume in (m3)
  AnyVar PCSA = 1e4*Vol0/Lf0;///< PCSA (cm2) is calculated as muscle volume divided between muscle branches and divided by fiber length
  Lt0 = max({MuscleParameters.TotalTendonLength, 0.001}); ///< Tendon slack length (Cannot be zero)
  Gamma0 = MuscleParameters.Pennationangle*(pi/180); ///< Pennation angle in radian
  Epsilon0 = MuscleParameters.Epsilon0; ///< Tendon strain at F0
  K1 = MuscleParameters.K1; ///< Factor for determining shortening speed at optimum length
  K2 = MuscleParameters.K2; ///< Factor for determining shortening speed at optimum length
  Fcfast = MuscleParameters.Fcfast; ///< Factor for determining shortening speed at optimum length
  Jt = .SubjectMusPar.Jt; ///< Shape parameter for the tendon stiffness
  Jpe = .SubjectMusPar.Jpe; ///< Shape parameter for the parallel stiffness
  PEFactor = .SubjectMusPar.PEFactor; ///< Parameter for influence of parallel stiffness
};


////////////////////////////////////
//     Plantaris (1 element )     //
////////////////////////////////////
AnyMuscleModel3E Plantaris1Par =
{
  AnyFolder& MuscleParameters = .SubjectMusPar.Plantaris;
  AnyIntVar MuscleElemNo = 1; ///< The number of this element of the muscle
  AnyIntVar MuscleElemAmount = 1; ///< The total amount of elements for this muscle
  F0 = .SubjectMusPar.PCSAfactor*PCSA; ///< Maximum force output at optimum fiber length
  Lf0 = MuscleParameters.OptimalFiberlength; ///< Optimum fiber length
  Vol0 = 1e-6*MuscleParameters.MuscleVolume/MuscleElemAmount; /// Muscle volume in (m3)
  AnyVar PCSA = 1e4*Vol0/Lf0;///< PCSA (cm2) is calculated as muscle volume divided between muscle branches and divided by fiber length
  Lt0 = max({MuscleParameters.TotalTendonLength, 0.001}); ///< Tendon slack length (Cannot be zero)
  Gamma0 = MuscleParameters.Pennationangle*(pi/180); ///< Pennation angle in radian
  Epsilon0 = MuscleParameters.Epsilon0; ///< Tendon strain at F0
  K1 = MuscleParameters.K1; ///< Factor for determining shortening speed at optimum length
  K2 = MuscleParameters.K2; ///< Factor for determining shortening speed at optimum length
  Fcfast = MuscleParameters.Fcfast; ///< Factor for determining shortening speed at optimum length
  Jt = .SubjectMusPar.Jt; ///< Shape parameter for the tendon stiffness
  Jpe = .SubjectMusPar.Jpe; ///< Shape parameter for the parallel stiffness
  PEFactor = .SubjectMusPar.PEFactor; ///< Parameter for influence of parallel stiffness
};


////////////////////////////////////
//     Popliteus (2 elements)     //
////////////////////////////////////
AnyMuscleModel3E Popliteus1Par =
{
  AnyFolder& MuscleParameters = .SubjectMusPar.Popliteus;
  AnyIntVar MuscleElemNo = 1; ///< The number of this element of the muscle
  AnyIntVar MuscleElemAmount = 2; ///< The total amount of elements for this muscle
  F0 = .SubjectMusPar.PCSAfactor*PCSA; ///< Maximum force output at optimum fiber length
  Lf0 = MuscleParameters.OptimalFiberlength; ///< Optimum fiber length
  Vol0 = 1e-6*MuscleParameters.MuscleVolume/MuscleElemAmount; /// Muscle volume in (m3)
  AnyVar PCSA = 1e4*Vol0/Lf0;///< PCSA (cm2) is calculated as muscle volume divided between muscle branches and divided by fiber length
  Lt0 = max({MuscleParameters.TotalTendonLength, 0.001}); ///< Tendon slack length (Cannot be zero)
  Gamma0 = MuscleParameters.Pennationangle*(pi/180); ///< Pennation angle in radian
  Epsilon0 = MuscleParameters.Epsilon0; ///< Tendon strain at F0
  K1 = MuscleParameters.K1; ///< Factor for determining shortening speed at optimum length
  K2 = MuscleParameters.K2; ///< Factor for determining shortening speed at optimum length
  Fcfast = MuscleParameters.Fcfast; ///< Factor for determining shortening speed at optimum length
  Jt = .SubjectMusPar.Jt; ///< Shape parameter for the tendon stiffness
  Jpe = .SubjectMusPar.Jpe; ///< Shape parameter for the parallel stiffness
  PEFactor = .SubjectMusPar.PEFactor; ///< Parameter for influence of parallel stiffness
};

AnyMuscleModel3E Popliteus2Par =
{
  AnyFolder& MuscleParameters = .SubjectMusPar.Popliteus;
  AnyIntVar MuscleElemNo = 2; ///< The number of this element of the muscle
  AnyIntVar MuscleElemAmount = 2; ///< The total amount of elements for this muscle
  F0 = .SubjectMusPar.PCSAfactor*PCSA; ///< Maximum force output at optimum fiber length
  Lf0 = MuscleParameters.OptimalFiberlength; ///< Optimum fiber length
  Vol0 = 1e-6*MuscleParameters.MuscleVolume/MuscleElemAmount; /// Muscle volume in (m3)
  AnyVar PCSA = 1e4*Vol0/Lf0;///< PCSA (cm2) is calculated as muscle volume divided between muscle branches and divided by fiber length
  Lt0 = max({MuscleParameters.TotalTendonLength, 0.001}); ///< Tendon slack length (Cannot be zero)
  Gamma0 = MuscleParameters.Pennationangle*(pi/180); ///< Pennation angle in radian
  Epsilon0 = MuscleParameters.Epsilon0; ///< Tendon strain at F0
  K1 = MuscleParameters.K1; ///< Factor for determining shortening speed at optimum length
  K2 = MuscleParameters.K2; ///< Factor for determining shortening speed at optimum length
  Fcfast = MuscleParameters.Fcfast; ///< Factor for determining shortening speed at optimum length
  Jt = .SubjectMusPar.Jt; ///< Shape parameter for the tendon stiffness
  Jpe = .SubjectMusPar.Jpe; ///< Shape parameter for the parallel stiffness
  PEFactor = .SubjectMusPar.PEFactor; ///< Parameter for influence of parallel stiffness
};


/////////////////////////////////////
//     PsoasMinor (1 element )     //
/////////////////////////////////////
AnyMuscleModel3E PsoasMinor1Par =
{
  AnyFolder& MuscleParameters = .SubjectMusPar.PsoasMinor;
  AnyIntVar MuscleElemNo = 1; ///< The number of this element of the muscle
  AnyIntVar MuscleElemAmount = 1; ///< The total amount of elements for this muscle
  F0 = .SubjectMusPar.PCSAfactor*PCSA; ///< Maximum force output at optimum fiber length
  Lf0 = MuscleParameters.OptimalFiberlength; ///< Optimum fiber length
  Vol0 = 1e-6*MuscleParameters.MuscleVolume/MuscleElemAmount; /// Muscle volume in (m3)
  AnyVar PCSA = 1e4*Vol0/Lf0;///< PCSA (cm2) is calculated as muscle volume divided between muscle branches and divided by fiber length
  Lt0 = max({MuscleParameters.TotalTendonLength, 0.001}); ///< Tendon slack length (Cannot be zero)
  Gamma0 = MuscleParameters.Pennationangle*(pi/180); ///< Pennation angle in radian
  Epsilon0 = MuscleParameters.Epsilon0; ///< Tendon strain at F0
  K1 = MuscleParameters.K1; ///< Factor for determining shortening speed at optimum length
  K2 = MuscleParameters.K2; ///< Factor for determining shortening speed at optimum length
  Fcfast = MuscleParameters.Fcfast; ///< Factor for determining shortening speed at optimum length
  Jt = .SubjectMusPar.Jt; ///< Shape parameter for the tendon stiffness
  Jpe = .SubjectMusPar.Jpe; ///< Shape parameter for the parallel stiffness
  PEFactor = .SubjectMusPar.PEFactor; ///< Parameter for influence of parallel stiffness
};


/////////////////////////////////////
//     PsoasMajor (11 elements)     //
/////////////////////////////////////
AnyMuscleModel3E PsoasMajor1Par =
{
  AnyFolder& MuscleParameters = .SubjectMusPar.PsoasMajor;
  AnyIntVar MuscleElemNo = 1; ///< The number of this element of the muscle
  AnyIntVar MuscleElemAmount = 11; ///< The total amount of elements for this muscle
  F0 = .SubjectMusPar.PCSAfactor*PCSA; ///< Maximum force output at optimum fiber length
  Lf0 = MuscleParameters.OptimalFiberlength; ///< Optimum fiber length
  Vol0 = 1e-6*MuscleParameters.MuscleVolume/MuscleElemAmount; /// Muscle volume in (m3)
  AnyVar PCSA = 1e4*Vol0/Lf0;///< PCSA (cm2) is calculated as muscle volume divided between muscle branches and divided by fiber length
  Lt0 = max({MuscleParameters.TotalTendonLength, 0.001}); ///< Tendon slack length (Cannot be zero)
  Gamma0 = MuscleParameters.Pennationangle*(pi/180); ///< Pennation angle in radian
  Epsilon0 = MuscleParameters.Epsilon0; ///< Tendon strain at F0
  K1 = MuscleParameters.K1; ///< Factor for determining shortening speed at optimum length
  K2 = MuscleParameters.K2; ///< Factor for determining shortening speed at optimum length
  Fcfast = MuscleParameters.Fcfast; ///< Factor for determining shortening speed at optimum length
  Jt = .SubjectMusPar.Jt; ///< Shape parameter for the tendon stiffness
  Jpe = .SubjectMusPar.Jpe; ///< Shape parameter for the parallel stiffness
  PEFactor = .SubjectMusPar.PEFactor; ///< Parameter for influence of parallel stiffness
};

AnyMuscleModel3E PsoasMajor2Par =
{
  AnyFolder& MuscleParameters = .SubjectMusPar.PsoasMajor;
  AnyIntVar MuscleElemNo = 2; ///< The number of this element of the muscle
  AnyIntVar MuscleElemAmount = 11; ///< The total amount of elements for this muscle
  F0 = .SubjectMusPar.PCSAfactor*PCSA; ///< Maximum force output at optimum fiber length
  Lf0 = MuscleParameters.OptimalFiberlength; ///< Optimum fiber length
  Vol0 = 1e-6*MuscleParameters.MuscleVolume/MuscleElemAmount; /// Muscle volume in (m3)
  AnyVar PCSA = 1e4*Vol0/Lf0;///< PCSA (cm2) is calculated as muscle volume divided between muscle branches and divided by fiber length
  Lt0 = max({MuscleParameters.TotalTendonLength, 0.001}); ///< Tendon slack length (Cannot be zero)
  Gamma0 = MuscleParameters.Pennationangle*(pi/180); ///< Pennation angle in radian
  Epsilon0 = MuscleParameters.Epsilon0; ///< Tendon strain at F0
  K1 = MuscleParameters.K1; ///< Factor for determining shortening speed at optimum length
  K2 = MuscleParameters.K2; ///< Factor for determining shortening speed at optimum length
  Fcfast = MuscleParameters.Fcfast; ///< Factor for determining shortening speed at optimum length
  Jt = .SubjectMusPar.Jt; ///< Shape parameter for the tendon stiffness
  Jpe = .SubjectMusPar.Jpe; ///< Shape parameter for the parallel stiffness
  PEFactor = .SubjectMusPar.PEFactor; ///< Parameter for influence of parallel stiffness
};

AnyMuscleModel3E PsoasMajor3Par =
{
  AnyFolder& MuscleParameters = .SubjectMusPar.PsoasMajor;
  AnyIntVar MuscleElemNo = 3; ///< The number of this element of the muscle
  AnyIntVar MuscleElemAmount = 11; ///< The total amount of elements for this muscle
  F0 = .SubjectMusPar.PCSAfactor*PCSA; ///< Maximum force output at optimum fiber length
  Lf0 = MuscleParameters.OptimalFiberlength; ///< Optimum fiber length
  Vol0 = 1e-6*MuscleParameters.MuscleVolume/MuscleElemAmount; /// Muscle volume in (m3)
  AnyVar PCSA = 1e4*Vol0/Lf0;///< PCSA (cm2) is calculated as muscle volume divided between muscle branches and divided by fiber length
  Lt0 = max({MuscleParameters.TotalTendonLength, 0.001}); ///< Tendon slack length (Cannot be zero)
  Gamma0 = MuscleParameters.Pennationangle*(pi/180); ///< Pennation angle in radian
  Epsilon0 = MuscleParameters.Epsilon0; ///< Tendon strain at F0
  K1 = MuscleParameters.K1; ///< Factor for determining shortening speed at optimum length
  K2 = MuscleParameters.K2; ///< Factor for determining shortening speed at optimum length
  Fcfast = MuscleParameters.Fcfast; ///< Factor for determining shortening speed at optimum length
  Jt = .SubjectMusPar.Jt; ///< Shape parameter for the tendon stiffness
  Jpe = .SubjectMusPar.Jpe; ///< Shape parameter for the parallel stiffness
  PEFactor = .SubjectMusPar.PEFactor; ///< Parameter for influence of parallel stiffness
};

AnyMuscleModel3E PsoasMajor4Par =
{
  AnyFolder& MuscleParameters = .SubjectMusPar.PsoasMajor;
  AnyIntVar MuscleElemNo = 4; ///< The number of this element of the muscle
  AnyIntVar MuscleElemAmount = 11; ///< The total amount of elements for this muscle
  F0 = .SubjectMusPar.PCSAfactor*PCSA; ///< Maximum force output at optimum fiber length
  Lf0 = MuscleParameters.OptimalFiberlength; ///< Optimum fiber length
  Vol0 = 1e-6*MuscleParameters.MuscleVolume/MuscleElemAmount; /// Muscle volume in (m3)
  AnyVar PCSA = 1e4*Vol0/Lf0;///< PCSA (cm2) is calculated as muscle volume divided between muscle branches and divided by fiber length
  Lt0 = max({MuscleParameters.TotalTendonLength, 0.001}); ///< Tendon slack length (Cannot be zero)
  Gamma0 = MuscleParameters.Pennationangle*(pi/180); ///< Pennation angle in radian
  Epsilon0 = MuscleParameters.Epsilon0; ///< Tendon strain at F0
  K1 = MuscleParameters.K1; ///< Factor for determining shortening speed at optimum length
  K2 = MuscleParameters.K2; ///< Factor for determining shortening speed at optimum length
  Fcfast = MuscleParameters.Fcfast; ///< Factor for determining shortening speed at optimum length
  Jt = .SubjectMusPar.Jt; ///< Shape parameter for the tendon stiffness
  Jpe = .SubjectMusPar.Jpe; ///< Shape parameter for the parallel stiffness
  PEFactor = .SubjectMusPar.PEFactor; ///< Parameter for influence of parallel stiffness
};

AnyMuscleModel3E PsoasMajor5Par =
{
  AnyFolder& MuscleParameters = .SubjectMusPar.PsoasMajor;
  AnyIntVar MuscleElemNo = 5; ///< The number of this element of the muscle
  AnyIntVar MuscleElemAmount = 11; ///< The total amount of elements for this muscle
  F0 = .SubjectMusPar.PCSAfactor*PCSA; ///< Maximum force output at optimum fiber length
  Lf0 = MuscleParameters.OptimalFiberlength; ///< Optimum fiber length
  Vol0 = 1e-6*MuscleParameters.MuscleVolume/MuscleElemAmount; /// Muscle volume in (m3)
  AnyVar PCSA = 1e4*Vol0/Lf0;///< PCSA (cm2) is calculated as muscle volume divided between muscle branches and divided by fiber length
  Lt0 = max({MuscleParameters.TotalTendonLength, 0.001}); ///< Tendon slack length (Cannot be zero)
  Gamma0 = MuscleParameters.Pennationangle*(pi/180); ///< Pennation angle in radian
  Epsilon0 = MuscleParameters.Epsilon0; ///< Tendon strain at F0
  K1 = MuscleParameters.K1; ///< Factor for determining shortening speed at optimum length
  K2 = MuscleParameters.K2; ///< Factor for determining shortening speed at optimum length
  Fcfast = MuscleParameters.Fcfast; ///< Factor for determining shortening speed at optimum length
  Jt = .SubjectMusPar.Jt; ///< Shape parameter for the tendon stiffness
  Jpe = .SubjectMusPar.Jpe; ///< Shape parameter for the parallel stiffness
  PEFactor = .SubjectMusPar.PEFactor; ///< Parameter for influence of parallel stiffness
};

AnyMuscleModel3E PsoasMajor6Par =
{
  AnyFolder& MuscleParameters = .SubjectMusPar.PsoasMajor;
  AnyIntVar MuscleElemNo = 6; ///< The number of this element of the muscle
  AnyIntVar MuscleElemAmount = 11; ///< The total amount of elements for this muscle
  F0 = .SubjectMusPar.PCSAfactor*PCSA; ///< Maximum force output at optimum fiber length
  Lf0 = MuscleParameters.OptimalFiberlength; ///< Optimum fiber length
  Vol0 = 1e-6*MuscleParameters.MuscleVolume/MuscleElemAmount; /// Muscle volume in (m3)
  AnyVar PCSA = 1e4*Vol0/Lf0;///< PCSA (cm2) is calculated as muscle volume divided between muscle branches and divided by fiber length
  Lt0 = max({MuscleParameters.TotalTendonLength, 0.001}); ///< Tendon slack length (Cannot be zero)
  Gamma0 = MuscleParameters.Pennationangle*(pi/180); ///< Pennation angle in radian
  Epsilon0 = MuscleParameters.Epsilon0; ///< Tendon strain at F0
  K1 = MuscleParameters.K1; ///< Factor for determining shortening speed at optimum length
  K2 = MuscleParameters.K2; ///< Factor for determining shortening speed at optimum length
  Fcfast = MuscleParameters.Fcfast; ///< Factor for determining shortening speed at optimum length
  Jt = .SubjectMusPar.Jt; ///< Shape parameter for the tendon stiffness
  Jpe = .SubjectMusPar.Jpe; ///< Shape parameter for the parallel stiffness
  PEFactor = .SubjectMusPar.PEFactor; ///< Parameter for influence of parallel stiffness
};

AnyMuscleModel3E PsoasMajor7Par =
{
  AnyFolder& MuscleParameters = .SubjectMusPar.PsoasMajor;
  AnyIntVar MuscleElemNo = 7; ///< The number of this element of the muscle
  AnyIntVar MuscleElemAmount = 11; ///< The total amount of elements for this muscle
  F0 = .SubjectMusPar.PCSAfactor*PCSA; ///< Maximum force output at optimum fiber length
  Lf0 = MuscleParameters.OptimalFiberlength; ///< Optimum fiber length
  Vol0 = 1e-6*MuscleParameters.MuscleVolume/MuscleElemAmount; /// Muscle volume in (m3)
  AnyVar PCSA = 1e4*Vol0/Lf0;///< PCSA (cm2) is calculated as muscle volume divided between muscle branches and divided by fiber length
  Lt0 = max({MuscleParameters.TotalTendonLength, 0.001}); ///< Tendon slack length (Cannot be zero)
  Gamma0 = MuscleParameters.Pennationangle*(pi/180); ///< Pennation angle in radian
  Epsilon0 = MuscleParameters.Epsilon0; ///< Tendon strain at F0
  K1 = MuscleParameters.K1; ///< Factor for determining shortening speed at optimum length
  K2 = MuscleParameters.K2; ///< Factor for determining shortening speed at optimum length
  Fcfast = MuscleParameters.Fcfast; ///< Factor for determining shortening speed at optimum length
  Jt = .SubjectMusPar.Jt; ///< Shape parameter for the tendon stiffness
  Jpe = .SubjectMusPar.Jpe; ///< Shape parameter for the parallel stiffness
  PEFactor = .SubjectMusPar.PEFactor; ///< Parameter for influence of parallel stiffness
};

AnyMuscleModel3E PsoasMajor8Par =
{
  AnyFolder& MuscleParameters = .SubjectMusPar.PsoasMajor;
  AnyIntVar MuscleElemNo = 8; ///< The number of this element of the muscle
  AnyIntVar MuscleElemAmount = 11; ///< The total amount of elements for this muscle
  F0 = .SubjectMusPar.PCSAfactor*PCSA; ///< Maximum force output at optimum fiber length
  Lf0 = MuscleParameters.OptimalFiberlength; ///< Optimum fiber length
  Vol0 = 1e-6*MuscleParameters.MuscleVolume/MuscleElemAmount; /// Muscle volume in (m3)
  AnyVar PCSA = 1e4*Vol0/Lf0;///< PCSA (cm2) is calculated as muscle volume divided between muscle branches and divided by fiber length
  Lt0 = max({MuscleParameters.TotalTendonLength, 0.001}); ///< Tendon slack length (Cannot be zero)
  Gamma0 = MuscleParameters.Pennationangle*(pi/180); ///< Pennation angle in radian
  Epsilon0 = MuscleParameters.Epsilon0; ///< Tendon strain at F0
  K1 = MuscleParameters.K1; ///< Factor for determining shortening speed at optimum length
  K2 = MuscleParameters.K2; ///< Factor for determining shortening speed at optimum length
  Fcfast = MuscleParameters.Fcfast; ///< Factor for determining shortening speed at optimum length
  Jt = .SubjectMusPar.Jt; ///< Shape parameter for the tendon stiffness
  Jpe = .SubjectMusPar.Jpe; ///< Shape parameter for the parallel stiffness
  PEFactor = .SubjectMusPar.PEFactor; ///< Parameter for influence of parallel stiffness
};

AnyMuscleModel3E PsoasMajor9Par =
{
  AnyFolder& MuscleParameters = .SubjectMusPar.PsoasMajor;
  AnyIntVar MuscleElemNo = 9; ///< The number of this element of the muscle
  AnyIntVar MuscleElemAmount = 11; ///< The total amount of elements for this muscle
  F0 = .SubjectMusPar.PCSAfactor*PCSA; ///< Maximum force output at optimum fiber length
  Lf0 = MuscleParameters.OptimalFiberlength; ///< Optimum fiber length
  Vol0 = 1e-6*MuscleParameters.MuscleVolume/MuscleElemAmount; /// Muscle volume in (m3)
  AnyVar PCSA = 1e4*Vol0/Lf0;///< PCSA (cm2) is calculated as muscle volume divided between muscle branches and divided by fiber length
  Lt0 = max({MuscleParameters.TotalTendonLength, 0.001}); ///< Tendon slack length (Cannot be zero)
  Gamma0 = MuscleParameters.Pennationangle*(pi/180); ///< Pennation angle in radian
  Epsilon0 = MuscleParameters.Epsilon0; ///< Tendon strain at F0
  K1 = MuscleParameters.K1; ///< Factor for determining shortening speed at optimum length
  K2 = MuscleParameters.K2; ///< Factor for determining shortening speed at optimum length
  Fcfast = MuscleParameters.Fcfast; ///< Factor for determining shortening speed at optimum length
  Jt = .SubjectMusPar.Jt; ///< Shape parameter for the tendon stiffness
  Jpe = .SubjectMusPar.Jpe; ///< Shape parameter for the parallel stiffness
  PEFactor = .SubjectMusPar.PEFactor; ///< Parameter for influence of parallel stiffness
};

AnyMuscleModel3E PsoasMajor10Par =
{
  AnyFolder& MuscleParameters = .SubjectMusPar.PsoasMajor;
  AnyIntVar MuscleElemNo = 10; ///< The number of this element of the muscle
  AnyIntVar MuscleElemAmount = 11; ///< The total amount of elements for this muscle
  F0 = .SubjectMusPar.PCSAfactor*PCSA; ///< Maximum force output at optimum fiber length
  Lf0 = MuscleParameters.OptimalFiberlength; ///< Optimum fiber length
  Vol0 = 1e-6*MuscleParameters.MuscleVolume/MuscleElemAmount; /// Muscle volume in (m3)
  AnyVar PCSA = 1e4*Vol0/Lf0;///< PCSA (cm2) is calculated as muscle volume divided between muscle branches and divided by fiber length
  Lt0 = max({MuscleParameters.TotalTendonLength, 0.001}); ///< Tendon slack length (Cannot be zero)
  Gamma0 = MuscleParameters.Pennationangle*(pi/180); ///< Pennation angle in radian
  Epsilon0 = MuscleParameters.Epsilon0; ///< Tendon strain at F0
  K1 = MuscleParameters.K1; ///< Factor for determining shortening speed at optimum length
  K2 = MuscleParameters.K2; ///< Factor for determining shortening speed at optimum length
  Fcfast = MuscleParameters.Fcfast; ///< Factor for determining shortening speed at optimum length
  Jt = .SubjectMusPar.Jt; ///< Shape parameter for the tendon stiffness
  Jpe = .SubjectMusPar.Jpe; ///< Shape parameter for the parallel stiffness
  PEFactor = .SubjectMusPar.PEFactor; ///< Parameter for influence of parallel stiffness
};

AnyMuscleModel3E PsoasMajor11Par =
{
  AnyFolder& MuscleParameters = .SubjectMusPar.PsoasMajor;
  AnyIntVar MuscleElemNo = 11; ///< The number of this element of the muscle
  AnyIntVar MuscleElemAmount = 11; ///< The total amount of elements for this muscle
  F0 = .SubjectMusPar.PCSAfactor*PCSA; ///< Maximum force output at optimum fiber length
  Lf0 = MuscleParameters.OptimalFiberlength; ///< Optimum fiber length
  Vol0 = 1e-6*MuscleParameters.MuscleVolume/MuscleElemAmount; /// Muscle volume in (m3)
  AnyVar PCSA = 1e4*Vol0/Lf0;///< PCSA (cm2) is calculated as muscle volume divided between muscle branches and divided by fiber length
  Lt0 = max({MuscleParameters.TotalTendonLength, 0.001}); ///< Tendon slack length (Cannot be zero)
  Gamma0 = MuscleParameters.Pennationangle*(pi/180); ///< Pennation angle in radian
  Epsilon0 = MuscleParameters.Epsilon0; ///< Tendon strain at F0
  K1 = MuscleParameters.K1; ///< Factor for determining shortening speed at optimum length
  K2 = MuscleParameters.K2; ///< Factor for determining shortening speed at optimum length
  Fcfast = MuscleParameters.Fcfast; ///< Factor for determining shortening speed at optimum length
  Jt = .SubjectMusPar.Jt; ///< Shape parameter for the tendon stiffness
  Jpe = .SubjectMusPar.Jpe; ///< Shape parameter for the parallel stiffness
  PEFactor = .SubjectMusPar.PEFactor; ///< Parameter for influence of parallel stiffness
};


///////////////////////////////////////////
//     QuadratusFemoris (4 elements)     //
///////////////////////////////////////////
AnyMuscleModel3E QuadratusFemoris1Par =
{
  AnyFolder& MuscleParameters = .SubjectMusPar.QuadratusFemoris;
  AnyIntVar MuscleElemNo = 1; ///< The number of this element of the muscle
  AnyIntVar MuscleElemAmount = 4; ///< The total amount of elements for this muscle
  F0 = .SubjectMusPar.PCSAfactor*PCSA; ///< Maximum force output at optimum fiber length
  Lf0 = MuscleParameters.OptimalFiberlength; ///< Optimum fiber length
  Vol0 = 1e-6*MuscleParameters.MuscleVolume/MuscleElemAmount; /// Muscle volume in (m3)
  AnyVar PCSA = 1e4*Vol0/Lf0;///< PCSA (cm2) is calculated as muscle volume divided between muscle branches and divided by fiber length
  Lt0 = max({MuscleParameters.TotalTendonLength, 0.001}); ///< Tendon slack length (Cannot be zero)
  Gamma0 = MuscleParameters.Pennationangle*(pi/180); ///< Pennation angle in radian
  Epsilon0 = MuscleParameters.Epsilon0; ///< Tendon strain at F0
  K1 = MuscleParameters.K1; ///< Factor for determining shortening speed at optimum length
  K2 = MuscleParameters.K2; ///< Factor for determining shortening speed at optimum length
  Fcfast = MuscleParameters.Fcfast; ///< Factor for determining shortening speed at optimum length
  Jt = .SubjectMusPar.Jt; ///< Shape parameter for the tendon stiffness
  Jpe = .SubjectMusPar.Jpe; ///< Shape parameter for the parallel stiffness
  PEFactor = .SubjectMusPar.PEFactor; ///< Parameter for influence of parallel stiffness
};

AnyMuscleModel3E QuadratusFemoris2Par =
{
  AnyFolder& MuscleParameters = .SubjectMusPar.QuadratusFemoris;
  AnyIntVar MuscleElemNo = 2; ///< The number of this element of the muscle
  AnyIntVar MuscleElemAmount = 4; ///< The total amount of elements for this muscle
  F0 = .SubjectMusPar.PCSAfactor*PCSA; ///< Maximum force output at optimum fiber length
  Lf0 = MuscleParameters.OptimalFiberlength; ///< Optimum fiber length
  Vol0 = 1e-6*MuscleParameters.MuscleVolume/MuscleElemAmount; /// Muscle volume in (m3)
  AnyVar PCSA = 1e4*Vol0/Lf0;///< PCSA (cm2) is calculated as muscle volume divided between muscle branches and divided by fiber length
  Lt0 = max({MuscleParameters.TotalTendonLength, 0.001}); ///< Tendon slack length (Cannot be zero)
  Gamma0 = MuscleParameters.Pennationangle*(pi/180); ///< Pennation angle in radian
  Epsilon0 = MuscleParameters.Epsilon0; ///< Tendon strain at F0
  K1 = MuscleParameters.K1; ///< Factor for determining shortening speed at optimum length
  K2 = MuscleParameters.K2; ///< Factor for determining shortening speed at optimum length
  Fcfast = MuscleParameters.Fcfast; ///< Factor for determining shortening speed at optimum length
  Jt = .SubjectMusPar.Jt; ///< Shape parameter for the tendon stiffness
  Jpe = .SubjectMusPar.Jpe; ///< Shape parameter for the parallel stiffness
  PEFactor = .SubjectMusPar.PEFactor; ///< Parameter for influence of parallel stiffness
};

AnyMuscleModel3E QuadratusFemoris3Par =
{
  AnyFolder& MuscleParameters = .SubjectMusPar.QuadratusFemoris;
  AnyIntVar MuscleElemNo = 3; ///< The number of this element of the muscle
  AnyIntVar MuscleElemAmount = 4; ///< The total amount of elements for this muscle
  F0 = .SubjectMusPar.PCSAfactor*PCSA; ///< Maximum force output at optimum fiber length
  Lf0 = MuscleParameters.OptimalFiberlength; ///< Optimum fiber length
  Vol0 = 1e-6*MuscleParameters.MuscleVolume/MuscleElemAmount; /// Muscle volume in (m3)
  AnyVar PCSA = 1e4*Vol0/Lf0;///< PCSA (cm2) is calculated as muscle volume divided between muscle branches and divided by fiber length
  Lt0 = max({MuscleParameters.TotalTendonLength, 0.001}); ///< Tendon slack length (Cannot be zero)
  Gamma0 = MuscleParameters.Pennationangle*(pi/180); ///< Pennation angle in radian
  Epsilon0 = MuscleParameters.Epsilon0; ///< Tendon strain at F0
  K1 = MuscleParameters.K1; ///< Factor for determining shortening speed at optimum length
  K2 = MuscleParameters.K2; ///< Factor for determining shortening speed at optimum length
  Fcfast = MuscleParameters.Fcfast; ///< Factor for determining shortening speed at optimum length
  Jt = .SubjectMusPar.Jt; ///< Shape parameter for the tendon stiffness
  Jpe = .SubjectMusPar.Jpe; ///< Shape parameter for the parallel stiffness
  PEFactor = .SubjectMusPar.PEFactor; ///< Parameter for influence of parallel stiffness
};

AnyMuscleModel3E QuadratusFemoris4Par =
{
  AnyFolder& MuscleParameters = .SubjectMusPar.QuadratusFemoris;
  AnyIntVar MuscleElemNo = 4; ///< The number of this element of the muscle
  AnyIntVar MuscleElemAmount = 4; ///< The total amount of elements for this muscle
  F0 = .SubjectMusPar.PCSAfactor*PCSA; ///< Maximum force output at optimum fiber length
  Lf0 = MuscleParameters.OptimalFiberlength; ///< Optimum fiber length
  Vol0 = 1e-6*MuscleParameters.MuscleVolume/MuscleElemAmount; /// Muscle volume in (m3)
  AnyVar PCSA = 1e4*Vol0/Lf0;///< PCSA (cm2) is calculated as muscle volume divided between muscle branches and divided by fiber length
  Lt0 = max({MuscleParameters.TotalTendonLength, 0.001}); ///< Tendon slack length (Cannot be zero)
  Gamma0 = MuscleParameters.Pennationangle*(pi/180); ///< Pennation angle in radian
  Epsilon0 = MuscleParameters.Epsilon0; ///< Tendon strain at F0
  K1 = MuscleParameters.K1; ///< Factor for determining shortening speed at optimum length
  K2 = MuscleParameters.K2; ///< Factor for determining shortening speed at optimum length
  Fcfast = MuscleParameters.Fcfast; ///< Factor for determining shortening speed at optimum length
  Jt = .SubjectMusPar.Jt; ///< Shape parameter for the tendon stiffness
  Jpe = .SubjectMusPar.Jpe; ///< Shape parameter for the parallel stiffness
  PEFactor = .SubjectMusPar.PEFactor; ///< Parameter for influence of parallel stiffness
};


////////////////////////////////////////
//     RectusFemoris (2 elements)     //
////////////////////////////////////////
AnyMuscleModel3E RectusFemoris1Par =
{
  AnyFolder& MuscleParameters = .SubjectMusPar.RectusFemoris;
  AnyIntVar MuscleElemNo = 1; ///< The number of this element of the muscle
  AnyIntVar MuscleElemAmount = 2; ///< The total amount of elements for this muscle
  F0 = .SubjectMusPar.PCSAfactor*PCSA; ///< Maximum force output at optimum fiber length
  Lf0 = MuscleParameters.OptimalFiberlength; ///< Optimum fiber length
  Vol0 = 1e-6*MuscleParameters.MuscleVolume/MuscleElemAmount; /// Muscle volume in (m3)
  AnyVar PCSA = 1e4*Vol0/Lf0;///< PCSA (cm2) is calculated as muscle volume divided between muscle branches and divided by fiber length
  Lt0 = max({MuscleParameters.TotalTendonLength, 0.001}); ///< Tendon slack length (Cannot be zero)
  Gamma0 = MuscleParameters.Pennationangle*(pi/180); ///< Pennation angle in radian
  Epsilon0 = MuscleParameters.Epsilon0; ///< Tendon strain at F0
  K1 = MuscleParameters.K1; ///< Factor for determining shortening speed at optimum length
  K2 = MuscleParameters.K2; ///< Factor for determining shortening speed at optimum length
  Fcfast = MuscleParameters.Fcfast; ///< Factor for determining shortening speed at optimum length
  Jt = .SubjectMusPar.Jt; ///< Shape parameter for the tendon stiffness
  Jpe = .SubjectMusPar.Jpe; ///< Shape parameter for the parallel stiffness
  PEFactor = .SubjectMusPar.PEFactor; ///< Parameter for influence of parallel stiffness
};

AnyMuscleModel3E RectusFemoris2Par =
{
  AnyFolder& MuscleParameters = .SubjectMusPar.RectusFemoris;
  AnyIntVar MuscleElemNo = 2; ///< The number of this element of the muscle
  AnyIntVar MuscleElemAmount = 2; ///< The total amount of elements for this muscle
  F0 = .SubjectMusPar.PCSAfactor*PCSA; ///< Maximum force output at optimum fiber length
  Lf0 = MuscleParameters.OptimalFiberlength; ///< Optimum fiber length
  Vol0 = 1e-6*MuscleParameters.MuscleVolume/MuscleElemAmount; /// Muscle volume in (m3)
  AnyVar PCSA = 1e4*Vol0/Lf0;///< PCSA (cm2) is calculated as muscle volume divided between muscle branches and divided by fiber length
  Lt0 = max({MuscleParameters.TotalTendonLength, 0.001}); ///< Tendon slack length (Cannot be zero)
  Gamma0 = MuscleParameters.Pennationangle*(pi/180); ///< Pennation angle in radian
  Epsilon0 = MuscleParameters.Epsilon0; ///< Tendon strain at F0
  K1 = MuscleParameters.K1; ///< Factor for determining shortening speed at optimum length
  K2 = MuscleParameters.K2; ///< Factor for determining shortening speed at optimum length
  Fcfast = MuscleParameters.Fcfast; ///< Factor for determining shortening speed at optimum length
  Jt = .SubjectMusPar.Jt; ///< Shape parameter for the tendon stiffness
  Jpe = .SubjectMusPar.Jpe; ///< Shape parameter for the parallel stiffness
  PEFactor = .SubjectMusPar.PEFactor; ///< Parameter for influence of parallel stiffness
};


////////////////////////////////////////////
//     SartoriusProximal (1 element )     //
////////////////////////////////////////////
AnyMuscleModel3E SartoriusProximal1Par =
{
  AnyFolder& MuscleParameters = .SubjectMusPar.SartoriusProximal;
  AnyIntVar MuscleElemNo = 1; ///< The number of this element of the muscle
  AnyIntVar MuscleElemAmount = 1; ///< The total amount of elements for this muscle
  F0 = .SubjectMusPar.PCSAfactor*PCSA; ///< Maximum force output at optimum fiber length
  Lf0 = MuscleParameters.OptimalFiberlength; ///< Optimum fiber length
  Vol0 = 1e-6*MuscleParameters.MuscleVolume/MuscleElemAmount; /// Muscle volume in (m3)
  AnyVar PCSA = 1e4*Vol0/Lf0;///< PCSA (cm2) is calculated as muscle volume divided between muscle branches and divided by fiber length
  Lt0 = max({MuscleParameters.TotalTendonLength, 0.001}); ///< Tendon slack length (Cannot be zero)
  Gamma0 = MuscleParameters.Pennationangle*(pi/180); ///< Pennation angle in radian
  Epsilon0 = MuscleParameters.Epsilon0; ///< Tendon strain at F0
  K1 = MuscleParameters.K1; ///< Factor for determining shortening speed at optimum length
  K2 = MuscleParameters.K2; ///< Factor for determining shortening speed at optimum length
  Fcfast = MuscleParameters.Fcfast; ///< Factor for determining shortening speed at optimum length
  Jt = .SubjectMusPar.Jt; ///< Shape parameter for the tendon stiffness
  Jpe = .SubjectMusPar.Jpe; ///< Shape parameter for the parallel stiffness
  PEFactor = .SubjectMusPar.PEFactor; ///< Parameter for influence of parallel stiffness
};


//////////////////////////////////////////
//     SartoriusDistal (1 element )     //
//////////////////////////////////////////
AnyMuscleModel3E SartoriusDistal1Par =
{
  AnyFolder& MuscleParameters = .SubjectMusPar.SartoriusDistal;
  AnyIntVar MuscleElemNo = 1; ///< The number of this element of the muscle
  AnyIntVar MuscleElemAmount = 1; ///< The total amount of elements for this muscle
  F0 = .SubjectMusPar.PCSAfactor*PCSA; ///< Maximum force output at optimum fiber length
  Lf0 = MuscleParameters.OptimalFiberlength; ///< Optimum fiber length
  Vol0 = 1e-6*MuscleParameters.MuscleVolume/MuscleElemAmount; /// Muscle volume in (m3)
  AnyVar PCSA = 1e4*Vol0/Lf0;///< PCSA (cm2) is calculated as muscle volume divided between muscle branches and divided by fiber length
  Lt0 = max({MuscleParameters.TotalTendonLength, 0.001}); ///< Tendon slack length (Cannot be zero)
  Gamma0 = MuscleParameters.Pennationangle*(pi/180); ///< Pennation angle in radian
  Epsilon0 = MuscleParameters.Epsilon0; ///< Tendon strain at F0
  K1 = MuscleParameters.K1; ///< Factor for determining shortening speed at optimum length
  K2 = MuscleParameters.K2; ///< Factor for determining shortening speed at optimum length
  Fcfast = MuscleParameters.Fcfast; ///< Factor for determining shortening speed at optimum length
  Jt = .SubjectMusPar.Jt; ///< Shape parameter for the tendon stiffness
  Jpe = .SubjectMusPar.Jpe; ///< Shape parameter for the parallel stiffness
  PEFactor = .SubjectMusPar.PEFactor; ///< Parameter for influence of parallel stiffness
};


//////////////////////////////////////////
//     Semimembranosus (1 element )     //
//////////////////////////////////////////
AnyMuscleModel3E Semimembranosus1Par =
{
  AnyFolder& MuscleParameters = .SubjectMusPar.Semimembranosus;
  AnyIntVar MuscleElemNo = 1; ///< The number of this element of the muscle
  AnyIntVar MuscleElemAmount = 1; ///< The total amount of elements for this muscle
  F0 = .SubjectMusPar.PCSAfactor*PCSA; ///< Maximum force output at optimum fiber length
  Lf0 = MuscleParameters.OptimalFiberlength; ///< Optimum fiber length
  Vol0 = 1e-6*MuscleParameters.MuscleVolume/MuscleElemAmount; /// Muscle volume in (m3)
  AnyVar PCSA = 1e4*Vol0/Lf0;///< PCSA (cm2) is calculated as muscle volume divided between muscle branches and divided by fiber length
  Lt0 = max({MuscleParameters.TotalTendonLength, 0.001}); ///< Tendon slack length (Cannot be zero)
  Gamma0 = MuscleParameters.Pennationangle*(pi/180); ///< Pennation angle in radian
  Epsilon0 = MuscleParameters.Epsilon0; ///< Tendon strain at F0
  K1 = MuscleParameters.K1; ///< Factor for determining shortening speed at optimum length
  K2 = MuscleParameters.K2; ///< Factor for determining shortening speed at optimum length
  Fcfast = MuscleParameters.Fcfast; ///< Factor for determining shortening speed at optimum length
  Jt = .SubjectMusPar.Jt; ///< Shape parameter for the tendon stiffness
  Jpe = .SubjectMusPar.Jpe; ///< Shape parameter for the parallel stiffness
  PEFactor = .SubjectMusPar.PEFactor; ///< Parameter for influence of parallel stiffness
};


/////////////////////////////////////////
//     Semitendinosus (1 element )     //
/////////////////////////////////////////
AnyMuscleModel3E Semitendinosus1Par =
{
  AnyFolder& MuscleParameters = .SubjectMusPar.Semitendinosus;
  AnyIntVar MuscleElemNo = 1; ///< The number of this element of the muscle
  AnyIntVar MuscleElemAmount = 1; ///< The total amount of elements for this muscle
  F0 = .SubjectMusPar.PCSAfactor*PCSA; ///< Maximum force output at optimum fiber length
  Lf0 = MuscleParameters.OptimalFiberlength; ///< Optimum fiber length
  Vol0 = 1e-6*MuscleParameters.MuscleVolume/MuscleElemAmount; /// Muscle volume in (m3)
  AnyVar PCSA = 1e4*Vol0/Lf0;///< PCSA (cm2) is calculated as muscle volume divided between muscle branches and divided by fiber length
  Lt0 = max({MuscleParameters.TotalTendonLength, 0.001}); ///< Tendon slack length (Cannot be zero)
  Gamma0 = MuscleParameters.Pennationangle*(pi/180); ///< Pennation angle in radian
  Epsilon0 = MuscleParameters.Epsilon0; ///< Tendon strain at F0
  K1 = MuscleParameters.K1; ///< Factor for determining shortening speed at optimum length
  K2 = MuscleParameters.K2; ///< Factor for determining shortening speed at optimum length
  Fcfast = MuscleParameters.Fcfast; ///< Factor for determining shortening speed at optimum length
  Jt = .SubjectMusPar.Jt; ///< Shape parameter for the tendon stiffness
  Jpe = .SubjectMusPar.Jpe; ///< Shape parameter for the parallel stiffness
  PEFactor = .SubjectMusPar.PEFactor; ///< Parameter for influence of parallel stiffness
};


/////////////////////////////////////////
//     SoleusMedialis (3 elements)     //
/////////////////////////////////////////
AnyMuscleModel3E SoleusMedialis1Par =
{
  AnyFolder& MuscleParameters = .SubjectMusPar.SoleusMedialis;
  AnyIntVar MuscleElemNo = 1; ///< The number of this element of the muscle
  AnyIntVar MuscleElemAmount = 3; ///< The total amount of elements for this muscle
  F0 = .SubjectMusPar.PCSAfactor*PCSA; ///< Maximum force output at optimum fiber length
  Lf0 = MuscleParameters.OptimalFiberlength; ///< Optimum fiber length
  Vol0 = 1e-6*MuscleParameters.MuscleVolume/MuscleElemAmount; /// Muscle volume in (m3)
  AnyVar PCSA = 1e4*Vol0/Lf0;///< PCSA (cm2) is calculated as muscle volume divided between muscle branches and divided by fiber length
  Lt0 = max({MuscleParameters.TotalTendonLength, 0.001}); ///< Tendon slack length (Cannot be zero)
  Gamma0 = MuscleParameters.Pennationangle*(pi/180); ///< Pennation angle in radian
  Epsilon0 = MuscleParameters.Epsilon0; ///< Tendon strain at F0
  K1 = MuscleParameters.K1; ///< Factor for determining shortening speed at optimum length
  K2 = MuscleParameters.K2; ///< Factor for determining shortening speed at optimum length
  Fcfast = MuscleParameters.Fcfast; ///< Factor for determining shortening speed at optimum length
  Jt = .SubjectMusPar.Jt; ///< Shape parameter for the tendon stiffness
  Jpe = .SubjectMusPar.Jpe; ///< Shape parameter for the parallel stiffness
  PEFactor = .SubjectMusPar.PEFactor; ///< Parameter for influence of parallel stiffness
};

AnyMuscleModel3E SoleusMedialis2Par =
{
  AnyFolder& MuscleParameters = .SubjectMusPar.SoleusMedialis;
  AnyIntVar MuscleElemNo = 2; ///< The number of this element of the muscle
  AnyIntVar MuscleElemAmount = 3; ///< The total amount of elements for this muscle
  F0 = .SubjectMusPar.PCSAfactor*PCSA; ///< Maximum force output at optimum fiber length
  Lf0 = MuscleParameters.OptimalFiberlength; ///< Optimum fiber length
  Vol0 = 1e-6*MuscleParameters.MuscleVolume/MuscleElemAmount; /// Muscle volume in (m3)
  AnyVar PCSA = 1e4*Vol0/Lf0;///< PCSA (cm2) is calculated as muscle volume divided between muscle branches and divided by fiber length
  Lt0 = max({MuscleParameters.TotalTendonLength, 0.001}); ///< Tendon slack length (Cannot be zero)
  Gamma0 = MuscleParameters.Pennationangle*(pi/180); ///< Pennation angle in radian
  Epsilon0 = MuscleParameters.Epsilon0; ///< Tendon strain at F0
  K1 = MuscleParameters.K1; ///< Factor for determining shortening speed at optimum length
  K2 = MuscleParameters.K2; ///< Factor for determining shortening speed at optimum length
  Fcfast = MuscleParameters.Fcfast; ///< Factor for determining shortening speed at optimum length
  Jt = .SubjectMusPar.Jt; ///< Shape parameter for the tendon stiffness
  Jpe = .SubjectMusPar.Jpe; ///< Shape parameter for the parallel stiffness
  PEFactor = .SubjectMusPar.PEFactor; ///< Parameter for influence of parallel stiffness
};

AnyMuscleModel3E SoleusMedialis3Par =
{
  AnyFolder& MuscleParameters = .SubjectMusPar.SoleusMedialis;
  AnyIntVar MuscleElemNo = 3; ///< The number of this element of the muscle
  AnyIntVar MuscleElemAmount = 3; ///< The total amount of elements for this muscle
  F0 = .SubjectMusPar.PCSAfactor*PCSA; ///< Maximum force output at optimum fiber length
  Lf0 = MuscleParameters.OptimalFiberlength; ///< Optimum fiber length
  Vol0 = 1e-6*MuscleParameters.MuscleVolume/MuscleElemAmount; /// Muscle volume in (m3)
  AnyVar PCSA = 1e4*Vol0/Lf0;///< PCSA (cm2) is calculated as muscle volume divided between muscle branches and divided by fiber length
  Lt0 = max({MuscleParameters.TotalTendonLength, 0.001}); ///< Tendon slack length (Cannot be zero)
  Gamma0 = MuscleParameters.Pennationangle*(pi/180); ///< Pennation angle in radian
  Epsilon0 = MuscleParameters.Epsilon0; ///< Tendon strain at F0
  K1 = MuscleParameters.K1; ///< Factor for determining shortening speed at optimum length
  K2 = MuscleParameters.K2; ///< Factor for determining shortening speed at optimum length
  Fcfast = MuscleParameters.Fcfast; ///< Factor for determining shortening speed at optimum length
  Jt = .SubjectMusPar.Jt; ///< Shape parameter for the tendon stiffness
  Jpe = .SubjectMusPar.Jpe; ///< Shape parameter for the parallel stiffness
  PEFactor = .SubjectMusPar.PEFactor; ///< Parameter for influence of parallel stiffness
};


//////////////////////////////////////////
//     SoleusLateralis (3 elements)     //
//////////////////////////////////////////
AnyMuscleModel3E SoleusLateralis1Par =
{
  AnyFolder& MuscleParameters = .SubjectMusPar.SoleusLateralis;
  AnyIntVar MuscleElemNo = 1; ///< The number of this element of the muscle
  AnyIntVar MuscleElemAmount = 3; ///< The total amount of elements for this muscle
  F0 = .SubjectMusPar.PCSAfactor*PCSA; ///< Maximum force output at optimum fiber length
  Lf0 = MuscleParameters.OptimalFiberlength; ///< Optimum fiber length
  Vol0 = 1e-6*MuscleParameters.MuscleVolume/MuscleElemAmount; /// Muscle volume in (m3)
  AnyVar PCSA = 1e4*Vol0/Lf0;///< PCSA (cm2) is calculated as muscle volume divided between muscle branches and divided by fiber length
  Lt0 = max({MuscleParameters.TotalTendonLength, 0.001}); ///< Tendon slack length (Cannot be zero)
  Gamma0 = MuscleParameters.Pennationangle*(pi/180); ///< Pennation angle in radian
  Epsilon0 = MuscleParameters.Epsilon0; ///< Tendon strain at F0
  K1 = MuscleParameters.K1; ///< Factor for determining shortening speed at optimum length
  K2 = MuscleParameters.K2; ///< Factor for determining shortening speed at optimum length
  Fcfast = MuscleParameters.Fcfast; ///< Factor for determining shortening speed at optimum length
  Jt = .SubjectMusPar.Jt; ///< Shape parameter for the tendon stiffness
  Jpe = .SubjectMusPar.Jpe; ///< Shape parameter for the parallel stiffness
  PEFactor = .SubjectMusPar.PEFactor; ///< Parameter for influence of parallel stiffness
};

AnyMuscleModel3E SoleusLateralis2Par =
{
  AnyFolder& MuscleParameters = .SubjectMusPar.SoleusLateralis;
  AnyIntVar MuscleElemNo = 2; ///< The number of this element of the muscle
  AnyIntVar MuscleElemAmount = 3; ///< The total amount of elements for this muscle
  F0 = .SubjectMusPar.PCSAfactor*PCSA; ///< Maximum force output at optimum fiber length
  Lf0 = MuscleParameters.OptimalFiberlength; ///< Optimum fiber length
  Vol0 = 1e-6*MuscleParameters.MuscleVolume/MuscleElemAmount; /// Muscle volume in (m3)
  AnyVar PCSA = 1e4*Vol0/Lf0;///< PCSA (cm2) is calculated as muscle volume divided between muscle branches and divided by fiber length
  Lt0 = max({MuscleParameters.TotalTendonLength, 0.001}); ///< Tendon slack length (Cannot be zero)
  Gamma0 = MuscleParameters.Pennationangle*(pi/180); ///< Pennation angle in radian
  Epsilon0 = MuscleParameters.Epsilon0; ///< Tendon strain at F0
  K1 = MuscleParameters.K1; ///< Factor for determining shortening speed at optimum length
  K2 = MuscleParameters.K2; ///< Factor for determining shortening speed at optimum length
  Fcfast = MuscleParameters.Fcfast; ///< Factor for determining shortening speed at optimum length
  Jt = .SubjectMusPar.Jt; ///< Shape parameter for the tendon stiffness
  Jpe = .SubjectMusPar.Jpe; ///< Shape parameter for the parallel stiffness
  PEFactor = .SubjectMusPar.PEFactor; ///< Parameter for influence of parallel stiffness
};
AnyMuscleModel3E SoleusLateralis3Par =
{
  AnyFolder& MuscleParameters = .SubjectMusPar.SoleusLateralis;
  AnyIntVar MuscleElemNo = 3; ///< The number of this element of the muscle
  AnyIntVar MuscleElemAmount = 3; ///< The total amount of elements for this muscle
  F0 = .SubjectMusPar.PCSAfactor*PCSA; ///< Maximum force output at optimum fiber length
  Lf0 = MuscleParameters.OptimalFiberlength; ///< Optimum fiber length
  Vol0 = 1e-6*MuscleParameters.MuscleVolume/MuscleElemAmount; /// Muscle volume in (m3)
  AnyVar PCSA = 1e4*Vol0/Lf0;///< PCSA (cm2) is calculated as muscle volume divided between muscle branches and divided by fiber length
  Lt0 = max({MuscleParameters.TotalTendonLength, 0.001}); ///< Tendon slack length (Cannot be zero)
  Gamma0 = MuscleParameters.Pennationangle*(pi/180); ///< Pennation angle in radian
  Epsilon0 = MuscleParameters.Epsilon0; ///< Tendon strain at F0
  K1 = MuscleParameters.K1; ///< Factor for determining shortening speed at optimum length
  K2 = MuscleParameters.K2; ///< Factor for determining shortening speed at optimum length
  Fcfast = MuscleParameters.Fcfast; ///< Factor for determining shortening speed at optimum length
  Jt = .SubjectMusPar.Jt; ///< Shape parameter for the tendon stiffness
  Jpe = .SubjectMusPar.Jpe; ///< Shape parameter for the parallel stiffness
  PEFactor = .SubjectMusPar.PEFactor; ///< Parameter for influence of parallel stiffness
};


/////////////////////////////////////////////
//     TensorFasciaeLatae (2 elements)     //
/////////////////////////////////////////////
AnyMuscleModel3E TensorFasciaeLatae1Par =
{
  AnyFolder& MuscleParameters = .SubjectMusPar.TensorFasciaeLatae;
  AnyIntVar MuscleElemNo = 1; ///< The number of this element of the muscle
  AnyIntVar MuscleElemAmount = 2; ///< The total amount of elements for this muscle
  F0 = .SubjectMusPar.PCSAfactor*PCSA; ///< Maximum force output at optimum fiber length
  Lf0 = MuscleParameters.OptimalFiberlength; ///< Optimum fiber length
  Vol0 = 1e-6*MuscleParameters.MuscleVolume/MuscleElemAmount; /// Muscle volume in (m3)
  AnyVar PCSA = 1e4*Vol0/Lf0;///< PCSA (cm2) is calculated as muscle volume divided between muscle branches and divided by fiber length
  Lt0 = max({MuscleParameters.TotalTendonLength, 0.001}); ///< Tendon slack length (Cannot be zero)
  Gamma0 = MuscleParameters.Pennationangle*(pi/180); ///< Pennation angle in radian
  Epsilon0 = MuscleParameters.Epsilon0; ///< Tendon strain at F0
  K1 = MuscleParameters.K1; ///< Factor for determining shortening speed at optimum length
  K2 = MuscleParameters.K2; ///< Factor for determining shortening speed at optimum length
  Fcfast = MuscleParameters.Fcfast; ///< Factor for determining shortening speed at optimum length
  Jt = .SubjectMusPar.Jt; ///< Shape parameter for the tendon stiffness
  Jpe = .SubjectMusPar.Jpe; ///< Shape parameter for the parallel stiffness
  PEFactor = .SubjectMusPar.PEFactor; ///< Parameter for influence of parallel stiffness
};

AnyMuscleModel3E TensorFasciaeLatae2Par =
{
  AnyFolder& MuscleParameters = .SubjectMusPar.TensorFasciaeLatae;
  AnyIntVar MuscleElemNo = 2; ///< The number of this element of the muscle
  AnyIntVar MuscleElemAmount = 2; ///< The total amount of elements for this muscle
  F0 = .SubjectMusPar.PCSAfactor*PCSA; ///< Maximum force output at optimum fiber length
  Lf0 = MuscleParameters.OptimalFiberlength; ///< Optimum fiber length
  Vol0 = 1e-6*MuscleParameters.MuscleVolume/MuscleElemAmount; /// Muscle volume in (m3)
  AnyVar PCSA = 1e4*Vol0/Lf0;///< PCSA (cm2) is calculated as muscle volume divided between muscle branches and divided by fiber length
  Lt0 = max({MuscleParameters.TotalTendonLength, 0.001}); ///< Tendon slack length (Cannot be zero)
  Gamma0 = MuscleParameters.Pennationangle*(pi/180); ///< Pennation angle in radian
  Epsilon0 = MuscleParameters.Epsilon0; ///< Tendon strain at F0
  K1 = MuscleParameters.K1; ///< Factor for determining shortening speed at optimum length
  K2 = MuscleParameters.K2; ///< Factor for determining shortening speed at optimum length
  Fcfast = MuscleParameters.Fcfast; ///< Factor for determining shortening speed at optimum length
  Jt = .SubjectMusPar.Jt; ///< Shape parameter for the tendon stiffness
  Jpe = .SubjectMusPar.Jpe; ///< Shape parameter for the parallel stiffness
  PEFactor = .SubjectMusPar.PEFactor; ///< Parameter for influence of parallel stiffness
};


///////////////////////////////////////////
//     TibialisAnterior (3 elements)     //
///////////////////////////////////////////
AnyMuscleModel3E TibialisAnterior1Par =
{
  AnyFolder& MuscleParameters = .SubjectMusPar.TibialisAnterior;
  AnyIntVar MuscleElemNo = 1; ///< The number of this element of the muscle
  AnyIntVar MuscleElemAmount = 3; ///< The total amount of elements for this muscle
  F0 = .SubjectMusPar.PCSAfactor*PCSA; ///< Maximum force output at optimum fiber length
  Lf0 = MuscleParameters.OptimalFiberlength; ///< Optimum fiber length
  Vol0 = 1e-6*MuscleParameters.MuscleVolume/MuscleElemAmount; /// Muscle volume in (m3)
  AnyVar PCSA = 1e4*Vol0/Lf0;///< PCSA (cm2) is calculated as muscle volume divided between muscle branches and divided by fiber length
  Lt0 = max({MuscleParameters.TotalTendonLength, 0.001}); ///< Tendon slack length (Cannot be zero)
  Gamma0 = MuscleParameters.Pennationangle*(pi/180); ///< Pennation angle in radian
  Epsilon0 = MuscleParameters.Epsilon0; ///< Tendon strain at F0
  K1 = MuscleParameters.K1; ///< Factor for determining shortening speed at optimum length
  K2 = MuscleParameters.K2; ///< Factor for determining shortening speed at optimum length
  Fcfast = MuscleParameters.Fcfast; ///< Factor for determining shortening speed at optimum length
  Jt = .SubjectMusPar.Jt; ///< Shape parameter for the tendon stiffness
  Jpe = .SubjectMusPar.Jpe; ///< Shape parameter for the parallel stiffness
  PEFactor = .SubjectMusPar.PEFactor; ///< Parameter for influence of parallel stiffness
};

AnyMuscleModel3E TibialisAnterior2Par =
{
  AnyFolder& MuscleParameters = .SubjectMusPar.TibialisAnterior;
  AnyIntVar MuscleElemNo = 2; ///< The number of this element of the muscle
  AnyIntVar MuscleElemAmount = 3; ///< The total amount of elements for this muscle
  F0 = .SubjectMusPar.PCSAfactor*PCSA; ///< Maximum force output at optimum fiber length
  Lf0 = MuscleParameters.OptimalFiberlength; ///< Optimum fiber length
  Vol0 = 1e-6*MuscleParameters.MuscleVolume/MuscleElemAmount; /// Muscle volume in (m3)
  AnyVar PCSA = 1e4*Vol0/Lf0;///< PCSA (cm2) is calculated as muscle volume divided between muscle branches and divided by fiber length
  Lt0 = max({MuscleParameters.TotalTendonLength, 0.001}); ///< Tendon slack length (Cannot be zero)
  Gamma0 = MuscleParameters.Pennationangle*(pi/180); ///< Pennation angle in radian
  Epsilon0 = MuscleParameters.Epsilon0; ///< Tendon strain at F0
  K1 = MuscleParameters.K1; ///< Factor for determining shortening speed at optimum length
  K2 = MuscleParameters.K2; ///< Factor for determining shortening speed at optimum length
  Fcfast = MuscleParameters.Fcfast; ///< Factor for determining shortening speed at optimum length
  Jt = .SubjectMusPar.Jt; ///< Shape parameter for the tendon stiffness
  Jpe = .SubjectMusPar.Jpe; ///< Shape parameter for the parallel stiffness
  PEFactor = .SubjectMusPar.PEFactor; ///< Parameter for influence of parallel stiffness
};

AnyMuscleModel3E TibialisAnterior3Par =
{
  AnyFolder& MuscleParameters = .SubjectMusPar.TibialisAnterior;
  AnyIntVar MuscleElemNo = 3; ///< The number of this element of the muscle
  AnyIntVar MuscleElemAmount = 3; ///< The total amount of elements for this muscle
  F0 = .SubjectMusPar.PCSAfactor*PCSA; ///< Maximum force output at optimum fiber length
  Lf0 = MuscleParameters.OptimalFiberlength; ///< Optimum fiber length
  Vol0 = 1e-6*MuscleParameters.MuscleVolume/MuscleElemAmount; /// Muscle volume in (m3)
  AnyVar PCSA = 1e4*Vol0/Lf0;///< PCSA (cm2) is calculated as muscle volume divided between muscle branches and divided by fiber length
  Lt0 = max({MuscleParameters.TotalTendonLength, 0.001}); ///< Tendon slack length (Cannot be zero)
  Gamma0 = MuscleParameters.Pennationangle*(pi/180); ///< Pennation angle in radian
  Epsilon0 = MuscleParameters.Epsilon0; ///< Tendon strain at F0
  K1 = MuscleParameters.K1; ///< Factor for determining shortening speed at optimum length
  K2 = MuscleParameters.K2; ///< Factor for determining shortening speed at optimum length
  Fcfast = MuscleParameters.Fcfast; ///< Factor for determining shortening speed at optimum length
  Jt = .SubjectMusPar.Jt; ///< Shape parameter for the tendon stiffness
  Jpe = .SubjectMusPar.Jpe; ///< Shape parameter for the parallel stiffness
  PEFactor = .SubjectMusPar.PEFactor; ///< Parameter for influence of parallel stiffness
};


////////////////////////////////////////////////////
//     TibialisPosteriorMedialis (3 elements)     //
////////////////////////////////////////////////////
AnyMuscleModel3E TibialisPosteriorMedialis1Par =
{
  AnyFolder& MuscleParameters = .SubjectMusPar.TibialisPosteriorMedialis;
  AnyIntVar MuscleElemNo = 1; ///< The number of this element of the muscle
  AnyIntVar MuscleElemAmount = 3; ///< The total amount of elements for this muscle
  F0 = .SubjectMusPar.PCSAfactor*PCSA; ///< Maximum force output at optimum fiber length
  Lf0 = MuscleParameters.OptimalFiberlength; ///< Optimum fiber length
  Vol0 = 1e-6*MuscleParameters.MuscleVolume/MuscleElemAmount; /// Muscle volume in (m3)
  AnyVar PCSA = 1e4*Vol0/Lf0;///< PCSA (cm2) is calculated as muscle volume divided between muscle branches and divided by fiber length
  Lt0 = max({MuscleParameters.TotalTendonLength, 0.001}); ///< Tendon slack length (Cannot be zero)
  Gamma0 = MuscleParameters.Pennationangle*(pi/180); ///< Pennation angle in radian
  Epsilon0 = MuscleParameters.Epsilon0; ///< Tendon strain at F0
  K1 = MuscleParameters.K1; ///< Factor for determining shortening speed at optimum length
  K2 = MuscleParameters.K2; ///< Factor for determining shortening speed at optimum length
  Fcfast = MuscleParameters.Fcfast; ///< Factor for determining shortening speed at optimum length
  Jt = .SubjectMusPar.Jt; ///< Shape parameter for the tendon stiffness
  Jpe = .SubjectMusPar.Jpe; ///< Shape parameter for the parallel stiffness
  PEFactor = .SubjectMusPar.PEFactor; ///< Parameter for influence of parallel stiffness
};

AnyMuscleModel3E TibialisPosteriorMedialis2Par =
{
  AnyFolder& MuscleParameters = .SubjectMusPar.TibialisPosteriorMedialis;
  AnyIntVar MuscleElemNo = 2; ///< The number of this element of the muscle
  AnyIntVar MuscleElemAmount = 3; ///< The total amount of elements for this muscle
  F0 = .SubjectMusPar.PCSAfactor*PCSA; ///< Maximum force output at optimum fiber length
  Lf0 = MuscleParameters.OptimalFiberlength; ///< Optimum fiber length
  Vol0 = 1e-6*MuscleParameters.MuscleVolume/MuscleElemAmount; /// Muscle volume in (m3)
  AnyVar PCSA = 1e4*Vol0/Lf0;///< PCSA (cm2) is calculated as muscle volume divided between muscle branches and divided by fiber length
  Lt0 = max({MuscleParameters.TotalTendonLength, 0.001}); ///< Tendon slack length (Cannot be zero)
  Gamma0 = MuscleParameters.Pennationangle*(pi/180); ///< Pennation angle in radian
  Epsilon0 = MuscleParameters.Epsilon0; ///< Tendon strain at F0
  K1 = MuscleParameters.K1; ///< Factor for determining shortening speed at optimum length
  K2 = MuscleParameters.K2; ///< Factor for determining shortening speed at optimum length
  Fcfast = MuscleParameters.Fcfast; ///< Factor for determining shortening speed at optimum length
  Jt = .SubjectMusPar.Jt; ///< Shape parameter for the tendon stiffness
  Jpe = .SubjectMusPar.Jpe; ///< Shape parameter for the parallel stiffness
  PEFactor = .SubjectMusPar.PEFactor; ///< Parameter for influence of parallel stiffness
};

AnyMuscleModel3E TibialisPosteriorMedialis3Par =
{
  AnyFolder& MuscleParameters = .SubjectMusPar.TibialisPosteriorMedialis;
  AnyIntVar MuscleElemNo = 3; ///< The number of this element of the muscle
  AnyIntVar MuscleElemAmount = 3; ///< The total amount of elements for this muscle
  F0 = .SubjectMusPar.PCSAfactor*PCSA; ///< Maximum force output at optimum fiber length
  Lf0 = MuscleParameters.OptimalFiberlength; ///< Optimum fiber length
  Vol0 = 1e-6*MuscleParameters.MuscleVolume/MuscleElemAmount; /// Muscle volume in (m3)
  AnyVar PCSA = 1e4*Vol0/Lf0;///< PCSA (cm2) is calculated as muscle volume divided between muscle branches and divided by fiber length
  Lt0 = max({MuscleParameters.TotalTendonLength, 0.001}); ///< Tendon slack length (Cannot be zero)
  Gamma0 = MuscleParameters.Pennationangle*(pi/180); ///< Pennation angle in radian
  Epsilon0 = MuscleParameters.Epsilon0; ///< Tendon strain at F0
  K1 = MuscleParameters.K1; ///< Factor for determining shortening speed at optimum length
  K2 = MuscleParameters.K2; ///< Factor for determining shortening speed at optimum length
  Fcfast = MuscleParameters.Fcfast; ///< Factor for determining shortening speed at optimum length
  Jt = .SubjectMusPar.Jt; ///< Shape parameter for the tendon stiffness
  Jpe = .SubjectMusPar.Jpe; ///< Shape parameter for the parallel stiffness
  PEFactor = .SubjectMusPar.PEFactor; ///< Parameter for influence of parallel stiffness
};


/////////////////////////////////////////////////////
//     TibialisPosteriorLateralis (3 elements)     //
/////////////////////////////////////////////////////
AnyMuscleModel3E TibialisPosteriorLateralis1Par =
{
  AnyFolder& MuscleParameters = .SubjectMusPar.TibialisPosteriorLateralis;
  AnyIntVar MuscleElemNo = 1; ///< The number of this element of the muscle
  AnyIntVar MuscleElemAmount = 3; ///< The total amount of elements for this muscle
  F0 = .SubjectMusPar.PCSAfactor*PCSA; ///< Maximum force output at optimum fiber length
  Lf0 = MuscleParameters.OptimalFiberlength; ///< Optimum fiber length
  Vol0 = 1e-6*MuscleParameters.MuscleVolume/MuscleElemAmount; /// Muscle volume in (m3)
  AnyVar PCSA = 1e4*Vol0/Lf0;///< PCSA (cm2) is calculated as muscle volume divided between muscle branches and divided by fiber length
  Lt0 = max({MuscleParameters.TotalTendonLength, 0.001}); ///< Tendon slack length (Cannot be zero)
  Gamma0 = MuscleParameters.Pennationangle*(pi/180); ///< Pennation angle in radian
  Epsilon0 = MuscleParameters.Epsilon0; ///< Tendon strain at F0
  K1 = MuscleParameters.K1; ///< Factor for determining shortening speed at optimum length
  K2 = MuscleParameters.K2; ///< Factor for determining shortening speed at optimum length
  Fcfast = MuscleParameters.Fcfast; ///< Factor for determining shortening speed at optimum length
  Jt = .SubjectMusPar.Jt; ///< Shape parameter for the tendon stiffness
  Jpe = .SubjectMusPar.Jpe; ///< Shape parameter for the parallel stiffness
  PEFactor = .SubjectMusPar.PEFactor; ///< Parameter for influence of parallel stiffness
};

AnyMuscleModel3E TibialisPosteriorLateralis2Par =
{
  AnyFolder& MuscleParameters = .SubjectMusPar.TibialisPosteriorLateralis;
  AnyIntVar MuscleElemNo = 2; ///< The number of this element of the muscle
  AnyIntVar MuscleElemAmount = 3; ///< The total amount of elements for this muscle
  F0 = .SubjectMusPar.PCSAfactor*PCSA; ///< Maximum force output at optimum fiber length
  Lf0 = MuscleParameters.OptimalFiberlength; ///< Optimum fiber length
  Vol0 = 1e-6*MuscleParameters.MuscleVolume/MuscleElemAmount; /// Muscle volume in (m3)
  AnyVar PCSA = 1e4*Vol0/Lf0;///< PCSA (cm2) is calculated as muscle volume divided between muscle branches and divided by fiber length
  Lt0 = max({MuscleParameters.TotalTendonLength, 0.001}); ///< Tendon slack length (Cannot be zero)
  Gamma0 = MuscleParameters.Pennationangle*(pi/180); ///< Pennation angle in radian
  Epsilon0 = MuscleParameters.Epsilon0; ///< Tendon strain at F0
  K1 = MuscleParameters.K1; ///< Factor for determining shortening speed at optimum length
  K2 = MuscleParameters.K2; ///< Factor for determining shortening speed at optimum length
  Fcfast = MuscleParameters.Fcfast; ///< Factor for determining shortening speed at optimum length
  Jt = .SubjectMusPar.Jt; ///< Shape parameter for the tendon stiffness
  Jpe = .SubjectMusPar.Jpe; ///< Shape parameter for the parallel stiffness
  PEFactor = .SubjectMusPar.PEFactor; ///< Parameter for influence of parallel stiffness
};

AnyMuscleModel3E TibialisPosteriorLateralis3Par =
{
  AnyFolder& MuscleParameters = .SubjectMusPar.TibialisPosteriorLateralis;
  AnyIntVar MuscleElemNo = 3; ///< The number of this element of the muscle
  AnyIntVar MuscleElemAmount = 3; ///< The total amount of elements for this muscle
  F0 = .SubjectMusPar.PCSAfactor*PCSA; ///< Maximum force output at optimum fiber length
  Lf0 = MuscleParameters.OptimalFiberlength; ///< Optimum fiber length
  Vol0 = 1e-6*MuscleParameters.MuscleVolume/MuscleElemAmount; /// Muscle volume in (m3)
  AnyVar PCSA = 1e4*Vol0/Lf0;///< PCSA (cm2) is calculated as muscle volume divided between muscle branches and divided by fiber length
  Lt0 = max({MuscleParameters.TotalTendonLength, 0.001}); ///< Tendon slack length (Cannot be zero)
  Gamma0 = MuscleParameters.Pennationangle*(pi/180); ///< Pennation angle in radian
  Epsilon0 = MuscleParameters.Epsilon0; ///< Tendon strain at F0
  K1 = MuscleParameters.K1; ///< Factor for determining shortening speed at optimum length
  K2 = MuscleParameters.K2; ///< Factor for determining shortening speed at optimum length
  Fcfast = MuscleParameters.Fcfast; ///< Factor for determining shortening speed at optimum length
  Jt = .SubjectMusPar.Jt; ///< Shape parameter for the tendon stiffness
  Jpe = .SubjectMusPar.Jpe; ///< Shape parameter for the parallel stiffness
  PEFactor = .SubjectMusPar.PEFactor; ///< Parameter for influence of parallel stiffness
};


////////////////////////////////////////////
//     VastusIntermedius (6 elements)     //
////////////////////////////////////////////
AnyMuscleModel3E VastusIntermedius1Par =
{
  AnyFolder& MuscleParameters = .SubjectMusPar.VastusIntermedius;
  AnyIntVar MuscleElemNo = 1; ///< The number of this element of the muscle
  AnyIntVar MuscleElemAmount = 6; ///< The total amount of elements for this muscle
  F0 = .SubjectMusPar.PCSAfactor*PCSA; ///< Maximum force output at optimum fiber length
  Lf0 = MuscleParameters.OptimalFiberlength; ///< Optimum fiber length
  Vol0 = 1e-6*MuscleParameters.MuscleVolume/MuscleElemAmount; /// Muscle volume in (m3)
  AnyVar PCSA = 1e4*Vol0/Lf0;///< PCSA (cm2) is calculated as muscle volume divided between muscle branches and divided by fiber length
  Lt0 = max({MuscleParameters.TotalTendonLength, 0.001}); ///< Tendon slack length (Cannot be zero)
  Gamma0 = MuscleParameters.Pennationangle*(pi/180); ///< Pennation angle in radian
  Epsilon0 = MuscleParameters.Epsilon0; ///< Tendon strain at F0
  K1 = MuscleParameters.K1; ///< Factor for determining shortening speed at optimum length
  K2 = MuscleParameters.K2; ///< Factor for determining shortening speed at optimum length
  Fcfast = MuscleParameters.Fcfast; ///< Factor for determining shortening speed at optimum length
  Jt = .SubjectMusPar.Jt; ///< Shape parameter for the tendon stiffness
  Jpe = .SubjectMusPar.Jpe; ///< Shape parameter for the parallel stiffness
  PEFactor = .SubjectMusPar.PEFactor; ///< Parameter for influence of parallel stiffness
};

AnyMuscleModel3E VastusIntermedius2Par =
{
  AnyFolder& MuscleParameters = .SubjectMusPar.VastusIntermedius;
  AnyIntVar MuscleElemNo = 2; ///< The number of this element of the muscle
  AnyIntVar MuscleElemAmount = 6; ///< The total amount of elements for this muscle
  F0 = .SubjectMusPar.PCSAfactor*PCSA; ///< Maximum force output at optimum fiber length
  Lf0 = MuscleParameters.OptimalFiberlength; ///< Optimum fiber length
  Vol0 = 1e-6*MuscleParameters.MuscleVolume/MuscleElemAmount; /// Muscle volume in (m3)
  AnyVar PCSA = 1e4*Vol0/Lf0;///< PCSA (cm2) is calculated as muscle volume divided between muscle branches and divided by fiber length
  Lt0 = max({MuscleParameters.TotalTendonLength, 0.001}); ///< Tendon slack length (Cannot be zero)
  Gamma0 = MuscleParameters.Pennationangle*(pi/180); ///< Pennation angle in radian
  Epsilon0 = MuscleParameters.Epsilon0; ///< Tendon strain at F0
  K1 = MuscleParameters.K1; ///< Factor for determining shortening speed at optimum length
  K2 = MuscleParameters.K2; ///< Factor for determining shortening speed at optimum length
  Fcfast = MuscleParameters.Fcfast; ///< Factor for determining shortening speed at optimum length
  Jt = .SubjectMusPar.Jt; ///< Shape parameter for the tendon stiffness
  Jpe = .SubjectMusPar.Jpe; ///< Shape parameter for the parallel stiffness
  PEFactor = .SubjectMusPar.PEFactor; ///< Parameter for influence of parallel stiffness
};

AnyMuscleModel3E VastusIntermedius3Par =
{
  AnyFolder& MuscleParameters = .SubjectMusPar.VastusIntermedius;
  AnyIntVar MuscleElemNo = 3; ///< The number of this element of the muscle
  AnyIntVar MuscleElemAmount = 6; ///< The total amount of elements for this muscle
  F0 = .SubjectMusPar.PCSAfactor*PCSA; ///< Maximum force output at optimum fiber length
  Lf0 = MuscleParameters.OptimalFiberlength; ///< Optimum fiber length
  Vol0 = 1e-6*MuscleParameters.MuscleVolume/MuscleElemAmount; /// Muscle volume in (m3)
  AnyVar PCSA = 1e4*Vol0/Lf0;///< PCSA (cm2) is calculated as muscle volume divided between muscle branches and divided by fiber length
  Lt0 = max({MuscleParameters.TotalTendonLength, 0.001}); ///< Tendon slack length (Cannot be zero)
  Gamma0 = MuscleParameters.Pennationangle*(pi/180); ///< Pennation angle in radian
  Epsilon0 = MuscleParameters.Epsilon0; ///< Tendon strain at F0
  K1 = MuscleParameters.K1; ///< Factor for determining shortening speed at optimum length
  K2 = MuscleParameters.K2; ///< Factor for determining shortening speed at optimum length
  Fcfast = MuscleParameters.Fcfast; ///< Factor for determining shortening speed at optimum length
  Jt = .SubjectMusPar.Jt; ///< Shape parameter for the tendon stiffness
  Jpe = .SubjectMusPar.Jpe; ///< Shape parameter for the parallel stiffness
  PEFactor = .SubjectMusPar.PEFactor; ///< Parameter for influence of parallel stiffness
};

AnyMuscleModel3E VastusIntermedius4Par =
{
  AnyFolder& MuscleParameters = .SubjectMusPar.VastusIntermedius;
  AnyIntVar MuscleElemNo = 4; ///< The number of this element of the muscle
  AnyIntVar MuscleElemAmount = 6; ///< The total amount of elements for this muscle
  F0 = .SubjectMusPar.PCSAfactor*PCSA; ///< Maximum force output at optimum fiber length
  Lf0 = MuscleParameters.OptimalFiberlength; ///< Optimum fiber length
  Vol0 = 1e-6*MuscleParameters.MuscleVolume/MuscleElemAmount; /// Muscle volume in (m3)
  AnyVar PCSA = 1e4*Vol0/Lf0;///< PCSA (cm2) is calculated as muscle volume divided between muscle branches and divided by fiber length
  Lt0 = max({MuscleParameters.TotalTendonLength, 0.001}); ///< Tendon slack length (Cannot be zero)
  Gamma0 = MuscleParameters.Pennationangle*(pi/180); ///< Pennation angle in radian
  Epsilon0 = MuscleParameters.Epsilon0; ///< Tendon strain at F0
  K1 = MuscleParameters.K1; ///< Factor for determining shortening speed at optimum length
  K2 = MuscleParameters.K2; ///< Factor for determining shortening speed at optimum length
  Fcfast = MuscleParameters.Fcfast; ///< Factor for determining shortening speed at optimum length
  Jt = .SubjectMusPar.Jt; ///< Shape parameter for the tendon stiffness
  Jpe = .SubjectMusPar.Jpe; ///< Shape parameter for the parallel stiffness
  PEFactor = .SubjectMusPar.PEFactor; ///< Parameter for influence of parallel stiffness
};

AnyMuscleModel3E VastusIntermedius5Par =
{
  AnyFolder& MuscleParameters = .SubjectMusPar.VastusIntermedius;
  AnyIntVar MuscleElemNo = 5; ///< The number of this element of the muscle
  AnyIntVar MuscleElemAmount = 6; ///< The total amount of elements for this muscle
  F0 = .SubjectMusPar.PCSAfactor*PCSA; ///< Maximum force output at optimum fiber length
  Lf0 = MuscleParameters.OptimalFiberlength; ///< Optimum fiber length
  Vol0 = 1e-6*MuscleParameters.MuscleVolume/MuscleElemAmount; /// Muscle volume in (m3)
  AnyVar PCSA = 1e4*Vol0/Lf0;///< PCSA (cm2) is calculated as muscle volume divided between muscle branches and divided by fiber length
  Lt0 = max({MuscleParameters.TotalTendonLength, 0.001}); ///< Tendon slack length (Cannot be zero)
  Gamma0 = MuscleParameters.Pennationangle*(pi/180); ///< Pennation angle in radian
  Epsilon0 = MuscleParameters.Epsilon0; ///< Tendon strain at F0
  K1 = MuscleParameters.K1; ///< Factor for determining shortening speed at optimum length
  K2 = MuscleParameters.K2; ///< Factor for determining shortening speed at optimum length
  Fcfast = MuscleParameters.Fcfast; ///< Factor for determining shortening speed at optimum length
  Jt = .SubjectMusPar.Jt; ///< Shape parameter for the tendon stiffness
  Jpe = .SubjectMusPar.Jpe; ///< Shape parameter for the parallel stiffness
  PEFactor = .SubjectMusPar.PEFactor; ///< Parameter for influence of parallel stiffness
};

AnyMuscleModel3E VastusIntermedius6Par =
{
  AnyFolder& MuscleParameters = .SubjectMusPar.VastusIntermedius;
  AnyIntVar MuscleElemNo = 6; ///< The number of this element of the muscle
  AnyIntVar MuscleElemAmount = 6; ///< The total amount of elements for this muscle
  F0 = .SubjectMusPar.PCSAfactor*PCSA; ///< Maximum force output at optimum fiber length
  Lf0 = MuscleParameters.OptimalFiberlength; ///< Optimum fiber length
  Vol0 = 1e-6*MuscleParameters.MuscleVolume/MuscleElemAmount; /// Muscle volume in (m3)
  AnyVar PCSA = 1e4*Vol0/Lf0;///< PCSA (cm2) is calculated as muscle volume divided between muscle branches and divided by fiber length
  Lt0 = max({MuscleParameters.TotalTendonLength, 0.001}); ///< Tendon slack length (Cannot be zero)
  Gamma0 = MuscleParameters.Pennationangle*(pi/180); ///< Pennation angle in radian
  Epsilon0 = MuscleParameters.Epsilon0; ///< Tendon strain at F0
  K1 = MuscleParameters.K1; ///< Factor for determining shortening speed at optimum length
  K2 = MuscleParameters.K2; ///< Factor for determining shortening speed at optimum length
  Fcfast = MuscleParameters.Fcfast; ///< Factor for determining shortening speed at optimum length
  Jt = .SubjectMusPar.Jt; ///< Shape parameter for the tendon stiffness
  Jpe = .SubjectMusPar.Jpe; ///< Shape parameter for the parallel stiffness
  PEFactor = .SubjectMusPar.PEFactor; ///< Parameter for influence of parallel stiffness
};


//////////////////////////////////////////////////
//     VastusLateralisInferior (6 elements)     //
//////////////////////////////////////////////////
AnyMuscleModel3E VastusLateralisInferior1Par =
{
  AnyFolder& MuscleParameters = .SubjectMusPar.VastusLateralisInferior;
  AnyIntVar MuscleElemNo = 1; ///< The number of this element of the muscle
  AnyIntVar MuscleElemAmount = 6; ///< The total amount of elements for this muscle
  F0 = .SubjectMusPar.PCSAfactor*PCSA; ///< Maximum force output at optimum fiber length
  Lf0 = MuscleParameters.OptimalFiberlength; ///< Optimum fiber length
  Vol0 = 1e-6*MuscleParameters.MuscleVolume/MuscleElemAmount; /// Muscle volume in (m3)
  AnyVar PCSA = 1e4*Vol0/Lf0;///< PCSA (cm2) is calculated as muscle volume divided between muscle branches and divided by fiber length
  Lt0 = max({MuscleParameters.TotalTendonLength, 0.001}); ///< Tendon slack length (Cannot be zero)
  Gamma0 = MuscleParameters.Pennationangle*(pi/180); ///< Pennation angle in radian
  Epsilon0 = MuscleParameters.Epsilon0; ///< Tendon strain at F0
  K1 = MuscleParameters.K1; ///< Factor for determining shortening speed at optimum length
  K2 = MuscleParameters.K2; ///< Factor for determining shortening speed at optimum length
  Fcfast = MuscleParameters.Fcfast; ///< Factor for determining shortening speed at optimum length
  Jt = .SubjectMusPar.Jt; ///< Shape parameter for the tendon stiffness
  Jpe = .SubjectMusPar.Jpe; ///< Shape parameter for the parallel stiffness
  PEFactor = .SubjectMusPar.PEFactor; ///< Parameter for influence of parallel stiffness
};

AnyMuscleModel3E VastusLateralisInferior2Par =
{
  AnyFolder& MuscleParameters = .SubjectMusPar.VastusLateralisInferior;
  AnyIntVar MuscleElemNo = 2; ///< The number of this element of the muscle
  AnyIntVar MuscleElemAmount = 6; ///< The total amount of elements for this muscle
  F0 = .SubjectMusPar.PCSAfactor*PCSA; ///< Maximum force output at optimum fiber length
  Lf0 = MuscleParameters.OptimalFiberlength; ///< Optimum fiber length
  Vol0 = 1e-6*MuscleParameters.MuscleVolume/MuscleElemAmount; /// Muscle volume in (m3)
  AnyVar PCSA = 1e4*Vol0/Lf0;///< PCSA (cm2) is calculated as muscle volume divided between muscle branches and divided by fiber length
  Lt0 = max({MuscleParameters.TotalTendonLength, 0.001}); ///< Tendon slack length (Cannot be zero)
  Gamma0 = MuscleParameters.Pennationangle*(pi/180); ///< Pennation angle in radian
  Epsilon0 = MuscleParameters.Epsilon0; ///< Tendon strain at F0
  K1 = MuscleParameters.K1; ///< Factor for determining shortening speed at optimum length
  K2 = MuscleParameters.K2; ///< Factor for determining shortening speed at optimum length
  Fcfast = MuscleParameters.Fcfast; ///< Factor for determining shortening speed at optimum length
  Jt = .SubjectMusPar.Jt; ///< Shape parameter for the tendon stiffness
  Jpe = .SubjectMusPar.Jpe; ///< Shape parameter for the parallel stiffness
  PEFactor = .SubjectMusPar.PEFactor; ///< Parameter for influence of parallel stiffness
};

AnyMuscleModel3E VastusLateralisInferior3Par =
{
  AnyFolder& MuscleParameters = .SubjectMusPar.VastusLateralisInferior;
  AnyIntVar MuscleElemNo = 3; ///< The number of this element of the muscle
  AnyIntVar MuscleElemAmount = 6; ///< The total amount of elements for this muscle
  F0 = .SubjectMusPar.PCSAfactor*PCSA; ///< Maximum force output at optimum fiber length
  Lf0 = MuscleParameters.OptimalFiberlength; ///< Optimum fiber length
  Vol0 = 1e-6*MuscleParameters.MuscleVolume/MuscleElemAmount; /// Muscle volume in (m3)
  AnyVar PCSA = 1e4*Vol0/Lf0;///< PCSA (cm2) is calculated as muscle volume divided between muscle branches and divided by fiber length
  Lt0 = max({MuscleParameters.TotalTendonLength, 0.001}); ///< Tendon slack length (Cannot be zero)
  Gamma0 = MuscleParameters.Pennationangle*(pi/180); ///< Pennation angle in radian
  Epsilon0 = MuscleParameters.Epsilon0; ///< Tendon strain at F0
  K1 = MuscleParameters.K1; ///< Factor for determining shortening speed at optimum length
  K2 = MuscleParameters.K2; ///< Factor for determining shortening speed at optimum length
  Fcfast = MuscleParameters.Fcfast; ///< Factor for determining shortening speed at optimum length
  Jt = .SubjectMusPar.Jt; ///< Shape parameter for the tendon stiffness
  Jpe = .SubjectMusPar.Jpe; ///< Shape parameter for the parallel stiffness
  PEFactor = .SubjectMusPar.PEFactor; ///< Parameter for influence of parallel stiffness
};

AnyMuscleModel3E VastusLateralisInferior4Par =
{
  AnyFolder& MuscleParameters = .SubjectMusPar.VastusLateralisInferior;
  AnyIntVar MuscleElemNo = 4; ///< The number of this element of the muscle
  AnyIntVar MuscleElemAmount = 6; ///< The total amount of elements for this muscle
  F0 = .SubjectMusPar.PCSAfactor*PCSA; ///< Maximum force output at optimum fiber length
  Lf0 = MuscleParameters.OptimalFiberlength; ///< Optimum fiber length
  Vol0 = 1e-6*MuscleParameters.MuscleVolume/MuscleElemAmount; /// Muscle volume in (m3)
  AnyVar PCSA = 1e4*Vol0/Lf0;///< PCSA (cm2) is calculated as muscle volume divided between muscle branches and divided by fiber length
  Lt0 = max({MuscleParameters.TotalTendonLength, 0.001}); ///< Tendon slack length (Cannot be zero)
  Gamma0 = MuscleParameters.Pennationangle*(pi/180); ///< Pennation angle in radian
  Epsilon0 = MuscleParameters.Epsilon0; ///< Tendon strain at F0
  K1 = MuscleParameters.K1; ///< Factor for determining shortening speed at optimum length
  K2 = MuscleParameters.K2; ///< Factor for determining shortening speed at optimum length
  Fcfast = MuscleParameters.Fcfast; ///< Factor for determining shortening speed at optimum length
  Jt = .SubjectMusPar.Jt; ///< Shape parameter for the tendon stiffness
  Jpe = .SubjectMusPar.Jpe; ///< Shape parameter for the parallel stiffness
  PEFactor = .SubjectMusPar.PEFactor; ///< Parameter for influence of parallel stiffness
};

AnyMuscleModel3E VastusLateralisInferior5Par =
{
  AnyFolder& MuscleParameters = .SubjectMusPar.VastusLateralisInferior;
  AnyIntVar MuscleElemNo = 5; ///< The number of this element of the muscle
  AnyIntVar MuscleElemAmount = 6; ///< The total amount of elements for this muscle
  F0 = .SubjectMusPar.PCSAfactor*PCSA; ///< Maximum force output at optimum fiber length
  Lf0 = MuscleParameters.OptimalFiberlength; ///< Optimum fiber length
  Vol0 = 1e-6*MuscleParameters.MuscleVolume/MuscleElemAmount; /// Muscle volume in (m3)
  AnyVar PCSA = 1e4*Vol0/Lf0;///< PCSA (cm2) is calculated as muscle volume divided between muscle branches and divided by fiber length
  Lt0 = max({MuscleParameters.TotalTendonLength, 0.001}); ///< Tendon slack length (Cannot be zero)
  Gamma0 = MuscleParameters.Pennationangle*(pi/180); ///< Pennation angle in radian
  Epsilon0 = MuscleParameters.Epsilon0; ///< Tendon strain at F0
  K1 = MuscleParameters.K1; ///< Factor for determining shortening speed at optimum length
  K2 = MuscleParameters.K2; ///< Factor for determining shortening speed at optimum length
  Fcfast = MuscleParameters.Fcfast; ///< Factor for determining shortening speed at optimum length
  Jt = .SubjectMusPar.Jt; ///< Shape parameter for the tendon stiffness
  Jpe = .SubjectMusPar.Jpe; ///< Shape parameter for the parallel stiffness
  PEFactor = .SubjectMusPar.PEFactor; ///< Parameter for influence of parallel stiffness
};

AnyMuscleModel3E VastusLateralisInferior6Par =
{
  AnyFolder& MuscleParameters = .SubjectMusPar.VastusLateralisInferior;
  AnyIntVar MuscleElemNo = 6; ///< The number of this element of the muscle
  AnyIntVar MuscleElemAmount = 6; ///< The total amount of elements for this muscle
  F0 = .SubjectMusPar.PCSAfactor*PCSA; ///< Maximum force output at optimum fiber length
  Lf0 = MuscleParameters.OptimalFiberlength; ///< Optimum fiber length
  Vol0 = 1e-6*MuscleParameters.MuscleVolume/MuscleElemAmount; /// Muscle volume in (m3)
  AnyVar PCSA = 1e4*Vol0/Lf0;///< PCSA (cm2) is calculated as muscle volume divided between muscle branches and divided by fiber length
  Lt0 = max({MuscleParameters.TotalTendonLength, 0.001}); ///< Tendon slack length (Cannot be zero)
  Gamma0 = MuscleParameters.Pennationangle*(pi/180); ///< Pennation angle in radian
  Epsilon0 = MuscleParameters.Epsilon0; ///< Tendon strain at F0
  K1 = MuscleParameters.K1; ///< Factor for determining shortening speed at optimum length
  K2 = MuscleParameters.K2; ///< Factor for determining shortening speed at optimum length
  Fcfast = MuscleParameters.Fcfast; ///< Factor for determining shortening speed at optimum length
  Jt = .SubjectMusPar.Jt; ///< Shape parameter for the tendon stiffness
  Jpe = .SubjectMusPar.Jpe; ///< Shape parameter for the parallel stiffness
  PEFactor = .SubjectMusPar.PEFactor; ///< Parameter for influence of parallel stiffness
};


//////////////////////////////////////////////////
//     VastusLateralisSuperior (2 elements)     //
//////////////////////////////////////////////////
AnyMuscleModel3E VastusLateralisSuperior1Par =
{
  AnyFolder& MuscleParameters = .SubjectMusPar.VastusLateralisSuperior;
  AnyIntVar MuscleElemNo = 1; ///< The number of this element of the muscle
  AnyIntVar MuscleElemAmount = 2; ///< The total amount of elements for this muscle
  F0 = .SubjectMusPar.PCSAfactor*PCSA; ///< Maximum force output at optimum fiber length
  Lf0 = MuscleParameters.OptimalFiberlength; ///< Optimum fiber length
  Vol0 = 1e-6*MuscleParameters.MuscleVolume/MuscleElemAmount; /// Muscle volume in (m3)
  AnyVar PCSA = 1e4*Vol0/Lf0;///< PCSA (cm2) is calculated as muscle volume divided between muscle branches and divided by fiber length
  Lt0 = max({MuscleParameters.TotalTendonLength, 0.001}); ///< Tendon slack length (Cannot be zero)
  Gamma0 = MuscleParameters.Pennationangle*(pi/180); ///< Pennation angle in radian
  Epsilon0 = MuscleParameters.Epsilon0; ///< Tendon strain at F0
  K1 = MuscleParameters.K1; ///< Factor for determining shortening speed at optimum length
  K2 = MuscleParameters.K2; ///< Factor for determining shortening speed at optimum length
  Fcfast = MuscleParameters.Fcfast; ///< Factor for determining shortening speed at optimum length
  Jt = .SubjectMusPar.Jt; ///< Shape parameter for the tendon stiffness
  Jpe = .SubjectMusPar.Jpe; ///< Shape parameter for the parallel stiffness
  PEFactor = .SubjectMusPar.PEFactor; ///< Parameter for influence of parallel stiffness
};

AnyMuscleModel3E VastusLateralisSuperior2Par =
{
  AnyFolder& MuscleParameters = .SubjectMusPar.VastusLateralisSuperior;
  AnyIntVar MuscleElemNo = 2; ///< The number of this element of the muscle
  AnyIntVar MuscleElemAmount = 2; ///< The total amount of elements for this muscle
  F0 = .SubjectMusPar.PCSAfactor*PCSA; ///< Maximum force output at optimum fiber length
  Lf0 = MuscleParameters.OptimalFiberlength; ///< Optimum fiber length
  Vol0 = 1e-6*MuscleParameters.MuscleVolume/MuscleElemAmount; /// Muscle volume in (m3)
  AnyVar PCSA = 1e4*Vol0/Lf0;///< PCSA (cm2) is calculated as muscle volume divided between muscle branches and divided by fiber length
  Lt0 = max({MuscleParameters.TotalTendonLength, 0.001}); ///< Tendon slack length (Cannot be zero)
  Gamma0 = MuscleParameters.Pennationangle*(pi/180); ///< Pennation angle in radian
  Epsilon0 = MuscleParameters.Epsilon0; ///< Tendon strain at F0
  K1 = MuscleParameters.K1; ///< Factor for determining shortening speed at optimum length
  K2 = MuscleParameters.K2; ///< Factor for determining shortening speed at optimum length
  Fcfast = MuscleParameters.Fcfast; ///< Factor for determining shortening speed at optimum length
  Jt = .SubjectMusPar.Jt; ///< Shape parameter for the tendon stiffness
  Jpe = .SubjectMusPar.Jpe; ///< Shape parameter for the parallel stiffness
  PEFactor = .SubjectMusPar.PEFactor; ///< Parameter for influence of parallel stiffness
};


/////////////////////////////////////////////////
//     VastusMedialisInferior (2 elements)     //
/////////////////////////////////////////////////
AnyMuscleModel3E VastusMedialisInferior1Par =
{
  AnyFolder& MuscleParameters = .SubjectMusPar.VastusMedialisInferior;
  AnyIntVar MuscleElemNo = 1; ///< The number of this element of the muscle
  AnyIntVar MuscleElemAmount = 2; ///< The total amount of elements for this muscle
  F0 = .SubjectMusPar.PCSAfactor*PCSA; ///< Maximum force output at optimum fiber length
  Lf0 = MuscleParameters.OptimalFiberlength; ///< Optimum fiber length
  Vol0 = 1e-6*MuscleParameters.MuscleVolume/MuscleElemAmount; /// Muscle volume in (m3)
  AnyVar PCSA = 1e4*Vol0/Lf0;///< PCSA (cm2) is calculated as muscle volume divided between muscle branches and divided by fiber length
  Lt0 = max({MuscleParameters.TotalTendonLength, 0.001}); ///< Tendon slack length (Cannot be zero)
  Gamma0 = MuscleParameters.Pennationangle*(pi/180); ///< Pennation angle in radian
  Epsilon0 = MuscleParameters.Epsilon0; ///< Tendon strain at F0
  K1 = MuscleParameters.K1; ///< Factor for determining shortening speed at optimum length
  K2 = MuscleParameters.K2; ///< Factor for determining shortening speed at optimum length
  Fcfast = MuscleParameters.Fcfast; ///< Factor for determining shortening speed at optimum length
  Jt = .SubjectMusPar.Jt; ///< Shape parameter for the tendon stiffness
  Jpe = .SubjectMusPar.Jpe; ///< Shape parameter for the parallel stiffness
  PEFactor = .SubjectMusPar.PEFactor; ///< Parameter for influence of parallel stiffness
};

AnyMuscleModel3E VastusMedialisInferior2Par =
{
  AnyFolder& MuscleParameters = .SubjectMusPar.VastusMedialisInferior;
  AnyIntVar MuscleElemNo = 2; ///< The number of this element of the muscle
  AnyIntVar MuscleElemAmount = 2; ///< The total amount of elements for this muscle
  F0 = .SubjectMusPar.PCSAfactor*PCSA; ///< Maximum force output at optimum fiber length
  Lf0 = MuscleParameters.OptimalFiberlength; ///< Optimum fiber length
  Vol0 = 1e-6*MuscleParameters.MuscleVolume/MuscleElemAmount; /// Muscle volume in (m3)
  AnyVar PCSA = 1e4*Vol0/Lf0;///< PCSA (cm2) is calculated as muscle volume divided between muscle branches and divided by fiber length
  Lt0 = max({MuscleParameters.TotalTendonLength, 0.001}); ///< Tendon slack length (Cannot be zero)
  Gamma0 = MuscleParameters.Pennationangle*(pi/180); ///< Pennation angle in radian
  Epsilon0 = MuscleParameters.Epsilon0; ///< Tendon strain at F0
  K1 = MuscleParameters.K1; ///< Factor for determining shortening speed at optimum length
  K2 = MuscleParameters.K2; ///< Factor for determining shortening speed at optimum length
  Fcfast = MuscleParameters.Fcfast; ///< Factor for determining shortening speed at optimum length
  Jt = .SubjectMusPar.Jt; ///< Shape parameter for the tendon stiffness
  Jpe = .SubjectMusPar.Jpe; ///< Shape parameter for the parallel stiffness
  PEFactor = .SubjectMusPar.PEFactor; ///< Parameter for influence of parallel stiffness
};


////////////////////////////////////////////
//     VastusMedialisMid (2 elements)     //
////////////////////////////////////////////
AnyMuscleModel3E VastusMedialisMid1Par =
{
  AnyFolder& MuscleParameters = .SubjectMusPar.VastusMedialisMid;
  AnyIntVar MuscleElemNo = 1; ///< The number of this element of the muscle
  AnyIntVar MuscleElemAmount = 2; ///< The total amount of elements for this muscle
  F0 = .SubjectMusPar.PCSAfactor*PCSA; ///< Maximum force output at optimum fiber length
  Lf0 = MuscleParameters.OptimalFiberlength; ///< Optimum fiber length
  Vol0 = 1e-6*MuscleParameters.MuscleVolume/MuscleElemAmount; /// Muscle volume in (m3)
  AnyVar PCSA = 1e4*Vol0/Lf0;///< PCSA (cm2) is calculated as muscle volume divided between muscle branches and divided by fiber length
  Lt0 = max({MuscleParameters.TotalTendonLength, 0.001}); ///< Tendon slack length (Cannot be zero)
  Gamma0 = MuscleParameters.Pennationangle*(pi/180); ///< Pennation angle in radian
  Epsilon0 = MuscleParameters.Epsilon0; ///< Tendon strain at F0
  K1 = MuscleParameters.K1; ///< Factor for determining shortening speed at optimum length
  K2 = MuscleParameters.K2; ///< Factor for determining shortening speed at optimum length
  Fcfast = MuscleParameters.Fcfast; ///< Factor for determining shortening speed at optimum length
  Jt = .SubjectMusPar.Jt; ///< Shape parameter for the tendon stiffness
  Jpe = .SubjectMusPar.Jpe; ///< Shape parameter for the parallel stiffness
  PEFactor = .SubjectMusPar.PEFactor; ///< Parameter for influence of parallel stiffness
};

AnyMuscleModel3E VastusMedialisMid2Par =
{
  AnyFolder& MuscleParameters = .SubjectMusPar.VastusMedialisMid;
  AnyIntVar MuscleElemNo = 2; ///< The number of this element of the muscle
  AnyIntVar MuscleElemAmount = 2; ///< The total amount of elements for this muscle
  F0 = .SubjectMusPar.PCSAfactor*PCSA; ///< Maximum force output at optimum fiber length
  Lf0 = MuscleParameters.OptimalFiberlength; ///< Optimum fiber length
  Vol0 = 1e-6*MuscleParameters.MuscleVolume/MuscleElemAmount; /// Muscle volume in (m3)
  AnyVar PCSA = 1e4*Vol0/Lf0;///< PCSA (cm2) is calculated as muscle volume divided between muscle branches and divided by fiber length
  Lt0 = max({MuscleParameters.TotalTendonLength, 0.001}); ///< Tendon slack length (Cannot be zero)
  Gamma0 = MuscleParameters.Pennationangle*(pi/180); ///< Pennation angle in radian
  Epsilon0 = MuscleParameters.Epsilon0; ///< Tendon strain at F0
  K1 = MuscleParameters.K1; ///< Factor for determining shortening speed at optimum length
  K2 = MuscleParameters.K2; ///< Factor for determining shortening speed at optimum length
  Fcfast = MuscleParameters.Fcfast; ///< Factor for determining shortening speed at optimum length
  Jt = .SubjectMusPar.Jt; ///< Shape parameter for the tendon stiffness
  Jpe = .SubjectMusPar.Jpe; ///< Shape parameter for the parallel stiffness
  PEFactor = .SubjectMusPar.PEFactor; ///< Parameter for influence of parallel stiffness
};


/////////////////////////////////////////////////
//     VastusMedialisSuperior (6 elements)     //
/////////////////////////////////////////////////
AnyMuscleModel3E VastusMedialisSuperior1Par =
{
  AnyFolder& MuscleParameters = .SubjectMusPar.VastusMedialisSuperior;
  AnyIntVar MuscleElemNo = 1; ///< The number of this element of the muscle
  AnyIntVar MuscleElemAmount = 6; ///< The total amount of elements for this muscle
  F0 = .SubjectMusPar.PCSAfactor*PCSA; ///< Maximum force output at optimum fiber length
  Lf0 = MuscleParameters.OptimalFiberlength; ///< Optimum fiber length
  Vol0 = 1e-6*MuscleParameters.MuscleVolume/MuscleElemAmount; /// Muscle volume in (m3)
  AnyVar PCSA = 1e4*Vol0/Lf0;///< PCSA (cm2) is calculated as muscle volume divided between muscle branches and divided by fiber length
  Lt0 = max({MuscleParameters.TotalTendonLength, 0.001}); ///< Tendon slack length (Cannot be zero)
  Gamma0 = MuscleParameters.Pennationangle*(pi/180); ///< Pennation angle in radian
  Epsilon0 = MuscleParameters.Epsilon0; ///< Tendon strain at F0
  K1 = MuscleParameters.K1; ///< Factor for determining shortening speed at optimum length
  K2 = MuscleParameters.K2; ///< Factor for determining shortening speed at optimum length
  Fcfast = MuscleParameters.Fcfast; ///< Factor for determining shortening speed at optimum length
  Jt = .SubjectMusPar.Jt; ///< Shape parameter for the tendon stiffness
  Jpe = .SubjectMusPar.Jpe; ///< Shape parameter for the parallel stiffness
  PEFactor = .SubjectMusPar.PEFactor; ///< Parameter for influence of parallel stiffness
};

AnyMuscleModel3E VastusMedialisSuperior2Par =
{
  AnyFolder& MuscleParameters = .SubjectMusPar.VastusMedialisSuperior;
  AnyIntVar MuscleElemNo = 2; ///< The number of this element of the muscle
  AnyIntVar MuscleElemAmount = 6; ///< The total amount of elements for this muscle
  F0 = .SubjectMusPar.PCSAfactor*PCSA; ///< Maximum force output at optimum fiber length
  Lf0 = MuscleParameters.OptimalFiberlength; ///< Optimum fiber length
  Vol0 = 1e-6*MuscleParameters.MuscleVolume/MuscleElemAmount; /// Muscle volume in (m3)
  AnyVar PCSA = 1e4*Vol0/Lf0;///< PCSA (cm2) is calculated as muscle volume divided between muscle branches and divided by fiber length
  Lt0 = max({MuscleParameters.TotalTendonLength, 0.001}); ///< Tendon slack length (Cannot be zero)
  Gamma0 = MuscleParameters.Pennationangle*(pi/180); ///< Pennation angle in radian
  Epsilon0 = MuscleParameters.Epsilon0; ///< Tendon strain at F0
  K1 = MuscleParameters.K1; ///< Factor for determining shortening speed at optimum length
  K2 = MuscleParameters.K2; ///< Factor for determining shortening speed at optimum length
  Fcfast = MuscleParameters.Fcfast; ///< Factor for determining shortening speed at optimum length
  Jt = .SubjectMusPar.Jt; ///< Shape parameter for the tendon stiffness
  Jpe = .SubjectMusPar.Jpe; ///< Shape parameter for the parallel stiffness
  PEFactor = .SubjectMusPar.PEFactor; ///< Parameter for influence of parallel stiffness
};

AnyMuscleModel3E VastusMedialisSuperior3Par =
{
  AnyFolder& MuscleParameters = .SubjectMusPar.VastusMedialisSuperior;
  AnyIntVar MuscleElemNo = 3; ///< The number of this element of the muscle
  AnyIntVar MuscleElemAmount = 6; ///< The total amount of elements for this muscle
  F0 = .SubjectMusPar.PCSAfactor*PCSA; ///< Maximum force output at optimum fiber length
  Lf0 = MuscleParameters.OptimalFiberlength; ///< Optimum fiber length
  Vol0 = 1e-6*MuscleParameters.MuscleVolume/MuscleElemAmount; /// Muscle volume in (m3)
  AnyVar PCSA = 1e4*Vol0/Lf0;///< PCSA (cm2) is calculated as muscle volume divided between muscle branches and divided by fiber length
  Lt0 = max({MuscleParameters.TotalTendonLength, 0.001}); ///< Tendon slack length (Cannot be zero)
  Gamma0 = MuscleParameters.Pennationangle*(pi/180); ///< Pennation angle in radian
  Epsilon0 = MuscleParameters.Epsilon0; ///< Tendon strain at F0
  K1 = MuscleParameters.K1; ///< Factor for determining shortening speed at optimum length
  K2 = MuscleParameters.K2; ///< Factor for determining shortening speed at optimum length
  Fcfast = MuscleParameters.Fcfast; ///< Factor for determining shortening speed at optimum length
  Jt = .SubjectMusPar.Jt; ///< Shape parameter for the tendon stiffness
  Jpe = .SubjectMusPar.Jpe; ///< Shape parameter for the parallel stiffness
  PEFactor = .SubjectMusPar.PEFactor; ///< Parameter for influence of parallel stiffness
};

AnyMuscleModel3E VastusMedialisSuperior4Par =
{
  AnyFolder& MuscleParameters = .SubjectMusPar.VastusMedialisSuperior;
  AnyIntVar MuscleElemNo = 4; ///< The number of this element of the muscle
  AnyIntVar MuscleElemAmount = 6; ///< The total amount of elements for this muscle
  F0 = .SubjectMusPar.PCSAfactor*PCSA; ///< Maximum force output at optimum fiber length
  Lf0 = MuscleParameters.OptimalFiberlength; ///< Optimum fiber length
  Vol0 = 1e-6*MuscleParameters.MuscleVolume/MuscleElemAmount; /// Muscle volume in (m3)
  AnyVar PCSA = 1e4*Vol0/Lf0;///< PCSA (cm2) is calculated as muscle volume divided between muscle branches and divided by fiber length
  Lt0 = max({MuscleParameters.TotalTendonLength, 0.001}); ///< Tendon slack length (Cannot be zero)
  Gamma0 = MuscleParameters.Pennationangle*(pi/180); ///< Pennation angle in radian
  Epsilon0 = MuscleParameters.Epsilon0; ///< Tendon strain at F0
  K1 = MuscleParameters.K1; ///< Factor for determining shortening speed at optimum length
  K2 = MuscleParameters.K2; ///< Factor for determining shortening speed at optimum length
  Fcfast = MuscleParameters.Fcfast; ///< Factor for determining shortening speed at optimum length
  Jt = .SubjectMusPar.Jt; ///< Shape parameter for the tendon stiffness
  Jpe = .SubjectMusPar.Jpe; ///< Shape parameter for the parallel stiffness
  PEFactor = .SubjectMusPar.PEFactor; ///< Parameter for influence of parallel stiffness
};

AnyMuscleModel3E VastusMedialisSuperior5Par =
{
  AnyFolder& MuscleParameters = .SubjectMusPar.VastusMedialisSuperior;
  AnyIntVar MuscleElemNo = 5; ///< The number of this element of the muscle
  AnyIntVar MuscleElemAmount = 6; ///< The total amount of elements for this muscle
  F0 = .SubjectMusPar.PCSAfactor*PCSA; ///< Maximum force output at optimum fiber length
  Lf0 = MuscleParameters.OptimalFiberlength; ///< Optimum fiber length
  Vol0 = 1e-6*MuscleParameters.MuscleVolume/MuscleElemAmount; /// Muscle volume in (m3)
  AnyVar PCSA = 1e4*Vol0/Lf0;///< PCSA (cm2) is calculated as muscle volume divided between muscle branches and divided by fiber length
  Lt0 = max({MuscleParameters.TotalTendonLength, 0.001}); ///< Tendon slack length (Cannot be zero)
  Gamma0 = MuscleParameters.Pennationangle*(pi/180); ///< Pennation angle in radian
  Epsilon0 = MuscleParameters.Epsilon0; ///< Tendon strain at F0
  K1 = MuscleParameters.K1; ///< Factor for determining shortening speed at optimum length
  K2 = MuscleParameters.K2; ///< Factor for determining shortening speed at optimum length
  Fcfast = MuscleParameters.Fcfast; ///< Factor for determining shortening speed at optimum length
  Jt = .SubjectMusPar.Jt; ///< Shape parameter for the tendon stiffness
  Jpe = .SubjectMusPar.Jpe; ///< Shape parameter for the parallel stiffness
  PEFactor = .SubjectMusPar.PEFactor; ///< Parameter for influence of parallel stiffness
};

AnyMuscleModel3E VastusMedialisSuperior6Par =
{
  AnyFolder& MuscleParameters = .SubjectMusPar.VastusMedialisSuperior;
  AnyIntVar MuscleElemNo = 6; ///< The number of this element of the muscle
  AnyIntVar MuscleElemAmount = 6; ///< The total amount of elements for this muscle
  F0 = .SubjectMusPar.PCSAfactor*PCSA; ///< Maximum force output at optimum fiber length
  Lf0 = MuscleParameters.OptimalFiberlength; ///< Optimum fiber length
  Vol0 = 1e-6*MuscleParameters.MuscleVolume/MuscleElemAmount; /// Muscle volume in (m3)
  AnyVar PCSA = 1e4*Vol0/Lf0;///< PCSA (cm2) is calculated as muscle volume divided between muscle branches and divided by fiber length
  Lt0 = max({MuscleParameters.TotalTendonLength, 0.001}); ///< Tendon slack length (Cannot be zero)
  Gamma0 = MuscleParameters.Pennationangle*(pi/180); ///< Pennation angle in radian
  Epsilon0 = MuscleParameters.Epsilon0; ///< Tendon strain at F0
  K1 = MuscleParameters.K1; ///< Factor for determining shortening speed at optimum length
  K2 = MuscleParameters.K2; ///< Factor for determining shortening speed at optimum length
  Fcfast = MuscleParameters.Fcfast; ///< Factor for determining shortening speed at optimum length
  Jt = .SubjectMusPar.Jt; ///< Shape parameter for the tendon stiffness
  Jpe = .SubjectMusPar.Jpe; ///< Shape parameter for the parallel stiffness
  PEFactor = .SubjectMusPar.PEFactor; ///< Parameter for influence of parallel stiffness
};
