/**^This folder implements the muscle models for the TLEM model.
Anatomical muscles from the TLEM data set are in many cases split into
several branches (elements). Strength parameters are split between the branches,
typically by uniform split.

Different morphologies of TLEM model are implemented in this file,
please refer to the file for details.
*/


AnyVar StrengthScaleShank = .StrengthScaling.Shank.StrengthScale;
AnyVar StrengthScaleThigh = .StrengthScaling.Thigh.StrengthScale;
AnyVar StrengthScalePelvis = .Scaling.StrengthScaling.Pelvis.StrengthScale;
AnyVar FiberLengthScaleShank = .FiberLengthScaling.Shank.FiberLengthScale;
AnyVar FiberLengthScaleThigh = .FiberLengthScaling.Thigh.FiberLengthScale;
AnyVar FiberLengthScalePelvis = .Scaling.FiberLengthScaling.Pelvis.FiberLengthScale;

// 3element muscle parameters
AnyVar Jt = DesignVar(3.0); // Shape parameter for the tendon stiffness
AnyVar Jpe = DesignVar(3.0); // Shape parameter for the parallel stiffness
AnyVar PEFactor = DesignVar(1.5); // Parameter for influence of parallel stiffness

AnyVar PCSAfactor = 90*.....HumanModel.StrengthParameters.StrengthIndexLeg; // = PCSAfactor in N/cm^2 , the PCSA itself is given in cm^2 so F0 is in Newton`s.
//Klein Horsman used a PCSAfactor of 27 N/cm^2 this is now changed to 90 N/cm^2

AnyFolder CadaverMusPar = {
#include "<BM_LEG_DATASET_PATH>ModelMuscleParameters.any"
};


AnyMuscleModel AdductorBrevisProximal1Par =
{
 AnyFolder &MuscleParameters = .CadaverMusPar.AdductorBrevisProximal;
 AnyIntVar MuscleElemNo = 1; ///< The number of this element of the muscle
 AnyIntVar MuscleElemAmount = 2; ///< The total amount of elements for this muscle
 F0 = .PCSAfactor*PCSA; // Maximum force output at optimum fiber length
 Lf0 = .FiberLengthScalePelvis
       * MuscleParameters.OptimalFiberlength
       * cos(pi/180*MuscleParameters.Pennationangle);
 V0 = .StrengthScalePelvis*MuscleParameters.VolumeMuscleBelly/MuscleElemAmount;
 AnyVar PCSA = V0/Lf0;///< PCSA is calculated as muscle volume divided between muscle branches, divided by fiber length and corrected for the pennation angle not used in the simple muscle model
};
AnyMuscleModel AdductorBrevisProximal2Par =
{
 AnyFolder &MuscleParameters = .CadaverMusPar.AdductorBrevisProximal;
 AnyIntVar MuscleElemNo = 2; ///< The number of this element of the muscle
 AnyIntVar MuscleElemAmount = 2; ///< The total amount of elements for this muscle
 F0 = .PCSAfactor*PCSA; // Maximum force output at optimum fiber length
 Lf0 = .FiberLengthScalePelvis
       * MuscleParameters.OptimalFiberlength
       * cos(pi/180*MuscleParameters.Pennationangle);
 V0 = .StrengthScalePelvis*MuscleParameters.VolumeMuscleBelly/MuscleElemAmount;
 AnyVar PCSA = V0/Lf0;///< PCSA is calculated as muscle volume divided between muscle branches, divided by fiber length and corrected for the pennation angle not used in the simple muscle model
};

AnyMuscleModel AdductorBrevisMid1Par =
{
 AnyFolder &MuscleParameters = .CadaverMusPar.AdductorBrevisMid;
 AnyIntVar MuscleElemNo = 1; ///< The number of this element of the muscle
 AnyIntVar MuscleElemAmount = 2; ///< The total amount of elements for this muscle
 F0 = .PCSAfactor*PCSA; // Maximum force output at optimum fiber length
 Lf0 = .FiberLengthScalePelvis
       * MuscleParameters.OptimalFiberlength
       * cos(pi/180*MuscleParameters.Pennationangle);
 V0 = .StrengthScalePelvis*MuscleParameters.VolumeMuscleBelly/MuscleElemAmount;
 AnyVar PCSA = V0/Lf0;///< PCSA is calculated as muscle volume divided between muscle branches, divided by fiber length and corrected for the pennation angle not used in the simple muscle model
};
AnyMuscleModel AdductorBrevisMid2Par =
{
 AnyFolder &MuscleParameters = .CadaverMusPar.AdductorBrevisMid;
 AnyIntVar MuscleElemNo = 2; ///< The number of this element of the muscle
 AnyIntVar MuscleElemAmount = 2; ///< The total amount of elements for this muscle
 F0 = .PCSAfactor*PCSA; // Maximum force output at optimum fiber length
 Lf0 = .FiberLengthScalePelvis
       * MuscleParameters.OptimalFiberlength
       * cos(pi/180*MuscleParameters.Pennationangle);
 V0 = .StrengthScalePelvis*MuscleParameters.VolumeMuscleBelly/MuscleElemAmount;
 AnyVar PCSA = V0/Lf0;///< PCSA is calculated as muscle volume divided between muscle branches, divided by fiber length and corrected for the pennation angle not used in the simple muscle model
};

AnyMuscleModel AdductorBrevisDistal1Par =
{
 AnyFolder &MuscleParameters = .CadaverMusPar.AdductorBrevisDistal;
 AnyIntVar MuscleElemNo = 1; ///< The number of this element of the muscle
 AnyIntVar MuscleElemAmount = 2; ///< The total amount of elements for this muscle
 F0 = .PCSAfactor*PCSA; // Maximum force output at optimum fiber length
 Lf0 = .FiberLengthScalePelvis
       * MuscleParameters.OptimalFiberlength
       * cos(pi/180*MuscleParameters.Pennationangle);
 V0 = .StrengthScalePelvis*MuscleParameters.VolumeMuscleBelly/MuscleElemAmount;
 AnyVar PCSA = V0/Lf0;///< PCSA is calculated as muscle volume divided between muscle branches, divided by fiber length and corrected for the pennation angle not used in the simple muscle model
};
AnyMuscleModel AdductorBrevisDistal2Par =
{
 AnyFolder &MuscleParameters = .CadaverMusPar.AdductorBrevisDistal;
 AnyIntVar MuscleElemNo = 2; ///< The number of this element of the muscle
 AnyIntVar MuscleElemAmount = 2; ///< The total amount of elements for this muscle
 F0 = .PCSAfactor*PCSA; // Maximum force output at optimum fiber length
 Lf0 = .FiberLengthScalePelvis
       * MuscleParameters.OptimalFiberlength
       * cos(pi/180*MuscleParameters.Pennationangle);
 V0 = .StrengthScalePelvis*MuscleParameters.VolumeMuscleBelly/MuscleElemAmount;
 AnyVar PCSA = V0/Lf0;///< PCSA is calculated as muscle volume divided between muscle branches, divided by fiber length and corrected for the pennation angle not used in the simple muscle model
};

AnyMuscleModel AdductorLongus1Par =
{
 AnyFolder &MuscleParameters = .CadaverMusPar.AdductorLongus;
 AnyIntVar MuscleElemNo = 1; ///< The number of this element of the muscle
 AnyIntVar MuscleElemAmount = 6; ///< The total amount of elements for this muscle
 F0 = .PCSAfactor*PCSA; // Maximum force output at optimum fiber length
 Lf0 = .FiberLengthScalePelvis
       * MuscleParameters.OptimalFiberlength
       * cos(pi/180*MuscleParameters.Pennationangle);
 V0 = .StrengthScalePelvis*MuscleParameters.VolumeMuscleBelly/MuscleElemAmount;
 AnyVar PCSA = V0/Lf0;///< PCSA is calculated as muscle volume divided between muscle branches, divided by fiber length and corrected for the pennation angle not used in the simple muscle model
};
AnyMuscleModel AdductorLongus2Par =
{
 AnyFolder &MuscleParameters = .CadaverMusPar.AdductorLongus;
 AnyIntVar MuscleElemNo = 2; ///< The number of this element of the muscle
 AnyIntVar MuscleElemAmount = 6; ///< The total amount of elements for this muscle
 F0 = .PCSAfactor*PCSA; // Maximum force output at optimum fiber length
 Lf0 = .FiberLengthScalePelvis
       * MuscleParameters.OptimalFiberlength
       * cos(pi/180*MuscleParameters.Pennationangle);
 V0 = .StrengthScalePelvis*MuscleParameters.VolumeMuscleBelly/MuscleElemAmount;
 AnyVar PCSA = V0/Lf0;///< PCSA is calculated as muscle volume divided between muscle branches, divided by fiber length and corrected for the pennation angle not used in the simple muscle model
};
AnyMuscleModel AdductorLongus3Par =
{
 AnyFolder &MuscleParameters = .CadaverMusPar.AdductorLongus;
 AnyIntVar MuscleElemNo = 3; ///< The number of this element of the muscle
 AnyIntVar MuscleElemAmount = 6; ///< The total amount of elements for this muscle
 F0 = .PCSAfactor*PCSA; // Maximum force output at optimum fiber length
 Lf0 = .FiberLengthScalePelvis
       * MuscleParameters.OptimalFiberlength
       * cos(pi/180*MuscleParameters.Pennationangle);
 V0 = .StrengthScalePelvis*MuscleParameters.VolumeMuscleBelly/MuscleElemAmount;
 AnyVar PCSA = V0/Lf0;///< PCSA is calculated as muscle volume divided between muscle branches, divided by fiber length and corrected for the pennation angle not used in the simple muscle model
};
AnyMuscleModel AdductorLongus4Par =
{
 AnyFolder &MuscleParameters = .CadaverMusPar.AdductorLongus;
 AnyIntVar MuscleElemNo = 4; ///< The number of this element of the muscle
 AnyIntVar MuscleElemAmount = 6; ///< The total amount of elements for this muscle
 F0 = .PCSAfactor*PCSA; // Maximum force output at optimum fiber length
 Lf0 = .FiberLengthScalePelvis
       * MuscleParameters.OptimalFiberlength
       * cos(pi/180*MuscleParameters.Pennationangle);
 V0 = .StrengthScalePelvis*MuscleParameters.VolumeMuscleBelly/MuscleElemAmount;
 AnyVar PCSA = V0/Lf0;///< PCSA is calculated as muscle volume divided between muscle branches, divided by fiber length and corrected for the pennation angle not used in the simple muscle model
};
AnyMuscleModel AdductorLongus5Par =
{
 AnyFolder &MuscleParameters = .CadaverMusPar.AdductorLongus;
 AnyIntVar MuscleElemNo = 5; ///< The number of this element of the muscle
 AnyIntVar MuscleElemAmount = 6; ///< The total amount of elements for this muscle
 F0 = .PCSAfactor*PCSA; // Maximum force output at optimum fiber length
 Lf0 = .FiberLengthScalePelvis
       * MuscleParameters.OptimalFiberlength
       * cos(pi/180*MuscleParameters.Pennationangle);
 V0 = .StrengthScalePelvis*MuscleParameters.VolumeMuscleBelly/MuscleElemAmount;
 AnyVar PCSA = V0/Lf0;///< PCSA is calculated as muscle volume divided between muscle branches, divided by fiber length and corrected for the pennation angle not used in the simple muscle model
};
AnyMuscleModel AdductorLongus6Par =
{
 AnyFolder &MuscleParameters = .CadaverMusPar.AdductorLongus;
 AnyIntVar MuscleElemNo = 6; ///< The number of this element of the muscle
 AnyIntVar MuscleElemAmount = 6; ///< The total amount of elements for this muscle
 F0 = .PCSAfactor*PCSA; // Maximum force output at optimum fiber length
 Lf0 = .FiberLengthScalePelvis
       * MuscleParameters.OptimalFiberlength
       * cos(pi/180*MuscleParameters.Pennationangle);
 V0 = .StrengthScalePelvis*MuscleParameters.VolumeMuscleBelly/MuscleElemAmount;
 AnyVar PCSA = V0/Lf0;///< PCSA is calculated as muscle volume divided between muscle branches, divided by fiber length and corrected for the pennation angle not used in the simple muscle model
};

AnyMuscleModel AdductorMagnusDistal1Par =
{
 AnyFolder &MuscleParameters = .CadaverMusPar.AdductorMagnusDistal;
 AnyIntVar MuscleElemNo = 1; ///< The number of this element of the muscle
 AnyIntVar MuscleElemAmount = 3; ///< The total amount of elements for this muscle
 F0 = .PCSAfactor*PCSA; // Maximum force output at optimum fiber length
 Lf0 = .FiberLengthScalePelvis
       * MuscleParameters.OptimalFiberlength
       * cos(pi/180*MuscleParameters.Pennationangle);
 V0 = .StrengthScalePelvis*MuscleParameters.VolumeMuscleBelly/MuscleElemAmount;
 AnyVar PCSA = V0/Lf0;///< PCSA is calculated as muscle volume divided between muscle branches, divided by fiber length and corrected for the pennation angle not used in the simple muscle model
};
AnyMuscleModel AdductorMagnusDistal2Par =
{
 AnyFolder &MuscleParameters = .CadaverMusPar.AdductorMagnusDistal;
 AnyIntVar MuscleElemNo = 2; ///< The number of this element of the muscle
 AnyIntVar MuscleElemAmount = 3; ///< The total amount of elements for this muscle
 F0 = .PCSAfactor*PCSA; // Maximum force output at optimum fiber length
 Lf0 = .FiberLengthScalePelvis
       * MuscleParameters.OptimalFiberlength
       * cos(pi/180*MuscleParameters.Pennationangle);
 V0 = .StrengthScalePelvis*MuscleParameters.VolumeMuscleBelly/MuscleElemAmount;
 AnyVar PCSA = V0/Lf0;///< PCSA is calculated as muscle volume divided between muscle branches, divided by fiber length and corrected for the pennation angle not used in the simple muscle model
};
AnyMuscleModel AdductorMagnusDistal3Par =
{
 AnyFolder &MuscleParameters = .CadaverMusPar.AdductorMagnusDistal;
 AnyIntVar MuscleElemNo = 3; ///< The number of this element of the muscle
 AnyIntVar MuscleElemAmount = 3; ///< The total amount of elements for this muscle
 F0 = .PCSAfactor*PCSA; // Maximum force output at optimum fiber length
 Lf0 = .FiberLengthScalePelvis
       * MuscleParameters.OptimalFiberlength
       * cos(pi/180*MuscleParameters.Pennationangle);
 V0 = .StrengthScalePelvis*MuscleParameters.VolumeMuscleBelly/MuscleElemAmount;
 AnyVar PCSA = V0/Lf0;///< PCSA is calculated as muscle volume divided between muscle branches, divided by fiber length and corrected for the pennation angle not used in the simple muscle model
};

AnyMuscleModel AdductorMagnusMid1Par =
{
 AnyFolder &MuscleParameters = .CadaverMusPar.AdductorMagnusMid;
 AnyIntVar MuscleElemNo = 1; ///< The number of this element of the muscle
 AnyIntVar MuscleElemAmount = 6; ///< The total amount of elements for this muscle
 F0 = .PCSAfactor*PCSA; // Maximum force output at optimum fiber length
 Lf0 = .FiberLengthScalePelvis
       * MuscleParameters.OptimalFiberlength
       * cos(pi/180*MuscleParameters.Pennationangle);
 V0 = .StrengthScalePelvis*MuscleParameters.VolumeMuscleBelly/MuscleElemAmount;
 AnyVar PCSA = V0/Lf0;///< PCSA is calculated as muscle volume divided between muscle branches, divided by fiber length and corrected for the pennation angle not used in the simple muscle model
};
AnyMuscleModel AdductorMagnusMid2Par =
{
 AnyFolder &MuscleParameters = .CadaverMusPar.AdductorMagnusMid;
 AnyIntVar MuscleElemNo = 2; ///< The number of this element of the muscle
 AnyIntVar MuscleElemAmount = 6; ///< The total amount of elements for this muscle
 F0 = .PCSAfactor*PCSA; // Maximum force output at optimum fiber length
 Lf0 = .FiberLengthScalePelvis
       * MuscleParameters.OptimalFiberlength
       * cos(pi/180*MuscleParameters.Pennationangle);
 V0 = .StrengthScalePelvis*MuscleParameters.VolumeMuscleBelly/MuscleElemAmount;
 AnyVar PCSA = V0/Lf0;///< PCSA is calculated as muscle volume divided between muscle branches, divided by fiber length and corrected for the pennation angle not used in the simple muscle model
};
AnyMuscleModel AdductorMagnusMid3Par =
{
 AnyFolder &MuscleParameters = .CadaverMusPar.AdductorMagnusMid;
 AnyIntVar MuscleElemNo = 3; ///< The number of this element of the muscle
 AnyIntVar MuscleElemAmount = 6; ///< The total amount of elements for this muscle
 F0 = .PCSAfactor*PCSA; // Maximum force output at optimum fiber length
 Lf0 = .FiberLengthScalePelvis
       * MuscleParameters.OptimalFiberlength
       * cos(pi/180*MuscleParameters.Pennationangle);
 V0 = .StrengthScalePelvis*MuscleParameters.VolumeMuscleBelly/MuscleElemAmount;
 AnyVar PCSA = V0/Lf0;///< PCSA is calculated as muscle volume divided between muscle branches, divided by fiber length and corrected for the pennation angle not used in the simple muscle model
};
AnyMuscleModel AdductorMagnusMid4Par =
{
 AnyFolder &MuscleParameters = .CadaverMusPar.AdductorMagnusMid;
 AnyIntVar MuscleElemNo = 4; ///< The number of this element of the muscle
 AnyIntVar MuscleElemAmount = 6; ///< The total amount of elements for this muscle
 F0 = .PCSAfactor*PCSA; // Maximum force output at optimum fiber length
 Lf0 = .FiberLengthScalePelvis
       * MuscleParameters.OptimalFiberlength
       * cos(pi/180*MuscleParameters.Pennationangle);
 V0 = .StrengthScalePelvis*MuscleParameters.VolumeMuscleBelly/MuscleElemAmount;
 AnyVar PCSA = V0/Lf0;///< PCSA is calculated as muscle volume divided between muscle branches, divided by fiber length and corrected for the pennation angle not used in the simple muscle model
};
AnyMuscleModel AdductorMagnusMid5Par =
{
 AnyFolder &MuscleParameters = .CadaverMusPar.AdductorMagnusMid;
 AnyIntVar MuscleElemNo = 5; ///< The number of this element of the muscle
 AnyIntVar MuscleElemAmount = 6; ///< The total amount of elements for this muscle
 F0 = .PCSAfactor*PCSA; // Maximum force output at optimum fiber length
 Lf0 = .FiberLengthScalePelvis
       * MuscleParameters.OptimalFiberlength
       * cos(pi/180*MuscleParameters.Pennationangle);
 V0 = .StrengthScalePelvis*MuscleParameters.VolumeMuscleBelly/MuscleElemAmount;
 AnyVar PCSA = V0/Lf0;///< PCSA is calculated as muscle volume divided between muscle branches, divided by fiber length and corrected for the pennation angle not used in the simple muscle model
};
AnyMuscleModel AdductorMagnusMid6Par =
{
 AnyFolder &MuscleParameters = .CadaverMusPar.AdductorMagnusMid;
 AnyIntVar MuscleElemNo = 6; ///< The number of this element of the muscle
 AnyIntVar MuscleElemAmount = 6; ///< The total amount of elements for this muscle
 F0 = .PCSAfactor*PCSA; // Maximum force output at optimum fiber length
 Lf0 = .FiberLengthScalePelvis
       * MuscleParameters.OptimalFiberlength
       * cos(pi/180*MuscleParameters.Pennationangle);
 V0 = .StrengthScalePelvis*MuscleParameters.VolumeMuscleBelly/MuscleElemAmount;
 AnyVar PCSA = V0/Lf0;///< PCSA is calculated as muscle volume divided between muscle branches, divided by fiber length and corrected for the pennation angle not used in the simple muscle model
};

AnyMuscleModel AdductorMagnusProximal1Par =
{
 AnyFolder &MuscleParameters = .CadaverMusPar.AdductorMagnusProximal;
 AnyIntVar MuscleElemNo = 1; ///< The number of this element of the muscle
 AnyIntVar MuscleElemAmount = 4; ///< The total amount of elements for this muscle
 F0 = .PCSAfactor*PCSA; // Maximum force output at optimum fiber length
 Lf0 = .FiberLengthScalePelvis
       * MuscleParameters.OptimalFiberlength
       * cos(pi/180*MuscleParameters.Pennationangle);
 V0 = .StrengthScalePelvis*MuscleParameters.VolumeMuscleBelly/MuscleElemAmount;
 AnyVar PCSA = V0/Lf0;///< PCSA is calculated as muscle volume divided between muscle branches, divided by fiber length and corrected for the pennation angle not used in the simple muscle model
};
AnyMuscleModel AdductorMagnusProximal2Par =
{
 AnyFolder &MuscleParameters = .CadaverMusPar.AdductorMagnusProximal;
 AnyIntVar MuscleElemNo = 2; ///< The number of this element of the muscle
 AnyIntVar MuscleElemAmount = 4; ///< The total amount of elements for this muscle
 F0 = .PCSAfactor*PCSA; // Maximum force output at optimum fiber length
 Lf0 = .FiberLengthScalePelvis
       * MuscleParameters.OptimalFiberlength
       * cos(pi/180*MuscleParameters.Pennationangle);
 V0 = .StrengthScalePelvis*MuscleParameters.VolumeMuscleBelly/MuscleElemAmount;
 AnyVar PCSA = V0/Lf0;///< PCSA is calculated as muscle volume divided between muscle branches, divided by fiber length and corrected for the pennation angle not used in the simple muscle model
};
AnyMuscleModel AdductorMagnusProximal3Par =
{
 AnyFolder &MuscleParameters = .CadaverMusPar.AdductorMagnusProximal;
 AnyIntVar MuscleElemNo = 3; ///< The number of this element of the muscle
 AnyIntVar MuscleElemAmount = 4; ///< The total amount of elements for this muscle
 F0 = .PCSAfactor*PCSA; // Maximum force output at optimum fiber length
 Lf0 = .FiberLengthScalePelvis
       * MuscleParameters.OptimalFiberlength
       * cos(pi/180*MuscleParameters.Pennationangle);
 V0 = .StrengthScalePelvis*MuscleParameters.VolumeMuscleBelly/MuscleElemAmount;
 AnyVar PCSA = V0/Lf0;///< PCSA is calculated as muscle volume divided between muscle branches, divided by fiber length and corrected for the pennation angle not used in the simple muscle model
};
AnyMuscleModel AdductorMagnusProximal4Par =
{
 AnyFolder &MuscleParameters = .CadaverMusPar.AdductorMagnusProximal;
 AnyIntVar MuscleElemNo = 4; ///< The number of this element of the muscle
 AnyIntVar MuscleElemAmount = 4; ///< The total amount of elements for this muscle
 F0 = .PCSAfactor*PCSA; // Maximum force output at optimum fiber length
 Lf0 = .FiberLengthScalePelvis
       * MuscleParameters.OptimalFiberlength
       * cos(pi/180*MuscleParameters.Pennationangle);
 V0 = .StrengthScalePelvis*MuscleParameters.VolumeMuscleBelly/MuscleElemAmount;
 AnyVar PCSA = V0/Lf0;///< PCSA is calculated as muscle volume divided between muscle branches, divided by fiber length and corrected for the pennation angle not used in the simple muscle model
};

AnyMuscleModel BicepsFemorisCaputLongum1Par =
{
 AnyFolder &MuscleParameters = .CadaverMusPar.BicepsFemorisCaputLongum;
 AnyIntVar MuscleElemNo = 1; ///< The number of this element of the muscle
 AnyIntVar MuscleElemAmount = 1; ///< The total amount of elements for this muscle
 F0 = .PCSAfactor*PCSA; // Maximum force output at optimum fiber length
 Lf0 = .FiberLengthScalePelvis
       * MuscleParameters.OptimalFiberlength
       * cos(pi/180*MuscleParameters.Pennationangle);
 V0 = .StrengthScalePelvis*MuscleParameters.VolumeMuscleBelly/MuscleElemAmount;
 AnyVar PCSA = V0/Lf0;///< PCSA is calculated as muscle volume divided between muscle branches, divided by fiber length and corrected for the pennation angle not used in the simple muscle model
};

AnyMuscleModel BicepsFemorisCaputBreve1Par =
{
 AnyFolder &MuscleParameters = .CadaverMusPar.BicepsFemorisCaputBreve;
 AnyIntVar MuscleElemNo = 1; ///< The number of this element of the muscle
 AnyIntVar MuscleElemAmount = 3; ///< The total amount of elements for this muscle
 F0 = .PCSAfactor*PCSA; // Maximum force output at optimum fiber length
 Lf0 = .FiberLengthScalePelvis
       * MuscleParameters.OptimalFiberlength
       * cos(pi/180*MuscleParameters.Pennationangle);
 V0 = .StrengthScalePelvis*MuscleParameters.VolumeMuscleBelly/MuscleElemAmount;
 AnyVar PCSA = V0/Lf0;///< PCSA is calculated as muscle volume divided between muscle branches, divided by fiber length and corrected for the pennation angle not used in the simple muscle model
};
AnyMuscleModel BicepsFemorisCaputBreve2Par =
{
 AnyFolder &MuscleParameters = .CadaverMusPar.BicepsFemorisCaputBreve;
 AnyIntVar MuscleElemNo = 2; ///< The number of this element of the muscle
 AnyIntVar MuscleElemAmount = 3; ///< The total amount of elements for this muscle
 F0 = .PCSAfactor*PCSA; // Maximum force output at optimum fiber length
 Lf0 = .FiberLengthScalePelvis
       * MuscleParameters.OptimalFiberlength
       * cos(pi/180*MuscleParameters.Pennationangle);
 V0 = .StrengthScalePelvis*MuscleParameters.VolumeMuscleBelly/MuscleElemAmount;
 AnyVar PCSA = V0/Lf0;///< PCSA is calculated as muscle volume divided between muscle branches, divided by fiber length and corrected for the pennation angle not used in the simple muscle model
};
AnyMuscleModel BicepsFemorisCaputBreve3Par =
{
 AnyFolder &MuscleParameters = .CadaverMusPar.BicepsFemorisCaputBreve;
 AnyIntVar MuscleElemNo = 3; ///< The number of this element of the muscle
 AnyIntVar MuscleElemAmount = 3; ///< The total amount of elements for this muscle
 F0 = .PCSAfactor*PCSA; // Maximum force output at optimum fiber length
 Lf0 = .FiberLengthScalePelvis
       * MuscleParameters.OptimalFiberlength
       * cos(pi/180*MuscleParameters.Pennationangle);
 V0 = .StrengthScalePelvis*MuscleParameters.VolumeMuscleBelly/MuscleElemAmount;
 AnyVar PCSA = V0/Lf0;///< PCSA is calculated as muscle volume divided between muscle branches, divided by fiber length and corrected for the pennation angle not used in the simple muscle model
};

AnyMuscleModel ExtensorDigitorumLongus1Par =
{
 AnyFolder &MuscleParameters = .CadaverMusPar.ExtensorDigitorumLongus;
 AnyIntVar MuscleElemNo = 1; ///< The number of this element of the muscle
 AnyIntVar MuscleElemAmount = 4; ///< The total amount of elements for this muscle
 F0 = .PCSAfactor*PCSA; // Maximum force output at optimum fiber length
 Lf0 = .FiberLengthScalePelvis
       * MuscleParameters.OptimalFiberlength
       * cos(pi/180*MuscleParameters.Pennationangle);
 V0 = .StrengthScalePelvis*MuscleParameters.VolumeMuscleBelly/MuscleElemAmount;
 AnyVar PCSA = V0/Lf0;///< PCSA is calculated as muscle volume divided between muscle branches, divided by fiber length and corrected for the pennation angle not used in the simple muscle model
};
AnyMuscleModel ExtensorDigitorumLongus2Par =
{
 AnyFolder &MuscleParameters = .CadaverMusPar.ExtensorDigitorumLongus;
 AnyIntVar MuscleElemNo = 2; ///< The number of this element of the muscle
 AnyIntVar MuscleElemAmount = 4; ///< The total amount of elements for this muscle
 F0 = .PCSAfactor*PCSA; // Maximum force output at optimum fiber length
 Lf0 = .FiberLengthScalePelvis
       * MuscleParameters.OptimalFiberlength
       * cos(pi/180*MuscleParameters.Pennationangle);
 V0 = .StrengthScalePelvis*MuscleParameters.VolumeMuscleBelly/MuscleElemAmount;
 AnyVar PCSA = V0/Lf0;///< PCSA is calculated as muscle volume divided between muscle branches, divided by fiber length and corrected for the pennation angle not used in the simple muscle model
};
AnyMuscleModel ExtensorDigitorumLongus3Par =
{
 AnyFolder &MuscleParameters = .CadaverMusPar.ExtensorDigitorumLongus;
 AnyIntVar MuscleElemNo = 3; ///< The number of this element of the muscle
 AnyIntVar MuscleElemAmount = 4; ///< The total amount of elements for this muscle
 F0 = .PCSAfactor*PCSA; // Maximum force output at optimum fiber length
 Lf0 = .FiberLengthScalePelvis
       * MuscleParameters.OptimalFiberlength
       * cos(pi/180*MuscleParameters.Pennationangle);
 V0 = .StrengthScalePelvis*MuscleParameters.VolumeMuscleBelly/MuscleElemAmount;
 AnyVar PCSA = V0/Lf0;///< PCSA is calculated as muscle volume divided between muscle branches, divided by fiber length and corrected for the pennation angle not used in the simple muscle model
};
AnyMuscleModel ExtensorDigitorumLongus4Par =
{
 AnyFolder &MuscleParameters = .CadaverMusPar.ExtensorDigitorumLongus;
 AnyIntVar MuscleElemNo = 4; ///< The number of this element of the muscle
 AnyIntVar MuscleElemAmount = 4; ///< The total amount of elements for this muscle
 F0 = .PCSAfactor*PCSA; // Maximum force output at optimum fiber length
 Lf0 = .FiberLengthScalePelvis
       * MuscleParameters.OptimalFiberlength
       * cos(pi/180*MuscleParameters.Pennationangle);
 V0 = .StrengthScalePelvis*MuscleParameters.VolumeMuscleBelly/MuscleElemAmount;
 AnyVar PCSA = V0/Lf0;///< PCSA is calculated as muscle volume divided between muscle branches, divided by fiber length and corrected for the pennation angle not used in the simple muscle model
};

AnyMuscleModel ExtensorHallucisLongus1Par =
{
 AnyFolder &MuscleParameters = .CadaverMusPar.ExtensorHallucisLongus;
 AnyIntVar MuscleElemNo = 1; ///< The number of this element of the muscle
 AnyIntVar MuscleElemAmount = 3; ///< The total amount of elements for this muscle
 F0 = .PCSAfactor*PCSA; // Maximum force output at optimum fiber length
 Lf0 = .FiberLengthScalePelvis
       * MuscleParameters.OptimalFiberlength
       * cos(pi/180*MuscleParameters.Pennationangle);
 V0 = .StrengthScalePelvis*MuscleParameters.VolumeMuscleBelly/MuscleElemAmount;
 AnyVar PCSA = V0/Lf0;///< PCSA is calculated as muscle volume divided between muscle branches, divided by fiber length and corrected for the pennation angle not used in the simple muscle model
};
AnyMuscleModel ExtensorHallucisLongus2Par =
{
 AnyFolder &MuscleParameters = .CadaverMusPar.ExtensorHallucisLongus;
 AnyIntVar MuscleElemNo = 2; ///< The number of this element of the muscle
 AnyIntVar MuscleElemAmount = 3; ///< The total amount of elements for this muscle
 F0 = .PCSAfactor*PCSA; // Maximum force output at optimum fiber length
 Lf0 = .FiberLengthScalePelvis
       * MuscleParameters.OptimalFiberlength
       * cos(pi/180*MuscleParameters.Pennationangle);
 V0 = .StrengthScalePelvis*MuscleParameters.VolumeMuscleBelly/MuscleElemAmount;
 AnyVar PCSA = V0/Lf0;///< PCSA is calculated as muscle volume divided between muscle branches, divided by fiber length and corrected for the pennation angle not used in the simple muscle model
};
AnyMuscleModel ExtensorHallucisLongus3Par =
{
 AnyFolder &MuscleParameters = .CadaverMusPar.ExtensorHallucisLongus;
 AnyIntVar MuscleElemNo = 3; ///< The number of this element of the muscle
 AnyIntVar MuscleElemAmount = 3; ///< The total amount of elements for this muscle
 F0 = .PCSAfactor*PCSA; // Maximum force output at optimum fiber length
 Lf0 = .FiberLengthScalePelvis
       * MuscleParameters.OptimalFiberlength
       * cos(pi/180*MuscleParameters.Pennationangle);
 V0 = .StrengthScalePelvis*MuscleParameters.VolumeMuscleBelly/MuscleElemAmount;
 AnyVar PCSA = V0/Lf0;///< PCSA is calculated as muscle volume divided between muscle branches, divided by fiber length and corrected for the pennation angle not used in the simple muscle model
};

AnyMuscleModel FlexorDigitorumLongus1Par =
{
 AnyFolder &MuscleParameters = .CadaverMusPar.FlexorDigitorumLongus;
 AnyIntVar MuscleElemNo = 1; ///< The number of this element of the muscle
 AnyIntVar MuscleElemAmount = 4; ///< The total amount of elements for this muscle
 F0 = .PCSAfactor*PCSA; // Maximum force output at optimum fiber length
 Lf0 = .FiberLengthScalePelvis
       * MuscleParameters.OptimalFiberlength
       * cos(pi/180*MuscleParameters.Pennationangle);
 V0 = .StrengthScalePelvis*MuscleParameters.VolumeMuscleBelly/MuscleElemAmount;
 AnyVar PCSA = V0/Lf0;///< PCSA is calculated as muscle volume divided between muscle branches, divided by fiber length and corrected for the pennation angle not used in the simple muscle model
};
AnyMuscleModel FlexorDigitorumLongus2Par =
{
 AnyFolder &MuscleParameters = .CadaverMusPar.FlexorDigitorumLongus;
 AnyIntVar MuscleElemNo = 2; ///< The number of this element of the muscle
 AnyIntVar MuscleElemAmount = 4; ///< The total amount of elements for this muscle
 F0 = .PCSAfactor*PCSA; // Maximum force output at optimum fiber length
 Lf0 = .FiberLengthScalePelvis
       * MuscleParameters.OptimalFiberlength
       * cos(pi/180*MuscleParameters.Pennationangle);
 V0 = .StrengthScalePelvis*MuscleParameters.VolumeMuscleBelly/MuscleElemAmount;
 AnyVar PCSA = V0/Lf0;///< PCSA is calculated as muscle volume divided between muscle branches, divided by fiber length and corrected for the pennation angle not used in the simple muscle model
};
AnyMuscleModel FlexorDigitorumLongus3Par =
{
 AnyFolder &MuscleParameters = .CadaverMusPar.FlexorDigitorumLongus;
 AnyIntVar MuscleElemNo = 3; ///< The number of this element of the muscle
 AnyIntVar MuscleElemAmount = 4; ///< The total amount of elements for this muscle
 F0 = .PCSAfactor*PCSA; // Maximum force output at optimum fiber length
 Lf0 = .FiberLengthScalePelvis
       * MuscleParameters.OptimalFiberlength
       * cos(pi/180*MuscleParameters.Pennationangle);
 V0 = .StrengthScalePelvis*MuscleParameters.VolumeMuscleBelly/MuscleElemAmount;
 AnyVar PCSA = V0/Lf0;///< PCSA is calculated as muscle volume divided between muscle branches, divided by fiber length and corrected for the pennation angle not used in the simple muscle model
};
AnyMuscleModel FlexorDigitorumLongus4Par =
{
 AnyFolder &MuscleParameters = .CadaverMusPar.FlexorDigitorumLongus;
 AnyIntVar MuscleElemNo = 4; ///< The number of this element of the muscle
 AnyIntVar MuscleElemAmount = 4; ///< The total amount of elements for this muscle
 F0 = .PCSAfactor*PCSA; // Maximum force output at optimum fiber length
 Lf0 = .FiberLengthScalePelvis
       * MuscleParameters.OptimalFiberlength
       * cos(pi/180*MuscleParameters.Pennationangle);
 V0 = .StrengthScalePelvis*MuscleParameters.VolumeMuscleBelly/MuscleElemAmount;
 AnyVar PCSA = V0/Lf0;///< PCSA is calculated as muscle volume divided between muscle branches, divided by fiber length and corrected for the pennation angle not used in the simple muscle model
};

AnyMuscleModel FlexorHallucisLongus1Par =
{
 AnyFolder &MuscleParameters = .CadaverMusPar.FlexorHallucisLongus;
 AnyIntVar MuscleElemNo = 1; ///< The number of this element of the muscle
 AnyIntVar MuscleElemAmount = 3; ///< The total amount of elements for this muscle
 F0 = .PCSAfactor*PCSA; // Maximum force output at optimum fiber length
 Lf0 = .FiberLengthScalePelvis
       * MuscleParameters.OptimalFiberlength
       * cos(pi/180*MuscleParameters.Pennationangle);
 V0 = .StrengthScalePelvis*MuscleParameters.VolumeMuscleBelly/MuscleElemAmount;
 AnyVar PCSA = V0/Lf0;///< PCSA is calculated as muscle volume divided between muscle branches, divided by fiber length and corrected for the pennation angle not used in the simple muscle model
};
AnyMuscleModel FlexorHallucisLongus2Par =
{
 AnyFolder &MuscleParameters = .CadaverMusPar.FlexorHallucisLongus;
 AnyIntVar MuscleElemNo = 2; ///< The number of this element of the muscle
 AnyIntVar MuscleElemAmount = 3; ///< The total amount of elements for this muscle
 F0 = .PCSAfactor*PCSA; // Maximum force output at optimum fiber length
 Lf0 = .FiberLengthScalePelvis
       * MuscleParameters.OptimalFiberlength
       * cos(pi/180*MuscleParameters.Pennationangle);
 V0 = .StrengthScalePelvis*MuscleParameters.VolumeMuscleBelly/MuscleElemAmount;
 AnyVar PCSA = V0/Lf0;///< PCSA is calculated as muscle volume divided between muscle branches, divided by fiber length and corrected for the pennation angle not used in the simple muscle model
};
AnyMuscleModel FlexorHallucisLongus3Par =
{
 AnyFolder &MuscleParameters = .CadaverMusPar.FlexorHallucisLongus;
 AnyIntVar MuscleElemNo = 3; ///< The number of this element of the muscle
 AnyIntVar MuscleElemAmount = 3; ///< The total amount of elements for this muscle
 F0 = .PCSAfactor*PCSA; // Maximum force output at optimum fiber length
 Lf0 = .FiberLengthScalePelvis
       * MuscleParameters.OptimalFiberlength
       * cos(pi/180*MuscleParameters.Pennationangle);
 V0 = .StrengthScalePelvis*MuscleParameters.VolumeMuscleBelly/MuscleElemAmount;
 AnyVar PCSA = V0/Lf0;///< PCSA is calculated as muscle volume divided between muscle branches, divided by fiber length and corrected for the pennation angle not used in the simple muscle model
};

AnyMuscleModel GastrocnemiusLateralis1Par =
{
 AnyFolder &MuscleParameters = .CadaverMusPar.GastrocnemiusLateralis;
 AnyIntVar MuscleElemNo = 1; ///< The number of this element of the muscle
 AnyIntVar MuscleElemAmount = 1; ///< The total amount of elements for this muscle
 F0 = .PCSAfactor*PCSA; // Maximum force output at optimum fiber length
 Lf0 = .FiberLengthScalePelvis
       * MuscleParameters.OptimalFiberlength
       * cos(pi/180*MuscleParameters.Pennationangle);
 V0 = .StrengthScalePelvis*MuscleParameters.VolumeMuscleBelly/MuscleElemAmount;
 AnyVar PCSA = V0/Lf0;///< PCSA is calculated as muscle volume divided between muscle branches, divided by fiber length and corrected for the pennation angle not used in the simple muscle model
};

AnyMuscleModel GastrocnemiusMedialis1Par =
{
 AnyFolder &MuscleParameters = .CadaverMusPar.GastrocnemiusMedialis;
 AnyIntVar MuscleElemNo = 1; ///< The number of this element of the muscle
 AnyIntVar MuscleElemAmount = 1; ///< The total amount of elements for this muscle
 F0 = .PCSAfactor*PCSA; // Maximum force output at optimum fiber length
 Lf0 = .FiberLengthScalePelvis
       * MuscleParameters.OptimalFiberlength
       * cos(pi/180*MuscleParameters.Pennationangle);
 V0 = .StrengthScalePelvis*MuscleParameters.VolumeMuscleBelly/MuscleElemAmount;
 AnyVar PCSA = V0/Lf0;///< PCSA is calculated as muscle volume divided between muscle branches, divided by fiber length and corrected for the pennation angle not used in the simple muscle model
};

AnyMuscleModel GemellusInferior1Par =
{
 AnyFolder &MuscleParameters = .CadaverMusPar.GemellusInferior;
 AnyIntVar MuscleElemNo = 1; ///< The number of this element of the muscle
 AnyIntVar MuscleElemAmount = 1; ///< The total amount of elements for this muscle
 F0 = .PCSAfactor*PCSA; // Maximum force output at optimum fiber length
 Lf0 = .FiberLengthScalePelvis
       * MuscleParameters.OptimalFiberlength
       * cos(pi/180*MuscleParameters.Pennationangle);
 V0 = .StrengthScalePelvis*MuscleParameters.VolumeMuscleBelly/MuscleElemAmount;
 AnyVar PCSA = V0/Lf0;///< PCSA is calculated as muscle volume divided between muscle branches, divided by fiber length and corrected for the pennation angle not used in the simple muscle model
};

AnyMuscleModel GemellusSuperior1Par =
{
 AnyFolder &MuscleParameters = .CadaverMusPar.GemellusSuperior;
 AnyIntVar MuscleElemNo = 1; ///< The number of this element of the muscle
 AnyIntVar MuscleElemAmount = 1; ///< The total amount of elements for this muscle
 F0 = .PCSAfactor*PCSA; // Maximum force output at optimum fiber length
 Lf0 = .FiberLengthScalePelvis
       * MuscleParameters.OptimalFiberlength
       * cos(pi/180*MuscleParameters.Pennationangle);
 V0 = .StrengthScalePelvis*MuscleParameters.VolumeMuscleBelly/MuscleElemAmount;
 AnyVar PCSA = V0/Lf0;///< PCSA is calculated as muscle volume divided between muscle branches, divided by fiber length and corrected for the pennation angle not used in the simple muscle model
};

AnyMuscleModel GluteusMaximusSuperior1Par =
{
 AnyFolder &MuscleParameters = .CadaverMusPar.GluteusMaximusSuperior;
 AnyIntVar MuscleElemNo = 1; ///< The number of this element of the muscle
 AnyIntVar MuscleElemAmount = 6; ///< The total amount of elements for this muscle
 F0 = .PCSAfactor*PCSA; // Maximum force output at optimum fiber length
 Lf0 = .FiberLengthScalePelvis
       * MuscleParameters.OptimalFiberlength
       * cos(pi/180*MuscleParameters.Pennationangle);
 V0 = .StrengthScalePelvis*MuscleParameters.VolumeMuscleBelly/MuscleElemAmount;
 AnyVar PCSA = V0/Lf0;///< PCSA is calculated as muscle volume divided between muscle branches, divided by fiber length and corrected for the pennation angle not used in the simple muscle model
};
AnyMuscleModel GluteusMaximusSuperior2Par =
{
 AnyFolder &MuscleParameters = .CadaverMusPar.GluteusMaximusSuperior;
 AnyIntVar MuscleElemNo = 2; ///< The number of this element of the muscle
 AnyIntVar MuscleElemAmount = 6; ///< The total amount of elements for this muscle
 F0 = .PCSAfactor*PCSA; // Maximum force output at optimum fiber length
 Lf0 = .FiberLengthScalePelvis
       * MuscleParameters.OptimalFiberlength
       * cos(pi/180*MuscleParameters.Pennationangle);
 V0 = .StrengthScalePelvis*MuscleParameters.VolumeMuscleBelly/MuscleElemAmount;
 AnyVar PCSA = V0/Lf0;///< PCSA is calculated as muscle volume divided between muscle branches, divided by fiber length and corrected for the pennation angle not used in the simple muscle model
};
AnyMuscleModel GluteusMaximusSuperior3Par =
{
 AnyFolder &MuscleParameters = .CadaverMusPar.GluteusMaximusSuperior;
 AnyIntVar MuscleElemNo = 3; ///< The number of this element of the muscle
 AnyIntVar MuscleElemAmount = 6; ///< The total amount of elements for this muscle
 F0 = .PCSAfactor*PCSA; // Maximum force output at optimum fiber length
 Lf0 = .FiberLengthScalePelvis
       * MuscleParameters.OptimalFiberlength
       * cos(pi/180*MuscleParameters.Pennationangle);
 V0 = .StrengthScalePelvis*MuscleParameters.VolumeMuscleBelly/MuscleElemAmount;
 AnyVar PCSA = V0/Lf0;///< PCSA is calculated as muscle volume divided between muscle branches, divided by fiber length and corrected for the pennation angle not used in the simple muscle model
};
AnyMuscleModel GluteusMaximusSuperior4Par =
{
 AnyFolder &MuscleParameters = .CadaverMusPar.GluteusMaximusSuperior;
 AnyIntVar MuscleElemNo = 4; ///< The number of this element of the muscle
 AnyIntVar MuscleElemAmount = 6; ///< The total amount of elements for this muscle
 F0 = .PCSAfactor*PCSA; // Maximum force output at optimum fiber length
 Lf0 = .FiberLengthScalePelvis
       * MuscleParameters.OptimalFiberlength
       * cos(pi/180*MuscleParameters.Pennationangle);
 V0 = .StrengthScalePelvis*MuscleParameters.VolumeMuscleBelly/MuscleElemAmount;
 AnyVar PCSA = V0/Lf0;///< PCSA is calculated as muscle volume divided between muscle branches, divided by fiber length and corrected for the pennation angle not used in the simple muscle model
};
AnyMuscleModel GluteusMaximusSuperior5Par =
{
 AnyFolder &MuscleParameters = .CadaverMusPar.GluteusMaximusSuperior;
 AnyIntVar MuscleElemNo = 5; ///< The number of this element of the muscle
 AnyIntVar MuscleElemAmount = 6; ///< The total amount of elements for this muscle
 F0 = .PCSAfactor*PCSA; // Maximum force output at optimum fiber length
 Lf0 = .FiberLengthScalePelvis
       * MuscleParameters.OptimalFiberlength
       * cos(pi/180*MuscleParameters.Pennationangle);
 V0 = .StrengthScalePelvis*MuscleParameters.VolumeMuscleBelly/MuscleElemAmount;
 AnyVar PCSA = V0/Lf0;///< PCSA is calculated as muscle volume divided between muscle branches, divided by fiber length and corrected for the pennation angle not used in the simple muscle model
};
AnyMuscleModel GluteusMaximusSuperior6Par =
{
 AnyFolder &MuscleParameters = .CadaverMusPar.GluteusMaximusSuperior;
 AnyIntVar MuscleElemNo = 6; ///< The number of this element of the muscle
 AnyIntVar MuscleElemAmount = 6; ///< The total amount of elements for this muscle
 F0 = .PCSAfactor*PCSA; // Maximum force output at optimum fiber length
 Lf0 = .FiberLengthScalePelvis
       * MuscleParameters.OptimalFiberlength
       * cos(pi/180*MuscleParameters.Pennationangle);
 V0 = .StrengthScalePelvis*MuscleParameters.VolumeMuscleBelly/MuscleElemAmount;
 AnyVar PCSA = V0/Lf0;///< PCSA is calculated as muscle volume divided between muscle branches, divided by fiber length and corrected for the pennation angle not used in the simple muscle model
};

AnyMuscleModel GluteusMaximusInferior1Par =
{
 AnyFolder &MuscleParameters = .CadaverMusPar.GluteusMaximusInferior;
 AnyIntVar MuscleElemNo = 1; ///< The number of this element of the muscle
 AnyIntVar MuscleElemAmount = 6; ///< The total amount of elements for this muscle
 F0 = .PCSAfactor*PCSA; // Maximum force output at optimum fiber length
 Lf0 = .FiberLengthScalePelvis
       * MuscleParameters.OptimalFiberlength
       * cos(pi/180*MuscleParameters.Pennationangle);
 V0 = .StrengthScalePelvis*MuscleParameters.VolumeMuscleBelly/MuscleElemAmount;
 AnyVar PCSA = V0/Lf0;///< PCSA is calculated as muscle volume divided between muscle branches, divided by fiber length and corrected for the pennation angle not used in the simple muscle model
};
AnyMuscleModel GluteusMaximusInferior2Par =
{
 AnyFolder &MuscleParameters = .CadaverMusPar.GluteusMaximusInferior;
 AnyIntVar MuscleElemNo = 2; ///< The number of this element of the muscle
 AnyIntVar MuscleElemAmount = 6; ///< The total amount of elements for this muscle
 F0 = .PCSAfactor*PCSA; // Maximum force output at optimum fiber length
 Lf0 = .FiberLengthScalePelvis
       * MuscleParameters.OptimalFiberlength
       * cos(pi/180*MuscleParameters.Pennationangle);
 V0 = .StrengthScalePelvis*MuscleParameters.VolumeMuscleBelly/MuscleElemAmount;
 AnyVar PCSA = V0/Lf0;///< PCSA is calculated as muscle volume divided between muscle branches, divided by fiber length and corrected for the pennation angle not used in the simple muscle model
};
AnyMuscleModel GluteusMaximusInferior3Par =
{
 AnyFolder &MuscleParameters = .CadaverMusPar.GluteusMaximusInferior;
 AnyIntVar MuscleElemNo = 3; ///< The number of this element of the muscle
 AnyIntVar MuscleElemAmount = 6; ///< The total amount of elements for this muscle
 F0 = .PCSAfactor*PCSA; // Maximum force output at optimum fiber length
 Lf0 = .FiberLengthScalePelvis
       * MuscleParameters.OptimalFiberlength
       * cos(pi/180*MuscleParameters.Pennationangle);
 V0 = .StrengthScalePelvis*MuscleParameters.VolumeMuscleBelly/MuscleElemAmount;
 AnyVar PCSA = V0/Lf0;///< PCSA is calculated as muscle volume divided between muscle branches, divided by fiber length and corrected for the pennation angle not used in the simple muscle model
};
AnyMuscleModel GluteusMaximusInferior4Par =
{
 AnyFolder &MuscleParameters = .CadaverMusPar.GluteusMaximusInferior;
 AnyIntVar MuscleElemNo = 4; ///< The number of this element of the muscle
 AnyIntVar MuscleElemAmount = 6; ///< The total amount of elements for this muscle
 F0 = .PCSAfactor*PCSA; // Maximum force output at optimum fiber length
 Lf0 = .FiberLengthScalePelvis
       * MuscleParameters.OptimalFiberlength
       * cos(pi/180*MuscleParameters.Pennationangle);
 V0 = .StrengthScalePelvis*MuscleParameters.VolumeMuscleBelly/MuscleElemAmount;
 AnyVar PCSA = V0/Lf0;///< PCSA is calculated as muscle volume divided between muscle branches, divided by fiber length and corrected for the pennation angle not used in the simple muscle model
};
AnyMuscleModel GluteusMaximusInferior5Par =
{
 AnyFolder &MuscleParameters = .CadaverMusPar.GluteusMaximusInferior;
 AnyIntVar MuscleElemNo = 5; ///< The number of this element of the muscle
 AnyIntVar MuscleElemAmount = 6; ///< The total amount of elements for this muscle
 F0 = .PCSAfactor*PCSA; // Maximum force output at optimum fiber length
 Lf0 = .FiberLengthScalePelvis
       * MuscleParameters.OptimalFiberlength
       * cos(pi/180*MuscleParameters.Pennationangle);
 V0 = .StrengthScalePelvis*MuscleParameters.VolumeMuscleBelly/MuscleElemAmount;
 AnyVar PCSA = V0/Lf0;///< PCSA is calculated as muscle volume divided between muscle branches, divided by fiber length and corrected for the pennation angle not used in the simple muscle model
};
AnyMuscleModel GluteusMaximusInferior6Par =
{
 AnyFolder &MuscleParameters = .CadaverMusPar.GluteusMaximusInferior;
 AnyIntVar MuscleElemNo = 6; ///< The number of this element of the muscle
 AnyIntVar MuscleElemAmount = 6; ///< The total amount of elements for this muscle
 F0 = .PCSAfactor*PCSA; // Maximum force output at optimum fiber length
 Lf0 = .FiberLengthScalePelvis
       * MuscleParameters.OptimalFiberlength
       * cos(pi/180*MuscleParameters.Pennationangle);
 V0 = .StrengthScalePelvis*MuscleParameters.VolumeMuscleBelly/MuscleElemAmount;
 AnyVar PCSA = V0/Lf0;///< PCSA is calculated as muscle volume divided between muscle branches, divided by fiber length and corrected for the pennation angle not used in the simple muscle model
};

AnyMuscleModel GluteusMediusAnterior1Par =
{
 AnyFolder &MuscleParameters = .CadaverMusPar.GluteusMediusAnterior;
 AnyIntVar MuscleElemNo = 1; ///< The number of this element of the muscle
 AnyIntVar MuscleElemAmount = 6; ///< The total amount of elements for this muscle
 F0 = .PCSAfactor*PCSA; // Maximum force output at optimum fiber length
 Lf0 = .FiberLengthScalePelvis
       * MuscleParameters.OptimalFiberlength
       * cos(pi/180*MuscleParameters.Pennationangle);
 V0 = .StrengthScalePelvis*MuscleParameters.VolumeMuscleBelly/MuscleElemAmount;
 AnyVar PCSA = V0/Lf0;///< PCSA is calculated as muscle volume divided between muscle branches, divided by fiber length and corrected for the pennation angle not used in the simple muscle model
};
AnyMuscleModel GluteusMediusAnterior2Par =
{
 AnyFolder &MuscleParameters = .CadaverMusPar.GluteusMediusAnterior;
 AnyIntVar MuscleElemNo = 2; ///< The number of this element of the muscle
 AnyIntVar MuscleElemAmount = 6; ///< The total amount of elements for this muscle
 F0 = .PCSAfactor*PCSA; // Maximum force output at optimum fiber length
 Lf0 = .FiberLengthScalePelvis
       * MuscleParameters.OptimalFiberlength
       * cos(pi/180*MuscleParameters.Pennationangle);
 V0 = .StrengthScalePelvis*MuscleParameters.VolumeMuscleBelly/MuscleElemAmount;
 AnyVar PCSA = V0/Lf0;///< PCSA is calculated as muscle volume divided between muscle branches, divided by fiber length and corrected for the pennation angle not used in the simple muscle model
};
AnyMuscleModel GluteusMediusAnterior3Par =
{
 AnyFolder &MuscleParameters = .CadaverMusPar.GluteusMediusAnterior;
 AnyIntVar MuscleElemNo = 3; ///< The number of this element of the muscle
 AnyIntVar MuscleElemAmount = 6; ///< The total amount of elements for this muscle
 F0 = .PCSAfactor*PCSA; // Maximum force output at optimum fiber length
 Lf0 = .FiberLengthScalePelvis
       * MuscleParameters.OptimalFiberlength
       * cos(pi/180*MuscleParameters.Pennationangle);
 V0 = .StrengthScalePelvis*MuscleParameters.VolumeMuscleBelly/MuscleElemAmount;
 AnyVar PCSA = V0/Lf0;///< PCSA is calculated as muscle volume divided between muscle branches, divided by fiber length and corrected for the pennation angle not used in the simple muscle model
};
AnyMuscleModel GluteusMediusAnterior4Par =
{
 AnyFolder &MuscleParameters = .CadaverMusPar.GluteusMediusAnterior;
 AnyIntVar MuscleElemNo = 4; ///< The number of this element of the muscle
 AnyIntVar MuscleElemAmount = 6; ///< The total amount of elements for this muscle
 F0 = .PCSAfactor*PCSA; // Maximum force output at optimum fiber length
 Lf0 = .FiberLengthScalePelvis
       * MuscleParameters.OptimalFiberlength
       * cos(pi/180*MuscleParameters.Pennationangle);
 V0 = .StrengthScalePelvis*MuscleParameters.VolumeMuscleBelly/MuscleElemAmount;
 AnyVar PCSA = V0/Lf0;///< PCSA is calculated as muscle volume divided between muscle branches, divided by fiber length and corrected for the pennation angle not used in the simple muscle model
};
AnyMuscleModel GluteusMediusAnterior5Par =
{
 AnyFolder &MuscleParameters = .CadaverMusPar.GluteusMediusAnterior;
 AnyIntVar MuscleElemNo = 5; ///< The number of this element of the muscle
 AnyIntVar MuscleElemAmount = 6; ///< The total amount of elements for this muscle
 F0 = .PCSAfactor*PCSA; // Maximum force output at optimum fiber length
 Lf0 = .FiberLengthScalePelvis
       * MuscleParameters.OptimalFiberlength
       * cos(pi/180*MuscleParameters.Pennationangle);
 V0 = .StrengthScalePelvis*MuscleParameters.VolumeMuscleBelly/MuscleElemAmount;
 AnyVar PCSA = V0/Lf0;///< PCSA is calculated as muscle volume divided between muscle branches, divided by fiber length and corrected for the pennation angle not used in the simple muscle model
};
AnyMuscleModel GluteusMediusAnterior6Par =
{
 AnyFolder &MuscleParameters = .CadaverMusPar.GluteusMediusAnterior;
 AnyIntVar MuscleElemNo = 6; ///< The number of this element of the muscle
 AnyIntVar MuscleElemAmount = 6; ///< The total amount of elements for this muscle
 F0 = .PCSAfactor*PCSA; // Maximum force output at optimum fiber length
 Lf0 = .FiberLengthScalePelvis
       * MuscleParameters.OptimalFiberlength
       * cos(pi/180*MuscleParameters.Pennationangle);
 V0 = .StrengthScalePelvis*MuscleParameters.VolumeMuscleBelly/MuscleElemAmount;
 AnyVar PCSA = V0/Lf0;///< PCSA is calculated as muscle volume divided between muscle branches, divided by fiber length and corrected for the pennation angle not used in the simple muscle model
};

AnyMuscleModel GluteusMediusPosterior1Par =
{
 AnyFolder &MuscleParameters = .CadaverMusPar.GluteusMediusPosterior;
 AnyIntVar MuscleElemNo = 1; ///< The number of this element of the muscle
 AnyIntVar MuscleElemAmount = 6; ///< The total amount of elements for this muscle
 F0 = .PCSAfactor*PCSA; // Maximum force output at optimum fiber length
 Lf0 = .FiberLengthScalePelvis
       * MuscleParameters.OptimalFiberlength
       * cos(pi/180*MuscleParameters.Pennationangle);
 V0 = .StrengthScalePelvis*MuscleParameters.VolumeMuscleBelly/MuscleElemAmount;
 AnyVar PCSA = V0/Lf0;///< PCSA is calculated as muscle volume divided between muscle branches, divided by fiber length and corrected for the pennation angle not used in the simple muscle model
};
AnyMuscleModel GluteusMediusPosterior2Par =
{
 AnyFolder &MuscleParameters = .CadaverMusPar.GluteusMediusPosterior;
 AnyIntVar MuscleElemNo = 2; ///< The number of this element of the muscle
 AnyIntVar MuscleElemAmount = 6; ///< The total amount of elements for this muscle
 F0 = .PCSAfactor*PCSA; // Maximum force output at optimum fiber length
 Lf0 = .FiberLengthScalePelvis
       * MuscleParameters.OptimalFiberlength
       * cos(pi/180*MuscleParameters.Pennationangle);
 V0 = .StrengthScalePelvis*MuscleParameters.VolumeMuscleBelly/MuscleElemAmount;
 AnyVar PCSA = V0/Lf0;///< PCSA is calculated as muscle volume divided between muscle branches, divided by fiber length and corrected for the pennation angle not used in the simple muscle model
};
AnyMuscleModel GluteusMediusPosterior3Par =
{
 AnyFolder &MuscleParameters = .CadaverMusPar.GluteusMediusPosterior;
 AnyIntVar MuscleElemNo = 3; ///< The number of this element of the muscle
 AnyIntVar MuscleElemAmount = 6; ///< The total amount of elements for this muscle
 F0 = .PCSAfactor*PCSA; // Maximum force output at optimum fiber length
 Lf0 = .FiberLengthScalePelvis
       * MuscleParameters.OptimalFiberlength
       * cos(pi/180*MuscleParameters.Pennationangle);
 V0 = .StrengthScalePelvis*MuscleParameters.VolumeMuscleBelly/MuscleElemAmount;
 AnyVar PCSA = V0/Lf0;///< PCSA is calculated as muscle volume divided between muscle branches, divided by fiber length and corrected for the pennation angle not used in the simple muscle model
};
AnyMuscleModel GluteusMediusPosterior4Par =
{
 AnyFolder &MuscleParameters = .CadaverMusPar.GluteusMediusPosterior;
 AnyIntVar MuscleElemNo = 4; ///< The number of this element of the muscle
 AnyIntVar MuscleElemAmount = 6; ///< The total amount of elements for this muscle
 F0 = .PCSAfactor*PCSA; // Maximum force output at optimum fiber length
 Lf0 = .FiberLengthScalePelvis
       * MuscleParameters.OptimalFiberlength
       * cos(pi/180*MuscleParameters.Pennationangle);
 V0 = .StrengthScalePelvis*MuscleParameters.VolumeMuscleBelly/MuscleElemAmount;
 AnyVar PCSA = V0/Lf0;///< PCSA is calculated as muscle volume divided between muscle branches, divided by fiber length and corrected for the pennation angle not used in the simple muscle model
};
AnyMuscleModel GluteusMediusPosterior5Par =
{
 AnyFolder &MuscleParameters = .CadaverMusPar.GluteusMediusPosterior;
 AnyIntVar MuscleElemNo = 5; ///< The number of this element of the muscle
 AnyIntVar MuscleElemAmount = 6; ///< The total amount of elements for this muscle
 F0 = .PCSAfactor*PCSA; // Maximum force output at optimum fiber length
 Lf0 = .FiberLengthScalePelvis
       * MuscleParameters.OptimalFiberlength
       * cos(pi/180*MuscleParameters.Pennationangle);
 V0 = .StrengthScalePelvis*MuscleParameters.VolumeMuscleBelly/MuscleElemAmount;
 AnyVar PCSA = V0/Lf0;///< PCSA is calculated as muscle volume divided between muscle branches, divided by fiber length and corrected for the pennation angle not used in the simple muscle model
};
AnyMuscleModel GluteusMediusPosterior6Par =
{
 AnyFolder &MuscleParameters = .CadaverMusPar.GluteusMediusPosterior;
 AnyIntVar MuscleElemNo = 6; ///< The number of this element of the muscle
 AnyIntVar MuscleElemAmount = 6; ///< The total amount of elements for this muscle
 F0 = .PCSAfactor*PCSA; // Maximum force output at optimum fiber length
 Lf0 = .FiberLengthScalePelvis
       * MuscleParameters.OptimalFiberlength
       * cos(pi/180*MuscleParameters.Pennationangle);
 V0 = .StrengthScalePelvis*MuscleParameters.VolumeMuscleBelly/MuscleElemAmount;
 AnyVar PCSA = V0/Lf0;///< PCSA is calculated as muscle volume divided between muscle branches, divided by fiber length and corrected for the pennation angle not used in the simple muscle model
};

AnyMuscleModel GluteusMinimusAnterior1Par =
{
 AnyFolder &MuscleParameters = .CadaverMusPar.GluteusMinimusAnterior;
 AnyIntVar MuscleElemNo = 1; ///< The number of this element of the muscle
 AnyIntVar MuscleElemAmount = 1; ///< The total amount of elements for this muscle
 F0 = .PCSAfactor*PCSA; // Maximum force output at optimum fiber length
 Lf0 = .FiberLengthScalePelvis
       * MuscleParameters.OptimalFiberlength
       * cos(pi/180*MuscleParameters.Pennationangle);
 V0 = .StrengthScalePelvis*MuscleParameters.VolumeMuscleBelly/MuscleElemAmount;
 AnyVar PCSA = V0/Lf0;///< PCSA is calculated as muscle volume divided between muscle branches, divided by fiber length and corrected for the pennation angle not used in the simple muscle model
};

AnyMuscleModel GluteusMinimusMid1Par =
{
 AnyFolder &MuscleParameters = .CadaverMusPar.GluteusMinimusMid;
 AnyIntVar MuscleElemNo = 1; ///< The number of this element of the muscle
 AnyIntVar MuscleElemAmount = 1; ///< The total amount of elements for this muscle
 F0 = .PCSAfactor*PCSA; // Maximum force output at optimum fiber length
 Lf0 = .FiberLengthScalePelvis
       * MuscleParameters.OptimalFiberlength
       * cos(pi/180*MuscleParameters.Pennationangle);
 V0 = .StrengthScalePelvis*MuscleParameters.VolumeMuscleBelly/MuscleElemAmount;
 AnyVar PCSA = V0/Lf0;///< PCSA is calculated as muscle volume divided between muscle branches, divided by fiber length and corrected for the pennation angle not used in the simple muscle model
};

AnyMuscleModel GluteusMinimusPosterior1Par =
{
 AnyFolder &MuscleParameters = .CadaverMusPar.GluteusMinimusPosterior;
 AnyIntVar MuscleElemNo = 1; ///< The number of this element of the muscle
 AnyIntVar MuscleElemAmount = 1; ///< The total amount of elements for this muscle
 F0 = .PCSAfactor*PCSA; // Maximum force output at optimum fiber length
 Lf0 = .FiberLengthScalePelvis
       * MuscleParameters.OptimalFiberlength
       * cos(pi/180*MuscleParameters.Pennationangle);
 V0 = .StrengthScalePelvis*MuscleParameters.VolumeMuscleBelly/MuscleElemAmount;
 AnyVar PCSA = V0/Lf0;///< PCSA is calculated as muscle volume divided between muscle branches, divided by fiber length and corrected for the pennation angle not used in the simple muscle model
};

AnyMuscleModel Gracilis1Par =
{
 AnyFolder &MuscleParameters = .CadaverMusPar.Gracilis;
 AnyIntVar MuscleElemNo = 1; ///< The number of this element of the muscle
 AnyIntVar MuscleElemAmount = 2; ///< The total amount of elements for this muscle
 F0 = .PCSAfactor*PCSA; // Maximum force output at optimum fiber length
 Lf0 = .FiberLengthScalePelvis
       * MuscleParameters.OptimalFiberlength
       * cos(pi/180*MuscleParameters.Pennationangle);
 V0 = .StrengthScalePelvis*MuscleParameters.VolumeMuscleBelly/MuscleElemAmount;
 AnyVar PCSA = V0/Lf0;///< PCSA is calculated as muscle volume divided between muscle branches, divided by fiber length and corrected for the pennation angle not used in the simple muscle model
};
AnyMuscleModel Gracilis2Par =
{
 AnyFolder &MuscleParameters = .CadaverMusPar.Gracilis;
 AnyIntVar MuscleElemNo = 2; ///< The number of this element of the muscle
 AnyIntVar MuscleElemAmount = 2; ///< The total amount of elements for this muscle
 F0 = .PCSAfactor*PCSA; // Maximum force output at optimum fiber length
 Lf0 = .FiberLengthScalePelvis
       * MuscleParameters.OptimalFiberlength
       * cos(pi/180*MuscleParameters.Pennationangle);
 V0 = .StrengthScalePelvis*MuscleParameters.VolumeMuscleBelly/MuscleElemAmount;
 AnyVar PCSA = V0/Lf0;///< PCSA is calculated as muscle volume divided between muscle branches, divided by fiber length and corrected for the pennation angle not used in the simple muscle model
};

AnyMuscleModel IliacusLateralis1Par =
{
 AnyFolder &MuscleParameters = .CadaverMusPar.IliacusLateralis;
 AnyIntVar MuscleElemNo = 1; ///< The number of this element of the muscle
 AnyIntVar MuscleElemAmount = 3; ///< The total amount of elements for this muscle
 F0 = .PCSAfactor*PCSA; // Maximum force output at optimum fiber length
 Lf0 = .FiberLengthScalePelvis
       * MuscleParameters.OptimalFiberlength
       * cos(pi/180*MuscleParameters.Pennationangle);
 V0 = .StrengthScalePelvis*MuscleParameters.VolumeMuscleBelly/MuscleElemAmount;
 AnyVar PCSA = V0/Lf0;///< PCSA is calculated as muscle volume divided between muscle branches, divided by fiber length and corrected for the pennation angle not used in the simple muscle model
};
AnyMuscleModel IliacusLateralis2Par =
{
 AnyFolder &MuscleParameters = .CadaverMusPar.IliacusLateralis;
 AnyIntVar MuscleElemNo = 2; ///< The number of this element of the muscle
 AnyIntVar MuscleElemAmount = 3; ///< The total amount of elements for this muscle
 F0 = .PCSAfactor*PCSA; // Maximum force output at optimum fiber length
 Lf0 = .FiberLengthScalePelvis
       * MuscleParameters.OptimalFiberlength
       * cos(pi/180*MuscleParameters.Pennationangle);
 V0 = .StrengthScalePelvis*MuscleParameters.VolumeMuscleBelly/MuscleElemAmount;
 AnyVar PCSA = V0/Lf0;///< PCSA is calculated as muscle volume divided between muscle branches, divided by fiber length and corrected for the pennation angle not used in the simple muscle model
};
AnyMuscleModel IliacusLateralis3Par =
{
 AnyFolder &MuscleParameters = .CadaverMusPar.IliacusLateralis;
 AnyIntVar MuscleElemNo = 3; ///< The number of this element of the muscle
 AnyIntVar MuscleElemAmount = 3; ///< The total amount of elements for this muscle
 F0 = .PCSAfactor*PCSA; // Maximum force output at optimum fiber length
 Lf0 = .FiberLengthScalePelvis
       * MuscleParameters.OptimalFiberlength
       * cos(pi/180*MuscleParameters.Pennationangle);
 V0 = .StrengthScalePelvis*MuscleParameters.VolumeMuscleBelly/MuscleElemAmount;
 AnyVar PCSA = V0/Lf0;///< PCSA is calculated as muscle volume divided between muscle branches, divided by fiber length and corrected for the pennation angle not used in the simple muscle model
};

AnyMuscleModel IliacusMid1Par =
{
 AnyFolder &MuscleParameters = .CadaverMusPar.IliacusMid;
 AnyIntVar MuscleElemNo = 1; ///< The number of this element of the muscle
 AnyIntVar MuscleElemAmount = 3; ///< The total amount of elements for this muscle
 F0 = .PCSAfactor*PCSA; // Maximum force output at optimum fiber length
 Lf0 = .FiberLengthScalePelvis
       * MuscleParameters.OptimalFiberlength
       * cos(pi/180*MuscleParameters.Pennationangle);
 V0 = .StrengthScalePelvis*MuscleParameters.VolumeMuscleBelly/MuscleElemAmount;
 AnyVar PCSA = V0/Lf0;///< PCSA is calculated as muscle volume divided between muscle branches, divided by fiber length and corrected for the pennation angle not used in the simple muscle model
};
AnyMuscleModel IliacusMid2Par =
{
 AnyFolder &MuscleParameters = .CadaverMusPar.IliacusMid;
 AnyIntVar MuscleElemNo = 2; ///< The number of this element of the muscle
 AnyIntVar MuscleElemAmount = 3; ///< The total amount of elements for this muscle
 F0 = .PCSAfactor*PCSA; // Maximum force output at optimum fiber length
 Lf0 = .FiberLengthScalePelvis
       * MuscleParameters.OptimalFiberlength
       * cos(pi/180*MuscleParameters.Pennationangle);
 V0 = .StrengthScalePelvis*MuscleParameters.VolumeMuscleBelly/MuscleElemAmount;
 AnyVar PCSA = V0/Lf0;///< PCSA is calculated as muscle volume divided between muscle branches, divided by fiber length and corrected for the pennation angle not used in the simple muscle model
};
AnyMuscleModel IliacusMid3Par =
{
 AnyFolder &MuscleParameters = .CadaverMusPar.IliacusMid;
 AnyIntVar MuscleElemNo = 3; ///< The number of this element of the muscle
 AnyIntVar MuscleElemAmount = 3; ///< The total amount of elements for this muscle
 F0 = .PCSAfactor*PCSA; // Maximum force output at optimum fiber length
 Lf0 = .FiberLengthScalePelvis
       * MuscleParameters.OptimalFiberlength
       * cos(pi/180*MuscleParameters.Pennationangle);
 V0 = .StrengthScalePelvis*MuscleParameters.VolumeMuscleBelly/MuscleElemAmount;
 AnyVar PCSA = V0/Lf0;///< PCSA is calculated as muscle volume divided between muscle branches, divided by fiber length and corrected for the pennation angle not used in the simple muscle model
};

AnyMuscleModel IliacusMedialis1Par =
{
 AnyFolder &MuscleParameters = .CadaverMusPar.IliacusMedialis;
 AnyIntVar MuscleElemNo = 1; ///< The number of this element of the muscle
 AnyIntVar MuscleElemAmount = 3; ///< The total amount of elements for this muscle
 F0 = .PCSAfactor*PCSA; // Maximum force output at optimum fiber length
 Lf0 = .FiberLengthScalePelvis
       * MuscleParameters.OptimalFiberlength
       * cos(pi/180*MuscleParameters.Pennationangle);
 V0 = .StrengthScalePelvis*MuscleParameters.VolumeMuscleBelly/MuscleElemAmount;
 AnyVar PCSA = V0/Lf0;///< PCSA is calculated as muscle volume divided between muscle branches, divided by fiber length and corrected for the pennation angle not used in the simple muscle model
};
AnyMuscleModel IliacusMedialis2Par =
{
 AnyFolder &MuscleParameters = .CadaverMusPar.IliacusMedialis;
 AnyIntVar MuscleElemNo = 2; ///< The number of this element of the muscle
 AnyIntVar MuscleElemAmount = 3; ///< The total amount of elements for this muscle
 F0 = .PCSAfactor*PCSA; // Maximum force output at optimum fiber length
 Lf0 = .FiberLengthScalePelvis
       * MuscleParameters.OptimalFiberlength
       * cos(pi/180*MuscleParameters.Pennationangle);
 V0 = .StrengthScalePelvis*MuscleParameters.VolumeMuscleBelly/MuscleElemAmount;
 AnyVar PCSA = V0/Lf0;///< PCSA is calculated as muscle volume divided between muscle branches, divided by fiber length and corrected for the pennation angle not used in the simple muscle model
};
AnyMuscleModel IliacusMedialis3Par =
{
 AnyFolder &MuscleParameters = .CadaverMusPar.IliacusMedialis;
 AnyIntVar MuscleElemNo = 3; ///< The number of this element of the muscle
 AnyIntVar MuscleElemAmount = 3; ///< The total amount of elements for this muscle
 F0 = .PCSAfactor*PCSA; // Maximum force output at optimum fiber length
 Lf0 = .FiberLengthScalePelvis
       * MuscleParameters.OptimalFiberlength
       * cos(pi/180*MuscleParameters.Pennationangle);
 V0 = .StrengthScalePelvis*MuscleParameters.VolumeMuscleBelly/MuscleElemAmount;
 AnyVar PCSA = V0/Lf0;///< PCSA is calculated as muscle volume divided between muscle branches, divided by fiber length and corrected for the pennation angle not used in the simple muscle model
};

AnyMuscleModel ObturatorExternusInferior1Par =
{
 AnyFolder &MuscleParameters = .CadaverMusPar.ObturatorExternusInferior;
 AnyIntVar MuscleElemNo = 1; ///< The number of this element of the muscle
 AnyIntVar MuscleElemAmount = 2; ///< The total amount of elements for this muscle
 F0 = .PCSAfactor*PCSA; // Maximum force output at optimum fiber length
 Lf0 = .FiberLengthScalePelvis
       * MuscleParameters.OptimalFiberlength
       * cos(pi/180*MuscleParameters.Pennationangle);
 V0 = .StrengthScalePelvis*MuscleParameters.VolumeMuscleBelly/MuscleElemAmount;
 AnyVar PCSA = V0/Lf0;///< PCSA is calculated as muscle volume divided between muscle branches, divided by fiber length and corrected for the pennation angle not used in the simple muscle model
};
AnyMuscleModel ObturatorExternusInferior2Par =
{
 AnyFolder &MuscleParameters = .CadaverMusPar.ObturatorExternusInferior;
 AnyIntVar MuscleElemNo = 2; ///< The number of this element of the muscle
 AnyIntVar MuscleElemAmount = 2; ///< The total amount of elements for this muscle
 F0 = .PCSAfactor*PCSA; // Maximum force output at optimum fiber length
 Lf0 = .FiberLengthScalePelvis
       * MuscleParameters.OptimalFiberlength
       * cos(pi/180*MuscleParameters.Pennationangle);
 V0 = .StrengthScalePelvis*MuscleParameters.VolumeMuscleBelly/MuscleElemAmount;
 AnyVar PCSA = V0/Lf0;///< PCSA is calculated as muscle volume divided between muscle branches, divided by fiber length and corrected for the pennation angle not used in the simple muscle model
};

AnyMuscleModel ObturatorExternusSuperior1Par =
{
 AnyFolder &MuscleParameters = .CadaverMusPar.ObturatorExternusSuperior;
 AnyIntVar MuscleElemNo = 1; ///< The number of this element of the muscle
 AnyIntVar MuscleElemAmount = 3; ///< The total amount of elements for this muscle
 F0 = .PCSAfactor*PCSA; // Maximum force output at optimum fiber length
 Lf0 = .FiberLengthScalePelvis
       * MuscleParameters.OptimalFiberlength
       * cos(pi/180*MuscleParameters.Pennationangle);
 V0 = .StrengthScalePelvis*MuscleParameters.VolumeMuscleBelly/MuscleElemAmount;
 AnyVar PCSA = V0/Lf0;///< PCSA is calculated as muscle volume divided between muscle branches, divided by fiber length and corrected for the pennation angle not used in the simple muscle model
};
AnyMuscleModel ObturatorExternusSuperior2Par =
{
 AnyFolder &MuscleParameters = .CadaverMusPar.ObturatorExternusSuperior;
 AnyIntVar MuscleElemNo = 2; ///< The number of this element of the muscle
 AnyIntVar MuscleElemAmount = 3; ///< The total amount of elements for this muscle
 F0 = .PCSAfactor*PCSA; // Maximum force output at optimum fiber length
 Lf0 = .FiberLengthScalePelvis
       * MuscleParameters.OptimalFiberlength
       * cos(pi/180*MuscleParameters.Pennationangle);
 V0 = .StrengthScalePelvis*MuscleParameters.VolumeMuscleBelly/MuscleElemAmount;
 AnyVar PCSA = V0/Lf0;///< PCSA is calculated as muscle volume divided between muscle branches, divided by fiber length and corrected for the pennation angle not used in the simple muscle model
};
AnyMuscleModel ObturatorExternusSuperior3Par =
{
 AnyFolder &MuscleParameters = .CadaverMusPar.ObturatorExternusSuperior;
 AnyIntVar MuscleElemNo = 3; ///< The number of this element of the muscle
 AnyIntVar MuscleElemAmount = 3; ///< The total amount of elements for this muscle
 F0 = .PCSAfactor*PCSA; // Maximum force output at optimum fiber length
 Lf0 = .FiberLengthScalePelvis
       * MuscleParameters.OptimalFiberlength
       * cos(pi/180*MuscleParameters.Pennationangle);
 V0 = .StrengthScalePelvis*MuscleParameters.VolumeMuscleBelly/MuscleElemAmount;
 AnyVar PCSA = V0/Lf0;///< PCSA is calculated as muscle volume divided between muscle branches, divided by fiber length and corrected for the pennation angle not used in the simple muscle model
};

AnyMuscleModel ObturatorInternus1Par =
{
 AnyFolder &MuscleParameters = .CadaverMusPar.ObturatorInternus;
 AnyIntVar MuscleElemNo = 1; ///< The number of this element of the muscle
 AnyIntVar MuscleElemAmount = 6; ///< The total amount of elements for this muscle
 F0 = .PCSAfactor*PCSA; // Maximum force output at optimum fiber length
 Lf0 = .FiberLengthScalePelvis
       * MuscleParameters.OptimalFiberlength
       * cos(pi/180*MuscleParameters.Pennationangle);
 V0 = .StrengthScalePelvis*MuscleParameters.VolumeMuscleBelly/MuscleElemAmount;
 AnyVar PCSA = V0/Lf0;///< PCSA is calculated as muscle volume divided between muscle branches, divided by fiber length and corrected for the pennation angle not used in the simple muscle model
};
AnyMuscleModel ObturatorInternus2Par =
{
 AnyFolder &MuscleParameters = .CadaverMusPar.ObturatorInternus;
 AnyIntVar MuscleElemNo = 2; ///< The number of this element of the muscle
 AnyIntVar MuscleElemAmount = 6; ///< The total amount of elements for this muscle
 F0 = .PCSAfactor*PCSA; // Maximum force output at optimum fiber length
 Lf0 = .FiberLengthScalePelvis
       * MuscleParameters.OptimalFiberlength
       * cos(pi/180*MuscleParameters.Pennationangle);
 V0 = .StrengthScalePelvis*MuscleParameters.VolumeMuscleBelly/MuscleElemAmount;
 AnyVar PCSA = V0/Lf0;///< PCSA is calculated as muscle volume divided between muscle branches, divided by fiber length and corrected for the pennation angle not used in the simple muscle model
};
AnyMuscleModel ObturatorInternus3Par =
{
 AnyFolder &MuscleParameters = .CadaverMusPar.ObturatorInternus;
 AnyIntVar MuscleElemNo = 3; ///< The number of this element of the muscle
 AnyIntVar MuscleElemAmount = 6; ///< The total amount of elements for this muscle
 F0 = .PCSAfactor*PCSA; // Maximum force output at optimum fiber length
 Lf0 = .FiberLengthScalePelvis
       * MuscleParameters.OptimalFiberlength
       * cos(pi/180*MuscleParameters.Pennationangle);
 V0 = .StrengthScalePelvis*MuscleParameters.VolumeMuscleBelly/MuscleElemAmount;
 AnyVar PCSA = V0/Lf0;///< PCSA is calculated as muscle volume divided between muscle branches, divided by fiber length and corrected for the pennation angle not used in the simple muscle model
};
AnyMuscleModel ObturatorInternus4Par =
{
 AnyFolder &MuscleParameters = .CadaverMusPar.ObturatorInternus;
 AnyIntVar MuscleElemNo = 4; ///< The number of this element of the muscle
 AnyIntVar MuscleElemAmount = 6; ///< The total amount of elements for this muscle
 F0 = .PCSAfactor*PCSA; // Maximum force output at optimum fiber length
 Lf0 = .FiberLengthScalePelvis
       * MuscleParameters.OptimalFiberlength
       * cos(pi/180*MuscleParameters.Pennationangle);
 V0 = .StrengthScalePelvis*MuscleParameters.VolumeMuscleBelly/MuscleElemAmount;
 AnyVar PCSA = V0/Lf0;///< PCSA is calculated as muscle volume divided between muscle branches, divided by fiber length and corrected for the pennation angle not used in the simple muscle model
};
AnyMuscleModel ObturatorInternus5Par =
{
 AnyFolder &MuscleParameters = .CadaverMusPar.ObturatorInternus;
 AnyIntVar MuscleElemNo = 5; ///< The number of this element of the muscle
 AnyIntVar MuscleElemAmount = 6; ///< The total amount of elements for this muscle
 F0 = .PCSAfactor*PCSA; // Maximum force output at optimum fiber length
 Lf0 = .FiberLengthScalePelvis
       * MuscleParameters.OptimalFiberlength
       * cos(pi/180*MuscleParameters.Pennationangle);
 V0 = .StrengthScalePelvis*MuscleParameters.VolumeMuscleBelly/MuscleElemAmount;
 AnyVar PCSA = V0/Lf0;///< PCSA is calculated as muscle volume divided between muscle branches, divided by fiber length and corrected for the pennation angle not used in the simple muscle model
};
AnyMuscleModel ObturatorInternus6Par =
{
 AnyFolder &MuscleParameters = .CadaverMusPar.ObturatorInternus;
 AnyIntVar MuscleElemNo = 6; ///< The number of this element of the muscle
 AnyIntVar MuscleElemAmount = 6; ///< The total amount of elements for this muscle
 F0 = .PCSAfactor*PCSA; // Maximum force output at optimum fiber length
 Lf0 = .FiberLengthScalePelvis
       * MuscleParameters.OptimalFiberlength
       * cos(pi/180*MuscleParameters.Pennationangle);
 V0 = .StrengthScalePelvis*MuscleParameters.VolumeMuscleBelly/MuscleElemAmount;
 AnyVar PCSA = V0/Lf0;///< PCSA is calculated as muscle volume divided between muscle branches, divided by fiber length and corrected for the pennation angle not used in the simple muscle model
};

AnyMuscleModel Pectineus1Par =
{
 AnyFolder &MuscleParameters = .CadaverMusPar.Pectineus;
 AnyIntVar MuscleElemNo = 1; ///< The number of this element of the muscle
 AnyIntVar MuscleElemAmount = 4; ///< The total amount of elements for this muscle
 F0 = .PCSAfactor*PCSA; // Maximum force output at optimum fiber length
 Lf0 = .FiberLengthScalePelvis
       * MuscleParameters.OptimalFiberlength
       * cos(pi/180*MuscleParameters.Pennationangle);
 V0 = .StrengthScalePelvis*MuscleParameters.VolumeMuscleBelly/MuscleElemAmount;
 AnyVar PCSA = V0/Lf0;///< PCSA is calculated as muscle volume divided between muscle branches, divided by fiber length and corrected for the pennation angle not used in the simple muscle model
};
AnyMuscleModel Pectineus2Par =
{
 AnyFolder &MuscleParameters = .CadaverMusPar.Pectineus;
 AnyIntVar MuscleElemNo = 2; ///< The number of this element of the muscle
 AnyIntVar MuscleElemAmount = 4; ///< The total amount of elements for this muscle
 F0 = .PCSAfactor*PCSA; // Maximum force output at optimum fiber length
 Lf0 = .FiberLengthScalePelvis
       * MuscleParameters.OptimalFiberlength
       * cos(pi/180*MuscleParameters.Pennationangle);
 V0 = .StrengthScalePelvis*MuscleParameters.VolumeMuscleBelly/MuscleElemAmount;
 AnyVar PCSA = V0/Lf0;///< PCSA is calculated as muscle volume divided between muscle branches, divided by fiber length and corrected for the pennation angle not used in the simple muscle model
};
AnyMuscleModel Pectineus3Par =
{
 AnyFolder &MuscleParameters = .CadaverMusPar.Pectineus;
 AnyIntVar MuscleElemNo = 3; ///< The number of this element of the muscle
 AnyIntVar MuscleElemAmount = 4; ///< The total amount of elements for this muscle
 F0 = .PCSAfactor*PCSA; // Maximum force output at optimum fiber length
 Lf0 = .FiberLengthScalePelvis
       * MuscleParameters.OptimalFiberlength
       * cos(pi/180*MuscleParameters.Pennationangle);
 V0 = .StrengthScalePelvis*MuscleParameters.VolumeMuscleBelly/MuscleElemAmount;
 AnyVar PCSA = V0/Lf0;///< PCSA is calculated as muscle volume divided between muscle branches, divided by fiber length and corrected for the pennation angle not used in the simple muscle model
};
AnyMuscleModel Pectineus4Par =
{
 AnyFolder &MuscleParameters = .CadaverMusPar.Pectineus;
 AnyIntVar MuscleElemNo = 4; ///< The number of this element of the muscle
 AnyIntVar MuscleElemAmount = 4; ///< The total amount of elements for this muscle
 F0 = .PCSAfactor*PCSA; // Maximum force output at optimum fiber length
 Lf0 = .FiberLengthScalePelvis
       * MuscleParameters.OptimalFiberlength
       * cos(pi/180*MuscleParameters.Pennationangle);
 V0 = .StrengthScalePelvis*MuscleParameters.VolumeMuscleBelly/MuscleElemAmount;
 AnyVar PCSA = V0/Lf0;///< PCSA is calculated as muscle volume divided between muscle branches, divided by fiber length and corrected for the pennation angle not used in the simple muscle model
};

AnyMuscleModel PeroneusBrevis1Par =
{
 AnyFolder &MuscleParameters = .CadaverMusPar.PeroneusBrevis;
 AnyIntVar MuscleElemNo = 1; ///< The number of this element of the muscle
 AnyIntVar MuscleElemAmount = 3; ///< The total amount of elements for this muscle
 F0 = .PCSAfactor*PCSA; // Maximum force output at optimum fiber length
 Lf0 = .FiberLengthScalePelvis
       * MuscleParameters.OptimalFiberlength
       * cos(pi/180*MuscleParameters.Pennationangle);
 V0 = .StrengthScalePelvis*MuscleParameters.VolumeMuscleBelly/MuscleElemAmount;
 AnyVar PCSA = V0/Lf0;///< PCSA is calculated as muscle volume divided between muscle branches, divided by fiber length and corrected for the pennation angle not used in the simple muscle model
};
AnyMuscleModel PeroneusBrevis2Par =
{
 AnyFolder &MuscleParameters = .CadaverMusPar.PeroneusBrevis;
 AnyIntVar MuscleElemNo = 2; ///< The number of this element of the muscle
 AnyIntVar MuscleElemAmount = 3; ///< The total amount of elements for this muscle
 F0 = .PCSAfactor*PCSA; // Maximum force output at optimum fiber length
 Lf0 = .FiberLengthScalePelvis
       * MuscleParameters.OptimalFiberlength
       * cos(pi/180*MuscleParameters.Pennationangle);
 V0 = .StrengthScalePelvis*MuscleParameters.VolumeMuscleBelly/MuscleElemAmount;
 AnyVar PCSA = V0/Lf0;///< PCSA is calculated as muscle volume divided between muscle branches, divided by fiber length and corrected for the pennation angle not used in the simple muscle model
};
AnyMuscleModel PeroneusBrevis3Par =
{
 AnyFolder &MuscleParameters = .CadaverMusPar.PeroneusBrevis;
 AnyIntVar MuscleElemNo = 3; ///< The number of this element of the muscle
 AnyIntVar MuscleElemAmount = 3; ///< The total amount of elements for this muscle
 F0 = .PCSAfactor*PCSA; // Maximum force output at optimum fiber length
 Lf0 = .FiberLengthScalePelvis
       * MuscleParameters.OptimalFiberlength
       * cos(pi/180*MuscleParameters.Pennationangle);
 V0 = .StrengthScalePelvis*MuscleParameters.VolumeMuscleBelly/MuscleElemAmount;
 AnyVar PCSA = V0/Lf0;///< PCSA is calculated as muscle volume divided between muscle branches, divided by fiber length and corrected for the pennation angle not used in the simple muscle model
};

AnyMuscleModel PeroneusLongus1Par =
{
 AnyFolder &MuscleParameters = .CadaverMusPar.PeroneusLongus;
 AnyIntVar MuscleElemNo = 1; ///< The number of this element of the muscle
 AnyIntVar MuscleElemAmount = 3; ///< The total amount of elements for this muscle
 F0 = .PCSAfactor*PCSA; // Maximum force output at optimum fiber length
 Lf0 = .FiberLengthScalePelvis
       * MuscleParameters.OptimalFiberlength
       * cos(pi/180*MuscleParameters.Pennationangle);
 V0 = .StrengthScalePelvis*MuscleParameters.VolumeMuscleBelly/MuscleElemAmount;
 AnyVar PCSA = V0/Lf0;///< PCSA is calculated as muscle volume divided between muscle branches, divided by fiber length and corrected for the pennation angle not used in the simple muscle model
};
AnyMuscleModel PeroneusLongus2Par =
{
 AnyFolder &MuscleParameters = .CadaverMusPar.PeroneusLongus;
 AnyIntVar MuscleElemNo = 2; ///< The number of this element of the muscle
 AnyIntVar MuscleElemAmount = 3; ///< The total amount of elements for this muscle
 F0 = .PCSAfactor*PCSA; // Maximum force output at optimum fiber length
 Lf0 = .FiberLengthScalePelvis
       * MuscleParameters.OptimalFiberlength
       * cos(pi/180*MuscleParameters.Pennationangle);
 V0 = .StrengthScalePelvis*MuscleParameters.VolumeMuscleBelly/MuscleElemAmount;
 AnyVar PCSA = V0/Lf0;///< PCSA is calculated as muscle volume divided between muscle branches, divided by fiber length and corrected for the pennation angle not used in the simple muscle model
};
AnyMuscleModel PeroneusLongus3Par =
{
 AnyFolder &MuscleParameters = .CadaverMusPar.PeroneusLongus;
 AnyIntVar MuscleElemNo = 3; ///< The number of this element of the muscle
 AnyIntVar MuscleElemAmount = 3; ///< The total amount of elements for this muscle
 F0 = .PCSAfactor*PCSA; // Maximum force output at optimum fiber length
 Lf0 = .FiberLengthScalePelvis
       * MuscleParameters.OptimalFiberlength
       * cos(pi/180*MuscleParameters.Pennationangle);
 V0 = .StrengthScalePelvis*MuscleParameters.VolumeMuscleBelly/MuscleElemAmount;
 AnyVar PCSA = V0/Lf0;///< PCSA is calculated as muscle volume divided between muscle branches, divided by fiber length and corrected for the pennation angle not used in the simple muscle model
};

AnyMuscleModel PeroneusTertius1Par =
{
 AnyFolder &MuscleParameters = .CadaverMusPar.PeroneusTertius;
 AnyIntVar MuscleElemNo = 1; ///< The number of this element of the muscle
 AnyIntVar MuscleElemAmount = 3; ///< The total amount of elements for this muscle
 F0 = .PCSAfactor*PCSA; // Maximum force output at optimum fiber length
 Lf0 = .FiberLengthScalePelvis
       * MuscleParameters.OptimalFiberlength
       * cos(pi/180*MuscleParameters.Pennationangle);
 V0 = .StrengthScalePelvis*MuscleParameters.VolumeMuscleBelly/MuscleElemAmount;
 AnyVar PCSA = V0/Lf0;///< PCSA is calculated as muscle volume divided between muscle branches, divided by fiber length and corrected for the pennation angle not used in the simple muscle model
};
AnyMuscleModel PeroneusTertius2Par =
{
 AnyFolder &MuscleParameters = .CadaverMusPar.PeroneusTertius;
 AnyIntVar MuscleElemNo = 2; ///< The number of this element of the muscle
 AnyIntVar MuscleElemAmount = 3; ///< The total amount of elements for this muscle
 F0 = .PCSAfactor*PCSA; // Maximum force output at optimum fiber length
 Lf0 = .FiberLengthScalePelvis
       * MuscleParameters.OptimalFiberlength
       * cos(pi/180*MuscleParameters.Pennationangle);
 V0 = .StrengthScalePelvis*MuscleParameters.VolumeMuscleBelly/MuscleElemAmount;
 AnyVar PCSA = V0/Lf0;///< PCSA is calculated as muscle volume divided between muscle branches, divided by fiber length and corrected for the pennation angle not used in the simple muscle model
};
AnyMuscleModel PeroneusTertius3Par =
{
 AnyFolder &MuscleParameters = .CadaverMusPar.PeroneusTertius;
 AnyIntVar MuscleElemNo = 3; ///< The number of this element of the muscle
 AnyIntVar MuscleElemAmount = 3; ///< The total amount of elements for this muscle
 F0 = .PCSAfactor*PCSA; // Maximum force output at optimum fiber length
 Lf0 = .FiberLengthScalePelvis
       * MuscleParameters.OptimalFiberlength
       * cos(pi/180*MuscleParameters.Pennationangle);
 V0 = .StrengthScalePelvis*MuscleParameters.VolumeMuscleBelly/MuscleElemAmount;
 AnyVar PCSA = V0/Lf0;///< PCSA is calculated as muscle volume divided between muscle branches, divided by fiber length and corrected for the pennation angle not used in the simple muscle model
};

AnyMuscleModel Piriformis1Par =
{
 AnyFolder &MuscleParameters = .CadaverMusPar.Piriformis;
 AnyIntVar MuscleElemNo = 1; ///< The number of this element of the muscle
 AnyIntVar MuscleElemAmount = 1; ///< The total amount of elements for this muscle
 F0 = .PCSAfactor*PCSA; // Maximum force output at optimum fiber length
 Lf0 = .FiberLengthScalePelvis
       * MuscleParameters.OptimalFiberlength
       * cos(pi/180*MuscleParameters.Pennationangle);
 V0 = .StrengthScalePelvis*MuscleParameters.VolumeMuscleBelly/MuscleElemAmount;
 AnyVar PCSA = V0/Lf0;///< PCSA is calculated as muscle volume divided between muscle branches, divided by fiber length and corrected for the pennation angle not used in the simple muscle model
};

AnyMuscleModel Plantaris1Par =
{
 AnyFolder &MuscleParameters = .CadaverMusPar.Plantaris;
 AnyIntVar MuscleElemNo = 1; ///< The number of this element of the muscle
 AnyIntVar MuscleElemAmount = 1; ///< The total amount of elements for this muscle
 F0 = .PCSAfactor*PCSA; // Maximum force output at optimum fiber length
 Lf0 = .FiberLengthScalePelvis
       * MuscleParameters.OptimalFiberlength
       * cos(pi/180*MuscleParameters.Pennationangle);
 V0 = .StrengthScalePelvis*MuscleParameters.VolumeMuscleBelly/MuscleElemAmount;
 AnyVar PCSA = V0/Lf0;///< PCSA is calculated as muscle volume divided between muscle branches, divided by fiber length and corrected for the pennation angle not used in the simple muscle model
};

AnyMuscleModel Popliteus1Par =
{
 AnyFolder &MuscleParameters = .CadaverMusPar.Popliteus;
 AnyIntVar MuscleElemNo = 1; ///< The number of this element of the muscle
 AnyIntVar MuscleElemAmount = 3; ///< The total amount of elements for this muscle
 F0 = .PCSAfactor*PCSA; // Maximum force output at optimum fiber length
 Lf0 = .FiberLengthScalePelvis
       * MuscleParameters.OptimalFiberlength
       * cos(pi/180*MuscleParameters.Pennationangle);
 V0 = .StrengthScalePelvis*MuscleParameters.VolumeMuscleBelly/MuscleElemAmount;
 AnyVar PCSA = V0/Lf0;///< PCSA is calculated as muscle volume divided between muscle branches, divided by fiber length and corrected for the pennation angle not used in the simple muscle model
};
AnyMuscleModel Popliteus2Par =
{
 AnyFolder &MuscleParameters = .CadaverMusPar.Popliteus;
 AnyIntVar MuscleElemNo = 2; ///< The number of this element of the muscle
 AnyIntVar MuscleElemAmount = 3; ///< The total amount of elements for this muscle
 F0 = .PCSAfactor*PCSA; // Maximum force output at optimum fiber length
 Lf0 = .FiberLengthScalePelvis
       * MuscleParameters.OptimalFiberlength
       * cos(pi/180*MuscleParameters.Pennationangle);
 V0 = .StrengthScalePelvis*MuscleParameters.VolumeMuscleBelly/MuscleElemAmount;
 AnyVar PCSA = V0/Lf0;///< PCSA is calculated as muscle volume divided between muscle branches, divided by fiber length and corrected for the pennation angle not used in the simple muscle model
};
AnyMuscleModel Popliteus3Par =
{
 AnyFolder &MuscleParameters = .CadaverMusPar.Popliteus;
 AnyIntVar MuscleElemNo = 3; ///< The number of this element of the muscle
 AnyIntVar MuscleElemAmount = 3; ///< The total amount of elements for this muscle
 F0 = .PCSAfactor*PCSA; // Maximum force output at optimum fiber length
 Lf0 = .FiberLengthScalePelvis
       * MuscleParameters.OptimalFiberlength
       * cos(pi/180*MuscleParameters.Pennationangle);
 V0 = .StrengthScalePelvis*MuscleParameters.VolumeMuscleBelly/MuscleElemAmount;
 AnyVar PCSA = V0/Lf0;///< PCSA is calculated as muscle volume divided between muscle branches, divided by fiber length and corrected for the pennation angle not used in the simple muscle model
};

AnyMuscleModel PsoasMinor1Par =
{
 AnyFolder &MuscleParameters = .CadaverMusPar.PsoasMinor;
 AnyIntVar MuscleElemNo = 1; ///< The number of this element of the muscle
 AnyIntVar MuscleElemAmount = 1; ///< The total amount of elements for this muscle
 F0 = .PCSAfactor*PCSA; // Maximum force output at optimum fiber length
 Lf0 = .FiberLengthScalePelvis
       * MuscleParameters.OptimalFiberlength
       * cos(pi/180*MuscleParameters.Pennationangle);
 V0 = .StrengthScalePelvis*MuscleParameters.VolumeMuscleBelly/MuscleElemAmount;
 AnyVar PCSA = V0/Lf0;///< PCSA is calculated as muscle volume divided between muscle branches, divided by fiber length and corrected for the pennation angle not used in the simple muscle model
};

AnyMuscleModel PsoasMajor1Par =
{
 AnyFolder &MuscleParameters = .CadaverMusPar.PsoasMajor;
 AnyIntVar MuscleElemNo = 1; ///< The number of this element of the muscle
 AnyIntVar MuscleElemAmount = 11; ///< The total amount of elements for this muscle
 F0 = .PCSAfactor*PCSA; // Maximum force output at optimum fiber length
 Lf0 = .FiberLengthScalePelvis
       * MuscleParameters.OptimalFiberlength
       * cos(pi/180*MuscleParameters.Pennationangle);
 V0 = .StrengthScalePelvis*MuscleParameters.VolumeMuscleBelly/MuscleElemAmount;
 AnyVar PCSA = V0/Lf0;///< PCSA is calculated as muscle volume divided between muscle branches, divided by fiber length and corrected for the pennation angle not used in the simple muscle model
};
AnyMuscleModel PsoasMajor2Par =
{
 AnyFolder &MuscleParameters = .CadaverMusPar.PsoasMajor;
 AnyIntVar MuscleElemNo = 2; ///< The number of this element of the muscle
 AnyIntVar MuscleElemAmount = 11; ///< The total amount of elements for this muscle
 F0 = .PCSAfactor*PCSA; // Maximum force output at optimum fiber length
 Lf0 = .FiberLengthScalePelvis
       * MuscleParameters.OptimalFiberlength
       * cos(pi/180*MuscleParameters.Pennationangle);
 V0 = .StrengthScalePelvis*MuscleParameters.VolumeMuscleBelly/MuscleElemAmount;
 AnyVar PCSA = V0/Lf0;///< PCSA is calculated as muscle volume divided between muscle branches, divided by fiber length and corrected for the pennation angle not used in the simple muscle model
};
AnyMuscleModel PsoasMajor3Par =
{
 AnyFolder &MuscleParameters = .CadaverMusPar.PsoasMajor;
 AnyIntVar MuscleElemNo = 3; ///< The number of this element of the muscle
 AnyIntVar MuscleElemAmount = 11; ///< The total amount of elements for this muscle
 F0 = .PCSAfactor*PCSA; // Maximum force output at optimum fiber length
 Lf0 = .FiberLengthScalePelvis
       * MuscleParameters.OptimalFiberlength
       * cos(pi/180*MuscleParameters.Pennationangle);
 V0 = .StrengthScalePelvis*MuscleParameters.VolumeMuscleBelly/MuscleElemAmount;
 AnyVar PCSA = V0/Lf0;///< PCSA is calculated as muscle volume divided between muscle branches, divided by fiber length and corrected for the pennation angle not used in the simple muscle model
};
AnyMuscleModel PsoasMajor4Par =
{
 AnyFolder &MuscleParameters = .CadaverMusPar.PsoasMajor;
 AnyIntVar MuscleElemNo = 4; ///< The number of this element of the muscle
 AnyIntVar MuscleElemAmount = 11; ///< The total amount of elements for this muscle
 F0 = .PCSAfactor*PCSA; // Maximum force output at optimum fiber length
 Lf0 = .FiberLengthScalePelvis
       * MuscleParameters.OptimalFiberlength
       * cos(pi/180*MuscleParameters.Pennationangle);
 V0 = .StrengthScalePelvis*MuscleParameters.VolumeMuscleBelly/MuscleElemAmount;
 AnyVar PCSA = V0/Lf0;///< PCSA is calculated as muscle volume divided between muscle branches, divided by fiber length and corrected for the pennation angle not used in the simple muscle model
};
AnyMuscleModel PsoasMajor5Par =
{
 AnyFolder &MuscleParameters = .CadaverMusPar.PsoasMajor;
 AnyIntVar MuscleElemNo = 5; ///< The number of this element of the muscle
 AnyIntVar MuscleElemAmount = 11; ///< The total amount of elements for this muscle
 F0 = .PCSAfactor*PCSA; // Maximum force output at optimum fiber length
 Lf0 = .FiberLengthScalePelvis
       * MuscleParameters.OptimalFiberlength
       * cos(pi/180*MuscleParameters.Pennationangle);
 V0 = .StrengthScalePelvis*MuscleParameters.VolumeMuscleBelly/MuscleElemAmount;
 AnyVar PCSA = V0/Lf0;///< PCSA is calculated as muscle volume divided between muscle branches, divided by fiber length and corrected for the pennation angle not used in the simple muscle model
};
AnyMuscleModel PsoasMajor6Par =
{
 AnyFolder &MuscleParameters = .CadaverMusPar.PsoasMajor;
 AnyIntVar MuscleElemNo = 6; ///< The number of this element of the muscle
 AnyIntVar MuscleElemAmount = 11; ///< The total amount of elements for this muscle
 F0 = .PCSAfactor*PCSA; // Maximum force output at optimum fiber length
 Lf0 = .FiberLengthScalePelvis
       * MuscleParameters.OptimalFiberlength
       * cos(pi/180*MuscleParameters.Pennationangle);
 V0 = .StrengthScalePelvis*MuscleParameters.VolumeMuscleBelly/MuscleElemAmount;
 AnyVar PCSA = V0/Lf0;///< PCSA is calculated as muscle volume divided between muscle branches, divided by fiber length and corrected for the pennation angle not used in the simple muscle model
};
AnyMuscleModel PsoasMajor7Par =
{
 AnyFolder &MuscleParameters = .CadaverMusPar.PsoasMajor;
 AnyIntVar MuscleElemNo = 7; ///< The number of this element of the muscle
 AnyIntVar MuscleElemAmount = 11; ///< The total amount of elements for this muscle
 F0 = .PCSAfactor*PCSA; // Maximum force output at optimum fiber length
 Lf0 = .FiberLengthScalePelvis
       * MuscleParameters.OptimalFiberlength
       * cos(pi/180*MuscleParameters.Pennationangle);
 V0 = .StrengthScalePelvis*MuscleParameters.VolumeMuscleBelly/MuscleElemAmount;
 AnyVar PCSA = V0/Lf0;///< PCSA is calculated as muscle volume divided between muscle branches, divided by fiber length and corrected for the pennation angle not used in the simple muscle model
};
AnyMuscleModel PsoasMajor8Par =
{
 AnyFolder &MuscleParameters = .CadaverMusPar.PsoasMajor;
 AnyIntVar MuscleElemNo = 8; ///< The number of this element of the muscle
 AnyIntVar MuscleElemAmount = 11; ///< The total amount of elements for this muscle
 F0 = .PCSAfactor*PCSA; // Maximum force output at optimum fiber length
 Lf0 = .FiberLengthScalePelvis
       * MuscleParameters.OptimalFiberlength
       * cos(pi/180*MuscleParameters.Pennationangle);
 V0 = .StrengthScalePelvis*MuscleParameters.VolumeMuscleBelly/MuscleElemAmount;
 AnyVar PCSA = V0/Lf0;///< PCSA is calculated as muscle volume divided between muscle branches, divided by fiber length and corrected for the pennation angle not used in the simple muscle model
};
AnyMuscleModel PsoasMajor9Par =
{
 AnyFolder &MuscleParameters = .CadaverMusPar.PsoasMajor;
 AnyIntVar MuscleElemNo = 9; ///< The number of this element of the muscle
 AnyIntVar MuscleElemAmount = 11; ///< The total amount of elements for this muscle
 F0 = .PCSAfactor*PCSA; // Maximum force output at optimum fiber length
 Lf0 = .FiberLengthScalePelvis
       * MuscleParameters.OptimalFiberlength
       * cos(pi/180*MuscleParameters.Pennationangle);
 V0 = .StrengthScalePelvis*MuscleParameters.VolumeMuscleBelly/MuscleElemAmount;
 AnyVar PCSA = V0/Lf0;///< PCSA is calculated as muscle volume divided between muscle branches, divided by fiber length and corrected for the pennation angle not used in the simple muscle model
};
AnyMuscleModel PsoasMajor10Par =
{
 AnyFolder &MuscleParameters = .CadaverMusPar.PsoasMajor;
 AnyIntVar MuscleElemNo = 10; ///< The number of this element of the muscle
 AnyIntVar MuscleElemAmount = 11; ///< The total amount of elements for this muscle
 F0 = .PCSAfactor*PCSA; // Maximum force output at optimum fiber length
 Lf0 = .FiberLengthScalePelvis
       * MuscleParameters.OptimalFiberlength
       * cos(pi/180*MuscleParameters.Pennationangle);
 V0 = .StrengthScalePelvis*MuscleParameters.VolumeMuscleBelly/MuscleElemAmount;
 AnyVar PCSA = V0/Lf0;///< PCSA is calculated as muscle volume divided between muscle branches, divided by fiber length and corrected for the pennation angle not used in the simple muscle model
};
AnyMuscleModel PsoasMajor11Par =
{
 AnyFolder &MuscleParameters = .CadaverMusPar.PsoasMajor;
 AnyIntVar MuscleElemNo = 11; ///< The number of this element of the muscle
 AnyIntVar MuscleElemAmount = 11; ///< The total amount of elements for this muscle
 F0 = .PCSAfactor*PCSA; // Maximum force output at optimum fiber length
 Lf0 = .FiberLengthScalePelvis
       * MuscleParameters.OptimalFiberlength
       * cos(pi/180*MuscleParameters.Pennationangle);
 V0 = .StrengthScalePelvis*MuscleParameters.VolumeMuscleBelly/MuscleElemAmount;
 AnyVar PCSA = V0/Lf0;///< PCSA is calculated as muscle volume divided between muscle branches, divided by fiber length and corrected for the pennation angle not used in the simple muscle model
};

AnyMuscleModel QuadratusFemoris1Par =
{
 AnyFolder &MuscleParameters = .CadaverMusPar.QuadratusFemoris;
 AnyIntVar MuscleElemNo = 1; ///< The number of this element of the muscle
 AnyIntVar MuscleElemAmount = 4; ///< The total amount of elements for this muscle
 F0 = .PCSAfactor*PCSA; // Maximum force output at optimum fiber length
 Lf0 = .FiberLengthScalePelvis
       * MuscleParameters.OptimalFiberlength
       * cos(pi/180*MuscleParameters.Pennationangle);
 V0 = .StrengthScalePelvis*MuscleParameters.VolumeMuscleBelly/MuscleElemAmount;
 AnyVar PCSA = V0/Lf0;///< PCSA is calculated as muscle volume divided between muscle branches, divided by fiber length and corrected for the pennation angle not used in the simple muscle model
};
AnyMuscleModel QuadratusFemoris2Par =
{
 AnyFolder &MuscleParameters = .CadaverMusPar.QuadratusFemoris;
 AnyIntVar MuscleElemNo = 2; ///< The number of this element of the muscle
 AnyIntVar MuscleElemAmount = 4; ///< The total amount of elements for this muscle
 F0 = .PCSAfactor*PCSA; // Maximum force output at optimum fiber length
 Lf0 = .FiberLengthScalePelvis
       * MuscleParameters.OptimalFiberlength
       * cos(pi/180*MuscleParameters.Pennationangle);
 V0 = .StrengthScalePelvis*MuscleParameters.VolumeMuscleBelly/MuscleElemAmount;
 AnyVar PCSA = V0/Lf0;///< PCSA is calculated as muscle volume divided between muscle branches, divided by fiber length and corrected for the pennation angle not used in the simple muscle model
};
AnyMuscleModel QuadratusFemoris3Par =
{
 AnyFolder &MuscleParameters = .CadaverMusPar.QuadratusFemoris;
 AnyIntVar MuscleElemNo = 3; ///< The number of this element of the muscle
 AnyIntVar MuscleElemAmount = 4; ///< The total amount of elements for this muscle
 F0 = .PCSAfactor*PCSA; // Maximum force output at optimum fiber length
 Lf0 = .FiberLengthScalePelvis
       * MuscleParameters.OptimalFiberlength
       * cos(pi/180*MuscleParameters.Pennationangle);
 V0 = .StrengthScalePelvis*MuscleParameters.VolumeMuscleBelly/MuscleElemAmount;
 AnyVar PCSA = V0/Lf0;///< PCSA is calculated as muscle volume divided between muscle branches, divided by fiber length and corrected for the pennation angle not used in the simple muscle model
};
AnyMuscleModel QuadratusFemoris4Par =
{
 AnyFolder &MuscleParameters = .CadaverMusPar.QuadratusFemoris;
 AnyIntVar MuscleElemNo = 4; ///< The number of this element of the muscle
 AnyIntVar MuscleElemAmount = 4; ///< The total amount of elements for this muscle
 F0 = .PCSAfactor*PCSA; // Maximum force output at optimum fiber length
 Lf0 = .FiberLengthScalePelvis
       * MuscleParameters.OptimalFiberlength
       * cos(pi/180*MuscleParameters.Pennationangle);
 V0 = .StrengthScalePelvis*MuscleParameters.VolumeMuscleBelly/MuscleElemAmount;
 AnyVar PCSA = V0/Lf0;///< PCSA is calculated as muscle volume divided between muscle branches, divided by fiber length and corrected for the pennation angle not used in the simple muscle model
};

AnyMuscleModel RectusFemoris1Par =
{
 AnyFolder &MuscleParameters = .CadaverMusPar.RectusFemoris;
 AnyIntVar MuscleElemNo = 1; ///< The number of this element of the muscle
 AnyIntVar MuscleElemAmount = 2; ///< The total amount of elements for this muscle
 F0 = .PCSAfactor*PCSA; // Maximum force output at optimum fiber length
 Lf0 = .FiberLengthScalePelvis
       * MuscleParameters.OptimalFiberlength
       * cos(pi/180*MuscleParameters.Pennationangle);
 V0 = .StrengthScalePelvis*MuscleParameters.VolumeMuscleBelly/MuscleElemAmount;
 AnyVar PCSA = V0/Lf0;///< PCSA is calculated as muscle volume divided between muscle branches, divided by fiber length and corrected for the pennation angle not used in the simple muscle model
};
AnyMuscleModel RectusFemoris2Par =
{
 AnyFolder &MuscleParameters = .CadaverMusPar.RectusFemoris;
 AnyIntVar MuscleElemNo = 2; ///< The number of this element of the muscle
 AnyIntVar MuscleElemAmount = 2; ///< The total amount of elements for this muscle
 F0 = .PCSAfactor*PCSA; // Maximum force output at optimum fiber length
 Lf0 = .FiberLengthScalePelvis
       * MuscleParameters.OptimalFiberlength
       * cos(pi/180*MuscleParameters.Pennationangle);
 V0 = .StrengthScalePelvis*MuscleParameters.VolumeMuscleBelly/MuscleElemAmount;
 AnyVar PCSA = V0/Lf0;///< PCSA is calculated as muscle volume divided between muscle branches, divided by fiber length and corrected for the pennation angle not used in the simple muscle model
};
AnyMuscleModel Sartorius1Par =
{
 AnyFolder &MuscleParameters = .CadaverMusPar.Sartorius;
 AnyIntVar MuscleElemNo = 1; ///< The number of this element of the muscle
 AnyIntVar MuscleElemAmount = 1; ///< The total amount of elements for this muscle
 F0 = .PCSAfactor*PCSA; // Maximum force output at optimum fiber length
 Lf0 = .FiberLengthScalePelvis
       * MuscleParameters.OptimalFiberlength
       * cos(pi/180*MuscleParameters.Pennationangle);
 V0 = .StrengthScalePelvis*MuscleParameters.VolumeMuscleBelly/MuscleElemAmount;
 AnyVar PCSA = V0/Lf0;///< PCSA is calculated as muscle volume divided between muscle branches, divided by fiber length and corrected for the pennation angle not used in the simple muscle model
};

AnyMuscleModel Semimembranosus1Par =
{
 AnyFolder &MuscleParameters = .CadaverMusPar.Semimembranosus;
 AnyIntVar MuscleElemNo = 1; ///< The number of this element of the muscle
 AnyIntVar MuscleElemAmount = 3; ///< The total amount of elements for this muscle
 F0 = .PCSAfactor*PCSA; // Maximum force output at optimum fiber length
 Lf0 = .FiberLengthScalePelvis
       * MuscleParameters.OptimalFiberlength
       * cos(pi/180*MuscleParameters.Pennationangle);
 V0 = .StrengthScalePelvis*MuscleParameters.VolumeMuscleBelly/MuscleElemAmount;
 AnyVar PCSA = V0/Lf0;///< PCSA is calculated as muscle volume divided between muscle branches, divided by fiber length and corrected for the pennation angle not used in the simple muscle model
};
AnyMuscleModel Semimembranosus2Par =
{
 AnyFolder &MuscleParameters = .CadaverMusPar.Semimembranosus;
 AnyIntVar MuscleElemNo = 2; ///< The number of this element of the muscle
 AnyIntVar MuscleElemAmount = 3; ///< The total amount of elements for this muscle
 F0 = .PCSAfactor*PCSA; // Maximum force output at optimum fiber length
 Lf0 = .FiberLengthScalePelvis
       * MuscleParameters.OptimalFiberlength
       * cos(pi/180*MuscleParameters.Pennationangle);
 V0 = .StrengthScalePelvis*MuscleParameters.VolumeMuscleBelly/MuscleElemAmount;
 AnyVar PCSA = V0/Lf0;///< PCSA is calculated as muscle volume divided between muscle branches, divided by fiber length and corrected for the pennation angle not used in the simple muscle model
};
AnyMuscleModel Semimembranosus3Par =
{
 AnyFolder &MuscleParameters = .CadaverMusPar.Semimembranosus;
 AnyIntVar MuscleElemNo = 3; ///< The number of this element of the muscle
 AnyIntVar MuscleElemAmount = 3; ///< The total amount of elements for this muscle
 F0 = .PCSAfactor*PCSA; // Maximum force output at optimum fiber length
 Lf0 = .FiberLengthScalePelvis
       * MuscleParameters.OptimalFiberlength
       * cos(pi/180*MuscleParameters.Pennationangle);
 V0 = .StrengthScalePelvis*MuscleParameters.VolumeMuscleBelly/MuscleElemAmount;
 AnyVar PCSA = V0/Lf0;///< PCSA is calculated as muscle volume divided between muscle branches, divided by fiber length and corrected for the pennation angle not used in the simple muscle model
};

AnyMuscleModel Semitendinosus1Par =
{
 AnyFolder &MuscleParameters = .CadaverMusPar.Semitendinosus;
 AnyIntVar MuscleElemNo = 1; ///< The number of this element of the muscle
 AnyIntVar MuscleElemAmount = 1; ///< The total amount of elements for this muscle
 F0 = .PCSAfactor*PCSA; // Maximum force output at optimum fiber length
 Lf0 = .FiberLengthScalePelvis
       * MuscleParameters.OptimalFiberlength
       * cos(pi/180*MuscleParameters.Pennationangle);
 V0 = .StrengthScalePelvis*MuscleParameters.VolumeMuscleBelly/MuscleElemAmount;
 AnyVar PCSA = V0/Lf0;///< PCSA is calculated as muscle volume divided between muscle branches, divided by fiber length and corrected for the pennation angle not used in the simple muscle model
};

AnyMuscleModel SoleusMedialis1Par =
{
 AnyFolder &MuscleParameters = .CadaverMusPar.SoleusMedialis;
 AnyIntVar MuscleElemNo = 1; ///< The number of this element of the muscle
 AnyIntVar MuscleElemAmount = 3; ///< The total amount of elements for this muscle
 F0 = .PCSAfactor*PCSA; // Maximum force output at optimum fiber length
 Lf0 = .FiberLengthScalePelvis
       * MuscleParameters.OptimalFiberlength
       * cos(pi/180*MuscleParameters.Pennationangle);
 V0 = .StrengthScalePelvis*MuscleParameters.VolumeMuscleBelly/MuscleElemAmount;
 AnyVar PCSA = V0/Lf0;///< PCSA is calculated as muscle volume divided between muscle branches, divided by fiber length and corrected for the pennation angle not used in the simple muscle model
};
AnyMuscleModel SoleusMedialis2Par =
{
 AnyFolder &MuscleParameters = .CadaverMusPar.SoleusMedialis;
 AnyIntVar MuscleElemNo = 2; ///< The number of this element of the muscle
 AnyIntVar MuscleElemAmount = 3; ///< The total amount of elements for this muscle
 F0 = .PCSAfactor*PCSA; // Maximum force output at optimum fiber length
 Lf0 = .FiberLengthScalePelvis
       * MuscleParameters.OptimalFiberlength
       * cos(pi/180*MuscleParameters.Pennationangle);
 V0 = .StrengthScalePelvis*MuscleParameters.VolumeMuscleBelly/MuscleElemAmount;
 AnyVar PCSA = V0/Lf0;///< PCSA is calculated as muscle volume divided between muscle branches, divided by fiber length and corrected for the pennation angle not used in the simple muscle model
};
AnyMuscleModel SoleusMedialis3Par =
{
 AnyFolder &MuscleParameters = .CadaverMusPar.SoleusMedialis;
 AnyIntVar MuscleElemNo = 3; ///< The number of this element of the muscle
 AnyIntVar MuscleElemAmount = 3; ///< The total amount of elements for this muscle
 F0 = .PCSAfactor*PCSA; // Maximum force output at optimum fiber length
 Lf0 = .FiberLengthScalePelvis
       * MuscleParameters.OptimalFiberlength
       * cos(pi/180*MuscleParameters.Pennationangle);
 V0 = .StrengthScalePelvis*MuscleParameters.VolumeMuscleBelly/MuscleElemAmount;
 AnyVar PCSA = V0/Lf0;///< PCSA is calculated as muscle volume divided between muscle branches, divided by fiber length and corrected for the pennation angle not used in the simple muscle model
};

AnyMuscleModel SoleusLateralis1Par =
{
 AnyFolder &MuscleParameters = .CadaverMusPar.SoleusLateralis;
 AnyIntVar MuscleElemNo = 1; ///< The number of this element of the muscle
 AnyIntVar MuscleElemAmount = 3; ///< The total amount of elements for this muscle
 F0 = .PCSAfactor*PCSA; // Maximum force output at optimum fiber length
 Lf0 = .FiberLengthScalePelvis
       * MuscleParameters.OptimalFiberlength
       * cos(pi/180*MuscleParameters.Pennationangle);
 V0 = .StrengthScalePelvis*MuscleParameters.VolumeMuscleBelly/MuscleElemAmount;
 AnyVar PCSA = V0/Lf0;///< PCSA is calculated as muscle volume divided between muscle branches, divided by fiber length and corrected for the pennation angle not used in the simple muscle model
};
AnyMuscleModel SoleusLateralis2Par =
{
 AnyFolder &MuscleParameters = .CadaverMusPar.SoleusLateralis;
 AnyIntVar MuscleElemNo = 2; ///< The number of this element of the muscle
 AnyIntVar MuscleElemAmount = 3; ///< The total amount of elements for this muscle
 F0 = .PCSAfactor*PCSA; // Maximum force output at optimum fiber length
 Lf0 = .FiberLengthScalePelvis
       * MuscleParameters.OptimalFiberlength
       * cos(pi/180*MuscleParameters.Pennationangle);
 V0 = .StrengthScalePelvis*MuscleParameters.VolumeMuscleBelly/MuscleElemAmount;
 AnyVar PCSA = V0/Lf0;///< PCSA is calculated as muscle volume divided between muscle branches, divided by fiber length and corrected for the pennation angle not used in the simple muscle model
};
AnyMuscleModel SoleusLateralis3Par =
{
 AnyFolder &MuscleParameters = .CadaverMusPar.SoleusLateralis;
 AnyIntVar MuscleElemNo = 3; ///< The number of this element of the muscle
 AnyIntVar MuscleElemAmount = 3; ///< The total amount of elements for this muscle
 F0 = .PCSAfactor*PCSA; // Maximum force output at optimum fiber length
 Lf0 = .FiberLengthScalePelvis
       * MuscleParameters.OptimalFiberlength
       * cos(pi/180*MuscleParameters.Pennationangle);
 V0 = .StrengthScalePelvis*MuscleParameters.VolumeMuscleBelly/MuscleElemAmount;
 AnyVar PCSA = V0/Lf0;///< PCSA is calculated as muscle volume divided between muscle branches, divided by fiber length and corrected for the pennation angle not used in the simple muscle model
};

AnyMuscleModel TensorFasciaeLatae1Par =
{
 AnyFolder &MuscleParameters = .CadaverMusPar.TensorFasciaeLatae;
 AnyIntVar MuscleElemNo = 1; ///< The number of this element of the muscle
 AnyIntVar MuscleElemAmount = 2; ///< The total amount of elements for this muscle
 F0 = .PCSAfactor*PCSA; // Maximum force output at optimum fiber length
 Lf0 = .FiberLengthScalePelvis
       * MuscleParameters.OptimalFiberlength
       * cos(pi/180*MuscleParameters.Pennationangle);
 V0 = .StrengthScalePelvis*MuscleParameters.VolumeMuscleBelly/MuscleElemAmount;
 AnyVar PCSA = V0/Lf0;///< PCSA is calculated as muscle volume divided between muscle branches, divided by fiber length and corrected for the pennation angle not used in the simple muscle model
};
AnyMuscleModel TensorFasciaeLatae2Par =
{
 AnyFolder &MuscleParameters = .CadaverMusPar.TensorFasciaeLatae;
 AnyIntVar MuscleElemNo = 2; ///< The number of this element of the muscle
 AnyIntVar MuscleElemAmount = 2; ///< The total amount of elements for this muscle
 F0 = .PCSAfactor*PCSA; // Maximum force output at optimum fiber length
 Lf0 = .FiberLengthScalePelvis
       * MuscleParameters.OptimalFiberlength
       * cos(pi/180*MuscleParameters.Pennationangle);
 V0 = .StrengthScalePelvis*MuscleParameters.VolumeMuscleBelly/MuscleElemAmount;
 AnyVar PCSA = V0/Lf0;///< PCSA is calculated as muscle volume divided between muscle branches, divided by fiber length and corrected for the pennation angle not used in the simple muscle model
};

AnyMuscleModel TibialisAnterior1Par =
{
 AnyFolder &MuscleParameters = .CadaverMusPar.TibialisAnterior;
 AnyIntVar MuscleElemNo = 1; ///< The number of this element of the muscle
 AnyIntVar MuscleElemAmount = 3; ///< The total amount of elements for this muscle
 F0 = .PCSAfactor*PCSA; // Maximum force output at optimum fiber length
 Lf0 = .FiberLengthScalePelvis
       * MuscleParameters.OptimalFiberlength
       * cos(pi/180*MuscleParameters.Pennationangle);
 V0 = .StrengthScalePelvis*MuscleParameters.VolumeMuscleBelly/MuscleElemAmount;
 AnyVar PCSA = V0/Lf0;///< PCSA is calculated as muscle volume divided between muscle branches, divided by fiber length and corrected for the pennation angle not used in the simple muscle model
};
AnyMuscleModel TibialisAnterior2Par =
{
 AnyFolder &MuscleParameters = .CadaverMusPar.TibialisAnterior;
 AnyIntVar MuscleElemNo = 2; ///< The number of this element of the muscle
 AnyIntVar MuscleElemAmount = 3; ///< The total amount of elements for this muscle
 F0 = .PCSAfactor*PCSA; // Maximum force output at optimum fiber length
 Lf0 = .FiberLengthScalePelvis
       * MuscleParameters.OptimalFiberlength
       * cos(pi/180*MuscleParameters.Pennationangle);
 V0 = .StrengthScalePelvis*MuscleParameters.VolumeMuscleBelly/MuscleElemAmount;
 AnyVar PCSA = V0/Lf0;///< PCSA is calculated as muscle volume divided between muscle branches, divided by fiber length and corrected for the pennation angle not used in the simple muscle model
};
AnyMuscleModel TibialisAnterior3Par =
{
 AnyFolder &MuscleParameters = .CadaverMusPar.TibialisAnterior;
 AnyIntVar MuscleElemNo = 3; ///< The number of this element of the muscle
 AnyIntVar MuscleElemAmount = 3; ///< The total amount of elements for this muscle
 F0 = .PCSAfactor*PCSA; // Maximum force output at optimum fiber length
 Lf0 = .FiberLengthScalePelvis
       * MuscleParameters.OptimalFiberlength
       * cos(pi/180*MuscleParameters.Pennationangle);
 V0 = .StrengthScalePelvis*MuscleParameters.VolumeMuscleBelly/MuscleElemAmount;
 AnyVar PCSA = V0/Lf0;///< PCSA is calculated as muscle volume divided between muscle branches, divided by fiber length and corrected for the pennation angle not used in the simple muscle model
};

AnyMuscleModel TibialisPosteriorMedialis1Par =
{
 AnyFolder &MuscleParameters = .CadaverMusPar.TibialisPosteriorMedialis;
 AnyIntVar MuscleElemNo = 1; ///< The number of this element of the muscle
 AnyIntVar MuscleElemAmount = 3; ///< The total amount of elements for this muscle
 F0 = .PCSAfactor*PCSA; // Maximum force output at optimum fiber length
 Lf0 = .FiberLengthScalePelvis
       * MuscleParameters.OptimalFiberlength
       * cos(pi/180*MuscleParameters.Pennationangle);
 V0 = .StrengthScalePelvis*MuscleParameters.VolumeMuscleBelly/MuscleElemAmount;
 AnyVar PCSA = V0/Lf0;///< PCSA is calculated as muscle volume divided between muscle branches, divided by fiber length and corrected for the pennation angle not used in the simple muscle model
};
AnyMuscleModel TibialisPosteriorMedialis2Par =
{
 AnyFolder &MuscleParameters = .CadaverMusPar.TibialisPosteriorMedialis;
 AnyIntVar MuscleElemNo = 2; ///< The number of this element of the muscle
 AnyIntVar MuscleElemAmount = 3; ///< The total amount of elements for this muscle
 F0 = .PCSAfactor*PCSA; // Maximum force output at optimum fiber length
 Lf0 = .FiberLengthScalePelvis
       * MuscleParameters.OptimalFiberlength
       * cos(pi/180*MuscleParameters.Pennationangle);
 V0 = .StrengthScalePelvis*MuscleParameters.VolumeMuscleBelly/MuscleElemAmount;
 AnyVar PCSA = V0/Lf0;///< PCSA is calculated as muscle volume divided between muscle branches, divided by fiber length and corrected for the pennation angle not used in the simple muscle model
};
AnyMuscleModel TibialisPosteriorMedialis3Par =
{
 AnyFolder &MuscleParameters = .CadaverMusPar.TibialisPosteriorMedialis;
 AnyIntVar MuscleElemNo = 3; ///< The number of this element of the muscle
 AnyIntVar MuscleElemAmount = 3; ///< The total amount of elements for this muscle
 F0 = .PCSAfactor*PCSA; // Maximum force output at optimum fiber length
 Lf0 = .FiberLengthScalePelvis
       * MuscleParameters.OptimalFiberlength
       * cos(pi/180*MuscleParameters.Pennationangle);
 V0 = .StrengthScalePelvis*MuscleParameters.VolumeMuscleBelly/MuscleElemAmount;
 AnyVar PCSA = V0/Lf0;///< PCSA is calculated as muscle volume divided between muscle branches, divided by fiber length and corrected for the pennation angle not used in the simple muscle model
};

AnyMuscleModel TibialisPosteriorLateralis1Par =
{
 AnyFolder &MuscleParameters = .CadaverMusPar.TibialisPosteriorLateralis;
 AnyIntVar MuscleElemNo = 1; ///< The number of this element of the muscle
 AnyIntVar MuscleElemAmount = 3; ///< The total amount of elements for this muscle
 F0 = .PCSAfactor*PCSA; // Maximum force output at optimum fiber length
 Lf0 = .FiberLengthScalePelvis
       * MuscleParameters.OptimalFiberlength
       * cos(pi/180*MuscleParameters.Pennationangle);
 V0 = .StrengthScalePelvis*MuscleParameters.VolumeMuscleBelly/MuscleElemAmount;
 AnyVar PCSA = V0/Lf0;///< PCSA is calculated as muscle volume divided between muscle branches, divided by fiber length and corrected for the pennation angle not used in the simple muscle model
};
AnyMuscleModel TibialisPosteriorLateralis2Par =
{
 AnyFolder &MuscleParameters = .CadaverMusPar.TibialisPosteriorLateralis;
 AnyIntVar MuscleElemNo = 2; ///< The number of this element of the muscle
 AnyIntVar MuscleElemAmount = 3; ///< The total amount of elements for this muscle
 F0 = .PCSAfactor*PCSA; // Maximum force output at optimum fiber length
 Lf0 = .FiberLengthScalePelvis
       * MuscleParameters.OptimalFiberlength
       * cos(pi/180*MuscleParameters.Pennationangle);
 V0 = .StrengthScalePelvis*MuscleParameters.VolumeMuscleBelly/MuscleElemAmount;
 AnyVar PCSA = V0/Lf0;///< PCSA is calculated as muscle volume divided between muscle branches, divided by fiber length and corrected for the pennation angle not used in the simple muscle model
};
AnyMuscleModel TibialisPosteriorLateralis3Par =
{
 AnyFolder &MuscleParameters = .CadaverMusPar.TibialisPosteriorLateralis;
 AnyIntVar MuscleElemNo = 3; ///< The number of this element of the muscle
 AnyIntVar MuscleElemAmount = 3; ///< The total amount of elements for this muscle
 F0 = .PCSAfactor*PCSA; // Maximum force output at optimum fiber length
 Lf0 = .FiberLengthScalePelvis
       * MuscleParameters.OptimalFiberlength
       * cos(pi/180*MuscleParameters.Pennationangle);
 V0 = .StrengthScalePelvis*MuscleParameters.VolumeMuscleBelly/MuscleElemAmount;
 AnyVar PCSA = V0/Lf0;///< PCSA is calculated as muscle volume divided between muscle branches, divided by fiber length and corrected for the pennation angle not used in the simple muscle model
};

AnyMuscleModel VastusIntermedius1Par =
{
 AnyFolder &MuscleParameters = .CadaverMusPar.VastusIntermedius;
 AnyIntVar MuscleElemNo = 1; ///< The number of this element of the muscle
 AnyIntVar MuscleElemAmount = 6; ///< The total amount of elements for this muscle
 F0 = .PCSAfactor*PCSA; // Maximum force output at optimum fiber length
 Lf0 = .FiberLengthScalePelvis
       * MuscleParameters.OptimalFiberlength
       * cos(pi/180*MuscleParameters.Pennationangle);
 V0 = .StrengthScalePelvis*MuscleParameters.VolumeMuscleBelly/MuscleElemAmount;
 AnyVar PCSA = V0/Lf0;///< PCSA is calculated as muscle volume divided between muscle branches, divided by fiber length and corrected for the pennation angle not used in the simple muscle model
};
AnyMuscleModel VastusIntermedius2Par =
{
 AnyFolder &MuscleParameters = .CadaverMusPar.VastusIntermedius;
 AnyIntVar MuscleElemNo = 2; ///< The number of this element of the muscle
 AnyIntVar MuscleElemAmount = 6; ///< The total amount of elements for this muscle
 F0 = .PCSAfactor*PCSA; // Maximum force output at optimum fiber length
 Lf0 = .FiberLengthScalePelvis
       * MuscleParameters.OptimalFiberlength
       * cos(pi/180*MuscleParameters.Pennationangle);
 V0 = .StrengthScalePelvis*MuscleParameters.VolumeMuscleBelly/MuscleElemAmount;
 AnyVar PCSA = V0/Lf0;///< PCSA is calculated as muscle volume divided between muscle branches, divided by fiber length and corrected for the pennation angle not used in the simple muscle model
};
AnyMuscleModel VastusIntermedius3Par =
{
 AnyFolder &MuscleParameters = .CadaverMusPar.VastusIntermedius;
 AnyIntVar MuscleElemNo = 3; ///< The number of this element of the muscle
 AnyIntVar MuscleElemAmount = 6; ///< The total amount of elements for this muscle
 F0 = .PCSAfactor*PCSA; // Maximum force output at optimum fiber length
 Lf0 = .FiberLengthScalePelvis
       * MuscleParameters.OptimalFiberlength
       * cos(pi/180*MuscleParameters.Pennationangle);
 V0 = .StrengthScalePelvis*MuscleParameters.VolumeMuscleBelly/MuscleElemAmount;
 AnyVar PCSA = V0/Lf0;///< PCSA is calculated as muscle volume divided between muscle branches, divided by fiber length and corrected for the pennation angle not used in the simple muscle model
};
AnyMuscleModel VastusIntermedius4Par =
{
 AnyFolder &MuscleParameters = .CadaverMusPar.VastusIntermedius;
 AnyIntVar MuscleElemNo = 4; ///< The number of this element of the muscle
 AnyIntVar MuscleElemAmount = 6; ///< The total amount of elements for this muscle
 F0 = .PCSAfactor*PCSA; // Maximum force output at optimum fiber length
 Lf0 = .FiberLengthScalePelvis
       * MuscleParameters.OptimalFiberlength
       * cos(pi/180*MuscleParameters.Pennationangle);
 V0 = .StrengthScalePelvis*MuscleParameters.VolumeMuscleBelly/MuscleElemAmount;
 AnyVar PCSA = V0/Lf0;///< PCSA is calculated as muscle volume divided between muscle branches, divided by fiber length and corrected for the pennation angle not used in the simple muscle model
};
AnyMuscleModel VastusIntermedius5Par =
{
 AnyFolder &MuscleParameters = .CadaverMusPar.VastusIntermedius;
 AnyIntVar MuscleElemNo = 5; ///< The number of this element of the muscle
 AnyIntVar MuscleElemAmount = 6; ///< The total amount of elements for this muscle
 F0 = .PCSAfactor*PCSA; // Maximum force output at optimum fiber length
 Lf0 = .FiberLengthScalePelvis
       * MuscleParameters.OptimalFiberlength
       * cos(pi/180*MuscleParameters.Pennationangle);
 V0 = .StrengthScalePelvis*MuscleParameters.VolumeMuscleBelly/MuscleElemAmount;
 AnyVar PCSA = V0/Lf0;///< PCSA is calculated as muscle volume divided between muscle branches, divided by fiber length and corrected for the pennation angle not used in the simple muscle model
};
AnyMuscleModel VastusIntermedius6Par =
{
 AnyFolder &MuscleParameters = .CadaverMusPar.VastusIntermedius;
 AnyIntVar MuscleElemNo = 6; ///< The number of this element of the muscle
 AnyIntVar MuscleElemAmount = 6; ///< The total amount of elements for this muscle
 F0 = .PCSAfactor*PCSA; // Maximum force output at optimum fiber length
 Lf0 = .FiberLengthScalePelvis
       * MuscleParameters.OptimalFiberlength
       * cos(pi/180*MuscleParameters.Pennationangle);
 V0 = .StrengthScalePelvis*MuscleParameters.VolumeMuscleBelly/MuscleElemAmount;
 AnyVar PCSA = V0/Lf0;///< PCSA is calculated as muscle volume divided between muscle branches, divided by fiber length and corrected for the pennation angle not used in the simple muscle model
};

AnyMuscleModel VastusLateralisInferior1Par =
{
 AnyFolder &MuscleParameters = .CadaverMusPar.VastusLateralisInferior;
 AnyIntVar MuscleElemNo = 1; ///< The number of this element of the muscle
 AnyIntVar MuscleElemAmount = 6; ///< The total amount of elements for this muscle
 F0 = .PCSAfactor*PCSA; // Maximum force output at optimum fiber length
 Lf0 = .FiberLengthScalePelvis
       * MuscleParameters.OptimalFiberlength
       * cos(pi/180*MuscleParameters.Pennationangle);
 V0 = .StrengthScalePelvis*MuscleParameters.VolumeMuscleBelly/MuscleElemAmount;
 AnyVar PCSA = V0/Lf0;///< PCSA is calculated as muscle volume divided between muscle branches, divided by fiber length and corrected for the pennation angle not used in the simple muscle model
};
AnyMuscleModel VastusLateralisInferior2Par =
{
 AnyFolder &MuscleParameters = .CadaverMusPar.VastusLateralisInferior;
 AnyIntVar MuscleElemNo = 2; ///< The number of this element of the muscle
 AnyIntVar MuscleElemAmount = 6; ///< The total amount of elements for this muscle
 F0 = .PCSAfactor*PCSA; // Maximum force output at optimum fiber length
 Lf0 = .FiberLengthScalePelvis
       * MuscleParameters.OptimalFiberlength
       * cos(pi/180*MuscleParameters.Pennationangle);
 V0 = .StrengthScalePelvis*MuscleParameters.VolumeMuscleBelly/MuscleElemAmount;
 AnyVar PCSA = V0/Lf0;///< PCSA is calculated as muscle volume divided between muscle branches, divided by fiber length and corrected for the pennation angle not used in the simple muscle model
};
AnyMuscleModel VastusLateralisInferior3Par =
{
 AnyFolder &MuscleParameters = .CadaverMusPar.VastusLateralisInferior;
 AnyIntVar MuscleElemNo = 3; ///< The number of this element of the muscle
 AnyIntVar MuscleElemAmount = 6; ///< The total amount of elements for this muscle
 F0 = .PCSAfactor*PCSA; // Maximum force output at optimum fiber length
 Lf0 = .FiberLengthScalePelvis
       * MuscleParameters.OptimalFiberlength
       * cos(pi/180*MuscleParameters.Pennationangle);
 V0 = .StrengthScalePelvis*MuscleParameters.VolumeMuscleBelly/MuscleElemAmount;
 AnyVar PCSA = V0/Lf0;///< PCSA is calculated as muscle volume divided between muscle branches, divided by fiber length and corrected for the pennation angle not used in the simple muscle model
};
AnyMuscleModel VastusLateralisInferior4Par =
{
 AnyFolder &MuscleParameters = .CadaverMusPar.VastusLateralisInferior;
 AnyIntVar MuscleElemNo = 4; ///< The number of this element of the muscle
 AnyIntVar MuscleElemAmount = 6; ///< The total amount of elements for this muscle
 F0 = .PCSAfactor*PCSA; // Maximum force output at optimum fiber length
 Lf0 = .FiberLengthScalePelvis
       * MuscleParameters.OptimalFiberlength
       * cos(pi/180*MuscleParameters.Pennationangle);
 V0 = .StrengthScalePelvis*MuscleParameters.VolumeMuscleBelly/MuscleElemAmount;
 AnyVar PCSA = V0/Lf0;///< PCSA is calculated as muscle volume divided between muscle branches, divided by fiber length and corrected for the pennation angle not used in the simple muscle model
};
AnyMuscleModel VastusLateralisInferior5Par =
{
 AnyFolder &MuscleParameters = .CadaverMusPar.VastusLateralisInferior;
 AnyIntVar MuscleElemNo = 5; ///< The number of this element of the muscle
 AnyIntVar MuscleElemAmount = 6; ///< The total amount of elements for this muscle
 F0 = .PCSAfactor*PCSA; // Maximum force output at optimum fiber length
 Lf0 = .FiberLengthScalePelvis
       * MuscleParameters.OptimalFiberlength
       * cos(pi/180*MuscleParameters.Pennationangle);
 V0 = .StrengthScalePelvis*MuscleParameters.VolumeMuscleBelly/MuscleElemAmount;
 AnyVar PCSA = V0/Lf0;///< PCSA is calculated as muscle volume divided between muscle branches, divided by fiber length and corrected for the pennation angle not used in the simple muscle model
};
AnyMuscleModel VastusLateralisInferior6Par =
{
 AnyFolder &MuscleParameters = .CadaverMusPar.VastusLateralisInferior;
 AnyIntVar MuscleElemNo = 6; ///< The number of this element of the muscle
 AnyIntVar MuscleElemAmount = 6; ///< The total amount of elements for this muscle
 F0 = .PCSAfactor*PCSA; // Maximum force output at optimum fiber length
 Lf0 = .FiberLengthScalePelvis
       * MuscleParameters.OptimalFiberlength
       * cos(pi/180*MuscleParameters.Pennationangle);
 V0 = .StrengthScalePelvis*MuscleParameters.VolumeMuscleBelly/MuscleElemAmount;
 AnyVar PCSA = V0/Lf0;///< PCSA is calculated as muscle volume divided between muscle branches, divided by fiber length and corrected for the pennation angle not used in the simple muscle model
};

AnyMuscleModel VastusLateralisSuperior1Par =
{
 AnyFolder &MuscleParameters = .CadaverMusPar.VastusLateralisSuperior;
 AnyIntVar MuscleElemNo = 1; ///< The number of this element of the muscle
 AnyIntVar MuscleElemAmount = 2; ///< The total amount of elements for this muscle
 F0 = .PCSAfactor*PCSA; // Maximum force output at optimum fiber length
 Lf0 = .FiberLengthScalePelvis
       * MuscleParameters.OptimalFiberlength
       * cos(pi/180*MuscleParameters.Pennationangle);
 V0 = .StrengthScalePelvis*MuscleParameters.VolumeMuscleBelly/MuscleElemAmount;
 AnyVar PCSA = V0/Lf0;///< PCSA is calculated as muscle volume divided between muscle branches, divided by fiber length and corrected for the pennation angle not used in the simple muscle model
};
AnyMuscleModel VastusLateralisSuperior2Par =
{
 AnyFolder &MuscleParameters = .CadaverMusPar.VastusLateralisSuperior;
 AnyIntVar MuscleElemNo = 2; ///< The number of this element of the muscle
 AnyIntVar MuscleElemAmount = 2; ///< The total amount of elements for this muscle
 F0 = .PCSAfactor*PCSA; // Maximum force output at optimum fiber length
 Lf0 = .FiberLengthScalePelvis
       * MuscleParameters.OptimalFiberlength
       * cos(pi/180*MuscleParameters.Pennationangle);
 V0 = .StrengthScalePelvis*MuscleParameters.VolumeMuscleBelly/MuscleElemAmount;
 AnyVar PCSA = V0/Lf0;///< PCSA is calculated as muscle volume divided between muscle branches, divided by fiber length and corrected for the pennation angle not used in the simple muscle model
};

AnyMuscleModel VastusMedialisInferior1Par =
{
 AnyFolder &MuscleParameters = .CadaverMusPar.VastusMedialisInferior;
 AnyIntVar MuscleElemNo = 1; ///< The number of this element of the muscle
 AnyIntVar MuscleElemAmount = 2; ///< The total amount of elements for this muscle
 F0 = .PCSAfactor*PCSA; // Maximum force output at optimum fiber length
 Lf0 = .FiberLengthScalePelvis
       * MuscleParameters.OptimalFiberlength
       * cos(pi/180*MuscleParameters.Pennationangle);
 V0 = .StrengthScalePelvis*MuscleParameters.VolumeMuscleBelly/MuscleElemAmount;
 AnyVar PCSA = V0/Lf0;///< PCSA is calculated as muscle volume divided between muscle branches, divided by fiber length and corrected for the pennation angle not used in the simple muscle model
};
AnyMuscleModel VastusMedialisInferior2Par =
{
 AnyFolder &MuscleParameters = .CadaverMusPar.VastusMedialisInferior;
 AnyIntVar MuscleElemNo = 2; ///< The number of this element of the muscle
 AnyIntVar MuscleElemAmount = 2; ///< The total amount of elements for this muscle
 F0 = .PCSAfactor*PCSA; // Maximum force output at optimum fiber length
 Lf0 = .FiberLengthScalePelvis
       * MuscleParameters.OptimalFiberlength
       * cos(pi/180*MuscleParameters.Pennationangle);
 V0 = .StrengthScalePelvis*MuscleParameters.VolumeMuscleBelly/MuscleElemAmount;
 AnyVar PCSA = V0/Lf0;///< PCSA is calculated as muscle volume divided between muscle branches, divided by fiber length and corrected for the pennation angle not used in the simple muscle model
};

AnyMuscleModel VastusMedialisMid1Par =
{
 AnyFolder &MuscleParameters = .CadaverMusPar.VastusMedialisMid;
 AnyIntVar MuscleElemNo = 1; ///< The number of this element of the muscle
 AnyIntVar MuscleElemAmount = 2; ///< The total amount of elements for this muscle
 F0 = .PCSAfactor*PCSA; // Maximum force output at optimum fiber length
 Lf0 = .FiberLengthScalePelvis
       * MuscleParameters.OptimalFiberlength
       * cos(pi/180*MuscleParameters.Pennationangle);
 V0 = .StrengthScalePelvis*MuscleParameters.VolumeMuscleBelly/MuscleElemAmount;
 AnyVar PCSA = V0/Lf0;///< PCSA is calculated as muscle volume divided between muscle branches, divided by fiber length and corrected for the pennation angle not used in the simple muscle model
};
AnyMuscleModel VastusMedialisMid2Par =
{
 AnyFolder &MuscleParameters = .CadaverMusPar.VastusMedialisMid;
 AnyIntVar MuscleElemNo = 2; ///< The number of this element of the muscle
 AnyIntVar MuscleElemAmount = 2; ///< The total amount of elements for this muscle
 F0 = .PCSAfactor*PCSA; // Maximum force output at optimum fiber length
 Lf0 = .FiberLengthScalePelvis
       * MuscleParameters.OptimalFiberlength
       * cos(pi/180*MuscleParameters.Pennationangle);
 V0 = .StrengthScalePelvis*MuscleParameters.VolumeMuscleBelly/MuscleElemAmount;
 AnyVar PCSA = V0/Lf0;///< PCSA is calculated as muscle volume divided between muscle branches, divided by fiber length and corrected for the pennation angle not used in the simple muscle model
};

AnyMuscleModel VastusMedialisSuperior1Par =
{
 AnyFolder &MuscleParameters = .CadaverMusPar.VastusMedialisSuperior;
 AnyIntVar MuscleElemNo = 1; ///< The number of this element of the muscle
 AnyIntVar MuscleElemAmount = 6; ///< The total amount of elements for this muscle
 F0 = .PCSAfactor*PCSA; // Maximum force output at optimum fiber length
 Lf0 = .FiberLengthScalePelvis
       * MuscleParameters.OptimalFiberlength
       * cos(pi/180*MuscleParameters.Pennationangle);
 V0 = .StrengthScalePelvis*MuscleParameters.VolumeMuscleBelly/MuscleElemAmount;
 AnyVar PCSA = V0/Lf0;///< PCSA is calculated as muscle volume divided between muscle branches, divided by fiber length and corrected for the pennation angle not used in the simple muscle model
};
AnyMuscleModel VastusMedialisSuperior2Par =
{
 AnyFolder &MuscleParameters = .CadaverMusPar.VastusMedialisSuperior;
 AnyIntVar MuscleElemNo = 2; ///< The number of this element of the muscle
 AnyIntVar MuscleElemAmount = 6; ///< The total amount of elements for this muscle
 F0 = .PCSAfactor*PCSA; // Maximum force output at optimum fiber length
 Lf0 = .FiberLengthScalePelvis
       * MuscleParameters.OptimalFiberlength
       * cos(pi/180*MuscleParameters.Pennationangle);
 V0 = .StrengthScalePelvis*MuscleParameters.VolumeMuscleBelly/MuscleElemAmount;
 AnyVar PCSA = V0/Lf0;///< PCSA is calculated as muscle volume divided between muscle branches, divided by fiber length and corrected for the pennation angle not used in the simple muscle model
};
AnyMuscleModel VastusMedialisSuperior3Par =
{
 AnyFolder &MuscleParameters = .CadaverMusPar.VastusMedialisSuperior;
 AnyIntVar MuscleElemNo = 3; ///< The number of this element of the muscle
 AnyIntVar MuscleElemAmount = 6; ///< The total amount of elements for this muscle
 F0 = .PCSAfactor*PCSA; // Maximum force output at optimum fiber length
 Lf0 = .FiberLengthScalePelvis
       * MuscleParameters.OptimalFiberlength
       * cos(pi/180*MuscleParameters.Pennationangle);
 V0 = .StrengthScalePelvis*MuscleParameters.VolumeMuscleBelly/MuscleElemAmount;
 AnyVar PCSA = V0/Lf0;///< PCSA is calculated as muscle volume divided between muscle branches, divided by fiber length and corrected for the pennation angle not used in the simple muscle model
};
AnyMuscleModel VastusMedialisSuperior4Par =
{
 AnyFolder &MuscleParameters = .CadaverMusPar.VastusMedialisSuperior;
 AnyIntVar MuscleElemNo = 4; ///< The number of this element of the muscle
 AnyIntVar MuscleElemAmount = 6; ///< The total amount of elements for this muscle
 F0 = .PCSAfactor*PCSA; // Maximum force output at optimum fiber length
 Lf0 = .FiberLengthScalePelvis
       * MuscleParameters.OptimalFiberlength
       * cos(pi/180*MuscleParameters.Pennationangle);
 V0 = .StrengthScalePelvis*MuscleParameters.VolumeMuscleBelly/MuscleElemAmount;
 AnyVar PCSA = V0/Lf0;///< PCSA is calculated as muscle volume divided between muscle branches, divided by fiber length and corrected for the pennation angle not used in the simple muscle model
};
AnyMuscleModel VastusMedialisSuperior5Par =
{
 AnyFolder &MuscleParameters = .CadaverMusPar.VastusMedialisSuperior;
 AnyIntVar MuscleElemNo = 5; ///< The number of this element of the muscle
 AnyIntVar MuscleElemAmount = 6; ///< The total amount of elements for this muscle
 F0 = .PCSAfactor*PCSA; // Maximum force output at optimum fiber length
 Lf0 = .FiberLengthScalePelvis
       * MuscleParameters.OptimalFiberlength
       * cos(pi/180*MuscleParameters.Pennationangle);
 V0 = .StrengthScalePelvis*MuscleParameters.VolumeMuscleBelly/MuscleElemAmount;
 AnyVar PCSA = V0/Lf0;///< PCSA is calculated as muscle volume divided between muscle branches, divided by fiber length and corrected for the pennation angle not used in the simple muscle model
};
AnyMuscleModel VastusMedialisSuperior6Par =
{
 AnyFolder &MuscleParameters = .CadaverMusPar.VastusMedialisSuperior;
 AnyIntVar MuscleElemNo = 6; ///< The number of this element of the muscle
 AnyIntVar MuscleElemAmount = 6; ///< The total amount of elements for this muscle
 F0 = .PCSAfactor*PCSA; // Maximum force output at optimum fiber length
 Lf0 = .FiberLengthScalePelvis
       * MuscleParameters.OptimalFiberlength
       * cos(pi/180*MuscleParameters.Pennationangle);
 V0 = .StrengthScalePelvis*MuscleParameters.VolumeMuscleBelly/MuscleElemAmount;
 AnyVar PCSA = V0/Lf0;///< PCSA is calculated as muscle volume divided between muscle branches, divided by fiber length and corrected for the pennation angle not used in the simple muscle model
};
