#ifdef INCLUDE_MUSCLE_WEIGHT_FACTOR

#if INCLUDE_MUSCLE_WEIGHT_FACTOR == 1
AnyVar WeightFactor = (1.0/MusMdl.MuscleElemNo);
#endif
#if INCLUDE_MUSCLE_WEIGHT_FACTOR > 1
AnyVar WeightFactor = (MusMdl.Vol0);
#endif

//// The code below was used when no volumes where available in the muscle models
// #if INCLUDE_MUSCLE_WEIGHT_FACTOR > 2
// // F0/PCSAFactor = PCSA... This version is used when the simple muscles are used
// //AnyVar WeightFactor = (MusMdl.F0/..MusPar.PCSAfactor)^(1.0/p);
// AnyVar WeightFactor = (MusMdl.Vol0)^(1.0/p);
// #endif
// #if INCLUDE_MUSCLE_WEIGHT_FACTOR == 3
//   // F0*LfBar/(PCSAFactor) = PCSA*LfBar = Volumen... This version is used when the 3E muscles are used
//  AnyVar WeightFactor = (MusMdl.F0*MusMdl.Lfbar/..MusPar.PCSAfactor)^(1.0/p);
// #endif


#endif
