/*This is the subject specific msucle parameter file for TLEM 1 model

This files references all the values in the `Leg.ModelParameters.Muscles` folder.

The sections here are implemented as class templated so they can be customize
by the user, without editing this file:

In your application simply assign the values to override. E.g.:

  Main.HumanModel.BodyModel.Right.Leg.MusMdl.MusPar = {}
    AdductorMagnusDistal.VolumeScaleFactor = 2;
  };

*/

AnyVar StrengthScaleShank = ..StrengthScaling.Shank.StrengthScale;
AnyVar StrengthScaleThigh = ..StrengthScaling.Thigh.StrengthScale;
AnyVar StrengthScalePelvis = ..Scaling.StrengthScaling.Pelvis.StrengthScale;
AnyVar FiberLengthScaleShank = ..FiberLengthScaling.Shank.FiberLengthScale;
AnyVar FiberLengthScaleThigh = ..FiberLengthScaling.Thigh.FiberLengthScale;
AnyVar FiberLengthScalePelvis = ..Scaling.FiberLengthScaling.Pelvis.FiberLengthScale;


SubjectMuscleParameter_template AdductorBrevisProximal(NAME = AdductorBrevisProximal)= {
  //Muscle = ..ModelParameters.Muscles.AdductorBrevisProximal.Muscle;
  //Pennationangle = ..ModelParameters.Muscles.AdductorBrevisProximal.Pennationangle;
  //MuscleVolume = ..ModelParameters.Muscles.AdductorBrevisProximal.MuscleVolume;
  //OptimalFiberlength = ..ModelParameters.Muscles.AdductorBrevisProximal.OptimalFiberlength;
  //TotalTendonLength = ..ModelParameters.Muscles.AdductorBrevisProximal.TotalTendonLength;
  //K1 = ..ModelParameters.Muscles.AdductorBrevisProximal.K1;
  //K2 = ..ModelParameters.Muscles.AdductorBrevisProximal.K2;
  //Epsilon0 = ..ModelParameters.Muscles.AdductorBrevisProximal.Epsilon0;
  //Fcfast = ..ModelParameters.Muscles.AdductorBrevisProximal.Fcfast;
  //VolumeScaleFactor = DesignVar(1);
  //MuscleVolumeSubject = VolumeScaleFactor*VolumeScaleFactorScaleLaw*MuscleVolume;
  VolumeScaleFactorScaleLaw  = .StrengthScalePelvis;
  FiberScaleFactorScaleLaw   = .FiberLengthScalePelvis;
};
SubjectMuscleParameter_template AdductorBrevisMid(NAME = AdductorBrevisMid)= {
  //Muscle = ..ModelParameters.Muscles.AdductorBrevisMid.Muscle;
  //Pennationangle = ..ModelParameters.Muscles.AdductorBrevisMid.Pennationangle;
  //MuscleVolume = ..ModelParameters.Muscles.AdductorBrevisMid.MuscleVolume;
  //OptimalFiberlength = ..ModelParameters.Muscles.AdductorBrevisMid.OptimalFiberlength;
  //TotalTendonLength = ..ModelParameters.Muscles.AdductorBrevisMid.TotalTendonLength;
  //K1 = ..ModelParameters.Muscles.AdductorBrevisMid.K1;
  //K2 = ..ModelParameters.Muscles.AdductorBrevisMid.K2;
  //Epsilon0 = ..ModelParameters.Muscles.AdductorBrevisMid.Epsilon0;
  //Fcfast = ..ModelParameters.Muscles.AdductorBrevisMid.Fcfast;
  //VolumeScaleFactor = DesignVar(1);
  //MuscleVolumeSubject = VolumeScaleFactor*VolumeScaleFactorScaleLaw*MuscleVolume;
  VolumeScaleFactorScaleLaw  = .StrengthScalePelvis;
  FiberScaleFactorScaleLaw   = .FiberLengthScalePelvis;
};
SubjectMuscleParameter_template AdductorBrevisDistal(NAME = AdductorBrevisDistal)= {
  //Muscle = ..ModelParameters.Muscles.AdductorBrevisDistal.Muscle;
  //Pennationangle = ..ModelParameters.Muscles.AdductorBrevisDistal.Pennationangle;
  //MuscleVolume = ..ModelParameters.Muscles.AdductorBrevisDistal.MuscleVolume;
  //OptimalFiberlength = ..ModelParameters.Muscles.AdductorBrevisDistal.OptimalFiberlength;
  //TotalTendonLength = ..ModelParameters.Muscles.AdductorBrevisDistal.TotalTendonLength;
  //K1 = ..ModelParameters.Muscles.AdductorBrevisDistal.K1;
  //K2 = ..ModelParameters.Muscles.AdductorBrevisDistal.K2;
  //Epsilon0 = ..ModelParameters.Muscles.AdductorBrevisDistal.Epsilon0;
  //Fcfast = ..ModelParameters.Muscles.AdductorBrevisDistal.Fcfast;
  //VolumeScaleFactor = DesignVar(1);
  //MuscleVolumeSubject = VolumeScaleFactor*VolumeScaleFactorScaleLaw*MuscleVolume;
  VolumeScaleFactorScaleLaw  = .StrengthScalePelvis;
  FiberScaleFactorScaleLaw   = .FiberLengthScalePelvis;
};
SubjectMuscleParameter_template AdductorLongus(NAME = AdductorLongus)= {
  //Muscle = ..ModelParameters.Muscles.AdductorLongus.Muscle;
  //Pennationangle = ..ModelParameters.Muscles.AdductorLongus.Pennationangle;
  //MuscleVolume = ..ModelParameters.Muscles.AdductorLongus.MuscleVolume;
  //OptimalFiberlength = ..ModelParameters.Muscles.AdductorLongus.OptimalFiberlength;
  //TotalTendonLength = ..ModelParameters.Muscles.AdductorLongus.TotalTendonLength;
  //K1 = ..ModelParameters.Muscles.AdductorLongus.K1;
  //K2 = ..ModelParameters.Muscles.AdductorLongus.K2;
  //Epsilon0 = ..ModelParameters.Muscles.AdductorLongus.Epsilon0;
  //Fcfast = ..ModelParameters.Muscles.AdductorLongus.Fcfast;
  //VolumeScaleFactor = DesignVar(1);
  //MuscleVolumeSubject = VolumeScaleFactor*VolumeScaleFactorScaleLaw*MuscleVolume;
  VolumeScaleFactorScaleLaw  = .StrengthScaleThigh;
  FiberScaleFactorScaleLaw   = .FiberLengthScaleThigh;
};
SubjectMuscleParameter_template AdductorMagnusDistal(NAME = AdductorMagnusDistal)= {
  //Muscle = ..ModelParameters.Muscles.AdductorMagnusDistal.Muscle;
  //Pennationangle = ..ModelParameters.Muscles.AdductorMagnusDistal.Pennationangle;
  //MuscleVolume = ..ModelParameters.Muscles.AdductorMagnusDistal.MuscleVolume;
  //OptimalFiberlength = ..ModelParameters.Muscles.AdductorMagnusDistal.OptimalFiberlength;
  //TotalTendonLength = ..ModelParameters.Muscles.AdductorMagnusDistal.TotalTendonLength;
  //K1 = ..ModelParameters.Muscles.AdductorMagnusDistal.K1;
  //K2 = ..ModelParameters.Muscles.AdductorMagnusDistal.K2;
  //Epsilon0 = ..ModelParameters.Muscles.AdductorMagnusDistal.Epsilon0;
  //Fcfast = ..ModelParameters.Muscles.AdductorMagnusDistal.Fcfast;
  //VolumeScaleFactor = DesignVar(1);
  //MuscleVolumeSubject = VolumeScaleFactor*VolumeScaleFactorScaleLaw*MuscleVolume;
  VolumeScaleFactorScaleLaw  = .StrengthScaleThigh;
  FiberScaleFactorScaleLaw   = .FiberLengthScaleThigh;
};
SubjectMuscleParameter_template AdductorMagnusMid(NAME = AdductorMagnusMid)= {
  //Muscle = ..ModelParameters.Muscles.AdductorMagnusMid.Muscle;
  //Pennationangle = ..ModelParameters.Muscles.AdductorMagnusMid.Pennationangle;
  //MuscleVolume = ..ModelParameters.Muscles.AdductorMagnusMid.MuscleVolume;
  //OptimalFiberlength = ..ModelParameters.Muscles.AdductorMagnusMid.OptimalFiberlength;
  //TotalTendonLength = ..ModelParameters.Muscles.AdductorMagnusMid.TotalTendonLength;
  //K1 = ..ModelParameters.Muscles.AdductorMagnusMid.K1;
  //K2 = ..ModelParameters.Muscles.AdductorMagnusMid.K2;
  //Epsilon0 = ..ModelParameters.Muscles.AdductorMagnusMid.Epsilon0;
  //Fcfast = ..ModelParameters.Muscles.AdductorMagnusMid.Fcfast;
  //VolumeScaleFactor = DesignVar(1);
  //MuscleVolumeSubject = VolumeScaleFactor*VolumeScaleFactorScaleLaw*MuscleVolume;
  VolumeScaleFactorScaleLaw  = .StrengthScaleThigh;
  FiberScaleFactorScaleLaw   = .FiberLengthScaleThigh;
};
SubjectMuscleParameter_template AdductorMagnusProximal(NAME = AdductorMagnusProximal)= {
  //Muscle = ..ModelParameters.Muscles.AdductorMagnusProximal.Muscle;
  //Pennationangle = ..ModelParameters.Muscles.AdductorMagnusProximal.Pennationangle;
  //MuscleVolume = ..ModelParameters.Muscles.AdductorMagnusProximal.MuscleVolume;
  //OptimalFiberlength = ..ModelParameters.Muscles.AdductorMagnusProximal.OptimalFiberlength;
  //TotalTendonLength = ..ModelParameters.Muscles.AdductorMagnusProximal.TotalTendonLength;
  //K1 = ..ModelParameters.Muscles.AdductorMagnusProximal.K1;
  //K2 = ..ModelParameters.Muscles.AdductorMagnusProximal.K2;
  //Epsilon0 = ..ModelParameters.Muscles.AdductorMagnusProximal.Epsilon0;
  //Fcfast = ..ModelParameters.Muscles.AdductorMagnusProximal.Fcfast;
  //VolumeScaleFactor = DesignVar(1);
  //MuscleVolumeSubject = VolumeScaleFactor*VolumeScaleFactorScaleLaw*MuscleVolume;
  VolumeScaleFactorScaleLaw  = .StrengthScaleThigh;
  FiberScaleFactorScaleLaw   = .FiberLengthScaleThigh;
};
SubjectMuscleParameter_template BicepsFemorisCaputLongum(NAME = BicepsFemorisCaputLongum)= {
  //Muscle = ..ModelParameters.Muscles.BicepsFemorisCaputLongum.Muscle;
  //Pennationangle = ..ModelParameters.Muscles.BicepsFemorisCaputLongum.Pennationangle;
  //MuscleVolume = ..ModelParameters.Muscles.BicepsFemorisCaputLongum.MuscleVolume;
  //OptimalFiberlength = ..ModelParameters.Muscles.BicepsFemorisCaputLongum.OptimalFiberlength;
  //TotalTendonLength = ..ModelParameters.Muscles.BicepsFemorisCaputLongum.TotalTendonLength;
  //K1 = ..ModelParameters.Muscles.BicepsFemorisCaputLongum.K1;
  //K2 = ..ModelParameters.Muscles.BicepsFemorisCaputLongum.K2;
  //Epsilon0 = ..ModelParameters.Muscles.BicepsFemorisCaputLongum.Epsilon0;
  //Fcfast = ..ModelParameters.Muscles.BicepsFemorisCaputLongum.Fcfast;
  //VolumeScaleFactor = DesignVar(1);
  //MuscleVolumeSubject = VolumeScaleFactor*VolumeScaleFactorScaleLaw*MuscleVolume;
  VolumeScaleFactorScaleLaw  = .StrengthScaleThigh;
  FiberScaleFactorScaleLaw   = .FiberLengthScaleThigh;
};
SubjectMuscleParameter_template BicepsFemorisCaputBreve(NAME = BicepsFemorisCaputBreve)= {
  //Muscle = ..ModelParameters.Muscles.BicepsFemorisCaputBreve.Muscle;
  //Pennationangle = ..ModelParameters.Muscles.BicepsFemorisCaputBreve.Pennationangle;
  //MuscleVolume = ..ModelParameters.Muscles.BicepsFemorisCaputBreve.MuscleVolume;
  //OptimalFiberlength = ..ModelParameters.Muscles.BicepsFemorisCaputBreve.OptimalFiberlength;
  //TotalTendonLength = ..ModelParameters.Muscles.BicepsFemorisCaputBreve.TotalTendonLength;
  //K1 = ..ModelParameters.Muscles.BicepsFemorisCaputBreve.K1;
  //K2 = ..ModelParameters.Muscles.BicepsFemorisCaputBreve.K2;
  //Epsilon0 = ..ModelParameters.Muscles.BicepsFemorisCaputBreve.Epsilon0;
  //Fcfast = ..ModelParameters.Muscles.BicepsFemorisCaputBreve.Fcfast;
  //VolumeScaleFactor = DesignVar(1);
  //MuscleVolumeSubject = VolumeScaleFactor*VolumeScaleFactorScaleLaw*MuscleVolume;
  VolumeScaleFactorScaleLaw  = .StrengthScaleThigh;
  FiberScaleFactorScaleLaw   = .FiberLengthScaleThigh;
};
SubjectMuscleParameter_template ExtensorDigitorumLongus(NAME = ExtensorDigitorumLongus)= {
  //Muscle = ..ModelParameters.Muscles.ExtensorDigitorumLongus.Muscle;
  //Pennationangle = ..ModelParameters.Muscles.ExtensorDigitorumLongus.Pennationangle;
  //MuscleVolume = ..ModelParameters.Muscles.ExtensorDigitorumLongus.MuscleVolume;
  //OptimalFiberlength = ..ModelParameters.Muscles.ExtensorDigitorumLongus.OptimalFiberlength;
  //TotalTendonLength = ..ModelParameters.Muscles.ExtensorDigitorumLongus.TotalTendonLength;
  //K1 = ..ModelParameters.Muscles.ExtensorDigitorumLongus.K1;
  //K2 = ..ModelParameters.Muscles.ExtensorDigitorumLongus.K2;
  //Epsilon0 = ..ModelParameters.Muscles.ExtensorDigitorumLongus.Epsilon0;
  //Fcfast = ..ModelParameters.Muscles.ExtensorDigitorumLongus.Fcfast;
  //VolumeScaleFactor = DesignVar(1);
  //MuscleVolumeSubject = VolumeScaleFactor*VolumeScaleFactorScaleLaw*MuscleVolume;
  VolumeScaleFactorScaleLaw  = .StrengthScaleShank;
  FiberScaleFactorScaleLaw   = .FiberLengthScaleShank;
};
SubjectMuscleParameter_template ExtensorHallucisLongus(NAME = ExtensorHallucisLongus)= {
  //Muscle = ..ModelParameters.Muscles.ExtensorHallucisLongus.Muscle;
  //Pennationangle = ..ModelParameters.Muscles.ExtensorHallucisLongus.Pennationangle;
  //MuscleVolume = ..ModelParameters.Muscles.ExtensorHallucisLongus.MuscleVolume;
  //OptimalFiberlength = ..ModelParameters.Muscles.ExtensorHallucisLongus.OptimalFiberlength;
  //TotalTendonLength = ..ModelParameters.Muscles.ExtensorHallucisLongus.TotalTendonLength;
  //K1 = ..ModelParameters.Muscles.ExtensorHallucisLongus.K1;
  //K2 = ..ModelParameters.Muscles.ExtensorHallucisLongus.K2;
  //Epsilon0 = ..ModelParameters.Muscles.ExtensorHallucisLongus.Epsilon0;
  //Fcfast = ..ModelParameters.Muscles.ExtensorHallucisLongus.Fcfast;
  //VolumeScaleFactor = DesignVar(1);
  //MuscleVolumeSubject = VolumeScaleFactor*VolumeScaleFactorScaleLaw*MuscleVolume;
  VolumeScaleFactorScaleLaw  = .StrengthScaleShank;
  FiberScaleFactorScaleLaw   = .FiberLengthScaleShank;
};
SubjectMuscleParameter_template FlexorDigitorumLongus(NAME = FlexorDigitorumLongus)= {
  //Muscle = ..ModelParameters.Muscles.FlexorDigitorumLongus.Muscle;
  //Pennationangle = ..ModelParameters.Muscles.FlexorDigitorumLongus.Pennationangle;
  //MuscleVolume = ..ModelParameters.Muscles.FlexorDigitorumLongus.MuscleVolume;
  //OptimalFiberlength = ..ModelParameters.Muscles.FlexorDigitorumLongus.OptimalFiberlength;
  //TotalTendonLength = ..ModelParameters.Muscles.FlexorDigitorumLongus.TotalTendonLength;
  //K1 = ..ModelParameters.Muscles.FlexorDigitorumLongus.K1;
  //K2 = ..ModelParameters.Muscles.FlexorDigitorumLongus.K2;
  //Epsilon0 = ..ModelParameters.Muscles.FlexorDigitorumLongus.Epsilon0;
  //Fcfast = ..ModelParameters.Muscles.FlexorDigitorumLongus.Fcfast;
  //VolumeScaleFactor = DesignVar(1);
  //MuscleVolumeSubject = VolumeScaleFactor*VolumeScaleFactorScaleLaw*MuscleVolume;
  VolumeScaleFactorScaleLaw  = .StrengthScaleShank;
  FiberScaleFactorScaleLaw   = .FiberLengthScaleShank;
};
SubjectMuscleParameter_template FlexorHallucisLongus(NAME = FlexorHallucisLongus)= {
  //Muscle = ..ModelParameters.Muscles.FlexorHallucisLongus.Muscle;
  //Pennationangle = ..ModelParameters.Muscles.FlexorHallucisLongus.Pennationangle;
  //MuscleVolume = ..ModelParameters.Muscles.FlexorHallucisLongus.MuscleVolume;
  //OptimalFiberlength = ..ModelParameters.Muscles.FlexorHallucisLongus.OptimalFiberlength;
  //TotalTendonLength = ..ModelParameters.Muscles.FlexorHallucisLongus.TotalTendonLength;
  //K1 = ..ModelParameters.Muscles.FlexorHallucisLongus.K1;
  //K2 = ..ModelParameters.Muscles.FlexorHallucisLongus.K2;
  //Epsilon0 = ..ModelParameters.Muscles.FlexorHallucisLongus.Epsilon0;
  //Fcfast = ..ModelParameters.Muscles.FlexorHallucisLongus.Fcfast;
  //VolumeScaleFactor = DesignVar(1);
  //MuscleVolumeSubject = VolumeScaleFactor*VolumeScaleFactorScaleLaw*MuscleVolume;
  VolumeScaleFactorScaleLaw  = .StrengthScaleShank;
  FiberScaleFactorScaleLaw   = .FiberLengthScaleShank;
};
SubjectMuscleParameter_template GastrocnemiusLateralis(NAME = GastrocnemiusLateralis)= {
  //Muscle = ..ModelParameters.Muscles.GastrocnemiusLateralis.Muscle;
  //Pennationangle = ..ModelParameters.Muscles.GastrocnemiusLateralis.Pennationangle;
  //MuscleVolume = ..ModelParameters.Muscles.GastrocnemiusLateralis.MuscleVolume;
  //OptimalFiberlength = ..ModelParameters.Muscles.GastrocnemiusLateralis.OptimalFiberlength;
  //TotalTendonLength = ..ModelParameters.Muscles.GastrocnemiusLateralis.TotalTendonLength;
  //K1 = ..ModelParameters.Muscles.GastrocnemiusLateralis.K1;
  //K2 = ..ModelParameters.Muscles.GastrocnemiusLateralis.K2;
  //Epsilon0 = ..ModelParameters.Muscles.GastrocnemiusLateralis.Epsilon0;
  //Fcfast = ..ModelParameters.Muscles.GastrocnemiusLateralis.Fcfast;
  //VolumeScaleFactor = DesignVar(1);
  //MuscleVolumeSubject = VolumeScaleFactor*VolumeScaleFactorScaleLaw*MuscleVolume;
  VolumeScaleFactorScaleLaw  = .StrengthScaleShank;
  FiberScaleFactorScaleLaw   = .FiberLengthScaleShank;
};
SubjectMuscleParameter_template GastrocnemiusMedialis(NAME = GastrocnemiusMedialis)= {
  //Muscle = ..ModelParameters.Muscles.GastrocnemiusMedialis.Muscle;
  //Pennationangle = ..ModelParameters.Muscles.GastrocnemiusMedialis.Pennationangle;
  //MuscleVolume = ..ModelParameters.Muscles.GastrocnemiusMedialis.MuscleVolume;
  //OptimalFiberlength = ..ModelParameters.Muscles.GastrocnemiusMedialis.OptimalFiberlength;
  //TotalTendonLength = ..ModelParameters.Muscles.GastrocnemiusMedialis.TotalTendonLength;
  //K1 = ..ModelParameters.Muscles.GastrocnemiusMedialis.K1;
  //K2 = ..ModelParameters.Muscles.GastrocnemiusMedialis.K2;
  //Epsilon0 = ..ModelParameters.Muscles.GastrocnemiusMedialis.Epsilon0;
  //Fcfast = ..ModelParameters.Muscles.GastrocnemiusMedialis.Fcfast;
  //VolumeScaleFactor = DesignVar(1);
  //MuscleVolumeSubject = VolumeScaleFactor*VolumeScaleFactorScaleLaw*MuscleVolume;
  VolumeScaleFactorScaleLaw  = .StrengthScaleShank;
  FiberScaleFactorScaleLaw   = .FiberLengthScaleShank;
};
SubjectMuscleParameter_template GemellusInferior(NAME = GemellusInferior)= {
  //Muscle = ..ModelParameters.Muscles.GemellusInferior.Muscle;
  //Pennationangle = ..ModelParameters.Muscles.GemellusInferior.Pennationangle;
  //MuscleVolume = ..ModelParameters.Muscles.GemellusInferior.MuscleVolume;
  //OptimalFiberlength = ..ModelParameters.Muscles.GemellusInferior.OptimalFiberlength;
  //TotalTendonLength = ..ModelParameters.Muscles.GemellusInferior.TotalTendonLength;
  //K1 = ..ModelParameters.Muscles.GemellusInferior.K1;
  //K2 = ..ModelParameters.Muscles.GemellusInferior.K2;
  //Epsilon0 = ..ModelParameters.Muscles.GemellusInferior.Epsilon0;
  //Fcfast = ..ModelParameters.Muscles.GemellusInferior.Fcfast;
  //VolumeScaleFactor = DesignVar(1);
  //MuscleVolumeSubject = VolumeScaleFactor*VolumeScaleFactorScaleLaw*MuscleVolume;
  VolumeScaleFactorScaleLaw  = .StrengthScalePelvis;
  FiberScaleFactorScaleLaw   = .FiberLengthScalePelvis;
};
SubjectMuscleParameter_template GemellusSuperior(NAME = GemellusSuperior)= {
  //Muscle = ..ModelParameters.Muscles.GemellusSuperior.Muscle;
  //Pennationangle = ..ModelParameters.Muscles.GemellusSuperior.Pennationangle;
  //MuscleVolume = ..ModelParameters.Muscles.GemellusSuperior.MuscleVolume;
  //OptimalFiberlength = ..ModelParameters.Muscles.GemellusSuperior.OptimalFiberlength;
  //TotalTendonLength = ..ModelParameters.Muscles.GemellusSuperior.TotalTendonLength;
  //K1 = ..ModelParameters.Muscles.GemellusSuperior.K1;
  //K2 = ..ModelParameters.Muscles.GemellusSuperior.K2;
  //Epsilon0 = ..ModelParameters.Muscles.GemellusSuperior.Epsilon0;
  //Fcfast = ..ModelParameters.Muscles.GemellusSuperior.Fcfast;
  //VolumeScaleFactor = DesignVar(1);
  //MuscleVolumeSubject = VolumeScaleFactor*VolumeScaleFactorScaleLaw*MuscleVolume;
  VolumeScaleFactorScaleLaw  = .StrengthScalePelvis;
  FiberScaleFactorScaleLaw   = .FiberLengthScalePelvis;
};
SubjectMuscleParameter_template GluteusMaximusSuperior(NAME = GluteusMaximusSuperior)= {
  //Muscle = ..ModelParameters.Muscles.GluteusMaximusSuperior.Muscle;
  //Pennationangle = ..ModelParameters.Muscles.GluteusMaximusSuperior.Pennationangle;
  //MuscleVolume = ..ModelParameters.Muscles.GluteusMaximusSuperior.MuscleVolume;
  //OptimalFiberlength = ..ModelParameters.Muscles.GluteusMaximusSuperior.OptimalFiberlength;
  //TotalTendonLength = ..ModelParameters.Muscles.GluteusMaximusSuperior.TotalTendonLength;
  //K1 = ..ModelParameters.Muscles.GluteusMaximusSuperior.K1;
  //K2 = ..ModelParameters.Muscles.GluteusMaximusSuperior.K2;
  //Epsilon0 = ..ModelParameters.Muscles.GluteusMaximusSuperior.Epsilon0;
  //Fcfast = ..ModelParameters.Muscles.GluteusMaximusSuperior.Fcfast;
  //VolumeScaleFactor = DesignVar(1);
  //MuscleVolumeSubject = VolumeScaleFactor*VolumeScaleFactorScaleLaw*MuscleVolume;
  VolumeScaleFactorScaleLaw  = .StrengthScaleThigh;
  FiberScaleFactorScaleLaw   = .FiberLengthScaleThigh;
};
SubjectMuscleParameter_template GluteusMaximusInferior(NAME = GluteusMaximusInferior)= {
  //Muscle = ..ModelParameters.Muscles.GluteusMaximusInferior.Muscle;
  //Pennationangle = ..ModelParameters.Muscles.GluteusMaximusInferior.Pennationangle;
  //MuscleVolume = ..ModelParameters.Muscles.GluteusMaximusInferior.MuscleVolume;
  //OptimalFiberlength = ..ModelParameters.Muscles.GluteusMaximusInferior.OptimalFiberlength;
  //TotalTendonLength = ..ModelParameters.Muscles.GluteusMaximusInferior.TotalTendonLength;
  //K1 = ..ModelParameters.Muscles.GluteusMaximusInferior.K1;
  //K2 = ..ModelParameters.Muscles.GluteusMaximusInferior.K2;
  //Epsilon0 = ..ModelParameters.Muscles.GluteusMaximusInferior.Epsilon0;
  //Fcfast = ..ModelParameters.Muscles.GluteusMaximusInferior.Fcfast;
  //VolumeScaleFactor = DesignVar(1);
  //MuscleVolumeSubject = VolumeScaleFactor*VolumeScaleFactorScaleLaw*MuscleVolume;
  VolumeScaleFactorScaleLaw  = .StrengthScaleThigh;
  FiberScaleFactorScaleLaw   = .FiberLengthScaleThigh;
};
SubjectMuscleParameter_template GluteusMediusAnterior(NAME = GluteusMediusAnterior)= {
  //Muscle = ..ModelParameters.Muscles.GluteusMediusAnterior.Muscle;
  //Pennationangle = ..ModelParameters.Muscles.GluteusMediusAnterior.Pennationangle;
  //MuscleVolume = ..ModelParameters.Muscles.GluteusMediusAnterior.MuscleVolume;
  //OptimalFiberlength = ..ModelParameters.Muscles.GluteusMediusAnterior.OptimalFiberlength;
  //TotalTendonLength = ..ModelParameters.Muscles.GluteusMediusAnterior.TotalTendonLength;
  //K1 = ..ModelParameters.Muscles.GluteusMediusAnterior.K1;
  //K2 = ..ModelParameters.Muscles.GluteusMediusAnterior.K2;
  //Epsilon0 = ..ModelParameters.Muscles.GluteusMediusAnterior.Epsilon0;
  //Fcfast = ..ModelParameters.Muscles.GluteusMediusAnterior.Fcfast;
  //VolumeScaleFactor = DesignVar(1);
  //MuscleVolumeSubject = VolumeScaleFactor*VolumeScaleFactorScaleLaw*MuscleVolume;
  VolumeScaleFactorScaleLaw  = .StrengthScalePelvis;
  FiberScaleFactorScaleLaw   = .FiberLengthScalePelvis;
};
SubjectMuscleParameter_template GluteusMediusPosterior(NAME = GluteusMediusPosterior)= {
  //Muscle = ..ModelParameters.Muscles.GluteusMediusPosterior.Muscle;
  //Pennationangle = ..ModelParameters.Muscles.GluteusMediusPosterior.Pennationangle;
  //MuscleVolume = ..ModelParameters.Muscles.GluteusMediusPosterior.MuscleVolume;
  //OptimalFiberlength = ..ModelParameters.Muscles.GluteusMediusPosterior.OptimalFiberlength;
  //TotalTendonLength = ..ModelParameters.Muscles.GluteusMediusPosterior.TotalTendonLength;
  //K1 = ..ModelParameters.Muscles.GluteusMediusPosterior.K1;
  //K2 = ..ModelParameters.Muscles.GluteusMediusPosterior.K2;
  //Epsilon0 = ..ModelParameters.Muscles.GluteusMediusPosterior.Epsilon0;
  //Fcfast = ..ModelParameters.Muscles.GluteusMediusPosterior.Fcfast;
  //VolumeScaleFactor = DesignVar(1);
  //MuscleVolumeSubject = VolumeScaleFactor*VolumeScaleFactorScaleLaw*MuscleVolume;
  VolumeScaleFactorScaleLaw  = .StrengthScalePelvis;
  FiberScaleFactorScaleLaw   = .FiberLengthScalePelvis;
};
SubjectMuscleParameter_template GluteusMinimusAnterior(NAME = GluteusMinimusAnterior)= {
  //Muscle = ..ModelParameters.Muscles.GluteusMinimusAnterior.Muscle;
  //Pennationangle = ..ModelParameters.Muscles.GluteusMinimusAnterior.Pennationangle;
  //MuscleVolume = ..ModelParameters.Muscles.GluteusMinimusAnterior.MuscleVolume;
  //OptimalFiberlength = ..ModelParameters.Muscles.GluteusMinimusAnterior.OptimalFiberlength;
  //TotalTendonLength = ..ModelParameters.Muscles.GluteusMinimusAnterior.TotalTendonLength;
  //K1 = ..ModelParameters.Muscles.GluteusMinimusAnterior.K1;
  //K2 = ..ModelParameters.Muscles.GluteusMinimusAnterior.K2;
  //Epsilon0 = ..ModelParameters.Muscles.GluteusMinimusAnterior.Epsilon0;
  //Fcfast = ..ModelParameters.Muscles.GluteusMinimusAnterior.Fcfast;
  //VolumeScaleFactor = DesignVar(1);
  //MuscleVolumeSubject = VolumeScaleFactor*VolumeScaleFactorScaleLaw*MuscleVolume;
  VolumeScaleFactorScaleLaw  = .StrengthScalePelvis;
  FiberScaleFactorScaleLaw   = .FiberLengthScalePelvis;
};
SubjectMuscleParameter_template GluteusMinimusMid(NAME = GluteusMinimusMid)= {
  //Muscle = ..ModelParameters.Muscles.GluteusMinimusMid.Muscle;
  //Pennationangle = ..ModelParameters.Muscles.GluteusMinimusMid.Pennationangle;
  //MuscleVolume = ..ModelParameters.Muscles.GluteusMinimusMid.MuscleVolume;
  //OptimalFiberlength = ..ModelParameters.Muscles.GluteusMinimusMid.OptimalFiberlength;
  //TotalTendonLength = ..ModelParameters.Muscles.GluteusMinimusMid.TotalTendonLength;
  //K1 = ..ModelParameters.Muscles.GluteusMinimusMid.K1;
  //K2 = ..ModelParameters.Muscles.GluteusMinimusMid.K2;
  //Epsilon0 = ..ModelParameters.Muscles.GluteusMinimusMid.Epsilon0;
  //Fcfast = ..ModelParameters.Muscles.GluteusMinimusMid.Fcfast;
  //VolumeScaleFactor = DesignVar(1);
  //MuscleVolumeSubject = VolumeScaleFactor*VolumeScaleFactorScaleLaw*MuscleVolume;
  VolumeScaleFactorScaleLaw  = .StrengthScalePelvis;
  FiberScaleFactorScaleLaw   = .FiberLengthScalePelvis;
};
SubjectMuscleParameter_template GluteusMinimusPosterior(NAME = GluteusMinimusPosterior)= {
  //Muscle = ..ModelParameters.Muscles.GluteusMinimusPosterior.Muscle;
  //Pennationangle = ..ModelParameters.Muscles.GluteusMinimusPosterior.Pennationangle;
  //MuscleVolume = ..ModelParameters.Muscles.GluteusMinimusPosterior.MuscleVolume;
  //OptimalFiberlength = ..ModelParameters.Muscles.GluteusMinimusPosterior.OptimalFiberlength;
  //TotalTendonLength = ..ModelParameters.Muscles.GluteusMinimusPosterior.TotalTendonLength;
  //K1 = ..ModelParameters.Muscles.GluteusMinimusPosterior.K1;
  //K2 = ..ModelParameters.Muscles.GluteusMinimusPosterior.K2;
  //Epsilon0 = ..ModelParameters.Muscles.GluteusMinimusPosterior.Epsilon0;
  //Fcfast = ..ModelParameters.Muscles.GluteusMinimusPosterior.Fcfast;
  //VolumeScaleFactor = DesignVar(1);
  //MuscleVolumeSubject = VolumeScaleFactor*VolumeScaleFactorScaleLaw*MuscleVolume;
  VolumeScaleFactorScaleLaw  = .StrengthScalePelvis;
  FiberScaleFactorScaleLaw   = .FiberLengthScalePelvis;
};
SubjectMuscleParameter_template Gracilis(NAME = Gracilis)= {
  //Muscle = ..ModelParameters.Muscles.Gracilis.Muscle;
  //Pennationangle = ..ModelParameters.Muscles.Gracilis.Pennationangle;
  //MuscleVolume = ..ModelParameters.Muscles.Gracilis.MuscleVolume;
  //OptimalFiberlength = ..ModelParameters.Muscles.Gracilis.OptimalFiberlength;
  //TotalTendonLength = ..ModelParameters.Muscles.Gracilis.TotalTendonLength;
  //K1 = ..ModelParameters.Muscles.Gracilis.K1;
  //K2 = ..ModelParameters.Muscles.Gracilis.K2;
  //Epsilon0 = ..ModelParameters.Muscles.Gracilis.Epsilon0;
  //Fcfast = ..ModelParameters.Muscles.Gracilis.Fcfast;
  //VolumeScaleFactor = DesignVar(1);
  //MuscleVolumeSubject = VolumeScaleFactor*VolumeScaleFactorScaleLaw*MuscleVolume;
  VolumeScaleFactorScaleLaw  = .StrengthScaleThigh;
  FiberScaleFactorScaleLaw   = .FiberLengthScaleThigh;
};
SubjectMuscleParameter_template IliacusLateralis(NAME = IliacusLateralis)= {
  //Muscle = ..ModelParameters.Muscles.IliacusLateralis.Muscle;
  //Pennationangle = ..ModelParameters.Muscles.IliacusLateralis.Pennationangle;
  //MuscleVolume = ..ModelParameters.Muscles.IliacusLateralis.MuscleVolume;
  //OptimalFiberlength = ..ModelParameters.Muscles.IliacusLateralis.OptimalFiberlength;
  //TotalTendonLength = ..ModelParameters.Muscles.IliacusLateralis.TotalTendonLength;
  //K1 = ..ModelParameters.Muscles.IliacusLateralis.K1;
  //K2 = ..ModelParameters.Muscles.IliacusLateralis.K2;
  //Epsilon0 = ..ModelParameters.Muscles.IliacusLateralis.Epsilon0;
  //Fcfast = ..ModelParameters.Muscles.IliacusLateralis.Fcfast;
  //VolumeScaleFactor = DesignVar(1);
  //MuscleVolumeSubject = VolumeScaleFactor*VolumeScaleFactorScaleLaw*MuscleVolume;
  VolumeScaleFactorScaleLaw  = .StrengthScalePelvis;
  FiberScaleFactorScaleLaw   = .FiberLengthScalePelvis;
};
SubjectMuscleParameter_template IliacusMid(NAME = IliacusMid)= {
  //Muscle = ..ModelParameters.Muscles.IliacusMid.Muscle;
  //Pennationangle = ..ModelParameters.Muscles.IliacusMid.Pennationangle;
  //MuscleVolume = ..ModelParameters.Muscles.IliacusMid.MuscleVolume;
  //OptimalFiberlength = ..ModelParameters.Muscles.IliacusMid.OptimalFiberlength;
  //TotalTendonLength = ..ModelParameters.Muscles.IliacusMid.TotalTendonLength;
  //K1 = ..ModelParameters.Muscles.IliacusMid.K1;
  //K2 = ..ModelParameters.Muscles.IliacusMid.K2;
  //Epsilon0 = ..ModelParameters.Muscles.IliacusMid.Epsilon0;
  //Fcfast = ..ModelParameters.Muscles.IliacusMid.Fcfast;
  //VolumeScaleFactor = DesignVar(1);
  //MuscleVolumeSubject = VolumeScaleFactor*VolumeScaleFactorScaleLaw*MuscleVolume;
  VolumeScaleFactorScaleLaw  = .StrengthScalePelvis;
  FiberScaleFactorScaleLaw   = .FiberLengthScalePelvis;
};
SubjectMuscleParameter_template IliacusMedialis(NAME = IliacusMedialis)= {
  //Muscle = ..ModelParameters.Muscles.IliacusMedialis.Muscle;
  //Pennationangle = ..ModelParameters.Muscles.IliacusMedialis.Pennationangle;
  //MuscleVolume = ..ModelParameters.Muscles.IliacusMedialis.MuscleVolume;
  //OptimalFiberlength = ..ModelParameters.Muscles.IliacusMedialis.OptimalFiberlength;
  //TotalTendonLength = ..ModelParameters.Muscles.IliacusMedialis.TotalTendonLength;
  //K1 = ..ModelParameters.Muscles.IliacusMedialis.K1;
  //K2 = ..ModelParameters.Muscles.IliacusMedialis.K2;
  //Epsilon0 = ..ModelParameters.Muscles.IliacusMedialis.Epsilon0;
  //Fcfast = ..ModelParameters.Muscles.IliacusMedialis.Fcfast;
  //VolumeScaleFactor = DesignVar(1);
  //MuscleVolumeSubject = VolumeScaleFactor*VolumeScaleFactorScaleLaw*MuscleVolume;
  VolumeScaleFactorScaleLaw  = .StrengthScalePelvis;
  FiberScaleFactorScaleLaw   = .FiberLengthScalePelvis;
};
SubjectMuscleParameter_template ObturatorExternusInferior(NAME = ObturatorExternusInferior)= {
  //Muscle = ..ModelParameters.Muscles.ObturatorExternusInferior.Muscle;
  //Pennationangle = ..ModelParameters.Muscles.ObturatorExternusInferior.Pennationangle;
  //MuscleVolume = ..ModelParameters.Muscles.ObturatorExternusInferior.MuscleVolume;
  //OptimalFiberlength = ..ModelParameters.Muscles.ObturatorExternusInferior.OptimalFiberlength;
  //TotalTendonLength = ..ModelParameters.Muscles.ObturatorExternusInferior.TotalTendonLength;
  //K1 = ..ModelParameters.Muscles.ObturatorExternusInferior.K1;
  //K2 = ..ModelParameters.Muscles.ObturatorExternusInferior.K2;
  //Epsilon0 = ..ModelParameters.Muscles.ObturatorExternusInferior.Epsilon0;
  //Fcfast = ..ModelParameters.Muscles.ObturatorExternusInferior.Fcfast;
  //VolumeScaleFactor = DesignVar(1);
  //MuscleVolumeSubject = VolumeScaleFactor*VolumeScaleFactorScaleLaw*MuscleVolume;
  VolumeScaleFactorScaleLaw  = .StrengthScalePelvis;
  FiberScaleFactorScaleLaw   = .FiberLengthScalePelvis;
};
SubjectMuscleParameter_template ObturatorExternusSuperior(NAME = ObturatorExternusSuperior)= {
  //Muscle = ..ModelParameters.Muscles.ObturatorExternusSuperior.Muscle;
  //Pennationangle = ..ModelParameters.Muscles.ObturatorExternusSuperior.Pennationangle;
  //MuscleVolume = ..ModelParameters.Muscles.ObturatorExternusSuperior.MuscleVolume;
  //OptimalFiberlength = ..ModelParameters.Muscles.ObturatorExternusSuperior.OptimalFiberlength;
  //TotalTendonLength = ..ModelParameters.Muscles.ObturatorExternusSuperior.TotalTendonLength;
  //K1 = ..ModelParameters.Muscles.ObturatorExternusSuperior.K1;
  //K2 = ..ModelParameters.Muscles.ObturatorExternusSuperior.K2;
  //Epsilon0 = ..ModelParameters.Muscles.ObturatorExternusSuperior.Epsilon0;
  //Fcfast = ..ModelParameters.Muscles.ObturatorExternusSuperior.Fcfast;
  //VolumeScaleFactor = DesignVar(1);
  //MuscleVolumeSubject = VolumeScaleFactor*VolumeScaleFactorScaleLaw*MuscleVolume;
  VolumeScaleFactorScaleLaw  = .StrengthScalePelvis;
  FiberScaleFactorScaleLaw   = .FiberLengthScalePelvis;
};
SubjectMuscleParameter_template ObturatorInternus(NAME = ObturatorInternus)= {
  //Muscle = ..ModelParameters.Muscles.ObturatorInternus.Muscle;
  //Pennationangle = ..ModelParameters.Muscles.ObturatorInternus.Pennationangle;
  //MuscleVolume = ..ModelParameters.Muscles.ObturatorInternus.MuscleVolume;
  //OptimalFiberlength = ..ModelParameters.Muscles.ObturatorInternus.OptimalFiberlength;
  //TotalTendonLength = ..ModelParameters.Muscles.ObturatorInternus.TotalTendonLength;
  //K1 = ..ModelParameters.Muscles.ObturatorInternus.K1;
  //K2 = ..ModelParameters.Muscles.ObturatorInternus.K2;
  //Epsilon0 = ..ModelParameters.Muscles.ObturatorInternus.Epsilon0;
  //Fcfast = ..ModelParameters.Muscles.ObturatorInternus.Fcfast;
  //VolumeScaleFactor = DesignVar(1);
  //MuscleVolumeSubject = VolumeScaleFactor*VolumeScaleFactorScaleLaw*MuscleVolume;
  VolumeScaleFactorScaleLaw  = .StrengthScalePelvis;
  FiberScaleFactorScaleLaw   = .FiberLengthScalePelvis;
};
SubjectMuscleParameter_template Pectineus(NAME = Pectineus)= {
  //Muscle = ..ModelParameters.Muscles.Pectineus.Muscle;
  //Pennationangle = ..ModelParameters.Muscles.Pectineus.Pennationangle;
  //MuscleVolume = ..ModelParameters.Muscles.Pectineus.MuscleVolume;
  //OptimalFiberlength = ..ModelParameters.Muscles.Pectineus.OptimalFiberlength;
  //TotalTendonLength = ..ModelParameters.Muscles.Pectineus.TotalTendonLength;
  //K1 = ..ModelParameters.Muscles.Pectineus.K1;
  //K2 = ..ModelParameters.Muscles.Pectineus.K2;
  //Epsilon0 = ..ModelParameters.Muscles.Pectineus.Epsilon0;
  //Fcfast = ..ModelParameters.Muscles.Pectineus.Fcfast;
  //VolumeScaleFactor = DesignVar(1);
  //MuscleVolumeSubject = VolumeScaleFactor*VolumeScaleFactorScaleLaw*MuscleVolume;
  VolumeScaleFactorScaleLaw  = .StrengthScaleThigh;
  FiberScaleFactorScaleLaw   = .FiberLengthScaleThigh;
};
SubjectMuscleParameter_template PeroneusBrevis(NAME = PeroneusBrevis)= {
  //Muscle = ..ModelParameters.Muscles.PeroneusBrevis.Muscle;
  //Pennationangle = ..ModelParameters.Muscles.PeroneusBrevis.Pennationangle;
  //MuscleVolume = ..ModelParameters.Muscles.PeroneusBrevis.MuscleVolume;
  //OptimalFiberlength = ..ModelParameters.Muscles.PeroneusBrevis.OptimalFiberlength;
  //TotalTendonLength = ..ModelParameters.Muscles.PeroneusBrevis.TotalTendonLength;
  //K1 = ..ModelParameters.Muscles.PeroneusBrevis.K1;
  //K2 = ..ModelParameters.Muscles.PeroneusBrevis.K2;
  //Epsilon0 = ..ModelParameters.Muscles.PeroneusBrevis.Epsilon0;
  //Fcfast = ..ModelParameters.Muscles.PeroneusBrevis.Fcfast;
  //VolumeScaleFactor = DesignVar(1);
  //MuscleVolumeSubject = VolumeScaleFactor*VolumeScaleFactorScaleLaw*MuscleVolume;
  VolumeScaleFactorScaleLaw  = .StrengthScaleShank;
  FiberScaleFactorScaleLaw   = .FiberLengthScaleShank;
};
SubjectMuscleParameter_template PeroneusLongus(NAME = PeroneusLongus)= {
  //Muscle = ..ModelParameters.Muscles.PeroneusLongus.Muscle;
  //Pennationangle = ..ModelParameters.Muscles.PeroneusLongus.Pennationangle;
  //MuscleVolume = ..ModelParameters.Muscles.PeroneusLongus.MuscleVolume;
  //OptimalFiberlength = ..ModelParameters.Muscles.PeroneusLongus.OptimalFiberlength;
  //TotalTendonLength = ..ModelParameters.Muscles.PeroneusLongus.TotalTendonLength;
  //K1 = ..ModelParameters.Muscles.PeroneusLongus.K1;
  //K2 = ..ModelParameters.Muscles.PeroneusLongus.K2;
  //Epsilon0 = ..ModelParameters.Muscles.PeroneusLongus.Epsilon0;
  //Fcfast = ..ModelParameters.Muscles.PeroneusLongus.Fcfast;
  //VolumeScaleFactor = DesignVar(1);
  //MuscleVolumeSubject = VolumeScaleFactor*VolumeScaleFactorScaleLaw*MuscleVolume;
  VolumeScaleFactorScaleLaw  = .StrengthScaleShank;
  FiberScaleFactorScaleLaw   = .FiberLengthScaleShank;
};
SubjectMuscleParameter_template PeroneusTertius(NAME = PeroneusTertius)= {
  //Muscle = ..ModelParameters.Muscles.PeroneusTertius.Muscle;
  //Pennationangle = ..ModelParameters.Muscles.PeroneusTertius.Pennationangle;
  //MuscleVolume = ..ModelParameters.Muscles.PeroneusTertius.MuscleVolume;
  //OptimalFiberlength = ..ModelParameters.Muscles.PeroneusTertius.OptimalFiberlength;
  //TotalTendonLength = ..ModelParameters.Muscles.PeroneusTertius.TotalTendonLength;
  //K1 = ..ModelParameters.Muscles.PeroneusTertius.K1;
  //K2 = ..ModelParameters.Muscles.PeroneusTertius.K2;
  //Epsilon0 = ..ModelParameters.Muscles.PeroneusTertius.Epsilon0;
  //Fcfast = ..ModelParameters.Muscles.PeroneusTertius.Fcfast;
  //VolumeScaleFactor = DesignVar(1);
  //MuscleVolumeSubject = VolumeScaleFactor*VolumeScaleFactorScaleLaw*MuscleVolume;
  VolumeScaleFactorScaleLaw  = .StrengthScaleShank;
  FiberScaleFactorScaleLaw   = .FiberLengthScaleShank;
};
SubjectMuscleParameter_template Piriformis(NAME = Piriformis)= {
  //Muscle = ..ModelParameters.Muscles.Piriformis.Muscle;
  //Pennationangle = ..ModelParameters.Muscles.Piriformis.Pennationangle;
  //MuscleVolume = ..ModelParameters.Muscles.Piriformis.MuscleVolume;
  //OptimalFiberlength = ..ModelParameters.Muscles.Piriformis.OptimalFiberlength;
  //TotalTendonLength = ..ModelParameters.Muscles.Piriformis.TotalTendonLength;
  //K1 = ..ModelParameters.Muscles.Piriformis.K1;
  //K2 = ..ModelParameters.Muscles.Piriformis.K2;
  //Epsilon0 = ..ModelParameters.Muscles.Piriformis.Epsilon0;
  //Fcfast = ..ModelParameters.Muscles.Piriformis.Fcfast;
  //VolumeScaleFactor = DesignVar(1);
  //MuscleVolumeSubject = VolumeScaleFactor*VolumeScaleFactorScaleLaw*MuscleVolume;
  VolumeScaleFactorScaleLaw  = .StrengthScalePelvis;
  FiberScaleFactorScaleLaw   = .FiberLengthScalePelvis;
};
SubjectMuscleParameter_template Plantaris(NAME = Plantaris)= {
  //Muscle = ..ModelParameters.Muscles.Plantaris.Muscle;
  //Pennationangle = ..ModelParameters.Muscles.Plantaris.Pennationangle;
  //MuscleVolume = ..ModelParameters.Muscles.Plantaris.MuscleVolume;
  //OptimalFiberlength = ..ModelParameters.Muscles.Plantaris.OptimalFiberlength;
  //TotalTendonLength = ..ModelParameters.Muscles.Plantaris.TotalTendonLength;
  //K1 = ..ModelParameters.Muscles.Plantaris.K1;
  //K2 = ..ModelParameters.Muscles.Plantaris.K2;
  //Epsilon0 = ..ModelParameters.Muscles.Plantaris.Epsilon0;
  //Fcfast = ..ModelParameters.Muscles.Plantaris.Fcfast;
  //VolumeScaleFactor = DesignVar(1);
  //MuscleVolumeSubject = VolumeScaleFactor*VolumeScaleFactorScaleLaw*MuscleVolume;
  VolumeScaleFactorScaleLaw  = .StrengthScaleShank;
  FiberScaleFactorScaleLaw   = .FiberLengthScaleShank;
};
SubjectMuscleParameter_template Popliteus(NAME = Popliteus)= {
  //Muscle = ..ModelParameters.Muscles.Popliteus.Muscle;
  //Pennationangle = ..ModelParameters.Muscles.Popliteus.Pennationangle;
  //MuscleVolume = ..ModelParameters.Muscles.Popliteus.MuscleVolume;
  //OptimalFiberlength = ..ModelParameters.Muscles.Popliteus.OptimalFiberlength;
  //TotalTendonLength = ..ModelParameters.Muscles.Popliteus.TotalTendonLength;
  //K1 = ..ModelParameters.Muscles.Popliteus.K1;
  //K2 = ..ModelParameters.Muscles.Popliteus.K2;
  //Epsilon0 = ..ModelParameters.Muscles.Popliteus.Epsilon0;
  //Fcfast = ..ModelParameters.Muscles.Popliteus.Fcfast;
  //VolumeScaleFactor = DesignVar(1);
  //MuscleVolumeSubject = VolumeScaleFactor*VolumeScaleFactorScaleLaw*MuscleVolume;
  VolumeScaleFactorScaleLaw  = .StrengthScaleShank;
  FiberScaleFactorScaleLaw   = .FiberLengthScaleShank;
};
SubjectMuscleParameter_template PsoasMinor(NAME = PsoasMinor)= {
  //Muscle = ..ModelParameters.Muscles.PsoasMinor.Muscle;
  //Pennationangle = ..ModelParameters.Muscles.PsoasMinor.Pennationangle;
  //MuscleVolume = ..ModelParameters.Muscles.PsoasMinor.MuscleVolume;
  //OptimalFiberlength = ..ModelParameters.Muscles.PsoasMinor.OptimalFiberlength;
  //TotalTendonLength = ..ModelParameters.Muscles.PsoasMinor.TotalTendonLength;
  //K1 = ..ModelParameters.Muscles.PsoasMinor.K1;
  //K2 = ..ModelParameters.Muscles.PsoasMinor.K2;
  //Epsilon0 = ..ModelParameters.Muscles.PsoasMinor.Epsilon0;
  //Fcfast = ..ModelParameters.Muscles.PsoasMinor.Fcfast;
  //VolumeScaleFactor = DesignVar(1);
  //MuscleVolumeSubject = VolumeScaleFactor*VolumeScaleFactorScaleLaw*MuscleVolume;
  VolumeScaleFactorScaleLaw  = .StrengthScalePelvis;
  FiberScaleFactorScaleLaw   = .FiberLengthScalePelvis;
};
SubjectMuscleParameter_template PsoasMajor(NAME = PsoasMajor)= {
  //Muscle = ..ModelParameters.Muscles.PsoasMajor.Muscle;
  //Pennationangle = ..ModelParameters.Muscles.PsoasMajor.Pennationangle;
  //MuscleVolume = ..ModelParameters.Muscles.PsoasMajor.MuscleVolume;
  //OptimalFiberlength = ..ModelParameters.Muscles.PsoasMajor.OptimalFiberlength;
  //TotalTendonLength = ..ModelParameters.Muscles.PsoasMajor.TotalTendonLength;
  //K1 = ..ModelParameters.Muscles.PsoasMajor.K1;
  //K2 = ..ModelParameters.Muscles.PsoasMajor.K2;
  //Epsilon0 = ..ModelParameters.Muscles.PsoasMajor.Epsilon0;
  //Fcfast = ..ModelParameters.Muscles.PsoasMajor.Fcfast;
  //VolumeScaleFactor = DesignVar(1);
  //MuscleVolumeSubject = VolumeScaleFactor*VolumeScaleFactorScaleLaw*MuscleVolume;
  VolumeScaleFactorScaleLaw  = .StrengthScalePelvis;
  FiberScaleFactorScaleLaw   = .FiberLengthScalePelvis;
};
SubjectMuscleParameter_template QuadratusFemoris(NAME = QuadratusFemoris)= {
  //Muscle = ..ModelParameters.Muscles.QuadratusFemoris.Muscle;
  //Pennationangle = ..ModelParameters.Muscles.QuadratusFemoris.Pennationangle;
  //MuscleVolume = ..ModelParameters.Muscles.QuadratusFemoris.MuscleVolume;
  //OptimalFiberlength = ..ModelParameters.Muscles.QuadratusFemoris.OptimalFiberlength;
  //TotalTendonLength = ..ModelParameters.Muscles.QuadratusFemoris.TotalTendonLength;
  //K1 = ..ModelParameters.Muscles.QuadratusFemoris.K1;
  //K2 = ..ModelParameters.Muscles.QuadratusFemoris.K2;
  //Epsilon0 = ..ModelParameters.Muscles.QuadratusFemoris.Epsilon0;
  //Fcfast = ..ModelParameters.Muscles.QuadratusFemoris.Fcfast;
  //VolumeScaleFactor = DesignVar(1);
  //MuscleVolumeSubject = VolumeScaleFactor*VolumeScaleFactorScaleLaw*MuscleVolume;
  VolumeScaleFactorScaleLaw  = .StrengthScalePelvis;
  FiberScaleFactorScaleLaw   = .FiberLengthScalePelvis;
};
SubjectMuscleParameter_template RectusFemoris(NAME = RectusFemoris)= {
  //Muscle = ..ModelParameters.Muscles.RectusFemoris.Muscle;
  //Pennationangle = ..ModelParameters.Muscles.RectusFemoris.Pennationangle;
  //MuscleVolume = ..ModelParameters.Muscles.RectusFemoris.MuscleVolume;
  //OptimalFiberlength = ..ModelParameters.Muscles.RectusFemoris.OptimalFiberlength;
  //TotalTendonLength = ..ModelParameters.Muscles.RectusFemoris.TotalTendonLength;
  //K1 = ..ModelParameters.Muscles.RectusFemoris.K1;
  //K2 = ..ModelParameters.Muscles.RectusFemoris.K2;
  //Epsilon0 = ..ModelParameters.Muscles.RectusFemoris.Epsilon0;
  //Fcfast = ..ModelParameters.Muscles.RectusFemoris.Fcfast;
  //VolumeScaleFactor = DesignVar(1);
  //MuscleVolumeSubject = VolumeScaleFactor*VolumeScaleFactorScaleLaw*MuscleVolume;
  VolumeScaleFactorScaleLaw  = .StrengthScaleThigh;
  FiberScaleFactorScaleLaw   = .FiberLengthScaleThigh;
};
SubjectMuscleParameter_template SartoriusProximal(NAME = SartoriusProximal)= {
  //Muscle = ..ModelParameters.Muscles.SartoriusProximal.Muscle;
  //Pennationangle = ..ModelParameters.Muscles.SartoriusProximal.Pennationangle;
  //MuscleVolume = ..ModelParameters.Muscles.SartoriusProximal.MuscleVolume;
  //OptimalFiberlength = ..ModelParameters.Muscles.SartoriusProximal.OptimalFiberlength;
  //TotalTendonLength = ..ModelParameters.Muscles.SartoriusProximal.TotalTendonLength;
  //K1 = ..ModelParameters.Muscles.SartoriusProximal.K1;
  //K2 = ..ModelParameters.Muscles.SartoriusProximal.K2;
  //Epsilon0 = ..ModelParameters.Muscles.SartoriusProximal.Epsilon0;
  //Fcfast = ..ModelParameters.Muscles.SartoriusProximal.Fcfast;
  //VolumeScaleFactor = DesignVar(1);
  //MuscleVolumeSubject = VolumeScaleFactor*VolumeScaleFactorScaleLaw*MuscleVolume;
  VolumeScaleFactorScaleLaw  = .StrengthScaleThigh;
  FiberScaleFactorScaleLaw   = .FiberLengthScaleThigh;
};
SubjectMuscleParameter_template SartoriusDistal(NAME = SartoriusDistal)= {
  //Muscle = ..ModelParameters.Muscles.SartoriusDistal.Muscle;
  //Pennationangle = ..ModelParameters.Muscles.SartoriusDistal.Pennationangle;
  //MuscleVolume = ..ModelParameters.Muscles.SartoriusDistal.MuscleVolume;
  //OptimalFiberlength = ..ModelParameters.Muscles.SartoriusDistal.OptimalFiberlength;
  //TotalTendonLength = ..ModelParameters.Muscles.SartoriusDistal.TotalTendonLength;
  //K1 = ..ModelParameters.Muscles.SartoriusDistal.K1;
  //K2 = ..ModelParameters.Muscles.SartoriusDistal.K2;
  //Epsilon0 = ..ModelParameters.Muscles.SartoriusDistal.Epsilon0;
  //Fcfast = ..ModelParameters.Muscles.SartoriusDistal.Fcfast;
  //VolumeScaleFactor = DesignVar(1);
  //MuscleVolumeSubject = VolumeScaleFactor*VolumeScaleFactorScaleLaw*MuscleVolume;
  VolumeScaleFactorScaleLaw  = .StrengthScaleThigh;
  FiberScaleFactorScaleLaw   = .FiberLengthScaleThigh;
};
SubjectMuscleParameter_template Semimembranosus(NAME = Semimembranosus)= {
  //Muscle = ..ModelParameters.Muscles.Semimembranosus.Muscle;
  //Pennationangle = ..ModelParameters.Muscles.Semimembranosus.Pennationangle;
  //MuscleVolume = ..ModelParameters.Muscles.Semimembranosus.MuscleVolume;
  //OptimalFiberlength = ..ModelParameters.Muscles.Semimembranosus.OptimalFiberlength;
  //TotalTendonLength = ..ModelParameters.Muscles.Semimembranosus.TotalTendonLength;
  //K1 = ..ModelParameters.Muscles.Semimembranosus.K1;
  //K2 = ..ModelParameters.Muscles.Semimembranosus.K2;
  //Epsilon0 = ..ModelParameters.Muscles.Semimembranosus.Epsilon0;
  //Fcfast = ..ModelParameters.Muscles.Semimembranosus.Fcfast;
  //VolumeScaleFactor = DesignVar(1);
  //MuscleVolumeSubject = VolumeScaleFactor*VolumeScaleFactorScaleLaw*MuscleVolume;
  VolumeScaleFactorScaleLaw  = .StrengthScaleThigh;
  FiberScaleFactorScaleLaw   = .FiberLengthScaleThigh;
};
SubjectMuscleParameter_template Semitendinosus(NAME = Semitendinosus)= {
  //Muscle = ..ModelParameters.Muscles.Semitendinosus.Muscle;
  //Pennationangle = ..ModelParameters.Muscles.Semitendinosus.Pennationangle;
  //MuscleVolume = ..ModelParameters.Muscles.Semitendinosus.MuscleVolume;
  //OptimalFiberlength = ..ModelParameters.Muscles.Semitendinosus.OptimalFiberlength;
  //TotalTendonLength = ..ModelParameters.Muscles.Semitendinosus.TotalTendonLength;
  //K1 = ..ModelParameters.Muscles.Semitendinosus.K1;
  //K2 = ..ModelParameters.Muscles.Semitendinosus.K2;
  //Epsilon0 = ..ModelParameters.Muscles.Semitendinosus.Epsilon0;
  //Fcfast = ..ModelParameters.Muscles.Semitendinosus.Fcfast;
  //VolumeScaleFactor = DesignVar(1);
  //MuscleVolumeSubject = VolumeScaleFactor*VolumeScaleFactorScaleLaw*MuscleVolume;
  VolumeScaleFactorScaleLaw  = .StrengthScaleThigh;
  FiberScaleFactorScaleLaw   = .FiberLengthScaleThigh;
};
SubjectMuscleParameter_template SoleusMedialis(NAME = SoleusMedialis)= {
  //Muscle = ..ModelParameters.Muscles.SoleusMedialis.Muscle;
  //Pennationangle = ..ModelParameters.Muscles.SoleusMedialis.Pennationangle;
  //MuscleVolume = ..ModelParameters.Muscles.SoleusMedialis.MuscleVolume;
  //OptimalFiberlength = ..ModelParameters.Muscles.SoleusMedialis.OptimalFiberlength;
  //TotalTendonLength = ..ModelParameters.Muscles.SoleusMedialis.TotalTendonLength;
  //K1 = ..ModelParameters.Muscles.SoleusMedialis.K1;
  //K2 = ..ModelParameters.Muscles.SoleusMedialis.K2;
  //Epsilon0 = ..ModelParameters.Muscles.SoleusMedialis.Epsilon0;
  //Fcfast = ..ModelParameters.Muscles.SoleusMedialis.Fcfast;
  //VolumeScaleFactor = DesignVar(1);
  //MuscleVolumeSubject = VolumeScaleFactor*VolumeScaleFactorScaleLaw*MuscleVolume;
  VolumeScaleFactorScaleLaw  = .StrengthScaleShank;
  FiberScaleFactorScaleLaw   = .FiberLengthScaleShank;
};
SubjectMuscleParameter_template SoleusLateralis(NAME = SoleusLateralis)= {
  //Muscle = ..ModelParameters.Muscles.SoleusLateralis.Muscle;
  //Pennationangle = ..ModelParameters.Muscles.SoleusLateralis.Pennationangle;
  //MuscleVolume = ..ModelParameters.Muscles.SoleusLateralis.MuscleVolume;
  //OptimalFiberlength = ..ModelParameters.Muscles.SoleusLateralis.OptimalFiberlength;
  //TotalTendonLength = ..ModelParameters.Muscles.SoleusLateralis.TotalTendonLength;
  //K1 = ..ModelParameters.Muscles.SoleusLateralis.K1;
  //K2 = ..ModelParameters.Muscles.SoleusLateralis.K2;
  //Epsilon0 = ..ModelParameters.Muscles.SoleusLateralis.Epsilon0;
  //Fcfast = ..ModelParameters.Muscles.SoleusLateralis.Fcfast;
  //VolumeScaleFactor = DesignVar(1);
  //MuscleVolumeSubject = VolumeScaleFactor*VolumeScaleFactorScaleLaw*MuscleVolume;
  VolumeScaleFactorScaleLaw  = .StrengthScaleShank;
  FiberScaleFactorScaleLaw   = .FiberLengthScaleShank;
};
SubjectMuscleParameter_template TensorFasciaeLatae(NAME = TensorFasciaeLatae)= {
  //Muscle = ..ModelParameters.Muscles.TensorFasciaeLatae.Muscle;
  //Pennationangle = ..ModelParameters.Muscles.TensorFasciaeLatae.Pennationangle;
  //MuscleVolume = ..ModelParameters.Muscles.TensorFasciaeLatae.MuscleVolume;
  //OptimalFiberlength = ..ModelParameters.Muscles.TensorFasciaeLatae.OptimalFiberlength;
  //TotalTendonLength = ..ModelParameters.Muscles.TensorFasciaeLatae.TotalTendonLength;
  //K1 = ..ModelParameters.Muscles.TensorFasciaeLatae.K1;
  //K2 = ..ModelParameters.Muscles.TensorFasciaeLatae.K2;
  //Epsilon0 = ..ModelParameters.Muscles.TensorFasciaeLatae.Epsilon0;
  //Fcfast = ..ModelParameters.Muscles.TensorFasciaeLatae.Fcfast;
  //VolumeScaleFactor = DesignVar(1);
  //MuscleVolumeSubject = VolumeScaleFactor*VolumeScaleFactorScaleLaw*MuscleVolume;
  VolumeScaleFactorScaleLaw  = .StrengthScaleThigh;
  FiberScaleFactorScaleLaw   = .FiberLengthScaleThigh;
};
SubjectMuscleParameter_template TibialisAnterior(NAME = TibialisAnterior)= {
  //Muscle = ..ModelParameters.Muscles.TibialisAnterior.Muscle;
  //Pennationangle = ..ModelParameters.Muscles.TibialisAnterior.Pennationangle;
  //MuscleVolume = ..ModelParameters.Muscles.TibialisAnterior.MuscleVolume;
  //OptimalFiberlength = ..ModelParameters.Muscles.TibialisAnterior.OptimalFiberlength;
  //TotalTendonLength = ..ModelParameters.Muscles.TibialisAnterior.TotalTendonLength;
  //K1 = ..ModelParameters.Muscles.TibialisAnterior.K1;
  //K2 = ..ModelParameters.Muscles.TibialisAnterior.K2;
  //Epsilon0 = ..ModelParameters.Muscles.TibialisAnterior.Epsilon0;
  //Fcfast = ..ModelParameters.Muscles.TibialisAnterior.Fcfast;
  //VolumeScaleFactor = DesignVar(1);
  //MuscleVolumeSubject = VolumeScaleFactor*VolumeScaleFactorScaleLaw*MuscleVolume;
  VolumeScaleFactorScaleLaw  = .StrengthScaleShank;
  FiberScaleFactorScaleLaw   = .FiberLengthScaleShank;
};
SubjectMuscleParameter_template TibialisPosteriorMedialis(NAME = TibialisPosteriorMedialis)= {
  //Muscle = ..ModelParameters.Muscles.TibialisPosteriorMedialis.Muscle;
  //Pennationangle = ..ModelParameters.Muscles.TibialisPosteriorMedialis.Pennationangle;
  //MuscleVolume = ..ModelParameters.Muscles.TibialisPosteriorMedialis.MuscleVolume;
  //OptimalFiberlength = ..ModelParameters.Muscles.TibialisPosteriorMedialis.OptimalFiberlength;
  //TotalTendonLength = ..ModelParameters.Muscles.TibialisPosteriorMedialis.TotalTendonLength;
  //K1 = ..ModelParameters.Muscles.TibialisPosteriorMedialis.K1;
  //K2 = ..ModelParameters.Muscles.TibialisPosteriorMedialis.K2;
  //Epsilon0 = ..ModelParameters.Muscles.TibialisPosteriorMedialis.Epsilon0;
  //Fcfast = ..ModelParameters.Muscles.TibialisPosteriorMedialis.Fcfast;
  //VolumeScaleFactor = DesignVar(1);
  //MuscleVolumeSubject = VolumeScaleFactor*VolumeScaleFactorScaleLaw*MuscleVolume;
  VolumeScaleFactorScaleLaw  = .StrengthScaleShank;
  FiberScaleFactorScaleLaw   = .FiberLengthScaleShank;
};
SubjectMuscleParameter_template TibialisPosteriorLateralis(NAME = TibialisPosteriorLateralis)= {
  //Muscle = ..ModelParameters.Muscles.TibialisPosteriorLateralis.Muscle;
  //Pennationangle = ..ModelParameters.Muscles.TibialisPosteriorLateralis.Pennationangle;
  //MuscleVolume = ..ModelParameters.Muscles.TibialisPosteriorLateralis.MuscleVolume;
  //OptimalFiberlength = ..ModelParameters.Muscles.TibialisPosteriorLateralis.OptimalFiberlength;
  //TotalTendonLength = ..ModelParameters.Muscles.TibialisPosteriorLateralis.TotalTendonLength;
  //K1 = ..ModelParameters.Muscles.TibialisPosteriorLateralis.K1;
  //K2 = ..ModelParameters.Muscles.TibialisPosteriorLateralis.K2;
  //Epsilon0 = ..ModelParameters.Muscles.TibialisPosteriorLateralis.Epsilon0;
  //Fcfast = ..ModelParameters.Muscles.TibialisPosteriorLateralis.Fcfast;
  //VolumeScaleFactor = DesignVar(1);
  //MuscleVolumeSubject = VolumeScaleFactor*VolumeScaleFactorScaleLaw*MuscleVolume;
  VolumeScaleFactorScaleLaw  = .StrengthScaleShank;
  FiberScaleFactorScaleLaw   = .FiberLengthScaleShank;
};
SubjectMuscleParameter_template VastusIntermedius(NAME = VastusIntermedius)= {
  //Muscle = ..ModelParameters.Muscles.VastusIntermedius.Muscle;
  //Pennationangle = ..ModelParameters.Muscles.VastusIntermedius.Pennationangle;
  //MuscleVolume = ..ModelParameters.Muscles.VastusIntermedius.MuscleVolume;
  //OptimalFiberlength = ..ModelParameters.Muscles.VastusIntermedius.OptimalFiberlength;
  //TotalTendonLength = ..ModelParameters.Muscles.VastusIntermedius.TotalTendonLength;
  //K1 = ..ModelParameters.Muscles.VastusIntermedius.K1;
  //K2 = ..ModelParameters.Muscles.VastusIntermedius.K2;
  //Epsilon0 = ..ModelParameters.Muscles.VastusIntermedius.Epsilon0;
  //Fcfast = ..ModelParameters.Muscles.VastusIntermedius.Fcfast;
  //VolumeScaleFactor = DesignVar(1);
  //MuscleVolumeSubject = VolumeScaleFactor*VolumeScaleFactorScaleLaw*MuscleVolume;
  VolumeScaleFactorScaleLaw  = .StrengthScaleThigh;
  FiberScaleFactorScaleLaw   = .FiberLengthScaleThigh;
};
SubjectMuscleParameter_template VastusLateralisInferior(NAME = VastusLateralisInferior)= {
  //Muscle = ..ModelParameters.Muscles.VastusLateralisInferior.Muscle;
  //Pennationangle = ..ModelParameters.Muscles.VastusLateralisInferior.Pennationangle;
  //MuscleVolume = ..ModelParameters.Muscles.VastusLateralisInferior.MuscleVolume;
  //OptimalFiberlength = ..ModelParameters.Muscles.VastusLateralisInferior.OptimalFiberlength;
  //TotalTendonLength = ..ModelParameters.Muscles.VastusLateralisInferior.TotalTendonLength;
  //K1 = ..ModelParameters.Muscles.VastusLateralisInferior.K1;
  //K2 = ..ModelParameters.Muscles.VastusLateralisInferior.K2;
  //Epsilon0 = ..ModelParameters.Muscles.VastusLateralisInferior.Epsilon0;
  //Fcfast = ..ModelParameters.Muscles.VastusLateralisInferior.Fcfast;
  //VolumeScaleFactor = DesignVar(1);
  //MuscleVolumeSubject = VolumeScaleFactor*VolumeScaleFactorScaleLaw*MuscleVolume;
  VolumeScaleFactorScaleLaw  = .StrengthScaleThigh;
  FiberScaleFactorScaleLaw   = .FiberLengthScaleThigh;
};
SubjectMuscleParameter_template VastusLateralisSuperior(NAME = VastusLateralisSuperior)= {
  //Muscle = ..ModelParameters.Muscles.VastusLateralisSuperior.Muscle;
  //Pennationangle = ..ModelParameters.Muscles.VastusLateralisSuperior.Pennationangle;
  //MuscleVolume = ..ModelParameters.Muscles.VastusLateralisSuperior.MuscleVolume;
  //OptimalFiberlength = ..ModelParameters.Muscles.VastusLateralisSuperior.OptimalFiberlength;
  //TotalTendonLength = ..ModelParameters.Muscles.VastusLateralisSuperior.TotalTendonLength;
  //K1 = ..ModelParameters.Muscles.VastusLateralisSuperior.K1;
  //K2 = ..ModelParameters.Muscles.VastusLateralisSuperior.K2;
  //Epsilon0 = ..ModelParameters.Muscles.VastusLateralisSuperior.Epsilon0;
  //Fcfast = ..ModelParameters.Muscles.VastusLateralisSuperior.Fcfast;
  //VolumeScaleFactor = DesignVar(1);
  //MuscleVolumeSubject = VolumeScaleFactor*VolumeScaleFactorScaleLaw*MuscleVolume;
  VolumeScaleFactorScaleLaw  = .StrengthScaleThigh;
  FiberScaleFactorScaleLaw   = .FiberLengthScaleThigh;
};
SubjectMuscleParameter_template VastusMedialisInferior(NAME = VastusMedialisInferior)= {
  //Muscle = ..ModelParameters.Muscles.VastusMedialisInferior.Muscle;
  //Pennationangle = ..ModelParameters.Muscles.VastusMedialisInferior.Pennationangle;
  //MuscleVolume = ..ModelParameters.Muscles.VastusMedialisInferior.MuscleVolume;
  //OptimalFiberlength = ..ModelParameters.Muscles.VastusMedialisInferior.OptimalFiberlength;
  //TotalTendonLength = ..ModelParameters.Muscles.VastusMedialisInferior.TotalTendonLength;
  //K1 = ..ModelParameters.Muscles.VastusMedialisInferior.K1;
  //K2 = ..ModelParameters.Muscles.VastusMedialisInferior.K2;
  //Epsilon0 = ..ModelParameters.Muscles.VastusMedialisInferior.Epsilon0;
  //Fcfast = ..ModelParameters.Muscles.VastusMedialisInferior.Fcfast;
  //VolumeScaleFactor = DesignVar(1);
  //MuscleVolumeSubject = VolumeScaleFactor*VolumeScaleFactorScaleLaw*MuscleVolume;
  VolumeScaleFactorScaleLaw  = .StrengthScaleThigh;
  FiberScaleFactorScaleLaw   = .FiberLengthScaleThigh;
};
SubjectMuscleParameter_template VastusMedialisMid(NAME = VastusMedialisMid)= {
  //Muscle = ..ModelParameters.Muscles.VastusMedialisMid.Muscle;
  //Pennationangle = ..ModelParameters.Muscles.VastusMedialisMid.Pennationangle;
  //MuscleVolume = ..ModelParameters.Muscles.VastusMedialisMid.MuscleVolume;
  //OptimalFiberlength = ..ModelParameters.Muscles.VastusMedialisMid.OptimalFiberlength;
  //TotalTendonLength = ..ModelParameters.Muscles.VastusMedialisMid.TotalTendonLength;
  //K1 = ..ModelParameters.Muscles.VastusMedialisMid.K1;
  //K2 = ..ModelParameters.Muscles.VastusMedialisMid.K2;
  //Epsilon0 = ..ModelParameters.Muscles.VastusMedialisMid.Epsilon0;
  //Fcfast = ..ModelParameters.Muscles.VastusMedialisMid.Fcfast;
  //VolumeScaleFactor = DesignVar(1);
  //MuscleVolumeSubject = VolumeScaleFactor*VolumeScaleFactorScaleLaw*MuscleVolume;
  VolumeScaleFactorScaleLaw  = .StrengthScaleThigh;
  FiberScaleFactorScaleLaw   = .FiberLengthScaleThigh;
};
SubjectMuscleParameter_template VastusMedialisSuperior(NAME = VastusMedialisSuperior)= {
  //Muscle = ..ModelParameters.Muscles.VastusMedialisSuperior.Muscle;
  //Pennationangle = ..ModelParameters.Muscles.VastusMedialisSuperior.Pennationangle;
  //MuscleVolume = ..ModelParameters.Muscles.VastusMedialisSuperior.MuscleVolume;
  //OptimalFiberlength = ..ModelParameters.Muscles.VastusMedialisSuperior.OptimalFiberlength;
  //TotalTendonLength = ..ModelParameters.Muscles.VastusMedialisSuperior.TotalTendonLength;
  //K1 = ..ModelParameters.Muscles.VastusMedialisSuperior.K1;
  //K2 = ..ModelParameters.Muscles.VastusMedialisSuperior.K2;
  //Epsilon0 = ..ModelParameters.Muscles.VastusMedialisSuperior.Epsilon0;
  //Fcfast = ..ModelParameters.Muscles.VastusMedialisSuperior.Fcfast;
  //VolumeScaleFactor = DesignVar(1);
  //MuscleVolumeSubject = VolumeScaleFactor*VolumeScaleFactorScaleLaw*MuscleVolume;
  VolumeScaleFactorScaleLaw  = .StrengthScaleThigh;
  FiberScaleFactorScaleLaw   = .FiberLengthScaleThigh;
};
