/*
  This dataset is part of The TLEMsafe Project Dataset. The dataset was
  created during the TLEMsafe project (www.tlemsafe.eu) funded by the
  European Commission under Grant Agreement (no. 247860) and under the
  TLEMsafe Consortium Agreement.

  Use the following paper when citing:
    Carbone, V., Fluit, R., Pellikaan, P., van der Krogt, M.M., Janssen, D.,
    Damsgaard, M., Vigneron, L., Feilkas, T., Koopman, H.F.J.M., Verdonschot, N., 2015.
    TLEM 2.0 - a comprehensive musculoskeletal geometry dataset for
    subject-specific modeling of lower extremity.
    J. Biomech. 48, 734-741. doi:10.1016/j.jbiomech.2014.12.034


  The TLEMsafe project did not involve measurement of muscle paramters. The parameters of this
  model are therefore taken from the original TLEM model:

  This dataset is based on the PhD thesis by Martijn D. Klein Horsman titled
  "The Twente Lower Extremity Model (TLEM): Consistent Dynamic Simulation of the
  Human Locomotor Apparatus"

  The TLEM muscle parameters are essentially a mixture of parematers which could be obtained by
  Klein Horsman himself as well as data obtained by Scott L. Delp.
  (see http://isbweb.org/data/delp)

  This script implements the Handsfield et. al (2014) muscle volumes, which can be calculated
  using regrssion equations based on body anthropometrics or total muscle volume.

*/

#define VOLUME_FORMULA_TOTAL_MUSCLE_VOLUME .TotalMuscleVolume*TotalMuscleVolumeRegression.b1 + TotalMuscleVolumeRegression.b2
#define VOLUME_FORMULA_MASS .BodyMass*BodyMassRegression.b1 + BodyMassRegression.b2
#define VOLUME_FORMULA_HEIGHT_MASS .BodyMass*.BodyHeight*BodyHeightMassRegression.b1 + BodyHeightMassRegression.b2

#ifndef VOLUME_FORMULA
  #define VOLUME_FORMULA VOLUME_FORMULA_HEIGHT_MASS
#endif

#if BM_SCALING == CONST_SCALING_STANDARD
  AnyFloatVar BodyMass = .....Scaling.Scaling.StandardParameters.BodyParameters.BodyMass;
  AnyFloatVar BodyHeight = (.....Scaling.Scaling.StandardParameters.BodyParameters.BodyMass/.....Scaling.Scaling.StandardParameters.BodyParameters.BMI)^0.5;
#else
  AnyFloatVar BodyMass = ......AnthroDataSubject.AnthroData.Body_Mass;
  AnyFloatVar BodyHeight = ......AnthroDataSubject.AnthroData.body_height;
#endif
AnyFloatVar TotalMuscleVolume = DesignVar(47*BodyMass*BodyHeight + 1285); ///< Total muscle volume estimated based on Handsfield (cm^3)


AnyFolder AdductorBrevisProximal = {
    AnyString Muscle = "Add. brev. (prox.)"; ///< Descriptive name for the muscle, e.g. for plotting
    AnyFloat Pennationangle = DesignVar(0.0); ///< Pennation angle of the muscle fibers (degres)
    AnyFloatVar VolumeRatio = 0.33333; ///< factor to be multiplied to obtain the final volume
    AnyFolder TotalMuscleVolumeRegression = {
      AnyFloatVar b1 = 0.01370; ///< b1 (cm3/cm3)
      AnyFloatVar b2 = 6.20; ///< b2 (cm3)
    };
    AnyFolder BodyMassRegression = {
      AnyFloatVar b1 = 1.13000; ///< b1 (cm3/kg)
      AnyFloatVar b2 = 22.90; ///< b2 (cm3)
    };
    AnyFolder BodyHeightMassRegression = {
      AnyFloatVar b1 = 0.62200; ///< b1 (cm3/m*kg)
      AnyFloatVar b2 = 27.10; ///< b2 (cm3)
    };
    AnyFloatVar VolumeMuscleBelly = DesignVar((VOLUME_FORMULA)*VolumeRatio); ///< Volume of the muscle using Handsfield regression on total muscle volume (cm^3)
    AnyFloat OptimalFiberlength = DesignVar(9.53); ///< Optimal working length of the muscle fiber (cm)
    AnyFloat TotalTendonLength = DesignVar(0.00); ///< The total tendon length (cm)
    AnyFloat K1 = DesignVar(10.00); ///< K1 constant in the muscle model.  Factor for determining shortening speed at optimum length
    AnyFloat K2 = DesignVar(0.00); ///< K2 constant in the muscle model.  Factor for determining shortening speed at optimum length
    AnyFloat EpsilonBar = DesignVar(0.0530); ///< Epsilon bar in the muscle model. Represents tendon strain at F0
};

AnyFolder AdductorBrevisMid = {
    AnyString Muscle = "Add. brev. (mid.)"; ///< Descriptive name for the muscle, e.g. for plotting
    AnyFloat Pennationangle = DesignVar(0.0); ///< Pennation angle of the muscle fibers (degres)
    AnyFloatVar VolumeRatio = 0.33333; ///< factor to be multiplied to obtain the final volume
    AnyFolder TotalMuscleVolumeRegression = {
      AnyFloatVar b1 = 0.01370; ///< b1 (cm3/cm3)
      AnyFloatVar b2 = 6.20; ///< b2 (cm3)
    };
    AnyFolder BodyMassRegression = {
      AnyFloatVar b1 = 1.13000; ///< b1 (cm3/kg)
      AnyFloatVar b2 = 22.90; ///< b2 (cm3)
    };
    AnyFolder BodyHeightMassRegression = {
      AnyFloatVar b1 = 0.62200; ///< b1 (cm3/m*kg)
      AnyFloatVar b2 = 27.10; ///< b2 (cm3)
    };
    AnyFloatVar VolumeMuscleBelly = DesignVar((VOLUME_FORMULA)*VolumeRatio); ///< Volume of the muscle using Handsfield regression on total muscle volume (cm^3)
    AnyFloat OptimalFiberlength = DesignVar(10.38); ///< Optimal working length of the muscle fiber (cm)
    AnyFloat TotalTendonLength = DesignVar(0.00); ///< The total tendon length (cm)
    AnyFloat K1 = DesignVar(10.00); ///< K1 constant in the muscle model.  Factor for determining shortening speed at optimum length
    AnyFloat K2 = DesignVar(0.00); ///< K2 constant in the muscle model.  Factor for determining shortening speed at optimum length
    AnyFloat EpsilonBar = DesignVar(0.0530); ///< Epsilon bar in the muscle model. Represents tendon strain at F0
};

AnyFolder AdductorBrevisDistal = {
    AnyString Muscle = "Add. brev. (dist.)"; ///< Descriptive name for the muscle, e.g. for plotting
    AnyFloat Pennationangle = DesignVar(0.0); ///< Pennation angle of the muscle fibers (degres)
    AnyFloatVar VolumeRatio = 0.33333; ///< factor to be multiplied to obtain the final volume
    AnyFolder TotalMuscleVolumeRegression = {
      AnyFloatVar b1 = 0.01370; ///< b1 (cm3/cm3)
      AnyFloatVar b2 = 6.20; ///< b2 (cm3)
    };
    AnyFolder BodyMassRegression = {
      AnyFloatVar b1 = 1.13000; ///< b1 (cm3/kg)
      AnyFloatVar b2 = 22.90; ///< b2 (cm3)
    };
    AnyFolder BodyHeightMassRegression = {
      AnyFloatVar b1 = 0.62200; ///< b1 (cm3/m*kg)
      AnyFloatVar b2 = 27.10; ///< b2 (cm3)
    };
    AnyFloatVar VolumeMuscleBelly = DesignVar((VOLUME_FORMULA)*VolumeRatio); ///< Volume of the muscle using Handsfield regression on total muscle volume (cm^3)
    AnyFloat OptimalFiberlength = DesignVar(11.22); ///< Optimal working length of the muscle fiber (cm)
    AnyFloat TotalTendonLength = DesignVar(0.00); ///< The total tendon length (cm)
    AnyFloat K1 = DesignVar(10.00); ///< K1 constant in the muscle model.  Factor for determining shortening speed at optimum length
    AnyFloat K2 = DesignVar(0.00); ///< K2 constant in the muscle model.  Factor for determining shortening speed at optimum length
    AnyFloat EpsilonBar = DesignVar(0.0530); ///< Epsilon bar in the muscle model. Represents tendon strain at F0
};

AnyFolder AdductorLongus = {
    AnyString Muscle = "Add. long."; ///< Descriptive name for the muscle, e.g. for plotting
    AnyFloat Pennationangle = DesignVar(0.0); ///< Pennation angle of the muscle fibers (degres)
    AnyFloatVar VolumeRatio = 1.00000; ///< factor to be multiplied to obtain the final volume
    AnyFolder TotalMuscleVolumeRegression = {
      AnyFloatVar b1 = 0.02590; ///< b1 (cm3/cm3)
      AnyFloatVar b2 = -21.90; ///< b2 (cm3)
    };
    AnyFolder BodyMassRegression = {
      AnyFloatVar b1 = 2.27000; ///< b1 (cm3/kg)
      AnyFloatVar b2 = -0.48; ///< b2 (cm3)
    };
    AnyFolder BodyHeightMassRegression = {
      AnyFloatVar b1 = 1.19000; ///< b1 (cm3/m*kg)
      AnyFloatVar b2 = 14.30; ///< b2 (cm3)
    };
    AnyFloatVar VolumeMuscleBelly = DesignVar((VOLUME_FORMULA)*VolumeRatio); ///< Volume of the muscle using Handsfield regression on total muscle volume (cm^3)
    AnyFloat OptimalFiberlength = DesignVar(10.57); ///< Optimal working length of the muscle fiber (cm)
    AnyFloat TotalTendonLength = DesignVar(0.00); ///< The total tendon length (cm)
    AnyFloat K1 = DesignVar(10.00); ///< K1 constant in the muscle model.  Factor for determining shortening speed at optimum length
    AnyFloat K2 = DesignVar(0.00); ///< K2 constant in the muscle model.  Factor for determining shortening speed at optimum length
    AnyFloat EpsilonBar = DesignVar(0.0530); ///< Epsilon bar in the muscle model. Represents tendon strain at F0
};

AnyFolder AdductorMagnusDistal = {
    AnyString Muscle = "Add. magn. (dist.)"; ///< Descriptive name for the muscle, e.g. for plotting
    AnyFloat Pennationangle = DesignVar(0.0); ///< Pennation angle of the muscle fibers (degres)
    AnyFloatVar VolumeRatio = 0.33333; ///< factor to be multiplied to obtain the final volume
    AnyFolder TotalMuscleVolumeRegression = {
      AnyFloatVar b1 = 0.07930; ///< b1 (cm3/cm3)
      AnyFloatVar b2 = -4.70; ///< b2 (cm3)
    };
    AnyFolder BodyMassRegression = {
      AnyFloatVar b1 = 6.93000; ///< b1 (cm3/kg)
      AnyFloatVar b2 = 62.30; ///< b2 (cm3)
    };
    AnyFolder BodyHeightMassRegression = {
      AnyFloatVar b1 = 3.64000; ///< b1 (cm3/m*kg)
      AnyFloatVar b2 = 109.00; ///< b2 (cm3)
    };
    AnyFloatVar VolumeMuscleBelly = DesignVar((VOLUME_FORMULA)*VolumeRatio); ///< Volume of the muscle using Handsfield regression on total muscle volume (cm^3)
    AnyFloat OptimalFiberlength = DesignVar(10.78); ///< Optimal working length of the muscle fiber (cm)
    AnyFloat TotalTendonLength = DesignVar(4.20); ///< The total tendon length (cm)
    AnyFloat K1 = DesignVar(10.00); ///< K1 constant in the muscle model.  Factor for determining shortening speed at optimum length
    AnyFloat K2 = DesignVar(0.00); ///< K2 constant in the muscle model.  Factor for determining shortening speed at optimum length
    AnyFloat EpsilonBar = DesignVar(0.0530); ///< Epsilon bar in the muscle model. Represents tendon strain at F0
};

AnyFolder AdductorMagnusMid = {
    AnyString Muscle = "Add. magn. (mid.) "; ///< Descriptive name for the muscle, e.g. for plotting
    AnyFloat Pennationangle = DesignVar(0.0); ///< Pennation angle of the muscle fibers (degres)
    AnyFloatVar VolumeRatio = 0.33333; ///< factor to be multiplied to obtain the final volume
    AnyFolder TotalMuscleVolumeRegression = {
      AnyFloatVar b1 = 0.07930; ///< b1 (cm3/cm3)
      AnyFloatVar b2 = -4.70; ///< b2 (cm3)
    };
    AnyFolder BodyMassRegression = {
      AnyFloatVar b1 = 6.93000; ///< b1 (cm3/kg)
      AnyFloatVar b2 = 62.30; ///< b2 (cm3)
    };
    AnyFolder BodyHeightMassRegression = {
      AnyFloatVar b1 = 3.64000; ///< b1 (cm3/m*kg)
      AnyFloatVar b2 = 109.00; ///< b2 (cm3)
    };
    AnyFloatVar VolumeMuscleBelly = DesignVar((VOLUME_FORMULA)*VolumeRatio); ///< Volume of the muscle using Handsfield regression on total muscle volume (cm^3)
    AnyFloat OptimalFiberlength = DesignVar(10.43); ///< Optimal working length of the muscle fiber (cm)
    AnyFloat TotalTendonLength = DesignVar(0.00); ///< The total tendon length (cm)
    AnyFloat K1 = DesignVar(10.00); ///< K1 constant in the muscle model.  Factor for determining shortening speed at optimum length
    AnyFloat K2 = DesignVar(0.00); ///< K2 constant in the muscle model.  Factor for determining shortening speed at optimum length
    AnyFloat EpsilonBar = DesignVar(0.0530); ///< Epsilon bar in the muscle model. Represents tendon strain at F0
};

/// The fiber length of this muscle was changed (keeping the PCSA constant) since it was too long compared muscle length unscaled. In AMMR1.4 this change was only applied to two of the four elements.
AnyFolder AdductorMagnusProximal = {
    AnyString Muscle = "Add. magn. (prox.)"; ///< Descriptive name for the muscle, e.g. for plotting
    AnyFloat Pennationangle = DesignVar(0.0); ///< Pennation angle of the muscle fibers (degres)
    AnyFloatVar VolumeRatio = 0.33333; ///< factor to be multiplied to obtain the final volume
    AnyFolder TotalMuscleVolumeRegression = {
      AnyFloatVar b1 = 0.07930; ///< b1 (cm3/cm3)
      AnyFloatVar b2 = -4.70; ///< b2 (cm3)
    };
    AnyFolder BodyMassRegression = {
      AnyFloatVar b1 = 6.93000; ///< b1 (cm3/kg)
      AnyFloatVar b2 = 62.30; ///< b2 (cm3)
    };
    AnyFolder BodyHeightMassRegression = {
      AnyFloatVar b1 = 3.64000; ///< b1 (cm3/m*kg)
      AnyFloatVar b2 = 109.00; ///< b2 (cm3)
    };
    AnyFloatVar VolumeMuscleBelly = DesignVar((VOLUME_FORMULA)*VolumeRatio); ///< Volume of the muscle using Handsfield regression on total muscle volume (cm^3)
    AnyFloat OptimalFiberlength = DesignVar(8.70); ///< Optimal working length of the muscle fiber (cm)
    AnyFloat TotalTendonLength = DesignVar(0.00); ///< The total tendon length (cm)
    AnyFloat K1 = DesignVar(10.00); ///< K1 constant in the muscle model.  Factor for determining shortening speed at optimum length
    AnyFloat K2 = DesignVar(0.00); ///< K2 constant in the muscle model.  Factor for determining shortening speed at optimum length
    AnyFloat EpsilonBar = DesignVar(0.0530); ///< Epsilon bar in the muscle model. Represents tendon strain at F0
};

AnyFolder BicepsFemorisCaputLongum = {
    AnyString Muscle = "Bic. fem. CL"; ///< Descriptive name for the muscle, e.g. for plotting
    AnyFloat Pennationangle = DesignVar(29.9); ///< Pennation angle of the muscle fibers (degres)
    AnyFloatVar VolumeRatio = 1.00000; ///< factor to be multiplied to obtain the final volume
    AnyFolder TotalMuscleVolumeRegression = {
      AnyFloatVar b1 = 0.02560; ///< b1 (cm3/cm3)
      AnyFloatVar b2 = 24.30; ///< b2 (cm3)
    };
    AnyFolder BodyMassRegression = {
      AnyFloatVar b1 = 2.31000; ///< b1 (cm3/kg)
      AnyFloatVar b2 = 40.80; ///< b2 (cm3)
    };
    AnyFolder BodyHeightMassRegression = {
      AnyFloatVar b1 = 1.24000; ///< b1 (cm3/m*kg)
      AnyFloatVar b2 = 53.00; ///< b2 (cm3)
    };
    AnyFloatVar VolumeMuscleBelly = DesignVar((VOLUME_FORMULA)*VolumeRatio); ///< Volume of the muscle using Handsfield regression on total muscle volume (cm^3)
    AnyFloat OptimalFiberlength = DesignVar(8.54); ///< Optimal working length of the muscle fiber (cm)
    AnyFloat TotalTendonLength = DesignVar(13.00); ///< The total tendon length (cm)
    AnyFloat K1 = DesignVar(10.00); ///< K1 constant in the muscle model.  Factor for determining shortening speed at optimum length
    AnyFloat K2 = DesignVar(0.00); ///< K2 constant in the muscle model.  Factor for determining shortening speed at optimum length
    AnyFloat EpsilonBar = DesignVar(0.0530); ///< Epsilon bar in the muscle model. Represents tendon strain at F0
};

AnyFolder BicepsFemorisCaputBreve = {
    AnyString Muscle = "Bic. fem. CB"; ///< Descriptive name for the muscle, e.g. for plotting
    AnyFloat Pennationangle = DesignVar(0.0); ///< Pennation angle of the muscle fibers (degres)
    AnyFloatVar VolumeRatio = 1.00000; ///< factor to be multiplied to obtain the final volume
    AnyFolder TotalMuscleVolumeRegression = {
      AnyFloatVar b1 = 0.01600; ///< b1 (cm3/cm3)
      AnyFloatVar b2 = -13.80; ///< b2 (cm3)
    };
    AnyFolder BodyMassRegression = {
      AnyFloatVar b1 = 1.38000; ///< b1 (cm3/kg)
      AnyFloatVar b2 = 1.02; ///< b2 (cm3)
    };
    AnyFolder BodyHeightMassRegression = {
      AnyFloatVar b1 = 0.73800; ///< b1 (cm3/m*kg)
      AnyFloatVar b2 = 8.64; ///< b2 (cm3)
    };
    AnyFloatVar VolumeMuscleBelly = DesignVar((VOLUME_FORMULA)*VolumeRatio); ///< Volume of the muscle using Handsfield regression on total muscle volume (cm^3)
    AnyFloat OptimalFiberlength = DesignVar(9.14); ///< Optimal working length of the muscle fiber (cm)
    AnyFloat TotalTendonLength = DesignVar(3.10); ///< The total tendon length (cm)
    AnyFloat K1 = DesignVar(10.00); ///< K1 constant in the muscle model.  Factor for determining shortening speed at optimum length
    AnyFloat K2 = DesignVar(0.00); ///< K2 constant in the muscle model.  Factor for determining shortening speed at optimum length
    AnyFloat EpsilonBar = DesignVar(0.0530); ///< Epsilon bar in the muscle model. Represents tendon strain at F0
};

AnyFolder ExtensorDigitorumLongus = {
    AnyString Muscle = "Ext. dig. long."; ///< Descriptive name for the muscle, e.g. for plotting
    AnyFloat Pennationangle = DesignVar(8.3); ///< Pennation angle of the muscle fibers (degres)
    AnyFloatVar VolumeRatio = 0.47000; ///< factor to be multiplied to obtain the final volume
    AnyFolder TotalMuscleVolumeRegression = {
      AnyFloatVar b1 = 0.01320; ///< b1 (cm3/cm3)
      AnyFloatVar b2 = 8.70; ///< b2 (cm3)
    };
    AnyFolder BodyMassRegression = {
      AnyFloatVar b1 = 1.21000; ///< b1 (cm3/kg)
      AnyFloatVar b2 = 15.50; ///< b2 (cm3)
    };
    AnyFolder BodyHeightMassRegression = {
      AnyFloatVar b1 = 0.61900; ///< b1 (cm3/m*kg)
      AnyFloatVar b2 = 25.60; ///< b2 (cm3)
    };
    AnyFloatVar VolumeMuscleBelly = DesignVar((VOLUME_FORMULA)*VolumeRatio); ///< Volume of the muscle using Handsfield regression on total muscle volume (cm^3)
    AnyFloat OptimalFiberlength = DesignVar(5.99); ///< Optimal working length of the muscle fiber (cm)
    AnyFloat TotalTendonLength = DesignVar(30.10); ///< The total tendon length (cm)
    AnyFloat K1 = DesignVar(10.00); ///< K1 constant in the muscle model.  Factor for determining shortening speed at optimum length
    AnyFloat K2 = DesignVar(0.00); ///< K2 constant in the muscle model.  Factor for determining shortening speed at optimum length
    AnyFloat EpsilonBar = DesignVar(0.0530); ///< Epsilon bar in the muscle model. Represents tendon strain at F0
};

AnyFolder ExtensorHallucisLongus = {
    AnyString Muscle = "Ext. hal. long."; ///< Descriptive name for the muscle, e.g. for plotting
    AnyFloat Pennationangle = DesignVar(14.4); ///< Pennation angle of the muscle fibers (degres)
    AnyFloatVar VolumeRatio = 0.53000; ///< factor to be multiplied to obtain the final volume
    AnyFolder TotalMuscleVolumeRegression = {
      AnyFloatVar b1 = 0.01320; ///< b1 (cm3/cm3)
      AnyFloatVar b2 = 8.70; ///< b2 (cm3)
    };
    AnyFolder BodyMassRegression = {
      AnyFloatVar b1 = 1.21000; ///< b1 (cm3/kg)
      AnyFloatVar b2 = 15.50; ///< b2 (cm3)
    };
    AnyFolder BodyHeightMassRegression = {
      AnyFloatVar b1 = 0.61900; ///< b1 (cm3/m*kg)
      AnyFloatVar b2 = 25.60; ///< b2 (cm3)
    };
    AnyFloatVar VolumeMuscleBelly = DesignVar((VOLUME_FORMULA)*VolumeRatio); ///< Volume of the muscle using Handsfield regression on total muscle volume (cm^3)
    AnyFloat OptimalFiberlength = DesignVar(5.98); ///< Optimal working length of the muscle fiber (cm)
    AnyFloat TotalTendonLength = DesignVar(17.80); ///< The total tendon length (cm)
    AnyFloat K1 = DesignVar(10.00); ///< K1 constant in the muscle model.  Factor for determining shortening speed at optimum length
    AnyFloat K2 = DesignVar(0.00); ///< K2 constant in the muscle model.  Factor for determining shortening speed at optimum length
    AnyFloat EpsilonBar = DesignVar(0.0530); ///< Epsilon bar in the muscle model. Represents tendon strain at F0
};

AnyFolder FlexorDigitorumLongus = {
    AnyString Muscle = "Flex. dig. long."; ///< Descriptive name for the muscle, e.g. for plotting
    AnyFloat Pennationangle = DesignVar(28.4); ///< Pennation angle of the muscle fibers (degres)
    AnyFloatVar VolumeRatio = 1.00000; ///< factor to be multiplied to obtain the final volume
    AnyFolder TotalMuscleVolumeRegression = {
      AnyFloatVar b1 = 0.00259; ///< b1 (cm3/cm3)
      AnyFloatVar b2 = 11.60; ///< b2 (cm3)
    };
    AnyFolder BodyMassRegression = {
      AnyFloatVar b1 = 0.24500; ///< b1 (cm3/kg)
      AnyFloatVar b2 = 12.40; ///< b2 (cm3)
    };
    AnyFolder BodyHeightMassRegression = {
      AnyFloatVar b1 = 0.13000; ///< b1 (cm3/m*kg)
      AnyFloatVar b2 = 13.90; ///< b2 (cm3)
    };
    AnyFloatVar VolumeMuscleBelly = DesignVar((VOLUME_FORMULA)*VolumeRatio); ///< Volume of the muscle using Handsfield regression on total muscle volume (cm^3)
    AnyFloat OptimalFiberlength = DesignVar(3.84); ///< Optimal working length of the muscle fiber (cm)
    AnyFloat TotalTendonLength = DesignVar(16.60); ///< The total tendon length (cm)
    AnyFloat K1 = DesignVar(10.00); ///< K1 constant in the muscle model.  Factor for determining shortening speed at optimum length
    AnyFloat K2 = DesignVar(0.00); ///< K2 constant in the muscle model.  Factor for determining shortening speed at optimum length
    AnyFloat EpsilonBar = DesignVar(0.0530); ///< Epsilon bar in the muscle model. Represents tendon strain at F0
};

///  The fiber length value have been corrected compared to the original data set. (Optimum fiber length Ward et al 2009
AnyFolder FlexorHallucisLongus = {
    AnyString Muscle = "Flex. hal. long."; ///< Descriptive name for the muscle, e.g. for plotting
    AnyFloat Pennationangle = DesignVar(30.1); ///< Pennation angle of the muscle fibers (degres)
    AnyFloatVar VolumeRatio = 1.00000; ///< factor to be multiplied to obtain the final volume
    AnyFolder TotalMuscleVolumeRegression = {
      AnyFloatVar b1 = 0.01370; ///< b1 (cm3/cm3)
      AnyFloatVar b2 = -18.90; ///< b2 (cm3)
    };
    AnyFolder BodyMassRegression = {
      AnyFloatVar b1 = 1.14000; ///< b1 (cm3/kg)
      AnyFloatVar b2 = -2.95; ///< b2 (cm3)
    };
    AnyFolder BodyHeightMassRegression = {
      AnyFloatVar b1 = 0.62200; ///< b1 (cm3/m*kg)
      AnyFloatVar b2 = 1.85; ///< b2 (cm3)
    };
    AnyFloatVar VolumeMuscleBelly = DesignVar((VOLUME_FORMULA)*VolumeRatio); ///< Volume of the muscle using Handsfield regression on total muscle volume (cm^3)
    AnyFloat OptimalFiberlength = DesignVar(5.20); ///< Optimal working length of the muscle fiber (cm)
    AnyFloat TotalTendonLength = DesignVar(23.40); ///< The total tendon length (cm)
    AnyFloat K1 = DesignVar(10.00); ///< K1 constant in the muscle model.  Factor for determining shortening speed at optimum length
    AnyFloat K2 = DesignVar(0.00); ///< K2 constant in the muscle model.  Factor for determining shortening speed at optimum length
    AnyFloat EpsilonBar = DesignVar(0.0530); ///< Epsilon bar in the muscle model. Represents tendon strain at F0
};

AnyFolder GastrocnemiusLateralis = {
    AnyString Muscle = "Gastrocn. (lat.)"; ///< Descriptive name for the muscle, e.g. for plotting
    AnyFloat Pennationangle = DesignVar(25.4); ///< Pennation angle of the muscle fibers (degres)
    AnyFloatVar VolumeRatio = 1.00000; ///< factor to be multiplied to obtain the final volume
    AnyFolder TotalMuscleVolumeRegression = {
      AnyFloatVar b1 = 0.01990; ///< b1 (cm3/cm3)
      AnyFloatVar b2 = 8.21; ///< b2 (cm3)
    };
    AnyFolder BodyMassRegression = {
      AnyFloatVar b1 = 2.19000; ///< b1 (cm3/kg)
      AnyFloatVar b2 = -7.59; ///< b2 (cm3)
    };
    AnyFolder BodyHeightMassRegression = {
      AnyFloatVar b1 = 1.08000; ///< b1 (cm3/m*kg)
      AnyFloatVar b2 = 15.70; ///< b2 (cm3)
    };
    AnyFloatVar VolumeMuscleBelly = DesignVar((VOLUME_FORMULA)*VolumeRatio); ///< Volume of the muscle using Handsfield regression on total muscle volume (cm^3)
    AnyFloat OptimalFiberlength = DesignVar(5.69); ///< Optimal working length of the muscle fiber (cm)
    AnyFloat TotalTendonLength = DesignVar(23.40); ///< The total tendon length (cm)
    AnyFloat K1 = DesignVar(10.00); ///< K1 constant in the muscle model.  Factor for determining shortening speed at optimum length
    AnyFloat K2 = DesignVar(0.00); ///< K2 constant in the muscle model.  Factor for determining shortening speed at optimum length
    AnyFloat EpsilonBar = DesignVar(0.0530); ///< Epsilon bar in the muscle model. Represents tendon strain at F0
};

AnyFolder GastrocnemiusMedialis = {
    AnyString Muscle = "Gastrocn. (med.)"; ///< Descriptive name for the muscle, e.g. for plotting
    AnyFloat Pennationangle = DesignVar(10.8); ///< Pennation angle of the muscle fibers (degres)
    AnyFloatVar VolumeRatio = 1.00000; ///< factor to be multiplied to obtain the final volume
    AnyFolder TotalMuscleVolumeRegression = {
      AnyFloatVar b1 = 0.03480; ///< b1 (cm3/cm3)
      AnyFloatVar b2 = 9.42; ///< b2 (cm3)
    };
    AnyFolder BodyMassRegression = {
      AnyFloatVar b1 = 3.41000; ///< b1 (cm3/kg)
      AnyFloatVar b2 = 12.60; ///< b2 (cm3)
    };
    AnyFolder BodyHeightMassRegression = {
      AnyFloatVar b1 = 1.71000; ///< b1 (cm3/m*kg)
      AnyFloatVar b2 = 46.20; ///< b2 (cm3)
    };
    AnyFloatVar VolumeMuscleBelly = DesignVar((VOLUME_FORMULA)*VolumeRatio); ///< Volume of the muscle using Handsfield regression on total muscle volume (cm^3)
    AnyFloat OptimalFiberlength = DesignVar(6.01); ///< Optimal working length of the muscle fiber (cm)
    AnyFloat TotalTendonLength = DesignVar(21.20); ///< The total tendon length (cm)
    AnyFloat K1 = DesignVar(10.00); ///< K1 constant in the muscle model.  Factor for determining shortening speed at optimum length
    AnyFloat K2 = DesignVar(0.00); ///< K2 constant in the muscle model.  Factor for determining shortening speed at optimum length
    AnyFloat EpsilonBar = DesignVar(0.0530); ///< Epsilon bar in the muscle model. Represents tendon strain at F0
};

AnyFolder GemellusInferior = {
    AnyString Muscle = "Gemellus (inf.)"; ///< Descriptive name for the muscle, e.g. for plotting
    AnyFloat Pennationangle = DesignVar(0.0); ///< Pennation angle of the muscle fibers (degres)
    AnyFloatVar VolumeRatio = 0.50000; ///< factor to be multiplied to obtain the final volume
    AnyFolder TotalMuscleVolumeRegression = {
      AnyFloatVar b1 = 0.00172; ///< b1 (cm3/cm3)
      AnyFloatVar b2 = 3.85; ///< b2 (cm3)
    };
    AnyFolder BodyMassRegression = {
      AnyFloatVar b1 = 0.13900; ///< b1 (cm3/kg)
      AnyFloatVar b2 = 6.11; ///< b2 (cm3)
    };
    AnyFolder BodyHeightMassRegression = {
      AnyFloatVar b1 = 0.06880; ///< b1 (cm3/m*kg)
      AnyFloatVar b2 = 7.56; ///< b2 (cm3)
    };
    AnyFloatVar VolumeMuscleBelly = DesignVar((VOLUME_FORMULA)*VolumeRatio); ///< Volume of the muscle using Handsfield regression on total muscle volume (cm^3)
    AnyFloat OptimalFiberlength = DesignVar(3.43); ///< Optimal working length of the muscle fiber (cm)
    AnyFloat TotalTendonLength = DesignVar(0.00); ///< The total tendon length (cm)
    AnyFloat K1 = DesignVar(10.00); ///< K1 constant in the muscle model.  Factor for determining shortening speed at optimum length
    AnyFloat K2 = DesignVar(0.00); ///< K2 constant in the muscle model.  Factor for determining shortening speed at optimum length
    AnyFloat EpsilonBar = DesignVar(0.0530); ///< Epsilon bar in the muscle model. Represents tendon strain at F0
};

AnyFolder GemellusSuperior = {
    AnyString Muscle = "Gemellus (sup.)"; ///< Descriptive name for the muscle, e.g. for plotting
    AnyFloat Pennationangle = DesignVar(0.0); ///< Pennation angle of the muscle fibers (degres)
    AnyFloatVar VolumeRatio = 0.50000; ///< factor to be multiplied to obtain the final volume
    AnyFolder TotalMuscleVolumeRegression = {
      AnyFloatVar b1 = 0.00172; ///< b1 (cm3/cm3)
      AnyFloatVar b2 = 3.85; ///< b2 (cm3)
    };
    AnyFolder BodyMassRegression = {
      AnyFloatVar b1 = 0.13900; ///< b1 (cm3/kg)
      AnyFloatVar b2 = 6.11; ///< b2 (cm3)
    };
    AnyFolder BodyHeightMassRegression = {
      AnyFloatVar b1 = 0.06880; ///< b1 (cm3/m*kg)
      AnyFloatVar b2 = 7.56; ///< b2 (cm3)
    };
    AnyFloatVar VolumeMuscleBelly = DesignVar((VOLUME_FORMULA)*VolumeRatio); ///< Volume of the muscle using Handsfield regression on total muscle volume (cm^3)
    AnyFloat OptimalFiberlength = DesignVar(3.43); ///< Optimal working length of the muscle fiber (cm)
    AnyFloat TotalTendonLength = DesignVar(0.00); ///< The total tendon length (cm)
    AnyFloat K1 = DesignVar(10.00); ///< K1 constant in the muscle model.  Factor for determining shortening speed at optimum length
    AnyFloat K2 = DesignVar(0.00); ///< K2 constant in the muscle model.  Factor for determining shortening speed at optimum length
    AnyFloat EpsilonBar = DesignVar(0.0530); ///< Epsilon bar in the muscle model. Represents tendon strain at F0
};

/// The volume ratio between Glut.Max. inferior/superior been corrected based on the MRI scan of the cadaver 3 from TLEMsafe project
AnyFolder GluteusMaximusSuperior = {
    AnyString Muscle = "Glut. max. (sup.)"; ///< Descriptive name for the muscle, e.g. for plotting
    AnyFloat Pennationangle = DesignVar(0.0); ///< Pennation angle of the muscle fibers (degres)
    AnyFloatVar VolumeRatio = 0.27603; ///< factor to be multiplied to obtain the final volume
    AnyFolder TotalMuscleVolumeRegression = {
      AnyFloatVar b1 = 0.12300; ///< b1 (cm3/cm3)
      AnyFloatVar b2 = -25.40; ///< b2 (cm3)
    };
    AnyFolder BodyMassRegression = {
      AnyFloatVar b1 = 11.90000; ///< b1 (cm3/kg)
      AnyFloatVar b2 = -3.91; ///< b2 (cm3)
    };
    AnyFolder BodyHeightMassRegression = {
      AnyFloatVar b1 = 6.01000; ///< b1 (cm3/m*kg)
      AnyFloatVar b2 = 105.00; ///< b2 (cm3)
    };
    AnyFloatVar VolumeMuscleBelly = DesignVar((VOLUME_FORMULA)*VolumeRatio); ///< Volume of the muscle using Handsfield regression on total muscle volume (cm^3)
    AnyFloat OptimalFiberlength = DesignVar(12.00); ///< Optimal working length of the muscle fiber (cm)
    AnyFloat TotalTendonLength = DesignVar(0.00); ///< The total tendon length (cm)
    AnyFloat K1 = DesignVar(10.00); ///< K1 constant in the muscle model.  Factor for determining shortening speed at optimum length
    AnyFloat K2 = DesignVar(0.00); ///< K2 constant in the muscle model.  Factor for determining shortening speed at optimum length
    AnyFloat EpsilonBar = DesignVar(0.0530); ///< Epsilon bar in the muscle model. Represents tendon strain at F0
};

/// The volume ratio between Glut.Max. inferior/superior been corrected based on the MRI scan of the cadaver 3 from TLEMsafe project
AnyFolder GluteusMaximusInferior = {
    AnyString Muscle = "Glut. max. (inf.)"; ///< Descriptive name for the muscle, e.g. for plotting
    AnyFloat Pennationangle = DesignVar(0.0); ///< Pennation angle of the muscle fibers (degres)
    AnyFloatVar VolumeRatio = 0.72397; ///< factor to be multiplied to obtain the final volume
    AnyFolder TotalMuscleVolumeRegression = {
      AnyFloatVar b1 = 0.12300; ///< b1 (cm3/cm3)
      AnyFloatVar b2 = -25.40; ///< b2 (cm3)
    };
    AnyFolder BodyMassRegression = {
      AnyFloatVar b1 = 11.90000; ///< b1 (cm3/kg)
      AnyFloatVar b2 = -3.91; ///< b2 (cm3)
    };
    AnyFolder BodyHeightMassRegression = {
      AnyFloatVar b1 = 6.01000; ///< b1 (cm3/m*kg)
      AnyFloatVar b2 = 105.00; ///< b2 (cm3)
    };
    AnyFloatVar VolumeMuscleBelly = DesignVar((VOLUME_FORMULA)*VolumeRatio); ///< Volume of the muscle using Handsfield regression on total muscle volume (cm^3)
    AnyFloat OptimalFiberlength = DesignVar(15.14); ///< Optimal working length of the muscle fiber (cm)
    AnyFloat TotalTendonLength = DesignVar(0.00); ///< The total tendon length (cm)
    AnyFloat K1 = DesignVar(10.00); ///< K1 constant in the muscle model.  Factor for determining shortening speed at optimum length
    AnyFloat K2 = DesignVar(0.00); ///< K2 constant in the muscle model.  Factor for determining shortening speed at optimum length
    AnyFloat EpsilonBar = DesignVar(0.0530); ///< Epsilon bar in the muscle model. Represents tendon strain at F0
};

AnyFolder GluteusMediusAnterior = {
    AnyString Muscle = "Glut. med. (ant.)"; ///< Descriptive name for the muscle, e.g. for plotting
    AnyFloat Pennationangle = DesignVar(0.0); ///< Pennation angle of the muscle fibers (degres)
    AnyFloatVar VolumeRatio = 0.34698; ///< factor to be multiplied to obtain the final volume
    AnyFolder TotalMuscleVolumeRegression = {
      AnyFloatVar b1 = 0.04780; ///< b1 (cm3/cm3)
      AnyFloatVar b2 = -16.90; ///< b2 (cm3)
    };
    AnyFolder BodyMassRegression = {
      AnyFloatVar b1 = 4.14000; ///< b1 (cm3/kg)
      AnyFloatVar b2 = 26.30; ///< b2 (cm3)
    };
    AnyFolder BodyHeightMassRegression = {
      AnyFloatVar b1 = 2.17000; ///< b1 (cm3/m*kg)
      AnyFloatVar b2 = 54.80; ///< b2 (cm3)
    };
    AnyFloatVar VolumeMuscleBelly = DesignVar((VOLUME_FORMULA)*VolumeRatio); ///< Volume of the muscle using Handsfield regression on total muscle volume (cm^3)
    AnyFloat OptimalFiberlength = DesignVar(3.81); ///< Optimal working length of the muscle fiber (cm)
    AnyFloat TotalTendonLength = DesignVar(0.00); ///< The total tendon length (cm)
    AnyFloat K1 = DesignVar(10.00); ///< K1 constant in the muscle model.  Factor for determining shortening speed at optimum length
    AnyFloat K2 = DesignVar(0.00); ///< K2 constant in the muscle model.  Factor for determining shortening speed at optimum length
    AnyFloat EpsilonBar = DesignVar(0.0530); ///< Epsilon bar in the muscle model. Represents tendon strain at F0
};

AnyFolder GluteusMediusPosterior = {
    AnyString Muscle = "Glut. med. (post.)"; ///< Descriptive name for the muscle, e.g. for plotting
    AnyFloat Pennationangle = DesignVar(15.9); ///< Pennation angle of the muscle fibers (degres)
    AnyFloatVar VolumeRatio = 0.65302; ///< factor to be multiplied to obtain the final volume
    AnyFolder TotalMuscleVolumeRegression = {
      AnyFloatVar b1 = 0.04780; ///< b1 (cm3/cm3)
      AnyFloatVar b2 = -16.90; ///< b2 (cm3)
    };
    AnyFolder BodyMassRegression = {
      AnyFloatVar b1 = 4.14000; ///< b1 (cm3/kg)
      AnyFloatVar b2 = 26.30; ///< b2 (cm3)
    };
    AnyFolder BodyHeightMassRegression = {
      AnyFloatVar b1 = 2.17000; ///< b1 (cm3/m*kg)
      AnyFloatVar b2 = 54.80; ///< b2 (cm3)
    };
    AnyFloatVar VolumeMuscleBelly = DesignVar((VOLUME_FORMULA)*VolumeRatio); ///< Volume of the muscle using Handsfield regression on total muscle volume (cm^3)
    AnyFloat OptimalFiberlength = DesignVar(4.47); ///< Optimal working length of the muscle fiber (cm)
    AnyFloat TotalTendonLength = DesignVar(3.00); ///< The total tendon length (cm)
    AnyFloat K1 = DesignVar(10.00); ///< K1 constant in the muscle model.  Factor for determining shortening speed at optimum length
    AnyFloat K2 = DesignVar(0.00); ///< K2 constant in the muscle model.  Factor for determining shortening speed at optimum length
    AnyFloat EpsilonBar = DesignVar(0.0530); ///< Epsilon bar in the muscle model. Represents tendon strain at F0
};

AnyFolder GluteusMinimusAnterior = {
    AnyString Muscle = "Glut. min. (ant.)"; ///< Descriptive name for the muscle, e.g. for plotting
    AnyFloat Pennationangle = DesignVar(0.0); ///< Pennation angle of the muscle fibers (degres)
    AnyFloatVar VolumeRatio = 0.33333; ///< factor to be multiplied to obtain the final volume
    AnyFolder TotalMuscleVolumeRegression = {
      AnyFloatVar b1 = 0.01290; ///< b1 (cm3/cm3)
      AnyFloatVar b2 = 12.60; ///< b2 (cm3)
    };
    AnyFolder BodyMassRegression = {
      AnyFloatVar b1 = 1.08000; ///< b1 (cm3/kg)
      AnyFloatVar b2 = 27.00; ///< b2 (cm3)
    };
    AnyFolder BodyHeightMassRegression = {
      AnyFloatVar b1 = 0.57600; ///< b1 (cm3/m*kg)
      AnyFloatVar b2 = 33.10; ///< b2 (cm3)
    };
    AnyFloatVar VolumeMuscleBelly = DesignVar((VOLUME_FORMULA)*VolumeRatio); ///< Volume of the muscle using Handsfield regression on total muscle volume (cm^3)
    AnyFloat OptimalFiberlength = DesignVar(2.76); ///< Optimal working length of the muscle fiber (cm)
    AnyFloat TotalTendonLength = DesignVar(7.28); ///< The total tendon length (cm)
    AnyFloat K1 = DesignVar(10.00); ///< K1 constant in the muscle model.  Factor for determining shortening speed at optimum length
    AnyFloat K2 = DesignVar(0.00); ///< K2 constant in the muscle model.  Factor for determining shortening speed at optimum length
    AnyFloat EpsilonBar = DesignVar(0.0530); ///< Epsilon bar in the muscle model. Represents tendon strain at F0
};

AnyFolder GluteusMinimusMid = {
    AnyString Muscle = "Glut. min. (mid.)"; ///< Descriptive name for the muscle, e.g. for plotting
    AnyFloat Pennationangle = DesignVar(0.0); ///< Pennation angle of the muscle fibers (degres)
    AnyFloatVar VolumeRatio = 0.33333; ///< factor to be multiplied to obtain the final volume
    AnyFolder TotalMuscleVolumeRegression = {
      AnyFloatVar b1 = 0.01290; ///< b1 (cm3/cm3)
      AnyFloatVar b2 = 12.60; ///< b2 (cm3)
    };
    AnyFolder BodyMassRegression = {
      AnyFloatVar b1 = 1.08000; ///< b1 (cm3/kg)
      AnyFloatVar b2 = 27.00; ///< b2 (cm3)
    };
    AnyFolder BodyHeightMassRegression = {
      AnyFloatVar b1 = 0.57600; ///< b1 (cm3/m*kg)
      AnyFloatVar b2 = 33.10; ///< b2 (cm3)
    };
    AnyFloatVar VolumeMuscleBelly = DesignVar((VOLUME_FORMULA)*VolumeRatio); ///< Volume of the muscle using Handsfield regression on total muscle volume (cm^3)
    AnyFloat OptimalFiberlength = DesignVar(3.38); ///< Optimal working length of the muscle fiber (cm)
    AnyFloat TotalTendonLength = DesignVar(7.28); ///< The total tendon length (cm)
    AnyFloat K1 = DesignVar(10.00); ///< K1 constant in the muscle model.  Factor for determining shortening speed at optimum length
    AnyFloat K2 = DesignVar(0.00); ///< K2 constant in the muscle model.  Factor for determining shortening speed at optimum length
    AnyFloat EpsilonBar = DesignVar(0.0530); ///< Epsilon bar in the muscle model. Represents tendon strain at F0
};

AnyFolder GluteusMinimusPosterior = {
    AnyString Muscle = "Glut. min. (post.)"; ///< Descriptive name for the muscle, e.g. for plotting
    AnyFloat Pennationangle = DesignVar(0.0); ///< Pennation angle of the muscle fibers (degres)
    AnyFloatVar VolumeRatio = 0.33333; ///< factor to be multiplied to obtain the final volume
    AnyFolder TotalMuscleVolumeRegression = {
      AnyFloatVar b1 = 0.01290; ///< b1 (cm3/cm3)
      AnyFloatVar b2 = 12.60; ///< b2 (cm3)
    };
    AnyFolder BodyMassRegression = {
      AnyFloatVar b1 = 1.08000; ///< b1 (cm3/kg)
      AnyFloatVar b2 = 27.00; ///< b2 (cm3)
    };
    AnyFolder BodyHeightMassRegression = {
      AnyFloatVar b1 = 0.57600; ///< b1 (cm3/m*kg)
      AnyFloatVar b2 = 33.10; ///< b2 (cm3)
    };
    AnyFloatVar VolumeMuscleBelly = DesignVar((VOLUME_FORMULA)*VolumeRatio); ///< Volume of the muscle using Handsfield regression on total muscle volume (cm^3)
    AnyFloat OptimalFiberlength = DesignVar(3.70); ///< Optimal working length of the muscle fiber (cm)
    AnyFloat TotalTendonLength = DesignVar(7.28); ///< The total tendon length (cm)
    AnyFloat K1 = DesignVar(10.00); ///< K1 constant in the muscle model.  Factor for determining shortening speed at optimum length
    AnyFloat K2 = DesignVar(0.00); ///< K2 constant in the muscle model.  Factor for determining shortening speed at optimum length
    AnyFloat EpsilonBar = DesignVar(0.0530); ///< Epsilon bar in the muscle model. Represents tendon strain at F0
};

AnyFolder Gracilis = {
    AnyString Muscle = "Gracilis"; ///< Descriptive name for the muscle, e.g. for plotting
    AnyFloat Pennationangle = DesignVar(0.0); ///< Pennation angle of the muscle fibers (degres)
    AnyFloatVar VolumeRatio = 1.00000; ///< factor to be multiplied to obtain the final volume
    AnyFolder TotalMuscleVolumeRegression = {
      AnyFloatVar b1 = 0.01380; ///< b1 (cm3/cm3)
      AnyFloatVar b2 = 6.07; ///< b2 (cm3)
    };
    AnyFolder BodyMassRegression = {
      AnyFloatVar b1 = 1.08000; ///< b1 (cm3/kg)
      AnyFloatVar b2 = 26.50; ///< b2 (cm3)
    };
    AnyFolder BodyHeightMassRegression = {
      AnyFloatVar b1 = 0.58000; ///< b1 (cm3/m*kg)
      AnyFloatVar b2 = 32.10; ///< b2 (cm3)
    };
    AnyFloatVar VolumeMuscleBelly = DesignVar((VOLUME_FORMULA)*VolumeRatio); ///< Volume of the muscle using Handsfield regression on total muscle volume (cm^3)
    AnyFloat OptimalFiberlength = DesignVar(18.11); ///< Optimal working length of the muscle fiber (cm)
    AnyFloat TotalTendonLength = DesignVar(14.00); ///< The total tendon length (cm)
    AnyFloat K1 = DesignVar(10.00); ///< K1 constant in the muscle model.  Factor for determining shortening speed at optimum length
    AnyFloat K2 = DesignVar(0.00); ///< K2 constant in the muscle model.  Factor for determining shortening speed at optimum length
    AnyFloat EpsilonBar = DesignVar(0.0530); ///< Epsilon bar in the muscle model. Represents tendon strain at F0
};

AnyFolder IliacusLateralis = {
    AnyString Muscle = "Iliacus (lat.) "; ///< Descriptive name for the muscle, e.g. for plotting
    AnyFloat Pennationangle = DesignVar(26.5); ///< Pennation angle of the muscle fibers (degres)
    AnyFloatVar VolumeRatio = 0.33333; ///< factor to be multiplied to obtain the final volume
    AnyFolder TotalMuscleVolumeRegression = {
      AnyFloatVar b1 = 0.02480; ///< b1 (cm3/cm3)
      AnyFloatVar b2 = 0.38; ///< b2 (cm3)
    };
    AnyFolder BodyMassRegression = {
      AnyFloatVar b1 = 2.08000; ///< b1 (cm3/kg)
      AnyFloatVar b2 = 27.60; ///< b2 (cm3)
    };
    AnyFolder BodyHeightMassRegression = {
      AnyFloatVar b1 = 1.11000; ///< b1 (cm3/m*kg)
      AnyFloatVar b2 = 39.40; ///< b2 (cm3)
    };
    AnyFloatVar VolumeMuscleBelly = DesignVar((VOLUME_FORMULA)*VolumeRatio); ///< Volume of the muscle using Handsfield regression on total muscle volume (cm^3)
    AnyFloat OptimalFiberlength = DesignVar(10.31); ///< Optimal working length of the muscle fiber (cm)
    AnyFloat TotalTendonLength = DesignVar(11.30); ///< The total tendon length (cm)
    AnyFloat K1 = DesignVar(10.00); ///< K1 constant in the muscle model.  Factor for determining shortening speed at optimum length
    AnyFloat K2 = DesignVar(0.00); ///< K2 constant in the muscle model.  Factor for determining shortening speed at optimum length
    AnyFloat EpsilonBar = DesignVar(0.0530); ///< Epsilon bar in the muscle model. Represents tendon strain at F0
};

AnyFolder IliacusMid = {
    AnyString Muscle = "Iliacus (mid.)"; ///< Descriptive name for the muscle, e.g. for plotting
    AnyFloat Pennationangle = DesignVar(0.0); ///< Pennation angle of the muscle fibers (degres)
    AnyFloatVar VolumeRatio = 0.33333; ///< factor to be multiplied to obtain the final volume
    AnyFolder TotalMuscleVolumeRegression = {
      AnyFloatVar b1 = 0.02480; ///< b1 (cm3/cm3)
      AnyFloatVar b2 = 0.38; ///< b2 (cm3)
    };
    AnyFolder BodyMassRegression = {
      AnyFloatVar b1 = 2.08000; ///< b1 (cm3/kg)
      AnyFloatVar b2 = 27.60; ///< b2 (cm3)
    };
    AnyFolder BodyHeightMassRegression = {
      AnyFloatVar b1 = 1.11000; ///< b1 (cm3/m*kg)
      AnyFloatVar b2 = 39.40; ///< b2 (cm3)
    };
    AnyFloatVar VolumeMuscleBelly = DesignVar((VOLUME_FORMULA)*VolumeRatio); ///< Volume of the muscle using Handsfield regression on total muscle volume (cm^3)
    AnyFloat OptimalFiberlength = DesignVar(5.23); ///< Optimal working length of the muscle fiber (cm)
    AnyFloat TotalTendonLength = DesignVar(11.30); ///< The total tendon length (cm)
    AnyFloat K1 = DesignVar(10.00); ///< K1 constant in the muscle model.  Factor for determining shortening speed at optimum length
    AnyFloat K2 = DesignVar(0.00); ///< K2 constant in the muscle model.  Factor for determining shortening speed at optimum length
    AnyFloat EpsilonBar = DesignVar(0.0530); ///< Epsilon bar in the muscle model. Represents tendon strain at F0
};

AnyFolder IliacusMedialis = {
    AnyString Muscle = "Iliacus (med.)"; ///< Descriptive name for the muscle, e.g. for plotting
    AnyFloat Pennationangle = DesignVar(0.0); ///< Pennation angle of the muscle fibers (degres)
    AnyFloatVar VolumeRatio = 0.33333; ///< factor to be multiplied to obtain the final volume
    AnyFolder TotalMuscleVolumeRegression = {
      AnyFloatVar b1 = 0.02480; ///< b1 (cm3/cm3)
      AnyFloatVar b2 = 0.38; ///< b2 (cm3)
    };
    AnyFolder BodyMassRegression = {
      AnyFloatVar b1 = 2.08000; ///< b1 (cm3/kg)
      AnyFloatVar b2 = 27.60; ///< b2 (cm3)
    };
    AnyFolder BodyHeightMassRegression = {
      AnyFloatVar b1 = 1.11000; ///< b1 (cm3/m*kg)
      AnyFloatVar b2 = 39.40; ///< b2 (cm3)
    };
    AnyFloatVar VolumeMuscleBelly = DesignVar((VOLUME_FORMULA)*VolumeRatio); ///< Volume of the muscle using Handsfield regression on total muscle volume (cm^3)
    AnyFloat OptimalFiberlength = DesignVar(8.93); ///< Optimal working length of the muscle fiber (cm)
    AnyFloat TotalTendonLength = DesignVar(15.50); ///< The total tendon length (cm)
    AnyFloat K1 = DesignVar(10.00); ///< K1 constant in the muscle model.  Factor for determining shortening speed at optimum length
    AnyFloat K2 = DesignVar(0.00); ///< K2 constant in the muscle model.  Factor for determining shortening speed at optimum length
    AnyFloat EpsilonBar = DesignVar(0.0530); ///< Epsilon bar in the muscle model. Represents tendon strain at F0
};

AnyFolder ObturatorExternusInferior = {
    AnyString Muscle = "Obt. ext. (inf.)"; ///< Descriptive name for the muscle, e.g. for plotting
    AnyFloat Pennationangle = DesignVar(0.0); ///< Pennation angle of the muscle fibers (degres)
    AnyFloatVar VolumeRatio = 0.35716; ///< factor to be multiplied to obtain the final volume
    AnyFolder TotalMuscleVolumeRegression = {
      AnyFloatVar b1 = 0.00349; ///< b1 (cm3/cm3)
      AnyFloatVar b2 = 28.30; ///< b2 (cm3)
    };
    AnyFolder BodyMassRegression = {
      AnyFloatVar b1 = 0.27900; ///< b1 (cm3/kg)
      AnyFloatVar b2 = 33.10; ///< b2 (cm3)
    };
    AnyFolder BodyHeightMassRegression = {
      AnyFloatVar b1 = 0.14600; ///< b1 (cm3/m*kg)
      AnyFloatVar b2 = 35.10; ///< b2 (cm3)
    };
    AnyFloatVar VolumeMuscleBelly = DesignVar((VOLUME_FORMULA)*VolumeRatio); ///< Volume of the muscle using Handsfield regression on total muscle volume (cm^3)
    AnyFloat OptimalFiberlength = DesignVar(6.88); ///< Optimal working length of the muscle fiber (cm)
    AnyFloat TotalTendonLength = DesignVar(3.50); ///< The total tendon length (cm)
    AnyFloat K1 = DesignVar(10.00); ///< K1 constant in the muscle model.  Factor for determining shortening speed at optimum length
    AnyFloat K2 = DesignVar(0.00); ///< K2 constant in the muscle model.  Factor for determining shortening speed at optimum length
    AnyFloat EpsilonBar = DesignVar(0.0530); ///< Epsilon bar in the muscle model. Represents tendon strain at F0
};

AnyFolder ObturatorExternusSuperior = {
    AnyString Muscle = "Obt. ext. (sup.)"; ///< Descriptive name for the muscle, e.g. for plotting
    AnyFloat Pennationangle = DesignVar(0.0); ///< Pennation angle of the muscle fibers (degres)
    AnyFloatVar VolumeRatio = 0.64284; ///< factor to be multiplied to obtain the final volume
    AnyFolder TotalMuscleVolumeRegression = {
      AnyFloatVar b1 = 0.00349; ///< b1 (cm3/cm3)
      AnyFloatVar b2 = 28.30; ///< b2 (cm3)
    };
    AnyFolder BodyMassRegression = {
      AnyFloatVar b1 = 0.27900; ///< b1 (cm3/kg)
      AnyFloatVar b2 = 33.10; ///< b2 (cm3)
    };
    AnyFolder BodyHeightMassRegression = {
      AnyFloatVar b1 = 0.14600; ///< b1 (cm3/m*kg)
      AnyFloatVar b2 = 35.10; ///< b2 (cm3)
    };
    AnyFloatVar VolumeMuscleBelly = DesignVar((VOLUME_FORMULA)*VolumeRatio); ///< Volume of the muscle using Handsfield regression on total muscle volume (cm^3)
    AnyFloat OptimalFiberlength = DesignVar(2.77); ///< Optimal working length of the muscle fiber (cm)
    AnyFloat TotalTendonLength = DesignVar(3.00); ///< The total tendon length (cm)
    AnyFloat K1 = DesignVar(10.00); ///< K1 constant in the muscle model.  Factor for determining shortening speed at optimum length
    AnyFloat K2 = DesignVar(0.00); ///< K2 constant in the muscle model.  Factor for determining shortening speed at optimum length
    AnyFloat EpsilonBar = DesignVar(0.0530); ///< Epsilon bar in the muscle model. Represents tendon strain at F0
};

AnyFolder ObturatorInternus = {
    AnyString Muscle = "Obturator int."; ///< Descriptive name for the muscle, e.g. for plotting
    AnyFloat Pennationangle = DesignVar(0.0); ///< Pennation angle of the muscle fibers (degres)
    AnyFloatVar VolumeRatio = 1.00000; ///< factor to be multiplied to obtain the final volume
    AnyFolder TotalMuscleVolumeRegression = {
      AnyFloatVar b1 = 0.00252; ///< b1 (cm3/cm3)
      AnyFloatVar b2 = 8.68; ///< b2 (cm3)
    };
    AnyFolder BodyMassRegression = {
      AnyFloatVar b1 = 0.22800; ///< b1 (cm3/kg)
      AnyFloatVar b2 = 10.30; ///< b2 (cm3)
    };
    AnyFolder BodyHeightMassRegression = {
      AnyFloatVar b1 = 0.12000; ///< b1 (cm3/m*kg)
      AnyFloatVar b2 = 11.70; ///< b2 (cm3)
    };
    AnyFloatVar VolumeMuscleBelly = DesignVar((VOLUME_FORMULA)*VolumeRatio); ///< Volume of the muscle using Handsfield regression on total muscle volume (cm^3)
    AnyFloat OptimalFiberlength = DesignVar(2.05); ///< Optimal working length of the muscle fiber (cm)
    AnyFloat TotalTendonLength = DesignVar(8.20); ///< The total tendon length (cm)
    AnyFloat K1 = DesignVar(10.00); ///< K1 constant in the muscle model.  Factor for determining shortening speed at optimum length
    AnyFloat K2 = DesignVar(0.00); ///< K2 constant in the muscle model.  Factor for determining shortening speed at optimum length
    AnyFloat EpsilonBar = DesignVar(0.0530); ///< Epsilon bar in the muscle model. Represents tendon strain at F0
};

/// The fiber length have been corrected (keeping PCSA constant). This value was reduced because too long compared to the unscaled muscle length. To keep the same PCSA, the muscle mass have also been changed.
AnyFolder Pectineus = {
    AnyString Muscle = "Pectineus"; ///< Descriptive name for the muscle, e.g. for plotting
    AnyFloat Pennationangle = DesignVar(0.0); ///< Pennation angle of the muscle fibers (degres)
    AnyFloatVar VolumeRatio = 1.00000; ///< factor to be multiplied to obtain the final volume
    AnyFolder TotalMuscleVolumeRegression = {
      AnyFloatVar b1 = 0.01070; ///< b1 (cm3/cm3)
      AnyFloatVar b2 = -9.94; ///< b2 (cm3)
    };
    AnyFolder BodyMassRegression = {
      AnyFloatVar b1 = 0.94600; ///< b1 (cm3/kg)
      AnyFloatVar b2 = -1.59; ///< b2 (cm3)
    };
    AnyFolder BodyHeightMassRegression = {
      AnyFloatVar b1 = 0.48100; ///< b1 (cm3/m*kg)
      AnyFloatVar b2 = 6.70; ///< b2 (cm3)
    };
    AnyFloatVar VolumeMuscleBelly = DesignVar((VOLUME_FORMULA)*VolumeRatio); ///< Volume of the muscle using Handsfield regression on total muscle volume (cm^3)
    AnyFloat OptimalFiberlength = DesignVar(9.50); ///< Optimal working length of the muscle fiber (cm)
    AnyFloat TotalTendonLength = DesignVar(0.00); ///< The total tendon length (cm)
    AnyFloat K1 = DesignVar(10.00); ///< K1 constant in the muscle model.  Factor for determining shortening speed at optimum length
    AnyFloat K2 = DesignVar(0.00); ///< K2 constant in the muscle model.  Factor for determining shortening speed at optimum length
    AnyFloat EpsilonBar = DesignVar(0.0530); ///< Epsilon bar in the muscle model. Represents tendon strain at F0
};

/// The fiber length value have been corrected compared to the original data set. (Optimum fiber length Ward et al 2009) To keep the same PCSA, the muscle mass have also been changed.
AnyFolder PeroneusBrevis = {
    AnyString Muscle = "Peroneus brev."; ///< Descriptive name for the muscle, e.g. for plotting
    AnyFloat Pennationangle = DesignVar(23.1); ///< Pennation angle of the muscle fibers (degres)
    AnyFloatVar VolumeRatio = 0.41467; ///< factor to be multiplied to obtain the final volume
    AnyFolder TotalMuscleVolumeRegression = {
      AnyFloatVar b1 = 0.01940; ///< b1 (cm3/cm3)
      AnyFloatVar b2 = -7.43; ///< b2 (cm3)
    };
    AnyFolder BodyMassRegression = {
      AnyFloatVar b1 = 1.91000; ///< b1 (cm3/kg)
      AnyFloatVar b2 = -6.58; ///< b2 (cm3)
    };
    AnyFolder BodyHeightMassRegression = {
      AnyFloatVar b1 = 0.95600; ///< b1 (cm3/m*kg)
      AnyFloatVar b2 = 12.50; ///< b2 (cm3)
    };
    AnyFloatVar VolumeMuscleBelly = DesignVar((VOLUME_FORMULA)*VolumeRatio); ///< Volume of the muscle using Handsfield regression on total muscle volume (cm^3)
    AnyFloat OptimalFiberlength = DesignVar(4.54); ///< Optimal working length of the muscle fiber (cm)
    AnyFloat TotalTendonLength = DesignVar(6.40); ///< The total tendon length (cm)
    AnyFloat K1 = DesignVar(10.00); ///< K1 constant in the muscle model.  Factor for determining shortening speed at optimum length
    AnyFloat K2 = DesignVar(0.00); ///< K2 constant in the muscle model.  Factor for determining shortening speed at optimum length
    AnyFloat EpsilonBar = DesignVar(0.0530); ///< Epsilon bar in the muscle model. Represents tendon strain at F0
};

/// The fiber length value have been corrected compared to the original data set. (Optimum fiber length Ward et al 2009) To keep the same PCSA, the muscle mass have also been changed.
AnyFolder PeroneusLongus = {
    AnyString Muscle = "Peroneus long."; ///< Descriptive name for the muscle, e.g. for plotting
    AnyFloat Pennationangle = DesignVar(15.8); ///< Pennation angle of the muscle fibers (degres)
    AnyFloatVar VolumeRatio = 0.58533; ///< factor to be multiplied to obtain the final volume
    AnyFolder TotalMuscleVolumeRegression = {
      AnyFloatVar b1 = 0.01940; ///< b1 (cm3/cm3)
      AnyFloatVar b2 = -7.43; ///< b2 (cm3)
    };
    AnyFolder BodyMassRegression = {
      AnyFloatVar b1 = 1.91000; ///< b1 (cm3/kg)
      AnyFloatVar b2 = -6.58; ///< b2 (cm3)
    };
    AnyFolder BodyHeightMassRegression = {
      AnyFloatVar b1 = 0.95600; ///< b1 (cm3/m*kg)
      AnyFloatVar b2 = 12.50; ///< b2 (cm3)
    };
    AnyFloatVar VolumeMuscleBelly = DesignVar((VOLUME_FORMULA)*VolumeRatio); ///< Volume of the muscle using Handsfield regression on total muscle volume (cm^3)
    AnyFloat OptimalFiberlength = DesignVar(5.08); ///< Optimal working length of the muscle fiber (cm)
    AnyFloat TotalTendonLength = DesignVar(15.90); ///< The total tendon length (cm)
    AnyFloat K1 = DesignVar(10.00); ///< K1 constant in the muscle model.  Factor for determining shortening speed at optimum length
    AnyFloat K2 = DesignVar(0.00); ///< K2 constant in the muscle model.  Factor for determining shortening speed at optimum length
    AnyFloat EpsilonBar = DesignVar(0.0530); ///< Epsilon bar in the muscle model. Represents tendon strain at F0
};

/// volume calculated using 'extensors' volume from Handsfield, applying correction factor based on TLEM2.0
AnyFolder PeroneusTertius = {
    AnyString Muscle = "Peroneus tert."; ///< Descriptive name for the muscle, e.g. for plotting
    AnyFloat Pennationangle = DesignVar(19.1); ///< Pennation angle of the muscle fibers (degres)
    AnyFloatVar VolumeRatio = 0.27892; ///< factor to be multiplied to obtain the final volume
    AnyFolder TotalMuscleVolumeRegression = {
      AnyFloatVar b1 = 0.01320; ///< b1 (cm3/cm3)
      AnyFloatVar b2 = 8.70; ///< b2 (cm3)
    };
    AnyFolder BodyMassRegression = {
      AnyFloatVar b1 = 1.21000; ///< b1 (cm3/kg)
      AnyFloatVar b2 = 15.50; ///< b2 (cm3)
    };
    AnyFolder BodyHeightMassRegression = {
      AnyFloatVar b1 = 0.61900; ///< b1 (cm3/m*kg)
      AnyFloatVar b2 = 25.60; ///< b2 (cm3)
    };
    AnyFloatVar VolumeMuscleBelly = DesignVar((VOLUME_FORMULA)*VolumeRatio); ///< Volume of the muscle using Handsfield regression on total muscle volume (cm^3)
    AnyFloat OptimalFiberlength = DesignVar(4.27); ///< Optimal working length of the muscle fiber (cm)
    AnyFloat TotalTendonLength = DesignVar(10.00); ///< The total tendon length (cm)
    AnyFloat K1 = DesignVar(10.00); ///< K1 constant in the muscle model.  Factor for determining shortening speed at optimum length
    AnyFloat K2 = DesignVar(0.00); ///< K2 constant in the muscle model.  Factor for determining shortening speed at optimum length
    AnyFloat EpsilonBar = DesignVar(0.0530); ///< Epsilon bar in the muscle model. Represents tendon strain at F0
};

AnyFolder Piriformis = {
    AnyString Muscle = "Piriformis"; ///< Descriptive name for the muscle, e.g. for plotting
    AnyFloat Pennationangle = DesignVar(0.0); ///< Pennation angle of the muscle fibers (degres)
    AnyFloatVar VolumeRatio = 1.00000; ///< factor to be multiplied to obtain the final volume
    AnyFolder TotalMuscleVolumeRegression = {
      AnyFloatVar b1 = 0.00372; ///< b1 (cm3/cm3)
      AnyFloatVar b2 = 16.20; ///< b2 (cm3)
    };
    AnyFolder BodyMassRegression = {
      AnyFloatVar b1 = 0.20300; ///< b1 (cm3/kg)
      AnyFloatVar b2 = 28.10; ///< b2 (cm3)
    };
    AnyFolder BodyHeightMassRegression = {
      AnyFloatVar b1 = 0.13700; ///< b1 (cm3/m*kg)
      AnyFloatVar b2 = 25.70; ///< b2 (cm3)
    };
    AnyFloatVar VolumeMuscleBelly = DesignVar((VOLUME_FORMULA)*VolumeRatio); ///< Volume of the muscle using Handsfield regression on total muscle volume (cm^3)
    AnyFloat OptimalFiberlength = DesignVar(3.88); ///< Optimal working length of the muscle fiber (cm)
    AnyFloat TotalTendonLength = DesignVar(1.60); ///< The total tendon length (cm)
    AnyFloat K1 = DesignVar(10.00); ///< K1 constant in the muscle model.  Factor for determining shortening speed at optimum length
    AnyFloat K2 = DesignVar(0.00); ///< K2 constant in the muscle model.  Factor for determining shortening speed at optimum length
    AnyFloat EpsilonBar = DesignVar(0.0530); ///< Epsilon bar in the muscle model. Represents tendon strain at F0
};

/// volume not in the Handsfield dataset, using coefficients of Popliteus instead, with a correction factor based on TLEM2.0
AnyFolder Plantaris = {
    AnyString Muscle = "Plantaris"; ///< Descriptive name for the muscle, e.g. for plotting
    AnyFloat Pennationangle = DesignVar(0.0); ///< Pennation angle of the muscle fibers (degres)
    AnyFloatVar VolumeRatio = 0.44427; ///< factor to be multiplied to obtain the final volume
    AnyFolder TotalMuscleVolumeRegression = {
      AnyFloatVar b1 = 0.00298; ///< b1 (cm3/cm3)
      AnyFloatVar b2 = 2.11; ///< b2 (cm3)
    };
    AnyFolder BodyMassRegression = {
      AnyFloatVar b1 = 0.24500; ///< b1 (cm3/kg)
      AnyFloatVar b2 = 5.75; ///< b2 (cm3)
    };
    AnyFolder BodyHeightMassRegression = {
      AnyFloatVar b1 = 0.13300; ///< b1 (cm3/m*kg)
      AnyFloatVar b2 = 6.84; ///< b2 (cm3)
    };
    AnyFloatVar VolumeMuscleBelly = DesignVar((VOLUME_FORMULA)*VolumeRatio); ///< Volume of the muscle using Handsfield regression on total muscle volume (cm^3)
    AnyFloat OptimalFiberlength = DesignVar(4.77); ///< Optimal working length of the muscle fiber (cm)
    AnyFloat TotalTendonLength = DesignVar(35.00); ///< The total tendon length (cm)
    AnyFloat K1 = DesignVar(10.00); ///< K1 constant in the muscle model.  Factor for determining shortening speed at optimum length
    AnyFloat K2 = DesignVar(0.00); ///< K2 constant in the muscle model.  Factor for determining shortening speed at optimum length
    AnyFloat EpsilonBar = DesignVar(0.0530); ///< Epsilon bar in the muscle model. Represents tendon strain at F0
};

AnyFolder Popliteus = {
    AnyString Muscle = "Popliteus"; ///< Descriptive name for the muscle, e.g. for plotting
    AnyFloat Pennationangle = DesignVar(0.0); ///< Pennation angle of the muscle fibers (degres)
    AnyFloatVar VolumeRatio = 1.00000; ///< factor to be multiplied to obtain the final volume
    AnyFolder TotalMuscleVolumeRegression = {
      AnyFloatVar b1 = 0.00298; ///< b1 (cm3/cm3)
      AnyFloatVar b2 = 2.11; ///< b2 (cm3)
    };
    AnyFolder BodyMassRegression = {
      AnyFloatVar b1 = 0.24500; ///< b1 (cm3/kg)
      AnyFloatVar b2 = 5.75; ///< b2 (cm3)
    };
    AnyFolder BodyHeightMassRegression = {
      AnyFloatVar b1 = 0.13300; ///< b1 (cm3/m*kg)
      AnyFloatVar b2 = 6.84; ///< b2 (cm3)
    };
    AnyFloatVar VolumeMuscleBelly = DesignVar((VOLUME_FORMULA)*VolumeRatio); ///< Volume of the muscle using Handsfield regression on total muscle volume (cm^3)
    AnyFloat OptimalFiberlength = DesignVar(2.40); ///< Optimal working length of the muscle fiber (cm)
    AnyFloat TotalTendonLength = DesignVar(1.00); ///< The total tendon length (cm)
    AnyFloat K1 = DesignVar(10.00); ///< K1 constant in the muscle model.  Factor for determining shortening speed at optimum length
    AnyFloat K2 = DesignVar(0.00); ///< K2 constant in the muscle model.  Factor for determining shortening speed at optimum length
    AnyFloat EpsilonBar = DesignVar(0.0530); ///< Epsilon bar in the muscle model. Represents tendon strain at F0
};

AnyFolder PsoasMinor = {
    AnyString Muscle = "Psoas minor"; ///< Descriptive name for the muscle, e.g. for plotting
    AnyFloat Pennationangle = DesignVar(0.0); ///< Pennation angle of the muscle fibers (degres)
    AnyFloatVar VolumeRatio = 0.03318; ///< factor to be multiplied to obtain the final volume
    AnyFolder TotalMuscleVolumeRegression = {
      AnyFloatVar b1 = 0.05500; ///< b1 (cm3/cm3)
      AnyFloatVar b2 = -117.00; ///< b2 (cm3)
    };
    AnyFolder BodyMassRegression = {
      AnyFloatVar b1 = 4.45000; ///< b1 (cm3/kg)
      AnyFloatVar b2 = -44.70; ///< b2 (cm3)
    };
    AnyFolder BodyHeightMassRegression = {
      AnyFloatVar b1 = 2.43000; ///< b1 (cm3/m*kg)
      AnyFloatVar b2 = -26.30; ///< b2 (cm3)
    };
    AnyFloatVar VolumeMuscleBelly = DesignVar((VOLUME_FORMULA)*VolumeRatio); ///< Volume of the muscle using Handsfield regression on total muscle volume (cm^3)
    AnyFloat OptimalFiberlength = DesignVar(5.91); ///< Optimal working length of the muscle fiber (cm)
    AnyFloat TotalTendonLength = DesignVar(15.20); ///< The total tendon length (cm)
    AnyFloat K1 = DesignVar(10.00); ///< K1 constant in the muscle model.  Factor for determining shortening speed at optimum length
    AnyFloat K2 = DesignVar(0.00); ///< K2 constant in the muscle model.  Factor for determining shortening speed at optimum length
    AnyFloat EpsilonBar = DesignVar(0.0530); ///< Epsilon bar in the muscle model. Represents tendon strain at F0
};

AnyFolder PsoasMajor = {
    AnyString Muscle = "Psoas major"; ///< Descriptive name for the muscle, e.g. for plotting
    AnyFloat Pennationangle = DesignVar(13.4); ///< Pennation angle of the muscle fibers (degres)
    AnyFloatVar VolumeRatio = 0.96682; ///< factor to be multiplied to obtain the final volume
    AnyFolder TotalMuscleVolumeRegression = {
      AnyFloatVar b1 = 0.05500; ///< b1 (cm3/cm3)
      AnyFloatVar b2 = -117.00; ///< b2 (cm3)
    };
    AnyFolder BodyMassRegression = {
      AnyFloatVar b1 = 4.45000; ///< b1 (cm3/kg)
      AnyFloatVar b2 = -44.70; ///< b2 (cm3)
    };
    AnyFolder BodyHeightMassRegression = {
      AnyFloatVar b1 = 2.43000; ///< b1 (cm3/m*kg)
      AnyFloatVar b2 = -26.30; ///< b2 (cm3)
    };
    AnyFloatVar VolumeMuscleBelly = DesignVar((VOLUME_FORMULA)*VolumeRatio); ///< Volume of the muscle using Handsfield regression on total muscle volume (cm^3)
    AnyFloat OptimalFiberlength = DesignVar(9.92); ///< Optimal working length of the muscle fiber (cm)
    AnyFloat TotalTendonLength = DesignVar(11.30); ///< The total tendon length (cm)
    AnyFloat K1 = DesignVar(10.00); ///< K1 constant in the muscle model.  Factor for determining shortening speed at optimum length
    AnyFloat K2 = DesignVar(0.00); ///< K2 constant in the muscle model.  Factor for determining shortening speed at optimum length
    AnyFloat EpsilonBar = DesignVar(0.0530); ///< Epsilon bar in the muscle model. Represents tendon strain at F0
};

AnyFolder QuadratusFemoris = {
    AnyString Muscle = "Quadratis fem."; ///< Descriptive name for the muscle, e.g. for plotting
    AnyFloat Pennationangle = DesignVar(0.0); ///< Pennation angle of the muscle fibers (degres)
    AnyFloatVar VolumeRatio = 1.00000; ///< factor to be multiplied to obtain the final volume
    AnyFolder TotalMuscleVolumeRegression = {
      AnyFloatVar b1 = 0.00475; ///< b1 (cm3/cm3)
      AnyFloatVar b2 = -1.45; ///< b2 (cm3)
    };
    AnyFolder BodyMassRegression = {
      AnyFloatVar b1 = 0.40900; ///< b1 (cm3/kg)
      AnyFloatVar b2 = 3.01; ///< b2 (cm3)
    };
    AnyFolder BodyHeightMassRegression = {
      AnyFloatVar b1 = 0.22800; ///< b1 (cm3/m*kg)
      AnyFloatVar b2 = 4.20; ///< b2 (cm3)
    };
    AnyFloatVar VolumeMuscleBelly = DesignVar((VOLUME_FORMULA)*VolumeRatio); ///< Volume of the muscle using Handsfield regression on total muscle volume (cm^3)
    AnyFloat OptimalFiberlength = DesignVar(3.37); ///< Optimal working length of the muscle fiber (cm)
    AnyFloat TotalTendonLength = DesignVar(0.00); ///< The total tendon length (cm)
    AnyFloat K1 = DesignVar(10.00); ///< K1 constant in the muscle model.  Factor for determining shortening speed at optimum length
    AnyFloat K2 = DesignVar(0.00); ///< K2 constant in the muscle model.  Factor for determining shortening speed at optimum length
    AnyFloat EpsilonBar = DesignVar(0.0530); ///< Epsilon bar in the muscle model. Represents tendon strain at F0
};

AnyFolder RectusFemoris = {
    AnyString Muscle = "Rectus fem."; ///< Descriptive name for the muscle, e.g. for plotting
    AnyFloat Pennationangle = DesignVar(21.9); ///< Pennation angle of the muscle fibers (degres)
    AnyFloatVar VolumeRatio = 1.00000; ///< factor to be multiplied to obtain the final volume
    AnyFolder TotalMuscleVolumeRegression = {
      AnyFloatVar b1 = 0.03710; ///< b1 (cm3/cm3)
      AnyFloatVar b2 = 4.97; ///< b2 (cm3)
    };
    AnyFolder BodyMassRegression = {
      AnyFloatVar b1 = 3.15000; ///< b1 (cm3/kg)
      AnyFloatVar b2 = 43.20; ///< b2 (cm3)
    };
    AnyFolder BodyHeightMassRegression = {
      AnyFloatVar b1 = 1.71000; ///< b1 (cm3/m*kg)
      AnyFloatVar b2 = 56.90; ///< b2 (cm3)
    };
    AnyFloatVar VolumeMuscleBelly = DesignVar((VOLUME_FORMULA)*VolumeRatio); ///< Volume of the muscle using Handsfield regression on total muscle volume (cm^3)
    AnyFloat OptimalFiberlength = DesignVar(7.84); ///< Optimal working length of the muscle fiber (cm)
    AnyFloat TotalTendonLength = DesignVar(9.60); ///< The total tendon length (cm)
    AnyFloat K1 = DesignVar(10.00); ///< K1 constant in the muscle model.  Factor for determining shortening speed at optimum length
    AnyFloat K2 = DesignVar(0.00); ///< K2 constant in the muscle model.  Factor for determining shortening speed at optimum length
    AnyFloat EpsilonBar = DesignVar(0.0530); ///< Epsilon bar in the muscle model. Represents tendon strain at F0
};

/// In TLEM 2 the Sartorius mucles is no longer split into a distal/proximal part.
AnyFolder Sartorius = {
    AnyString Muscle = "Sartorius"; ///< Descriptive name for the muscle, e.g. for plotting
    AnyFloat Pennationangle = DesignVar(0.0); ///< Pennation angle of the muscle fibers (degres)
    AnyFloatVar VolumeRatio = 1.00000; ///< factor to be multiplied to obtain the final volume
    AnyFolder TotalMuscleVolumeRegression = {
      AnyFloatVar b1 = 0.02560; ///< b1 (cm3/cm3)
      AnyFloatVar b2 = -18.20; ///< b2 (cm3)
    };
    AnyFolder BodyMassRegression = {
      AnyFloatVar b1 = 2.34000; ///< b1 (cm3/kg)
      AnyFloatVar b2 = -4.47; ///< b2 (cm3)
    };
    AnyFolder BodyHeightMassRegression = {
      AnyFloatVar b1 = 1.19000; ///< b1 (cm3/m*kg)
      AnyFloatVar b2 = 15.90; ///< b2 (cm3)
    };
    AnyFloatVar VolumeMuscleBelly = DesignVar((VOLUME_FORMULA)*VolumeRatio); ///< Volume of the muscle using Handsfield regression on total muscle volume (cm^3)
    AnyFloat OptimalFiberlength = DesignVar(34.71); ///< Optimal working length of the muscle fiber (cm)
    AnyFloat TotalTendonLength = DesignVar(7.90); ///< The total tendon length (cm)
    AnyFloat K1 = DesignVar(10.00); ///< K1 constant in the muscle model.  Factor for determining shortening speed at optimum length
    AnyFloat K2 = DesignVar(0.00); ///< K2 constant in the muscle model.  Factor for determining shortening speed at optimum length
    AnyFloat EpsilonBar = DesignVar(0.0530); ///< Epsilon bar in the muscle model. Represents tendon strain at F0
};

AnyFolder Semimembranosus = {
    AnyString Muscle = "Semimembr."; ///< Descriptive name for the muscle, e.g. for plotting
    AnyFloat Pennationangle = DesignVar(25.0); ///< Pennation angle of the muscle fibers (degres)
    AnyFloatVar VolumeRatio = 1.00000; ///< factor to be multiplied to obtain the final volume
    AnyFolder TotalMuscleVolumeRegression = {
      AnyFloatVar b1 = 0.03190; ///< b1 (cm3/cm3)
      AnyFloatVar b2 = 18.20; ///< b2 (cm3)
    };
    AnyFolder BodyMassRegression = {
      AnyFloatVar b1 = 2.96000; ///< b1 (cm3/kg)
      AnyFloatVar b2 = 33.30; ///< b2 (cm3)
    };
    AnyFolder BodyHeightMassRegression = {
      AnyFloatVar b1 = 1.54000; ///< b1 (cm3/m*kg)
      AnyFloatVar b2 = 54.50; ///< b2 (cm3)
    };
    AnyFloatVar VolumeMuscleBelly = DesignVar((VOLUME_FORMULA)*VolumeRatio); ///< Volume of the muscle using Handsfield regression on total muscle volume (cm^3)
    AnyFloat OptimalFiberlength = DesignVar(8.09); ///< Optimal working length of the muscle fiber (cm)
    AnyFloat TotalTendonLength = DesignVar(15.70); ///< The total tendon length (cm)
    AnyFloat K1 = DesignVar(10.00); ///< K1 constant in the muscle model.  Factor for determining shortening speed at optimum length
    AnyFloat K2 = DesignVar(0.00); ///< K2 constant in the muscle model.  Factor for determining shortening speed at optimum length
    AnyFloat EpsilonBar = DesignVar(0.0530); ///< Epsilon bar in the muscle model. Represents tendon strain at F0
};

AnyFolder Semitendinosus = {
    AnyString Muscle = "Semitend."; ///< Descriptive name for the muscle, e.g. for plotting
    AnyFloat Pennationangle = DesignVar(0.0); ///< Pennation angle of the muscle fibers (degres)
    AnyFloatVar VolumeRatio = 1.00000; ///< factor to be multiplied to obtain the final volume
    AnyFolder TotalMuscleVolumeRegression = {
      AnyFloatVar b1 = 0.02850; ///< b1 (cm3/cm3)
      AnyFloatVar b2 = -16.80; ///< b2 (cm3)
    };
    AnyFolder BodyMassRegression = {
      AnyFloatVar b1 = 2.37000; ///< b1 (cm3/kg)
      AnyFloatVar b2 = 15.90; ///< b2 (cm3)
    };
    AnyFolder BodyHeightMassRegression = {
      AnyFloatVar b1 = 1.27000; ///< b1 (cm3/m*kg)
      AnyFloatVar b2 = 29.10; ///< b2 (cm3)
    };
    AnyFloatVar VolumeMuscleBelly = DesignVar((VOLUME_FORMULA)*VolumeRatio); ///< Volume of the muscle using Handsfield regression on total muscle volume (cm^3)
    AnyFloat OptimalFiberlength = DesignVar(14.16); ///< Optimal working length of the muscle fiber (cm)
    AnyFloat TotalTendonLength = DesignVar(23.70); ///< The total tendon length (cm)
    AnyFloat K1 = DesignVar(10.00); ///< K1 constant in the muscle model.  Factor for determining shortening speed at optimum length
    AnyFloat K2 = DesignVar(0.00); ///< K2 constant in the muscle model.  Factor for determining shortening speed at optimum length
    AnyFloat EpsilonBar = DesignVar(0.0530); ///< Epsilon bar in the muscle model. Represents tendon strain at F0
};

/// The fiber length  value have been corrected compared to the original data set (original value = 2.4).To keep the same PCSA, the muscle mass have also been changed.
AnyFolder SoleusMedialis = {
    AnyString Muscle = "Soleus (med.)"; ///< Descriptive name for the muscle, e.g. for plotting
    AnyFloat Pennationangle = DesignVar(64.5); ///< Pennation angle of the muscle fibers (degres)
    AnyFloatVar VolumeRatio = 0.52321; ///< factor to be multiplied to obtain the final volume
    AnyFolder TotalMuscleVolumeRegression = {
      AnyFloatVar b1 = 0.05070; ///< b1 (cm3/cm3)
      AnyFloatVar b2 = 78.20; ///< b2 (cm3)
    };
    AnyFolder BodyMassRegression = {
      AnyFloatVar b1 = 5.26000; ///< b1 (cm3/kg)
      AnyFloatVar b2 = 61.10; ///< b2 (cm3)
    };
    AnyFolder BodyHeightMassRegression = {
      AnyFloatVar b1 = 2.57000; ///< b1 (cm3/m*kg)
      AnyFloatVar b2 = 120.00; ///< b2 (cm3)
    };
    AnyFloatVar VolumeMuscleBelly = DesignVar((VOLUME_FORMULA)*VolumeRatio); ///< Volume of the muscle using Handsfield regression on total muscle volume (cm^3)
    AnyFloat OptimalFiberlength = DesignVar(4.40); ///< Optimal working length of the muscle fiber (cm)
    AnyFloat TotalTendonLength = DesignVar(8.50); ///< The total tendon length (cm)
    AnyFloat K1 = DesignVar(10.00); ///< K1 constant in the muscle model.  Factor for determining shortening speed at optimum length
    AnyFloat K2 = DesignVar(0.00); ///< K2 constant in the muscle model.  Factor for determining shortening speed at optimum length
    AnyFloat EpsilonBar = DesignVar(0.0530); ///< Epsilon bar in the muscle model. Represents tendon strain at F0
};

/// The fiber length  value have been corrected compared to the original data set (original value = 2.6). To keep the same PCSA,  the muscle mass have also been changed.
AnyFolder SoleusLateralis = {
    AnyString Muscle = "Soleus (lat.)"; ///< Descriptive name for the muscle, e.g. for plotting
    AnyFloat Pennationangle = DesignVar(58.7); ///< Pennation angle of the muscle fibers (degres)
    AnyFloatVar VolumeRatio = 0.47679; ///< factor to be multiplied to obtain the final volume
    AnyFolder TotalMuscleVolumeRegression = {
      AnyFloatVar b1 = 0.05070; ///< b1 (cm3/cm3)
      AnyFloatVar b2 = 78.20; ///< b2 (cm3)
    };
    AnyFolder BodyMassRegression = {
      AnyFloatVar b1 = 5.26000; ///< b1 (cm3/kg)
      AnyFloatVar b2 = 61.10; ///< b2 (cm3)
    };
    AnyFolder BodyHeightMassRegression = {
      AnyFloatVar b1 = 2.57000; ///< b1 (cm3/m*kg)
      AnyFloatVar b2 = 120.00; ///< b2 (cm3)
    };
    AnyFloatVar VolumeMuscleBelly = DesignVar((VOLUME_FORMULA)*VolumeRatio); ///< Volume of the muscle using Handsfield regression on total muscle volume (cm^3)
    AnyFloat OptimalFiberlength = DesignVar(4.40); ///< Optimal working length of the muscle fiber (cm)
    AnyFloat TotalTendonLength = DesignVar(8.50); ///< The total tendon length (cm)
    AnyFloat K1 = DesignVar(10.00); ///< K1 constant in the muscle model.  Factor for determining shortening speed at optimum length
    AnyFloat K2 = DesignVar(0.00); ///< K2 constant in the muscle model.  Factor for determining shortening speed at optimum length
    AnyFloat EpsilonBar = DesignVar(0.0530); ///< Epsilon bar in the muscle model. Represents tendon strain at F0
};

AnyFolder TensorFasciaeLatae = {
    AnyString Muscle = "Tensor fasc. l."; ///< Descriptive name for the muscle, e.g. for plotting
    AnyFloat Pennationangle = DesignVar(0.0); ///< Pennation angle of the muscle fibers (degres)
    AnyFloatVar VolumeRatio = 1.00000; ///< factor to be multiplied to obtain the final volume
    AnyFolder TotalMuscleVolumeRegression = {
      AnyFloatVar b1 = 0.01360; ///< b1 (cm3/cm3)
      AnyFloatVar b2 = -31.50; ///< b2 (cm3)
    };
    AnyFolder BodyMassRegression = {
      AnyFloatVar b1 = 1.12000; ///< b1 (cm3/kg)
      AnyFloatVar b2 = -15.60; ///< b2 (cm3)
    };
    AnyFolder BodyHeightMassRegression = {
      AnyFloatVar b1 = 0.62000; ///< b1 (cm3/m*kg)
      AnyFloatVar b2 = -11.80; ///< b2 (cm3)
    };
    AnyFloatVar VolumeMuscleBelly = DesignVar((VOLUME_FORMULA)*VolumeRatio); ///< Volume of the muscle using Handsfield regression on total muscle volume (cm^3)
    AnyFloat OptimalFiberlength = DesignVar(9.49); ///< Optimal working length of the muscle fiber (cm)
    AnyFloat TotalTendonLength = DesignVar(0.00); ///< The total tendon length (cm)
    AnyFloat K1 = DesignVar(10.00); ///< K1 constant in the muscle model.  Factor for determining shortening speed at optimum length
    AnyFloat K2 = DesignVar(0.00); ///< K2 constant in the muscle model.  Factor for determining shortening speed at optimum length
    AnyFloat EpsilonBar = DesignVar(0.0530); ///< Epsilon bar in the muscle model. Represents tendon strain at F0
};

/// The fiber length value have been corrected compared to the original data set. (Optimum fiber length Ward et al 2009
AnyFolder TibialisAnterior = {
    AnyString Muscle = "Tibialis ant."; ///< Descriptive name for the muscle, e.g. for plotting
    AnyFloat Pennationangle = DesignVar(9.6); ///< Pennation angle of the muscle fibers (degres)
    AnyFloatVar VolumeRatio = 1.00000; ///< factor to be multiplied to obtain the final volume
    AnyFolder TotalMuscleVolumeRegression = {
      AnyFloatVar b1 = 0.01610; ///< b1 (cm3/cm3)
      AnyFloatVar b2 = 20.30; ///< b2 (cm3)
    };
    AnyFolder BodyMassRegression = {
      AnyFloatVar b1 = 1.56000; ///< b1 (cm3/kg)
      AnyFloatVar b2 = 22.90; ///< b2 (cm3)
    };
    AnyFolder BodyHeightMassRegression = {
      AnyFloatVar b1 = 0.79600; ///< b1 (cm3/m*kg)
      AnyFloatVar b2 = 36.70; ///< b2 (cm3)
    };
    AnyFloatVar VolumeMuscleBelly = DesignVar((VOLUME_FORMULA)*VolumeRatio); ///< Volume of the muscle using Handsfield regression on total muscle volume (cm^3)
    AnyFloat OptimalFiberlength = DesignVar(6.83); ///< Optimal working length of the muscle fiber (cm)
    AnyFloat TotalTendonLength = DesignVar(23.50); ///< The total tendon length (cm)
    AnyFloat K1 = DesignVar(10.00); ///< K1 constant in the muscle model.  Factor for determining shortening speed at optimum length
    AnyFloat K2 = DesignVar(0.00); ///< K2 constant in the muscle model.  Factor for determining shortening speed at optimum length
    AnyFloat EpsilonBar = DesignVar(0.0530); ///< Epsilon bar in the muscle model. Represents tendon strain at F0
};

/// The fiber length value have been corrected compared to the original data set. (Optimum fiber length Ward et al 2009
AnyFolder TibialisPosteriorMedialis = {
    AnyString Muscle = "Tibial post. (med.)"; ///< Descriptive name for the muscle, e.g. for plotting
    AnyFloat Pennationangle = DesignVar(25.2); ///< Pennation angle of the muscle fibers (degres)
    AnyFloatVar VolumeRatio = 0.50000; ///< factor to be multiplied to obtain the final volume
    AnyFolder TotalMuscleVolumeRegression = {
      AnyFloatVar b1 = 0.01040; ///< b1 (cm3/cm3)
      AnyFloatVar b2 = 30.80; ///< b2 (cm3)
    };
    AnyFolder BodyMassRegression = {
      AnyFloatVar b1 = 0.83500; ///< b1 (cm3/kg)
      AnyFloatVar b2 = 44.80; ///< b2 (cm3)
    };
    AnyFolder BodyHeightMassRegression = {
      AnyFloatVar b1 = 0.45100; ///< b1 (cm3/m*kg)
      AnyFloatVar b2 = 48.90; ///< b2 (cm3)
    };
    AnyFloatVar VolumeMuscleBelly = DesignVar((VOLUME_FORMULA)*VolumeRatio); ///< Volume of the muscle using Handsfield regression on total muscle volume (cm^3)
    AnyFloat OptimalFiberlength = DesignVar(3.78); ///< Optimal working length of the muscle fiber (cm)
    AnyFloat TotalTendonLength = DesignVar(11.00); ///< The total tendon length (cm)
    AnyFloat K1 = DesignVar(10.00); ///< K1 constant in the muscle model.  Factor for determining shortening speed at optimum length
    AnyFloat K2 = DesignVar(0.00); ///< K2 constant in the muscle model.  Factor for determining shortening speed at optimum length
    AnyFloat EpsilonBar = DesignVar(0.0530); ///< Epsilon bar in the muscle model. Represents tendon strain at F0
};

/// The fiber length value have been corrected compared to the original data set. (Optimum fiber length Ward et al 2009
AnyFolder TibialisPosteriorLateralis = {
    AnyString Muscle = "Tibial post. (lat.)"; ///< Descriptive name for the muscle, e.g. for plotting
    AnyFloat Pennationangle = DesignVar(43.1); ///< Pennation angle of the muscle fibers (degres)
    AnyFloatVar VolumeRatio = 0.50000; ///< factor to be multiplied to obtain the final volume
    AnyFolder TotalMuscleVolumeRegression = {
      AnyFloatVar b1 = 0.01040; ///< b1 (cm3/cm3)
      AnyFloatVar b2 = 30.80; ///< b2 (cm3)
    };
    AnyFolder BodyMassRegression = {
      AnyFloatVar b1 = 0.83500; ///< b1 (cm3/kg)
      AnyFloatVar b2 = 44.80; ///< b2 (cm3)
    };
    AnyFolder BodyHeightMassRegression = {
      AnyFloatVar b1 = 0.45100; ///< b1 (cm3/m*kg)
      AnyFloatVar b2 = 48.90; ///< b2 (cm3)
    };
    AnyFloatVar VolumeMuscleBelly = DesignVar((VOLUME_FORMULA)*VolumeRatio); ///< Volume of the muscle using Handsfield regression on total muscle volume (cm^3)
    AnyFloat OptimalFiberlength = DesignVar(3.78); ///< Optimal working length of the muscle fiber (cm)
    AnyFloat TotalTendonLength = DesignVar(11.00); ///< The total tendon length (cm)
    AnyFloat K1 = DesignVar(10.00); ///< K1 constant in the muscle model.  Factor for determining shortening speed at optimum length
    AnyFloat K2 = DesignVar(0.00); ///< K2 constant in the muscle model.  Factor for determining shortening speed at optimum length
    AnyFloat EpsilonBar = DesignVar(0.0530); ///< Epsilon bar in the muscle model. Represents tendon strain at F0
};

AnyFolder VastusIntermedius = {
    AnyString Muscle = "Vastus interm."; ///< Descriptive name for the muscle, e.g. for plotting
    AnyFloat Pennationangle = DesignVar(11.8); ///< Pennation angle of the muscle fibers (degres)
    AnyFloatVar VolumeRatio = 1.00000; ///< factor to be multiplied to obtain the final volume
    AnyFolder TotalMuscleVolumeRegression = {
      AnyFloatVar b1 = 0.02730; ///< b1 (cm3/cm3)
      AnyFloatVar b2 = 76.50; ///< b2 (cm3)
    };
    AnyFolder BodyMassRegression = {
      AnyFloatVar b1 = 2.49000; ///< b1 (cm3/kg)
      AnyFloatVar b2 = 91.50; ///< b2 (cm3)
    };
    AnyFolder BodyHeightMassRegression = {
      AnyFloatVar b1 = 1.29000; ///< b1 (cm3/m*kg)
      AnyFloatVar b2 = 111.00; ///< b2 (cm3)
    };
    AnyFloatVar VolumeMuscleBelly = DesignVar((VOLUME_FORMULA)*VolumeRatio); ///< Volume of the muscle using Handsfield regression on total muscle volume (cm^3)
    AnyFloat OptimalFiberlength = DesignVar(7.68); ///< Optimal working length of the muscle fiber (cm)
    AnyFloat TotalTendonLength = DesignVar(12.60); ///< The total tendon length (cm)
    AnyFloat K1 = DesignVar(10.00); ///< K1 constant in the muscle model.  Factor for determining shortening speed at optimum length
    AnyFloat K2 = DesignVar(0.00); ///< K2 constant in the muscle model.  Factor for determining shortening speed at optimum length
    AnyFloat EpsilonBar = DesignVar(0.0530); ///< Epsilon bar in the muscle model. Represents tendon strain at F0
};

AnyFolder VastusLateralisInferior = {
    AnyString Muscle = "Vastus lat. (inf.)"; ///< Descriptive name for the muscle, e.g. for plotting
    AnyFloat Pennationangle = DesignVar(0.0); ///< Pennation angle of the muscle fibers (degres)
    AnyFloatVar VolumeRatio = 0.07791; ///< factor to be multiplied to obtain the final volume
    AnyFolder TotalMuscleVolumeRegression = {
      AnyFloatVar b1 = 0.12500; ///< b1 (cm3/cm3)
      AnyFloatVar b2 = -55.70; ///< b2 (cm3)
    };
    AnyFolder BodyMassRegression = {
      AnyFloatVar b1 = 11.50000; ///< b1 (cm3/kg)
      AnyFloatVar b2 = 6.15; ///< b2 (cm3)
    };
    AnyFolder BodyHeightMassRegression = {
      AnyFloatVar b1 = 5.89000; ///< b1 (cm3/m*kg)
      AnyFloatVar b2 = 102.00; ///< b2 (cm3)
    };
    AnyFloatVar VolumeMuscleBelly = DesignVar((VOLUME_FORMULA)*VolumeRatio); ///< Volume of the muscle using Handsfield regression on total muscle volume (cm^3)
    AnyFloat OptimalFiberlength = DesignVar(4.25); ///< Optimal working length of the muscle fiber (cm)
    AnyFloat TotalTendonLength = DesignVar(9.60); ///< The total tendon length (cm)
    AnyFloat K1 = DesignVar(10.00); ///< K1 constant in the muscle model.  Factor for determining shortening speed at optimum length
    AnyFloat K2 = DesignVar(0.00); ///< K2 constant in the muscle model.  Factor for determining shortening speed at optimum length
    AnyFloat EpsilonBar = DesignVar(0.0530); ///< Epsilon bar in the muscle model. Represents tendon strain at F0
};

AnyFolder VastusLateralisSuperior = {
    AnyString Muscle = "Vastus lat. (sup.)"; ///< Descriptive name for the muscle, e.g. for plotting
    AnyFloat Pennationangle = DesignVar(0.0); ///< Pennation angle of the muscle fibers (degres)
    AnyFloatVar VolumeRatio = 0.92209; ///< factor to be multiplied to obtain the final volume
    AnyFolder TotalMuscleVolumeRegression = {
      AnyFloatVar b1 = 0.12500; ///< b1 (cm3/cm3)
      AnyFloatVar b2 = -55.70; ///< b2 (cm3)
    };
    AnyFolder BodyMassRegression = {
      AnyFloatVar b1 = 11.50000; ///< b1 (cm3/kg)
      AnyFloatVar b2 = 6.15; ///< b2 (cm3)
    };
    AnyFolder BodyHeightMassRegression = {
      AnyFloatVar b1 = 5.89000; ///< b1 (cm3/m*kg)
      AnyFloatVar b2 = 102.00; ///< b2 (cm3)
    };
    AnyFloatVar VolumeMuscleBelly = DesignVar((VOLUME_FORMULA)*VolumeRatio); ///< Volume of the muscle using Handsfield regression on total muscle volume (cm^3)
    AnyFloat OptimalFiberlength = DesignVar(9.12); ///< Optimal working length of the muscle fiber (cm)
    AnyFloat TotalTendonLength = DesignVar(9.60); ///< The total tendon length (cm)
    AnyFloat K1 = DesignVar(10.00); ///< K1 constant in the muscle model.  Factor for determining shortening speed at optimum length
    AnyFloat K2 = DesignVar(0.00); ///< K2 constant in the muscle model.  Factor for determining shortening speed at optimum length
    AnyFloat EpsilonBar = DesignVar(0.0530); ///< Epsilon bar in the muscle model. Represents tendon strain at F0
};

/// The fiber length was changed (keeping PCSA constant) since it was too long compared to the unscaled muscle length. In the AMMR 1.4 this correction was only applied to  VastusMedialisInferior2Par.
AnyFolder VastusMedialisInferior = {
    AnyString Muscle = "Vastus med. (inf.)"; ///< Descriptive name for the muscle, e.g. for plotting
    AnyFloat Pennationangle = DesignVar(0.0); ///< Pennation angle of the muscle fibers (degres)
    AnyFloatVar VolumeRatio = 0.12030; ///< factor to be multiplied to obtain the final volume
    AnyFolder TotalMuscleVolumeRegression = {
      AnyFloatVar b1 = 0.06310; ///< b1 (cm3/cm3)
      AnyFloatVar b2 = -16.30; ///< b2 (cm3)
    };
    AnyFolder BodyMassRegression = {
      AnyFloatVar b1 = 6.12000; ///< b1 (cm3/kg)
      AnyFloatVar b2 = -6.22; ///< b2 (cm3)
    };
    AnyFolder BodyHeightMassRegression = {
      AnyFloatVar b1 = 3.03000; ///< b1 (cm3/m*kg)
      AnyFloatVar b2 = 57.60; ///< b2 (cm3)
    };
    AnyFloatVar VolumeMuscleBelly = DesignVar((VOLUME_FORMULA)*VolumeRatio); ///< Volume of the muscle using Handsfield regression on total muscle volume (cm^3)
    AnyFloat OptimalFiberlength = DesignVar(5.60); ///< Optimal working length of the muscle fiber (cm)
    AnyFloat TotalTendonLength = DesignVar(9.60); ///< The total tendon length (cm)
    AnyFloat K1 = DesignVar(10.00); ///< K1 constant in the muscle model.  Factor for determining shortening speed at optimum length
    AnyFloat K2 = DesignVar(0.00); ///< K2 constant in the muscle model.  Factor for determining shortening speed at optimum length
    AnyFloat EpsilonBar = DesignVar(0.0530); ///< Epsilon bar in the muscle model. Represents tendon strain at F0
};

AnyFolder VastusMedialisMid = {
    AnyString Muscle = "Vastus med. (mid.)"; ///< Descriptive name for the muscle, e.g. for plotting
    AnyFloat Pennationangle = DesignVar(0.0); ///< Pennation angle of the muscle fibers (degres)
    AnyFloatVar VolumeRatio = 0.38774; ///< factor to be multiplied to obtain the final volume
    AnyFolder TotalMuscleVolumeRegression = {
      AnyFloatVar b1 = 0.06310; ///< b1 (cm3/cm3)
      AnyFloatVar b2 = -16.30; ///< b2 (cm3)
    };
    AnyFolder BodyMassRegression = {
      AnyFloatVar b1 = 6.12000; ///< b1 (cm3/kg)
      AnyFloatVar b2 = -6.22; ///< b2 (cm3)
    };
    AnyFolder BodyHeightMassRegression = {
      AnyFloatVar b1 = 3.03000; ///< b1 (cm3/m*kg)
      AnyFloatVar b2 = 57.60; ///< b2 (cm3)
    };
    AnyFloatVar VolumeMuscleBelly = DesignVar((VOLUME_FORMULA)*VolumeRatio); ///< Volume of the muscle using Handsfield regression on total muscle volume (cm^3)
    AnyFloat OptimalFiberlength = DesignVar(7.58); ///< Optimal working length of the muscle fiber (cm)
    AnyFloat TotalTendonLength = DesignVar(9.60); ///< The total tendon length (cm)
    AnyFloat K1 = DesignVar(10.00); ///< K1 constant in the muscle model.  Factor for determining shortening speed at optimum length
    AnyFloat K2 = DesignVar(0.00); ///< K2 constant in the muscle model.  Factor for determining shortening speed at optimum length
    AnyFloat EpsilonBar = DesignVar(0.0530); ///< Epsilon bar in the muscle model. Represents tendon strain at F0
};

AnyFolder VastusMedialisSuperior = {
    AnyString Muscle = "Vastus med. (sup.)"; ///< Descriptive name for the muscle, e.g. for plotting
    AnyFloat Pennationangle = DesignVar(0.0); ///< Pennation angle of the muscle fibers (degres)
    AnyFloatVar VolumeRatio = 0.49195; ///< factor to be multiplied to obtain the final volume
    AnyFolder TotalMuscleVolumeRegression = {
      AnyFloatVar b1 = 0.06310; ///< b1 (cm3/cm3)
      AnyFloatVar b2 = -16.30; ///< b2 (cm3)
    };
    AnyFolder BodyMassRegression = {
      AnyFloatVar b1 = 6.12000; ///< b1 (cm3/kg)
      AnyFloatVar b2 = -6.22; ///< b2 (cm3)
    };
    AnyFolder BodyHeightMassRegression = {
      AnyFloatVar b1 = 3.03000; ///< b1 (cm3/m*kg)
      AnyFloatVar b2 = 57.60; ///< b2 (cm3)
    };
    AnyFloatVar VolumeMuscleBelly = DesignVar((VOLUME_FORMULA)*VolumeRatio); ///< Volume of the muscle using Handsfield regression on total muscle volume (cm^3)
    AnyFloat OptimalFiberlength = DesignVar(8.30); ///< Optimal working length of the muscle fiber (cm)
    AnyFloat TotalTendonLength = DesignVar(9.60); ///< The total tendon length (cm)
    AnyFloat K1 = DesignVar(10.00); ///< K1 constant in the muscle model.  Factor for determining shortening speed at optimum length
    AnyFloat K2 = DesignVar(0.00); ///< K2 constant in the muscle model.  Factor for determining shortening speed at optimum length
    AnyFloat EpsilonBar = DesignVar(0.0530); ///< Epsilon bar in the muscle model. Represents tendon strain at F0
};

#undef VOLUME_FORMULA_TOTAL_MUSCLE_VOLUME
#undef VOLUME_FORMULA_MASS
#undef VOLUME_FORMULA_HEIGHT_MASS
#undef VOLUME_FORMULA
