/**^This folder implements the muscle models for the TLEM model.
Anatomical muscles from the TLEM data set are in many cases split into
several branches (elements). Strength parameters are split between the branches,
typically by uniform split.

Different morphologies of TLEM model are implemented in this file,
please refer to the file for details.
*/


AnyVar StrengthScaleShank = .StrengthScaling.Shank.StrengthScale;
AnyVar StrengthScaleThigh = .StrengthScaling.Thigh.StrengthScale;
AnyVar StrengthScalePelvis = .Scaling.StrengthScaling.Pelvis.StrengthScale;
AnyVar FiberLengthScaleShank = .FiberLengthScaling.Shank.FiberLengthScale;
AnyVar FiberLengthScaleThigh = .FiberLengthScaling.Thigh.FiberLengthScale;
AnyVar FiberLengthScalePelvis = .Scaling.FiberLengthScaling.Pelvis.FiberLengthScale;

// 3element muscle parameters
AnyVar Jt = DesignVar(3.0); // Shape parameter for the tendon stiffness
AnyVar Jpe = DesignVar(3.0); // Shape parameter for the parallel stiffness
AnyVar PEFactor = DesignVar(1.5); // Parameter for influence of parallel stiffness

AnyVar PCSAfactor = 90*.....HumanModel.StrengthParameters.StrengthIndexLeg; // = PCSAfactor in N/cm^2 , the PCSA itself is given in cm^2 so F0 is in Newton`s.
//Klein Horsman used a PCSAfactor of 27 N/cm^2 this is now changed to 90 N/cm^2

AnyFolder CadaverMusPar = {
#include "<BM_LEG_DATASET_PATH>/ModelMuscleParameters.any"
};


/////////////////////////////////////////////////
//     AdductorBrevisProximal (2 elements)     //
/////////////////////////////////////////////////
AnyMuscleModel AdductorBrevisProximal1Par =
{
 AnyFolder &MuscleParameters = .CadaverMusPar.AdductorBrevisProximal;
 AnyIntVar MuscleElemNo = 1; ///< The number of this element of the muscle
 AnyIntVar MuscleElemAmount = 2; ///< The total amount of elements for this muscle
 F0 = .PCSAfactor*PCSA; // Maximum force output at optimum fiber length
 Lf0 = .FiberLengthScalePelvis
       * MuscleParameters.OptimalFiberlength
       * cos(pi/180*MuscleParameters.Pennationangle);
 Vol0 = .StrengthScalePelvis
        * MuscleParameters.VolumeScaleFactor
        * MuscleParameters.VolumeMuscleBelly/MuscleElemAmount;
 AnyVar PCSA = Vol0/Lf0;///< PCSA is calculated as muscle volume divided between muscle branches, divided by fiber length and corrected for the pennation angle not used in the simple muscle model
};

AnyMuscleModel AdductorBrevisProximal2Par =
{
 AnyFolder &MuscleParameters = .CadaverMusPar.AdductorBrevisProximal;
 AnyIntVar MuscleElemNo = 2; ///< The number of this element of the muscle
 AnyIntVar MuscleElemAmount = 2; ///< The total amount of elements for this muscle
 F0 = .PCSAfactor*PCSA; // Maximum force output at optimum fiber length
 Lf0 = .FiberLengthScalePelvis
       * MuscleParameters.OptimalFiberlength
       * cos(pi/180*MuscleParameters.Pennationangle);
 Vol0 = .StrengthScalePelvis
        * MuscleParameters.VolumeScaleFactor
        * MuscleParameters.VolumeMuscleBelly/MuscleElemAmount;
 AnyVar PCSA = Vol0/Lf0;///< PCSA is calculated as muscle volume divided between muscle branches, divided by fiber length and corrected for the pennation angle not used in the simple muscle model
};


////////////////////////////////////////////
//     AdductorBrevisMid (2 elements)     //
////////////////////////////////////////////
AnyMuscleModel AdductorBrevisMid1Par =
{
 AnyFolder &MuscleParameters = .CadaverMusPar.AdductorBrevisMid;
 AnyIntVar MuscleElemNo = 1; ///< The number of this element of the muscle
 AnyIntVar MuscleElemAmount = 2; ///< The total amount of elements for this muscle
 F0 = .PCSAfactor*PCSA; // Maximum force output at optimum fiber length
 Lf0 = .FiberLengthScalePelvis
       * MuscleParameters.OptimalFiberlength
       * cos(pi/180*MuscleParameters.Pennationangle);
 Vol0 = .StrengthScalePelvis
        * MuscleParameters.VolumeScaleFactor
        * MuscleParameters.VolumeMuscleBelly/MuscleElemAmount;
 AnyVar PCSA = Vol0/Lf0;///< PCSA is calculated as muscle volume divided between muscle branches, divided by fiber length and corrected for the pennation angle not used in the simple muscle model
};

AnyMuscleModel AdductorBrevisMid2Par =
{
 AnyFolder &MuscleParameters = .CadaverMusPar.AdductorBrevisMid;
 AnyIntVar MuscleElemNo = 2; ///< The number of this element of the muscle
 AnyIntVar MuscleElemAmount = 2; ///< The total amount of elements for this muscle
 F0 = .PCSAfactor*PCSA; // Maximum force output at optimum fiber length
 Lf0 = .FiberLengthScalePelvis
       * MuscleParameters.OptimalFiberlength
       * cos(pi/180*MuscleParameters.Pennationangle);
 Vol0 = .StrengthScalePelvis
        * MuscleParameters.VolumeScaleFactor
        * MuscleParameters.VolumeMuscleBelly/MuscleElemAmount;
 AnyVar PCSA = Vol0/Lf0;///< PCSA is calculated as muscle volume divided between muscle branches, divided by fiber length and corrected for the pennation angle not used in the simple muscle model
};


///////////////////////////////////////////////
//     AdductorBrevisDistal (2 elements)     //
///////////////////////////////////////////////
AnyMuscleModel AdductorBrevisDistal1Par =
{
 AnyFolder &MuscleParameters = .CadaverMusPar.AdductorBrevisDistal;
 AnyIntVar MuscleElemNo = 1; ///< The number of this element of the muscle
 AnyIntVar MuscleElemAmount = 2; ///< The total amount of elements for this muscle
 F0 = .PCSAfactor*PCSA; // Maximum force output at optimum fiber length
 Lf0 = .FiberLengthScalePelvis
       * MuscleParameters.OptimalFiberlength
       * cos(pi/180*MuscleParameters.Pennationangle);
 Vol0 = .StrengthScalePelvis
        * MuscleParameters.VolumeScaleFactor
        * MuscleParameters.VolumeMuscleBelly/MuscleElemAmount;
 AnyVar PCSA = Vol0/Lf0;///< PCSA is calculated as muscle volume divided between muscle branches, divided by fiber length and corrected for the pennation angle not used in the simple muscle model
};

AnyMuscleModel AdductorBrevisDistal2Par =
{
 AnyFolder &MuscleParameters = .CadaverMusPar.AdductorBrevisDistal;
 AnyIntVar MuscleElemNo = 2; ///< The number of this element of the muscle
 AnyIntVar MuscleElemAmount = 2; ///< The total amount of elements for this muscle
 F0 = .PCSAfactor*PCSA; // Maximum force output at optimum fiber length
 Lf0 = .FiberLengthScalePelvis
       * MuscleParameters.OptimalFiberlength
       * cos(pi/180*MuscleParameters.Pennationangle);
 Vol0 = .StrengthScalePelvis
        * MuscleParameters.VolumeScaleFactor
        * MuscleParameters.VolumeMuscleBelly/MuscleElemAmount;
 AnyVar PCSA = Vol0/Lf0;///< PCSA is calculated as muscle volume divided between muscle branches, divided by fiber length and corrected for the pennation angle not used in the simple muscle model
};


/////////////////////////////////////////
//     AdductorLongus (6 elements)     //
/////////////////////////////////////////
AnyMuscleModel AdductorLongus1Par =
{
 AnyFolder &MuscleParameters = .CadaverMusPar.AdductorLongus;
 AnyIntVar MuscleElemNo = 1; ///< The number of this element of the muscle
 AnyIntVar MuscleElemAmount = 6; ///< The total amount of elements for this muscle
 F0 = .PCSAfactor*PCSA; // Maximum force output at optimum fiber length
 Lf0 = .FiberLengthScaleThigh
       * MuscleParameters.OptimalFiberlength
       * cos(pi/180*MuscleParameters.Pennationangle);
 Vol0 = .StrengthScaleThigh
        * MuscleParameters.VolumeScaleFactor
        * MuscleParameters.VolumeMuscleBelly/MuscleElemAmount;
 AnyVar PCSA = Vol0/Lf0;///< PCSA is calculated as muscle volume divided between muscle branches, divided by fiber length and corrected for the pennation angle not used in the simple muscle model
};

AnyMuscleModel AdductorLongus2Par =
{
 AnyFolder &MuscleParameters = .CadaverMusPar.AdductorLongus;
 AnyIntVar MuscleElemNo = 2; ///< The number of this element of the muscle
 AnyIntVar MuscleElemAmount = 6; ///< The total amount of elements for this muscle
 F0 = .PCSAfactor*PCSA; // Maximum force output at optimum fiber length
 Lf0 = .FiberLengthScaleThigh
       * MuscleParameters.OptimalFiberlength
       * cos(pi/180*MuscleParameters.Pennationangle);
 Vol0 = .StrengthScaleThigh
        * MuscleParameters.VolumeScaleFactor
        * MuscleParameters.VolumeMuscleBelly/MuscleElemAmount;
 AnyVar PCSA = Vol0/Lf0;///< PCSA is calculated as muscle volume divided between muscle branches, divided by fiber length and corrected for the pennation angle not used in the simple muscle model
};

AnyMuscleModel AdductorLongus3Par =
{
 AnyFolder &MuscleParameters = .CadaverMusPar.AdductorLongus;
 AnyIntVar MuscleElemNo = 3; ///< The number of this element of the muscle
 AnyIntVar MuscleElemAmount = 6; ///< The total amount of elements for this muscle
 F0 = .PCSAfactor*PCSA; // Maximum force output at optimum fiber length
 Lf0 = .FiberLengthScaleThigh
       * MuscleParameters.OptimalFiberlength
       * cos(pi/180*MuscleParameters.Pennationangle);
 Vol0 = .StrengthScaleThigh
        * MuscleParameters.VolumeScaleFactor
        * MuscleParameters.VolumeMuscleBelly/MuscleElemAmount;
 AnyVar PCSA = Vol0/Lf0;///< PCSA is calculated as muscle volume divided between muscle branches, divided by fiber length and corrected for the pennation angle not used in the simple muscle model
};

AnyMuscleModel AdductorLongus4Par =
{
 AnyFolder &MuscleParameters = .CadaverMusPar.AdductorLongus;
 AnyIntVar MuscleElemNo = 4; ///< The number of this element of the muscle
 AnyIntVar MuscleElemAmount = 6; ///< The total amount of elements for this muscle
 F0 = .PCSAfactor*PCSA; // Maximum force output at optimum fiber length
 Lf0 = .FiberLengthScaleThigh
       * MuscleParameters.OptimalFiberlength
       * cos(pi/180*MuscleParameters.Pennationangle);
 Vol0 = .StrengthScaleThigh
        * MuscleParameters.VolumeScaleFactor
        * MuscleParameters.VolumeMuscleBelly/MuscleElemAmount;
 AnyVar PCSA = Vol0/Lf0;///< PCSA is calculated as muscle volume divided between muscle branches, divided by fiber length and corrected for the pennation angle not used in the simple muscle model
};

AnyMuscleModel AdductorLongus5Par =
{
 AnyFolder &MuscleParameters = .CadaverMusPar.AdductorLongus;
 AnyIntVar MuscleElemNo = 5; ///< The number of this element of the muscle
 AnyIntVar MuscleElemAmount = 6; ///< The total amount of elements for this muscle
 F0 = .PCSAfactor*PCSA; // Maximum force output at optimum fiber length
 Lf0 = .FiberLengthScaleThigh
       * MuscleParameters.OptimalFiberlength
       * cos(pi/180*MuscleParameters.Pennationangle);
 Vol0 = .StrengthScaleThigh
        * MuscleParameters.VolumeScaleFactor
        * MuscleParameters.VolumeMuscleBelly/MuscleElemAmount;
 AnyVar PCSA = Vol0/Lf0;///< PCSA is calculated as muscle volume divided between muscle branches, divided by fiber length and corrected for the pennation angle not used in the simple muscle model
};

AnyMuscleModel AdductorLongus6Par =
{
 AnyFolder &MuscleParameters = .CadaverMusPar.AdductorLongus;
 AnyIntVar MuscleElemNo = 6; ///< The number of this element of the muscle
 AnyIntVar MuscleElemAmount = 6; ///< The total amount of elements for this muscle
 F0 = .PCSAfactor*PCSA; // Maximum force output at optimum fiber length
 Lf0 = .FiberLengthScaleThigh
       * MuscleParameters.OptimalFiberlength
       * cos(pi/180*MuscleParameters.Pennationangle);
 Vol0 = .StrengthScaleThigh
        * MuscleParameters.VolumeScaleFactor
        * MuscleParameters.VolumeMuscleBelly/MuscleElemAmount;
 AnyVar PCSA = Vol0/Lf0;///< PCSA is calculated as muscle volume divided between muscle branches, divided by fiber length and corrected for the pennation angle not used in the simple muscle model
};


///////////////////////////////////////////////
//     AdductorMagnusDistal (3 elements)     //
///////////////////////////////////////////////
AnyMuscleModel AdductorMagnusDistal1Par =
{
 AnyFolder &MuscleParameters = .CadaverMusPar.AdductorMagnusDistal;
 AnyIntVar MuscleElemNo = 1; ///< The number of this element of the muscle
 AnyIntVar MuscleElemAmount = 3; ///< The total amount of elements for this muscle
 F0 = .PCSAfactor*PCSA; // Maximum force output at optimum fiber length
 Lf0 = .FiberLengthScaleThigh
       * MuscleParameters.OptimalFiberlength
       * cos(pi/180*MuscleParameters.Pennationangle);
 Vol0 = .StrengthScaleThigh
        * MuscleParameters.VolumeScaleFactor
        * MuscleParameters.VolumeMuscleBelly/MuscleElemAmount;
 AnyVar PCSA = Vol0/Lf0;///< PCSA is calculated as muscle volume divided between muscle branches, divided by fiber length and corrected for the pennation angle not used in the simple muscle model
};

AnyMuscleModel AdductorMagnusDistal2Par =
{
 AnyFolder &MuscleParameters = .CadaverMusPar.AdductorMagnusDistal;
 AnyIntVar MuscleElemNo = 2; ///< The number of this element of the muscle
 AnyIntVar MuscleElemAmount = 3; ///< The total amount of elements for this muscle
 F0 = .PCSAfactor*PCSA; // Maximum force output at optimum fiber length
 Lf0 = .FiberLengthScaleThigh
       * MuscleParameters.OptimalFiberlength
       * cos(pi/180*MuscleParameters.Pennationangle);
 Vol0 = .StrengthScaleThigh
        * MuscleParameters.VolumeScaleFactor
        * MuscleParameters.VolumeMuscleBelly/MuscleElemAmount;
 AnyVar PCSA = Vol0/Lf0;///< PCSA is calculated as muscle volume divided between muscle branches, divided by fiber length and corrected for the pennation angle not used in the simple muscle model
};

AnyMuscleModel AdductorMagnusDistal3Par =
{
 AnyFolder &MuscleParameters = .CadaverMusPar.AdductorMagnusDistal;
 AnyIntVar MuscleElemNo = 3; ///< The number of this element of the muscle
 AnyIntVar MuscleElemAmount = 3; ///< The total amount of elements for this muscle
 F0 = .PCSAfactor*PCSA; // Maximum force output at optimum fiber length
 Lf0 = .FiberLengthScaleThigh
       * MuscleParameters.OptimalFiberlength
       * cos(pi/180*MuscleParameters.Pennationangle);
 Vol0 = .StrengthScaleThigh
        * MuscleParameters.VolumeScaleFactor
        * MuscleParameters.VolumeMuscleBelly/MuscleElemAmount;
 AnyVar PCSA = Vol0/Lf0;///< PCSA is calculated as muscle volume divided between muscle branches, divided by fiber length and corrected for the pennation angle not used in the simple muscle model
};


////////////////////////////////////////////
//     AdductorMagnusMid (6 elements)     //
////////////////////////////////////////////
AnyMuscleModel AdductorMagnusMid1Par =
{
 AnyFolder &MuscleParameters = .CadaverMusPar.AdductorMagnusMid;
 AnyIntVar MuscleElemNo = 1; ///< The number of this element of the muscle
 AnyIntVar MuscleElemAmount = 6; ///< The total amount of elements for this muscle
 F0 = .PCSAfactor*PCSA; // Maximum force output at optimum fiber length
 Lf0 = .FiberLengthScaleThigh
       * MuscleParameters.OptimalFiberlength
       * cos(pi/180*MuscleParameters.Pennationangle);
 Vol0 = .StrengthScaleThigh
        * MuscleParameters.VolumeScaleFactor
        * MuscleParameters.VolumeMuscleBelly/MuscleElemAmount;
 AnyVar PCSA = Vol0/Lf0;///< PCSA is calculated as muscle volume divided between muscle branches, divided by fiber length and corrected for the pennation angle not used in the simple muscle model
};

AnyMuscleModel AdductorMagnusMid2Par =
{
 AnyFolder &MuscleParameters = .CadaverMusPar.AdductorMagnusMid;
 AnyIntVar MuscleElemNo = 2; ///< The number of this element of the muscle
 AnyIntVar MuscleElemAmount = 6; ///< The total amount of elements for this muscle
 F0 = .PCSAfactor*PCSA; // Maximum force output at optimum fiber length
 Lf0 = .FiberLengthScaleThigh
       * MuscleParameters.OptimalFiberlength
       * cos(pi/180*MuscleParameters.Pennationangle);
 Vol0 = .StrengthScaleThigh
        * MuscleParameters.VolumeScaleFactor
        * MuscleParameters.VolumeMuscleBelly/MuscleElemAmount;
 AnyVar PCSA = Vol0/Lf0;///< PCSA is calculated as muscle volume divided between muscle branches, divided by fiber length and corrected for the pennation angle not used in the simple muscle model
};

AnyMuscleModel AdductorMagnusMid3Par =
{
 AnyFolder &MuscleParameters = .CadaverMusPar.AdductorMagnusMid;
 AnyIntVar MuscleElemNo = 3; ///< The number of this element of the muscle
 AnyIntVar MuscleElemAmount = 6; ///< The total amount of elements for this muscle
 F0 = .PCSAfactor*PCSA; // Maximum force output at optimum fiber length
 Lf0 = .FiberLengthScaleThigh
       * MuscleParameters.OptimalFiberlength
       * cos(pi/180*MuscleParameters.Pennationangle);
 Vol0 = .StrengthScaleThigh
        * MuscleParameters.VolumeScaleFactor
        * MuscleParameters.VolumeMuscleBelly/MuscleElemAmount;
 AnyVar PCSA = Vol0/Lf0;///< PCSA is calculated as muscle volume divided between muscle branches, divided by fiber length and corrected for the pennation angle not used in the simple muscle model
};

AnyMuscleModel AdductorMagnusMid4Par =
{
 AnyFolder &MuscleParameters = .CadaverMusPar.AdductorMagnusMid;
 AnyIntVar MuscleElemNo = 4; ///< The number of this element of the muscle
 AnyIntVar MuscleElemAmount = 6; ///< The total amount of elements for this muscle
 F0 = .PCSAfactor*PCSA; // Maximum force output at optimum fiber length
 Lf0 = .FiberLengthScaleThigh
       * MuscleParameters.OptimalFiberlength
       * cos(pi/180*MuscleParameters.Pennationangle);
 Vol0 = .StrengthScaleThigh
        * MuscleParameters.VolumeScaleFactor
        * MuscleParameters.VolumeMuscleBelly/MuscleElemAmount;
 AnyVar PCSA = Vol0/Lf0;///< PCSA is calculated as muscle volume divided between muscle branches, divided by fiber length and corrected for the pennation angle not used in the simple muscle model
};

AnyMuscleModel AdductorMagnusMid5Par =
{
 AnyFolder &MuscleParameters = .CadaverMusPar.AdductorMagnusMid;
 AnyIntVar MuscleElemNo = 5; ///< The number of this element of the muscle
 AnyIntVar MuscleElemAmount = 6; ///< The total amount of elements for this muscle
 F0 = .PCSAfactor*PCSA; // Maximum force output at optimum fiber length
 Lf0 = .FiberLengthScaleThigh
       * MuscleParameters.OptimalFiberlength
       * cos(pi/180*MuscleParameters.Pennationangle);
 Vol0 = .StrengthScaleThigh
        * MuscleParameters.VolumeScaleFactor
        * MuscleParameters.VolumeMuscleBelly/MuscleElemAmount;
 AnyVar PCSA = Vol0/Lf0;///< PCSA is calculated as muscle volume divided between muscle branches, divided by fiber length and corrected for the pennation angle not used in the simple muscle model
};

AnyMuscleModel AdductorMagnusMid6Par =
{
 AnyFolder &MuscleParameters = .CadaverMusPar.AdductorMagnusMid;
 AnyIntVar MuscleElemNo = 6; ///< The number of this element of the muscle
 AnyIntVar MuscleElemAmount = 6; ///< The total amount of elements for this muscle
 F0 = .PCSAfactor*PCSA; // Maximum force output at optimum fiber length
 Lf0 = .FiberLengthScaleThigh
       * MuscleParameters.OptimalFiberlength
       * cos(pi/180*MuscleParameters.Pennationangle);
 Vol0 = .StrengthScaleThigh
        * MuscleParameters.VolumeScaleFactor
        * MuscleParameters.VolumeMuscleBelly/MuscleElemAmount;
 AnyVar PCSA = Vol0/Lf0;///< PCSA is calculated as muscle volume divided between muscle branches, divided by fiber length and corrected for the pennation angle not used in the simple muscle model
};


/////////////////////////////////////////////////
//     AdductorMagnusProximal (4 elements)     //
/////////////////////////////////////////////////
AnyMuscleModel AdductorMagnusProximal1Par =
{
 AnyFolder &MuscleParameters = .CadaverMusPar.AdductorMagnusProximal;
 AnyIntVar MuscleElemNo = 1; ///< The number of this element of the muscle
 AnyIntVar MuscleElemAmount = 4; ///< The total amount of elements for this muscle
 F0 = .PCSAfactor*PCSA; // Maximum force output at optimum fiber length
 Lf0 = .FiberLengthScaleThigh
       * MuscleParameters.OptimalFiberlength
       * cos(pi/180*MuscleParameters.Pennationangle);
 Vol0 = .StrengthScaleThigh
        * MuscleParameters.VolumeScaleFactor
        * MuscleParameters.VolumeMuscleBelly/MuscleElemAmount;
 AnyVar PCSA = Vol0/Lf0;///< PCSA is calculated as muscle volume divided between muscle branches, divided by fiber length and corrected for the pennation angle not used in the simple muscle model
};

AnyMuscleModel AdductorMagnusProximal2Par =
{
 AnyFolder &MuscleParameters = .CadaverMusPar.AdductorMagnusProximal;
 AnyIntVar MuscleElemNo = 2; ///< The number of this element of the muscle
 AnyIntVar MuscleElemAmount = 4; ///< The total amount of elements for this muscle
 F0 = .PCSAfactor*PCSA; // Maximum force output at optimum fiber length
 Lf0 = .FiberLengthScaleThigh
       * MuscleParameters.OptimalFiberlength
       * cos(pi/180*MuscleParameters.Pennationangle);
 Vol0 = .StrengthScaleThigh
        * MuscleParameters.VolumeScaleFactor
        * MuscleParameters.VolumeMuscleBelly/MuscleElemAmount;
 AnyVar PCSA = Vol0/Lf0;///< PCSA is calculated as muscle volume divided between muscle branches, divided by fiber length and corrected for the pennation angle not used in the simple muscle model
};

AnyMuscleModel AdductorMagnusProximal3Par =
{
 AnyFolder &MuscleParameters = .CadaverMusPar.AdductorMagnusProximal;
 AnyIntVar MuscleElemNo = 3; ///< The number of this element of the muscle
 AnyIntVar MuscleElemAmount = 4; ///< The total amount of elements for this muscle
 F0 = .PCSAfactor*PCSA; // Maximum force output at optimum fiber length
 Lf0 = .FiberLengthScaleThigh
       * MuscleParameters.OptimalFiberlength
       * cos(pi/180*MuscleParameters.Pennationangle);
 Vol0 = .StrengthScaleThigh
        * MuscleParameters.VolumeScaleFactor
        * MuscleParameters.VolumeMuscleBelly/MuscleElemAmount;
 AnyVar PCSA = Vol0/Lf0;///< PCSA is calculated as muscle volume divided between muscle branches, divided by fiber length and corrected for the pennation angle not used in the simple muscle model
};

AnyMuscleModel AdductorMagnusProximal4Par =
{
 AnyFolder &MuscleParameters = .CadaverMusPar.AdductorMagnusProximal;
 AnyIntVar MuscleElemNo = 4; ///< The number of this element of the muscle
 AnyIntVar MuscleElemAmount = 4; ///< The total amount of elements for this muscle
 F0 = .PCSAfactor*PCSA; // Maximum force output at optimum fiber length
 Lf0 = .FiberLengthScaleThigh
       * MuscleParameters.OptimalFiberlength
       * cos(pi/180*MuscleParameters.Pennationangle);
 Vol0 = .StrengthScaleThigh
        * MuscleParameters.VolumeScaleFactor
        * MuscleParameters.VolumeMuscleBelly/MuscleElemAmount;
 AnyVar PCSA = Vol0/Lf0;///< PCSA is calculated as muscle volume divided between muscle branches, divided by fiber length and corrected for the pennation angle not used in the simple muscle model
};


///////////////////////////////////////////////////
//     BicepsFemorisCaputLongum (1 element )     //
///////////////////////////////////////////////////
AnyMuscleModel BicepsFemorisCaputLongum1Par =
{
 AnyFolder &MuscleParameters = .CadaverMusPar.BicepsFemorisCaputLongum;
 AnyIntVar MuscleElemNo = 1; ///< The number of this element of the muscle
 AnyIntVar MuscleElemAmount = 1; ///< The total amount of elements for this muscle
 F0 = .PCSAfactor*PCSA; // Maximum force output at optimum fiber length
 Lf0 = .FiberLengthScaleThigh
       * MuscleParameters.OptimalFiberlength
       * cos(pi/180*MuscleParameters.Pennationangle);
 Vol0 = .StrengthScaleThigh
        * MuscleParameters.VolumeScaleFactor
        * MuscleParameters.VolumeMuscleBelly/MuscleElemAmount;
 AnyVar PCSA = Vol0/Lf0;///< PCSA is calculated as muscle volume divided between muscle branches, divided by fiber length and corrected for the pennation angle not used in the simple muscle model
};


//////////////////////////////////////////////////
//     BicepsFemorisCaputBreve (3 elements)     //
//////////////////////////////////////////////////
AnyMuscleModel BicepsFemorisCaputBreve1Par =
{
 AnyFolder &MuscleParameters = .CadaverMusPar.BicepsFemorisCaputBreve;
 AnyIntVar MuscleElemNo = 1; ///< The number of this element of the muscle
 AnyIntVar MuscleElemAmount = 3; ///< The total amount of elements for this muscle
 F0 = .PCSAfactor*PCSA; // Maximum force output at optimum fiber length
 Lf0 = .FiberLengthScaleThigh
       * MuscleParameters.OptimalFiberlength
       * cos(pi/180*MuscleParameters.Pennationangle);
 Vol0 = .StrengthScaleThigh
        * MuscleParameters.VolumeScaleFactor
        * MuscleParameters.VolumeMuscleBelly/MuscleElemAmount;
 AnyVar PCSA = Vol0/Lf0;///< PCSA is calculated as muscle volume divided between muscle branches, divided by fiber length and corrected for the pennation angle not used in the simple muscle model
};

AnyMuscleModel BicepsFemorisCaputBreve2Par =
{
 AnyFolder &MuscleParameters = .CadaverMusPar.BicepsFemorisCaputBreve;
 AnyIntVar MuscleElemNo = 2; ///< The number of this element of the muscle
 AnyIntVar MuscleElemAmount = 3; ///< The total amount of elements for this muscle
 F0 = .PCSAfactor*PCSA; // Maximum force output at optimum fiber length
 Lf0 = .FiberLengthScaleThigh
       * MuscleParameters.OptimalFiberlength
       * cos(pi/180*MuscleParameters.Pennationangle);
 Vol0 = .StrengthScaleThigh
        * MuscleParameters.VolumeScaleFactor
        * MuscleParameters.VolumeMuscleBelly/MuscleElemAmount;
 AnyVar PCSA = Vol0/Lf0;///< PCSA is calculated as muscle volume divided between muscle branches, divided by fiber length and corrected for the pennation angle not used in the simple muscle model
};

AnyMuscleModel BicepsFemorisCaputBreve3Par =
{
 AnyFolder &MuscleParameters = .CadaverMusPar.BicepsFemorisCaputBreve;
 AnyIntVar MuscleElemNo = 3; ///< The number of this element of the muscle
 AnyIntVar MuscleElemAmount = 3; ///< The total amount of elements for this muscle
 F0 = .PCSAfactor*PCSA; // Maximum force output at optimum fiber length
 Lf0 = .FiberLengthScaleThigh
       * MuscleParameters.OptimalFiberlength
       * cos(pi/180*MuscleParameters.Pennationangle);
 Vol0 = .StrengthScaleThigh
        * MuscleParameters.VolumeScaleFactor
        * MuscleParameters.VolumeMuscleBelly/MuscleElemAmount;
 AnyVar PCSA = Vol0/Lf0;///< PCSA is calculated as muscle volume divided between muscle branches, divided by fiber length and corrected for the pennation angle not used in the simple muscle model
};


//////////////////////////////////////////////////
//     ExtensorDigitorumLongus (4 elements)     //
//////////////////////////////////////////////////
AnyMuscleModel ExtensorDigitorumLongus1Par =
{
 AnyFolder &MuscleParameters = .CadaverMusPar.ExtensorDigitorumLongus;
 AnyIntVar MuscleElemNo = 1; ///< The number of this element of the muscle
 AnyIntVar MuscleElemAmount = 4; ///< The total amount of elements for this muscle
 F0 = .PCSAfactor*PCSA; // Maximum force output at optimum fiber length
 Lf0 = .FiberLengthScaleShank
       * MuscleParameters.OptimalFiberlength
       * cos(pi/180*MuscleParameters.Pennationangle);
 Vol0 = .StrengthScaleShank
        * MuscleParameters.VolumeScaleFactor
        * MuscleParameters.VolumeMuscleBelly/MuscleElemAmount;
 AnyVar PCSA = Vol0/Lf0;///< PCSA is calculated as muscle volume divided between muscle branches, divided by fiber length and corrected for the pennation angle not used in the simple muscle model
};

AnyMuscleModel ExtensorDigitorumLongus2Par =
{
 AnyFolder &MuscleParameters = .CadaverMusPar.ExtensorDigitorumLongus;
 AnyIntVar MuscleElemNo = 2; ///< The number of this element of the muscle
 AnyIntVar MuscleElemAmount = 4; ///< The total amount of elements for this muscle
 F0 = .PCSAfactor*PCSA; // Maximum force output at optimum fiber length
 Lf0 = .FiberLengthScaleShank
       * MuscleParameters.OptimalFiberlength
       * cos(pi/180*MuscleParameters.Pennationangle);
 Vol0 = .StrengthScaleShank
        * MuscleParameters.VolumeScaleFactor
        * MuscleParameters.VolumeMuscleBelly/MuscleElemAmount;
 AnyVar PCSA = Vol0/Lf0;///< PCSA is calculated as muscle volume divided between muscle branches, divided by fiber length and corrected for the pennation angle not used in the simple muscle model
};

AnyMuscleModel ExtensorDigitorumLongus3Par =
{
 AnyFolder &MuscleParameters = .CadaverMusPar.ExtensorDigitorumLongus;
 AnyIntVar MuscleElemNo = 3; ///< The number of this element of the muscle
 AnyIntVar MuscleElemAmount = 4; ///< The total amount of elements for this muscle
 F0 = .PCSAfactor*PCSA; // Maximum force output at optimum fiber length
 Lf0 = .FiberLengthScaleShank
       * MuscleParameters.OptimalFiberlength
       * cos(pi/180*MuscleParameters.Pennationangle);
 Vol0 = .StrengthScaleShank
        * MuscleParameters.VolumeScaleFactor
        * MuscleParameters.VolumeMuscleBelly/MuscleElemAmount;
 AnyVar PCSA = Vol0/Lf0;///< PCSA is calculated as muscle volume divided between muscle branches, divided by fiber length and corrected for the pennation angle not used in the simple muscle model
};

AnyMuscleModel ExtensorDigitorumLongus4Par =
{
 AnyFolder &MuscleParameters = .CadaverMusPar.ExtensorDigitorumLongus;
 AnyIntVar MuscleElemNo = 4; ///< The number of this element of the muscle
 AnyIntVar MuscleElemAmount = 4; ///< The total amount of elements for this muscle
 F0 = .PCSAfactor*PCSA; // Maximum force output at optimum fiber length
 Lf0 = .FiberLengthScaleShank
       * MuscleParameters.OptimalFiberlength
       * cos(pi/180*MuscleParameters.Pennationangle);
 Vol0 = .StrengthScaleShank
        * MuscleParameters.VolumeScaleFactor
        * MuscleParameters.VolumeMuscleBelly/MuscleElemAmount;
 AnyVar PCSA = Vol0/Lf0;///< PCSA is calculated as muscle volume divided between muscle branches, divided by fiber length and corrected for the pennation angle not used in the simple muscle model
};


/////////////////////////////////////////////////
//     ExtensorHallucisLongus (3 elements)     //
/////////////////////////////////////////////////
AnyMuscleModel ExtensorHallucisLongus1Par =
{
 AnyFolder &MuscleParameters = .CadaverMusPar.ExtensorHallucisLongus;
 AnyIntVar MuscleElemNo = 1; ///< The number of this element of the muscle
 AnyIntVar MuscleElemAmount = 3; ///< The total amount of elements for this muscle
 F0 = .PCSAfactor*PCSA; // Maximum force output at optimum fiber length
 Lf0 = .FiberLengthScaleShank
       * MuscleParameters.OptimalFiberlength
       * cos(pi/180*MuscleParameters.Pennationangle);
 Vol0 = .StrengthScaleShank
        * MuscleParameters.VolumeScaleFactor
        * MuscleParameters.VolumeMuscleBelly/MuscleElemAmount;
 AnyVar PCSA = Vol0/Lf0;///< PCSA is calculated as muscle volume divided between muscle branches, divided by fiber length and corrected for the pennation angle not used in the simple muscle model
};

AnyMuscleModel ExtensorHallucisLongus2Par =
{
 AnyFolder &MuscleParameters = .CadaverMusPar.ExtensorHallucisLongus;
 AnyIntVar MuscleElemNo = 2; ///< The number of this element of the muscle
 AnyIntVar MuscleElemAmount = 3; ///< The total amount of elements for this muscle
 F0 = .PCSAfactor*PCSA; // Maximum force output at optimum fiber length
 Lf0 = .FiberLengthScaleShank
       * MuscleParameters.OptimalFiberlength
       * cos(pi/180*MuscleParameters.Pennationangle);
 Vol0 = .StrengthScaleShank
        * MuscleParameters.VolumeScaleFactor
        * MuscleParameters.VolumeMuscleBelly/MuscleElemAmount;
 AnyVar PCSA = Vol0/Lf0;///< PCSA is calculated as muscle volume divided between muscle branches, divided by fiber length and corrected for the pennation angle not used in the simple muscle model
};

AnyMuscleModel ExtensorHallucisLongus3Par =
{
 AnyFolder &MuscleParameters = .CadaverMusPar.ExtensorHallucisLongus;
 AnyIntVar MuscleElemNo = 3; ///< The number of this element of the muscle
 AnyIntVar MuscleElemAmount = 3; ///< The total amount of elements for this muscle
 F0 = .PCSAfactor*PCSA; // Maximum force output at optimum fiber length
 Lf0 = .FiberLengthScaleShank
       * MuscleParameters.OptimalFiberlength
       * cos(pi/180*MuscleParameters.Pennationangle);
 Vol0 = .StrengthScaleShank
        * MuscleParameters.VolumeScaleFactor
        * MuscleParameters.VolumeMuscleBelly/MuscleElemAmount;
 AnyVar PCSA = Vol0/Lf0;///< PCSA is calculated as muscle volume divided between muscle branches, divided by fiber length and corrected for the pennation angle not used in the simple muscle model
};


////////////////////////////////////////////////
//     FlexorDigitorumLongus (4 elements)     //
////////////////////////////////////////////////
AnyMuscleModel FlexorDigitorumLongus1Par =
{
 AnyFolder &MuscleParameters = .CadaverMusPar.FlexorDigitorumLongus;
 AnyIntVar MuscleElemNo = 1; ///< The number of this element of the muscle
 AnyIntVar MuscleElemAmount = 4; ///< The total amount of elements for this muscle
 F0 = .PCSAfactor*PCSA; // Maximum force output at optimum fiber length
 Lf0 = .FiberLengthScaleShank
       * MuscleParameters.OptimalFiberlength
       * cos(pi/180*MuscleParameters.Pennationangle);
 Vol0 = .StrengthScaleShank
        * MuscleParameters.VolumeScaleFactor
        * MuscleParameters.VolumeMuscleBelly/MuscleElemAmount;
 AnyVar PCSA = Vol0/Lf0;///< PCSA is calculated as muscle volume divided between muscle branches, divided by fiber length and corrected for the pennation angle not used in the simple muscle model
};

AnyMuscleModel FlexorDigitorumLongus2Par =
{
 AnyFolder &MuscleParameters = .CadaverMusPar.FlexorDigitorumLongus;
 AnyIntVar MuscleElemNo = 2; ///< The number of this element of the muscle
 AnyIntVar MuscleElemAmount = 4; ///< The total amount of elements for this muscle
 F0 = .PCSAfactor*PCSA; // Maximum force output at optimum fiber length
 Lf0 = .FiberLengthScaleShank
       * MuscleParameters.OptimalFiberlength
       * cos(pi/180*MuscleParameters.Pennationangle);
 Vol0 = .StrengthScaleShank
        * MuscleParameters.VolumeScaleFactor
        * MuscleParameters.VolumeMuscleBelly/MuscleElemAmount;
 AnyVar PCSA = Vol0/Lf0;///< PCSA is calculated as muscle volume divided between muscle branches, divided by fiber length and corrected for the pennation angle not used in the simple muscle model
};

AnyMuscleModel FlexorDigitorumLongus3Par =
{
 AnyFolder &MuscleParameters = .CadaverMusPar.FlexorDigitorumLongus;
 AnyIntVar MuscleElemNo = 3; ///< The number of this element of the muscle
 AnyIntVar MuscleElemAmount = 4; ///< The total amount of elements for this muscle
 F0 = .PCSAfactor*PCSA; // Maximum force output at optimum fiber length
 Lf0 = .FiberLengthScaleShank
       * MuscleParameters.OptimalFiberlength
       * cos(pi/180*MuscleParameters.Pennationangle);
 Vol0 = .StrengthScaleShank
        * MuscleParameters.VolumeScaleFactor
        * MuscleParameters.VolumeMuscleBelly/MuscleElemAmount;
 AnyVar PCSA = Vol0/Lf0;///< PCSA is calculated as muscle volume divided between muscle branches, divided by fiber length and corrected for the pennation angle not used in the simple muscle model
};

AnyMuscleModel FlexorDigitorumLongus4Par =
{
 AnyFolder &MuscleParameters = .CadaverMusPar.FlexorDigitorumLongus;
 AnyIntVar MuscleElemNo = 4; ///< The number of this element of the muscle
 AnyIntVar MuscleElemAmount = 4; ///< The total amount of elements for this muscle
 F0 = .PCSAfactor*PCSA; // Maximum force output at optimum fiber length
 Lf0 = .FiberLengthScaleShank
       * MuscleParameters.OptimalFiberlength
       * cos(pi/180*MuscleParameters.Pennationangle);
 Vol0 = .StrengthScaleShank
        * MuscleParameters.VolumeScaleFactor
        * MuscleParameters.VolumeMuscleBelly/MuscleElemAmount;
 AnyVar PCSA = Vol0/Lf0;///< PCSA is calculated as muscle volume divided between muscle branches, divided by fiber length and corrected for the pennation angle not used in the simple muscle model
};


///////////////////////////////////////////////
//     FlexorHallucisLongus (3 elements)     //
///////////////////////////////////////////////
AnyMuscleModel FlexorHallucisLongus1Par =
{
 AnyFolder &MuscleParameters = .CadaverMusPar.FlexorHallucisLongus;
 AnyIntVar MuscleElemNo = 1; ///< The number of this element of the muscle
 AnyIntVar MuscleElemAmount = 3; ///< The total amount of elements for this muscle
 F0 = .PCSAfactor*PCSA; // Maximum force output at optimum fiber length
 Lf0 = .FiberLengthScaleShank
       * MuscleParameters.OptimalFiberlength
       * cos(pi/180*MuscleParameters.Pennationangle);
 Vol0 = .StrengthScaleShank
        * MuscleParameters.VolumeScaleFactor
        * MuscleParameters.VolumeMuscleBelly/MuscleElemAmount;
 AnyVar PCSA = Vol0/Lf0;///< PCSA is calculated as muscle volume divided between muscle branches, divided by fiber length and corrected for the pennation angle not used in the simple muscle model
};

AnyMuscleModel FlexorHallucisLongus2Par =
{
 AnyFolder &MuscleParameters = .CadaverMusPar.FlexorHallucisLongus;
 AnyIntVar MuscleElemNo = 2; ///< The number of this element of the muscle
 AnyIntVar MuscleElemAmount = 3; ///< The total amount of elements for this muscle
 F0 = .PCSAfactor*PCSA; // Maximum force output at optimum fiber length
 Lf0 = .FiberLengthScaleShank
       * MuscleParameters.OptimalFiberlength
       * cos(pi/180*MuscleParameters.Pennationangle);
 Vol0 = .StrengthScaleShank
        * MuscleParameters.VolumeScaleFactor
        * MuscleParameters.VolumeMuscleBelly/MuscleElemAmount;
 AnyVar PCSA = Vol0/Lf0;///< PCSA is calculated as muscle volume divided between muscle branches, divided by fiber length and corrected for the pennation angle not used in the simple muscle model
};

AnyMuscleModel FlexorHallucisLongus3Par =
{
 AnyFolder &MuscleParameters = .CadaverMusPar.FlexorHallucisLongus;
 AnyIntVar MuscleElemNo = 3; ///< The number of this element of the muscle
 AnyIntVar MuscleElemAmount = 3; ///< The total amount of elements for this muscle
 F0 = .PCSAfactor*PCSA; // Maximum force output at optimum fiber length
 Lf0 = .FiberLengthScaleShank
       * MuscleParameters.OptimalFiberlength
       * cos(pi/180*MuscleParameters.Pennationangle);
 Vol0 = .StrengthScaleShank
        * MuscleParameters.VolumeScaleFactor
        * MuscleParameters.VolumeMuscleBelly/MuscleElemAmount;
 AnyVar PCSA = Vol0/Lf0;///< PCSA is calculated as muscle volume divided between muscle branches, divided by fiber length and corrected for the pennation angle not used in the simple muscle model
};


/////////////////////////////////////////////////
//     GastrocnemiusLateralis (1 element )     //
/////////////////////////////////////////////////
AnyMuscleModel GastrocnemiusLateralis1Par =
{
 AnyFolder &MuscleParameters = .CadaverMusPar.GastrocnemiusLateralis;
 AnyIntVar MuscleElemNo = 1; ///< The number of this element of the muscle
 AnyIntVar MuscleElemAmount = 1; ///< The total amount of elements for this muscle
 F0 = .PCSAfactor*PCSA; // Maximum force output at optimum fiber length
 Lf0 = .FiberLengthScaleShank
       * MuscleParameters.OptimalFiberlength
       * cos(pi/180*MuscleParameters.Pennationangle);
 Vol0 = .StrengthScaleShank
        * MuscleParameters.VolumeScaleFactor
        * MuscleParameters.VolumeMuscleBelly/MuscleElemAmount;
 AnyVar PCSA = Vol0/Lf0;///< PCSA is calculated as muscle volume divided between muscle branches, divided by fiber length and corrected for the pennation angle not used in the simple muscle model
};


////////////////////////////////////////////////
//     GastrocnemiusMedialis (1 element )     //
////////////////////////////////////////////////
AnyMuscleModel GastrocnemiusMedialis1Par =
{
 AnyFolder &MuscleParameters = .CadaverMusPar.GastrocnemiusMedialis;
 AnyIntVar MuscleElemNo = 1; ///< The number of this element of the muscle
 AnyIntVar MuscleElemAmount = 1; ///< The total amount of elements for this muscle
 F0 = .PCSAfactor*PCSA; // Maximum force output at optimum fiber length
 Lf0 = .FiberLengthScaleShank
       * MuscleParameters.OptimalFiberlength
       * cos(pi/180*MuscleParameters.Pennationangle);
 Vol0 = .StrengthScaleShank
        * MuscleParameters.VolumeScaleFactor
        * MuscleParameters.VolumeMuscleBelly/MuscleElemAmount;
 AnyVar PCSA = Vol0/Lf0;///< PCSA is calculated as muscle volume divided between muscle branches, divided by fiber length and corrected for the pennation angle not used in the simple muscle model
};


///////////////////////////////////////////
//     GemellusInferior (1 element )     //
///////////////////////////////////////////
AnyMuscleModel GemellusInferior1Par =
{
 AnyFolder &MuscleParameters = .CadaverMusPar.GemellusInferior;
 AnyIntVar MuscleElemNo = 1; ///< The number of this element of the muscle
 AnyIntVar MuscleElemAmount = 1; ///< The total amount of elements for this muscle
 F0 = .PCSAfactor*PCSA; // Maximum force output at optimum fiber length
 Lf0 = .FiberLengthScalePelvis
       * MuscleParameters.OptimalFiberlength
       * cos(pi/180*MuscleParameters.Pennationangle);
 Vol0 = .StrengthScalePelvis
        * MuscleParameters.VolumeScaleFactor
        * MuscleParameters.VolumeMuscleBelly/MuscleElemAmount;
 AnyVar PCSA = Vol0/Lf0;///< PCSA is calculated as muscle volume divided between muscle branches, divided by fiber length and corrected for the pennation angle not used in the simple muscle model
};


///////////////////////////////////////////
//     GemellusSuperior (1 element )     //
///////////////////////////////////////////
AnyMuscleModel GemellusSuperior1Par =
{
 AnyFolder &MuscleParameters = .CadaverMusPar.GemellusSuperior;
 AnyIntVar MuscleElemNo = 1; ///< The number of this element of the muscle
 AnyIntVar MuscleElemAmount = 1; ///< The total amount of elements for this muscle
 F0 = .PCSAfactor*PCSA; // Maximum force output at optimum fiber length
 Lf0 = .FiberLengthScalePelvis
       * MuscleParameters.OptimalFiberlength
       * cos(pi/180*MuscleParameters.Pennationangle);
 Vol0 = .StrengthScalePelvis
        * MuscleParameters.VolumeScaleFactor
        * MuscleParameters.VolumeMuscleBelly/MuscleElemAmount;
 AnyVar PCSA = Vol0/Lf0;///< PCSA is calculated as muscle volume divided between muscle branches, divided by fiber length and corrected for the pennation angle not used in the simple muscle model
};


/////////////////////////////////////////////////
//     GluteusMaximusSuperior (6 elements)     //
/////////////////////////////////////////////////
AnyMuscleModel GluteusMaximusSuperior1Par =
{
 AnyFolder &MuscleParameters = .CadaverMusPar.GluteusMaximusSuperior;
 AnyIntVar MuscleElemNo = 1; ///< The number of this element of the muscle
 AnyIntVar MuscleElemAmount = 6; ///< The total amount of elements for this muscle
 F0 = .PCSAfactor*PCSA; // Maximum force output at optimum fiber length
 Lf0 = .FiberLengthScaleThigh
       * MuscleParameters.OptimalFiberlength
       * cos(pi/180*MuscleParameters.Pennationangle);
 Vol0 = .StrengthScaleThigh
        * MuscleParameters.VolumeScaleFactor
        * MuscleParameters.VolumeMuscleBelly/MuscleElemAmount;
 AnyVar PCSA = Vol0/Lf0;///< PCSA is calculated as muscle volume divided between muscle branches, divided by fiber length and corrected for the pennation angle not used in the simple muscle model
};

AnyMuscleModel GluteusMaximusSuperior2Par =
{
 AnyFolder &MuscleParameters = .CadaverMusPar.GluteusMaximusSuperior;
 AnyIntVar MuscleElemNo = 2; ///< The number of this element of the muscle
 AnyIntVar MuscleElemAmount = 6; ///< The total amount of elements for this muscle
 F0 = .PCSAfactor*PCSA; // Maximum force output at optimum fiber length
 Lf0 = .FiberLengthScaleThigh
       * MuscleParameters.OptimalFiberlength
       * cos(pi/180*MuscleParameters.Pennationangle);
 Vol0 = .StrengthScaleThigh
        * MuscleParameters.VolumeScaleFactor
        * MuscleParameters.VolumeMuscleBelly/MuscleElemAmount;
 AnyVar PCSA = Vol0/Lf0;///< PCSA is calculated as muscle volume divided between muscle branches, divided by fiber length and corrected for the pennation angle not used in the simple muscle model
};

AnyMuscleModel GluteusMaximusSuperior3Par =
{
 AnyFolder &MuscleParameters = .CadaverMusPar.GluteusMaximusSuperior;
 AnyIntVar MuscleElemNo = 3; ///< The number of this element of the muscle
 AnyIntVar MuscleElemAmount = 6; ///< The total amount of elements for this muscle
 F0 = .PCSAfactor*PCSA; // Maximum force output at optimum fiber length
 Lf0 = .FiberLengthScaleThigh
       * MuscleParameters.OptimalFiberlength
       * cos(pi/180*MuscleParameters.Pennationangle);
 Vol0 = .StrengthScaleThigh
        * MuscleParameters.VolumeScaleFactor
        * MuscleParameters.VolumeMuscleBelly/MuscleElemAmount;
 AnyVar PCSA = Vol0/Lf0;///< PCSA is calculated as muscle volume divided between muscle branches, divided by fiber length and corrected for the pennation angle not used in the simple muscle model
};

AnyMuscleModel GluteusMaximusSuperior4Par =
{
 AnyFolder &MuscleParameters = .CadaverMusPar.GluteusMaximusSuperior;
 AnyIntVar MuscleElemNo = 4; ///< The number of this element of the muscle
 AnyIntVar MuscleElemAmount = 6; ///< The total amount of elements for this muscle
 F0 = .PCSAfactor*PCSA; // Maximum force output at optimum fiber length
 Lf0 = .FiberLengthScaleThigh
       * MuscleParameters.OptimalFiberlength
       * cos(pi/180*MuscleParameters.Pennationangle);
 Vol0 = .StrengthScaleThigh
        * MuscleParameters.VolumeScaleFactor
        * MuscleParameters.VolumeMuscleBelly/MuscleElemAmount;
 AnyVar PCSA = Vol0/Lf0;///< PCSA is calculated as muscle volume divided between muscle branches, divided by fiber length and corrected for the pennation angle not used in the simple muscle model
};

AnyMuscleModel GluteusMaximusSuperior5Par =
{
 AnyFolder &MuscleParameters = .CadaverMusPar.GluteusMaximusSuperior;
 AnyIntVar MuscleElemNo = 5; ///< The number of this element of the muscle
 AnyIntVar MuscleElemAmount = 6; ///< The total amount of elements for this muscle
 F0 = .PCSAfactor*PCSA; // Maximum force output at optimum fiber length
 Lf0 = .FiberLengthScaleThigh
       * MuscleParameters.OptimalFiberlength
       * cos(pi/180*MuscleParameters.Pennationangle);
 Vol0 = .StrengthScaleThigh
        * MuscleParameters.VolumeScaleFactor
        * MuscleParameters.VolumeMuscleBelly/MuscleElemAmount;
 AnyVar PCSA = Vol0/Lf0;///< PCSA is calculated as muscle volume divided between muscle branches, divided by fiber length and corrected for the pennation angle not used in the simple muscle model
};

AnyMuscleModel GluteusMaximusSuperior6Par =
{
 AnyFolder &MuscleParameters = .CadaverMusPar.GluteusMaximusSuperior;
 AnyIntVar MuscleElemNo = 6; ///< The number of this element of the muscle
 AnyIntVar MuscleElemAmount = 6; ///< The total amount of elements for this muscle
 F0 = .PCSAfactor*PCSA; // Maximum force output at optimum fiber length
 Lf0 = .FiberLengthScaleThigh
       * MuscleParameters.OptimalFiberlength
       * cos(pi/180*MuscleParameters.Pennationangle);
 Vol0 = .StrengthScaleThigh
        * MuscleParameters.VolumeScaleFactor
        * MuscleParameters.VolumeMuscleBelly/MuscleElemAmount;
 AnyVar PCSA = Vol0/Lf0;///< PCSA is calculated as muscle volume divided between muscle branches, divided by fiber length and corrected for the pennation angle not used in the simple muscle model
};


/////////////////////////////////////////////////
//     GluteusMaximusInferior (6 elements)     //
/////////////////////////////////////////////////
AnyMuscleModel GluteusMaximusInferior1Par =
{
 AnyFolder &MuscleParameters = .CadaverMusPar.GluteusMaximusInferior;
 AnyIntVar MuscleElemNo = 1; ///< The number of this element of the muscle
 AnyIntVar MuscleElemAmount = 6; ///< The total amount of elements for this muscle
 F0 = .PCSAfactor*PCSA; // Maximum force output at optimum fiber length
 Lf0 = .FiberLengthScaleThigh
       * MuscleParameters.OptimalFiberlength
       * cos(pi/180*MuscleParameters.Pennationangle);
 Vol0 = .StrengthScaleThigh
        * MuscleParameters.VolumeScaleFactor
        * MuscleParameters.VolumeMuscleBelly/MuscleElemAmount;
 AnyVar PCSA = Vol0/Lf0;///< PCSA is calculated as muscle volume divided between muscle branches, divided by fiber length and corrected for the pennation angle not used in the simple muscle model
};

AnyMuscleModel GluteusMaximusInferior2Par =
{
 AnyFolder &MuscleParameters = .CadaverMusPar.GluteusMaximusInferior;
 AnyIntVar MuscleElemNo = 2; ///< The number of this element of the muscle
 AnyIntVar MuscleElemAmount = 6; ///< The total amount of elements for this muscle
 F0 = .PCSAfactor*PCSA; // Maximum force output at optimum fiber length
 Lf0 = .FiberLengthScaleThigh
       * MuscleParameters.OptimalFiberlength
       * cos(pi/180*MuscleParameters.Pennationangle);
 Vol0 = .StrengthScaleThigh
        * MuscleParameters.VolumeScaleFactor
        * MuscleParameters.VolumeMuscleBelly/MuscleElemAmount;
 AnyVar PCSA = Vol0/Lf0;///< PCSA is calculated as muscle volume divided between muscle branches, divided by fiber length and corrected for the pennation angle not used in the simple muscle model
};

AnyMuscleModel GluteusMaximusInferior3Par =
{
 AnyFolder &MuscleParameters = .CadaverMusPar.GluteusMaximusInferior;
 AnyIntVar MuscleElemNo = 3; ///< The number of this element of the muscle
 AnyIntVar MuscleElemAmount = 6; ///< The total amount of elements for this muscle
 F0 = .PCSAfactor*PCSA; // Maximum force output at optimum fiber length
 Lf0 = .FiberLengthScaleThigh
       * MuscleParameters.OptimalFiberlength
       * cos(pi/180*MuscleParameters.Pennationangle);
 Vol0 = .StrengthScaleThigh
        * MuscleParameters.VolumeScaleFactor
        * MuscleParameters.VolumeMuscleBelly/MuscleElemAmount;
 AnyVar PCSA = Vol0/Lf0;///< PCSA is calculated as muscle volume divided between muscle branches, divided by fiber length and corrected for the pennation angle not used in the simple muscle model
};

AnyMuscleModel GluteusMaximusInferior4Par =
{
 AnyFolder &MuscleParameters = .CadaverMusPar.GluteusMaximusInferior;
 AnyIntVar MuscleElemNo = 4; ///< The number of this element of the muscle
 AnyIntVar MuscleElemAmount = 6; ///< The total amount of elements for this muscle
 F0 = .PCSAfactor*PCSA; // Maximum force output at optimum fiber length
 Lf0 = .FiberLengthScaleThigh
       * MuscleParameters.OptimalFiberlength
       * cos(pi/180*MuscleParameters.Pennationangle);
 Vol0 = .StrengthScaleThigh
        * MuscleParameters.VolumeScaleFactor
        * MuscleParameters.VolumeMuscleBelly/MuscleElemAmount;
 AnyVar PCSA = Vol0/Lf0;///< PCSA is calculated as muscle volume divided between muscle branches, divided by fiber length and corrected for the pennation angle not used in the simple muscle model
};

AnyMuscleModel GluteusMaximusInferior5Par =
{
 AnyFolder &MuscleParameters = .CadaverMusPar.GluteusMaximusInferior;
 AnyIntVar MuscleElemNo = 5; ///< The number of this element of the muscle
 AnyIntVar MuscleElemAmount = 6; ///< The total amount of elements for this muscle
 F0 = .PCSAfactor*PCSA; // Maximum force output at optimum fiber length
 Lf0 = .FiberLengthScaleThigh
       * MuscleParameters.OptimalFiberlength
       * cos(pi/180*MuscleParameters.Pennationangle);
 Vol0 = .StrengthScaleThigh
        * MuscleParameters.VolumeScaleFactor
        * MuscleParameters.VolumeMuscleBelly/MuscleElemAmount;
 AnyVar PCSA = Vol0/Lf0;///< PCSA is calculated as muscle volume divided between muscle branches, divided by fiber length and corrected for the pennation angle not used in the simple muscle model
};

AnyMuscleModel GluteusMaximusInferior6Par =
{
 AnyFolder &MuscleParameters = .CadaverMusPar.GluteusMaximusInferior;
 AnyIntVar MuscleElemNo = 6; ///< The number of this element of the muscle
 AnyIntVar MuscleElemAmount = 6; ///< The total amount of elements for this muscle
 F0 = .PCSAfactor*PCSA; // Maximum force output at optimum fiber length
 Lf0 = .FiberLengthScaleThigh
       * MuscleParameters.OptimalFiberlength
       * cos(pi/180*MuscleParameters.Pennationangle);
 Vol0 = .StrengthScaleThigh
        * MuscleParameters.VolumeScaleFactor
        * MuscleParameters.VolumeMuscleBelly/MuscleElemAmount;
 AnyVar PCSA = Vol0/Lf0;///< PCSA is calculated as muscle volume divided between muscle branches, divided by fiber length and corrected for the pennation angle not used in the simple muscle model
};


////////////////////////////////////////////////
//     GluteusMediusAnterior (6 elements)     //
////////////////////////////////////////////////
AnyMuscleModel GluteusMediusAnterior1Par =
{
 AnyFolder &MuscleParameters = .CadaverMusPar.GluteusMediusAnterior;
 AnyIntVar MuscleElemNo = 1; ///< The number of this element of the muscle
 AnyIntVar MuscleElemAmount = 6; ///< The total amount of elements for this muscle
 F0 = .PCSAfactor*PCSA; // Maximum force output at optimum fiber length
 Lf0 = .FiberLengthScalePelvis
       * MuscleParameters.OptimalFiberlength
       * cos(pi/180*MuscleParameters.Pennationangle);
 Vol0 = .StrengthScalePelvis
        * MuscleParameters.VolumeScaleFactor
        * MuscleParameters.VolumeMuscleBelly/MuscleElemAmount;
 AnyVar PCSA = Vol0/Lf0;///< PCSA is calculated as muscle volume divided between muscle branches, divided by fiber length and corrected for the pennation angle not used in the simple muscle model
};

AnyMuscleModel GluteusMediusAnterior2Par =
{
 AnyFolder &MuscleParameters = .CadaverMusPar.GluteusMediusAnterior;
 AnyIntVar MuscleElemNo = 2; ///< The number of this element of the muscle
 AnyIntVar MuscleElemAmount = 6; ///< The total amount of elements for this muscle
 F0 = .PCSAfactor*PCSA; // Maximum force output at optimum fiber length
 Lf0 = .FiberLengthScalePelvis
       * MuscleParameters.OptimalFiberlength
       * cos(pi/180*MuscleParameters.Pennationangle);
 Vol0 = .StrengthScalePelvis
        * MuscleParameters.VolumeScaleFactor
        * MuscleParameters.VolumeMuscleBelly/MuscleElemAmount;
 AnyVar PCSA = Vol0/Lf0;///< PCSA is calculated as muscle volume divided between muscle branches, divided by fiber length and corrected for the pennation angle not used in the simple muscle model
};

AnyMuscleModel GluteusMediusAnterior3Par =
{
 AnyFolder &MuscleParameters = .CadaverMusPar.GluteusMediusAnterior;
 AnyIntVar MuscleElemNo = 3; ///< The number of this element of the muscle
 AnyIntVar MuscleElemAmount = 6; ///< The total amount of elements for this muscle
 F0 = .PCSAfactor*PCSA; // Maximum force output at optimum fiber length
 Lf0 = .FiberLengthScalePelvis
       * MuscleParameters.OptimalFiberlength
       * cos(pi/180*MuscleParameters.Pennationangle);
 Vol0 = .StrengthScalePelvis
        * MuscleParameters.VolumeScaleFactor
        * MuscleParameters.VolumeMuscleBelly/MuscleElemAmount;
 AnyVar PCSA = Vol0/Lf0;///< PCSA is calculated as muscle volume divided between muscle branches, divided by fiber length and corrected for the pennation angle not used in the simple muscle model
};

AnyMuscleModel GluteusMediusAnterior4Par =
{
 AnyFolder &MuscleParameters = .CadaverMusPar.GluteusMediusAnterior;
 AnyIntVar MuscleElemNo = 4; ///< The number of this element of the muscle
 AnyIntVar MuscleElemAmount = 6; ///< The total amount of elements for this muscle
 F0 = .PCSAfactor*PCSA; // Maximum force output at optimum fiber length
 Lf0 = .FiberLengthScalePelvis
       * MuscleParameters.OptimalFiberlength
       * cos(pi/180*MuscleParameters.Pennationangle);
 Vol0 = .StrengthScalePelvis
        * MuscleParameters.VolumeScaleFactor
        * MuscleParameters.VolumeMuscleBelly/MuscleElemAmount;
 AnyVar PCSA = Vol0/Lf0;///< PCSA is calculated as muscle volume divided between muscle branches, divided by fiber length and corrected for the pennation angle not used in the simple muscle model
};

AnyMuscleModel GluteusMediusAnterior5Par =
{
 AnyFolder &MuscleParameters = .CadaverMusPar.GluteusMediusAnterior;
 AnyIntVar MuscleElemNo = 5; ///< The number of this element of the muscle
 AnyIntVar MuscleElemAmount = 6; ///< The total amount of elements for this muscle
 F0 = .PCSAfactor*PCSA; // Maximum force output at optimum fiber length
 Lf0 = .FiberLengthScalePelvis
       * MuscleParameters.OptimalFiberlength
       * cos(pi/180*MuscleParameters.Pennationangle);
 Vol0 = .StrengthScalePelvis
        * MuscleParameters.VolumeScaleFactor
        * MuscleParameters.VolumeMuscleBelly/MuscleElemAmount;
 AnyVar PCSA = Vol0/Lf0;///< PCSA is calculated as muscle volume divided between muscle branches, divided by fiber length and corrected for the pennation angle not used in the simple muscle model
};

AnyMuscleModel GluteusMediusAnterior6Par =
{
 AnyFolder &MuscleParameters = .CadaverMusPar.GluteusMediusAnterior;
 AnyIntVar MuscleElemNo = 6; ///< The number of this element of the muscle
 AnyIntVar MuscleElemAmount = 6; ///< The total amount of elements for this muscle
 F0 = .PCSAfactor*PCSA; // Maximum force output at optimum fiber length
 Lf0 = .FiberLengthScalePelvis
       * MuscleParameters.OptimalFiberlength
       * cos(pi/180*MuscleParameters.Pennationangle);
 Vol0 = .StrengthScalePelvis
        * MuscleParameters.VolumeScaleFactor
        * MuscleParameters.VolumeMuscleBelly/MuscleElemAmount;
 AnyVar PCSA = Vol0/Lf0;///< PCSA is calculated as muscle volume divided between muscle branches, divided by fiber length and corrected for the pennation angle not used in the simple muscle model
};


/////////////////////////////////////////////////
//     GluteusMediusPosterior (6 elements)     //
/////////////////////////////////////////////////
AnyMuscleModel GluteusMediusPosterior1Par =
{
 AnyFolder &MuscleParameters = .CadaverMusPar.GluteusMediusPosterior;
 AnyIntVar MuscleElemNo = 1; ///< The number of this element of the muscle
 AnyIntVar MuscleElemAmount = 6; ///< The total amount of elements for this muscle
 F0 = .PCSAfactor*PCSA; // Maximum force output at optimum fiber length
 Lf0 = .FiberLengthScalePelvis
       * MuscleParameters.OptimalFiberlength
       * cos(pi/180*MuscleParameters.Pennationangle);
 Vol0 = .StrengthScalePelvis
        * MuscleParameters.VolumeScaleFactor
        * MuscleParameters.VolumeMuscleBelly/MuscleElemAmount;
 AnyVar PCSA = Vol0/Lf0;///< PCSA is calculated as muscle volume divided between muscle branches, divided by fiber length and corrected for the pennation angle not used in the simple muscle model
};

AnyMuscleModel GluteusMediusPosterior2Par =
{
 AnyFolder &MuscleParameters = .CadaverMusPar.GluteusMediusPosterior;
 AnyIntVar MuscleElemNo = 2; ///< The number of this element of the muscle
 AnyIntVar MuscleElemAmount = 6; ///< The total amount of elements for this muscle
 F0 = .PCSAfactor*PCSA; // Maximum force output at optimum fiber length
 Lf0 = .FiberLengthScalePelvis
       * MuscleParameters.OptimalFiberlength
       * cos(pi/180*MuscleParameters.Pennationangle);
 Vol0 = .StrengthScalePelvis
        * MuscleParameters.VolumeScaleFactor
        * MuscleParameters.VolumeMuscleBelly/MuscleElemAmount;
 AnyVar PCSA = Vol0/Lf0;///< PCSA is calculated as muscle volume divided between muscle branches, divided by fiber length and corrected for the pennation angle not used in the simple muscle model
};

AnyMuscleModel GluteusMediusPosterior3Par =
{
 AnyFolder &MuscleParameters = .CadaverMusPar.GluteusMediusPosterior;
 AnyIntVar MuscleElemNo = 3; ///< The number of this element of the muscle
 AnyIntVar MuscleElemAmount = 6; ///< The total amount of elements for this muscle
 F0 = .PCSAfactor*PCSA; // Maximum force output at optimum fiber length
 Lf0 = .FiberLengthScalePelvis
       * MuscleParameters.OptimalFiberlength
       * cos(pi/180*MuscleParameters.Pennationangle);
 Vol0 = .StrengthScalePelvis
        * MuscleParameters.VolumeScaleFactor
        * MuscleParameters.VolumeMuscleBelly/MuscleElemAmount;
 AnyVar PCSA = Vol0/Lf0;///< PCSA is calculated as muscle volume divided between muscle branches, divided by fiber length and corrected for the pennation angle not used in the simple muscle model
};

AnyMuscleModel GluteusMediusPosterior4Par =
{
 AnyFolder &MuscleParameters = .CadaverMusPar.GluteusMediusPosterior;
 AnyIntVar MuscleElemNo = 4; ///< The number of this element of the muscle
 AnyIntVar MuscleElemAmount = 6; ///< The total amount of elements for this muscle
 F0 = .PCSAfactor*PCSA; // Maximum force output at optimum fiber length
 Lf0 = .FiberLengthScalePelvis
       * MuscleParameters.OptimalFiberlength
       * cos(pi/180*MuscleParameters.Pennationangle);
 Vol0 = .StrengthScalePelvis
        * MuscleParameters.VolumeScaleFactor
        * MuscleParameters.VolumeMuscleBelly/MuscleElemAmount;
 AnyVar PCSA = Vol0/Lf0;///< PCSA is calculated as muscle volume divided between muscle branches, divided by fiber length and corrected for the pennation angle not used in the simple muscle model
};

AnyMuscleModel GluteusMediusPosterior5Par =
{
 AnyFolder &MuscleParameters = .CadaverMusPar.GluteusMediusPosterior;
 AnyIntVar MuscleElemNo = 5; ///< The number of this element of the muscle
 AnyIntVar MuscleElemAmount = 6; ///< The total amount of elements for this muscle
 F0 = .PCSAfactor*PCSA; // Maximum force output at optimum fiber length
 Lf0 = .FiberLengthScalePelvis
       * MuscleParameters.OptimalFiberlength
       * cos(pi/180*MuscleParameters.Pennationangle);
 Vol0 = .StrengthScalePelvis
        * MuscleParameters.VolumeScaleFactor
        * MuscleParameters.VolumeMuscleBelly/MuscleElemAmount;
 AnyVar PCSA = Vol0/Lf0;///< PCSA is calculated as muscle volume divided between muscle branches, divided by fiber length and corrected for the pennation angle not used in the simple muscle model
};

AnyMuscleModel GluteusMediusPosterior6Par =
{
 AnyFolder &MuscleParameters = .CadaverMusPar.GluteusMediusPosterior;
 AnyIntVar MuscleElemNo = 6; ///< The number of this element of the muscle
 AnyIntVar MuscleElemAmount = 6; ///< The total amount of elements for this muscle
 F0 = .PCSAfactor*PCSA; // Maximum force output at optimum fiber length
 Lf0 = .FiberLengthScalePelvis
       * MuscleParameters.OptimalFiberlength
       * cos(pi/180*MuscleParameters.Pennationangle);
 Vol0 = .StrengthScalePelvis
        * MuscleParameters.VolumeScaleFactor
        * MuscleParameters.VolumeMuscleBelly/MuscleElemAmount;
 AnyVar PCSA = Vol0/Lf0;///< PCSA is calculated as muscle volume divided between muscle branches, divided by fiber length and corrected for the pennation angle not used in the simple muscle model
};


/////////////////////////////////////////////////
//     GluteusMinimusAnterior (1 element )     //
/////////////////////////////////////////////////
AnyMuscleModel GluteusMinimusAnterior1Par =
{
 AnyFolder &MuscleParameters = .CadaverMusPar.GluteusMinimusAnterior;
 AnyIntVar MuscleElemNo = 1; ///< The number of this element of the muscle
 AnyIntVar MuscleElemAmount = 1; ///< The total amount of elements for this muscle
 F0 = .PCSAfactor*PCSA; // Maximum force output at optimum fiber length
 Lf0 = .FiberLengthScalePelvis
       * MuscleParameters.OptimalFiberlength
       * cos(pi/180*MuscleParameters.Pennationangle);
 Vol0 = .StrengthScalePelvis
        * MuscleParameters.VolumeScaleFactor
        * MuscleParameters.VolumeMuscleBelly/MuscleElemAmount;
 AnyVar PCSA = Vol0/Lf0;///< PCSA is calculated as muscle volume divided between muscle branches, divided by fiber length and corrected for the pennation angle not used in the simple muscle model
};


////////////////////////////////////////////
//     GluteusMinimusMid (1 element )     //
////////////////////////////////////////////
AnyMuscleModel GluteusMinimusMid1Par =
{
 AnyFolder &MuscleParameters = .CadaverMusPar.GluteusMinimusMid;
 AnyIntVar MuscleElemNo = 1; ///< The number of this element of the muscle
 AnyIntVar MuscleElemAmount = 1; ///< The total amount of elements for this muscle
 F0 = .PCSAfactor*PCSA; // Maximum force output at optimum fiber length
 Lf0 = .FiberLengthScalePelvis
       * MuscleParameters.OptimalFiberlength
       * cos(pi/180*MuscleParameters.Pennationangle);
 Vol0 = .StrengthScalePelvis
        * MuscleParameters.VolumeScaleFactor
        * MuscleParameters.VolumeMuscleBelly/MuscleElemAmount;
 AnyVar PCSA = Vol0/Lf0;///< PCSA is calculated as muscle volume divided between muscle branches, divided by fiber length and corrected for the pennation angle not used in the simple muscle model
};


//////////////////////////////////////////////////
//     GluteusMinimusPosterior (1 element )     //
//////////////////////////////////////////////////
AnyMuscleModel GluteusMinimusPosterior1Par =
{
 AnyFolder &MuscleParameters = .CadaverMusPar.GluteusMinimusPosterior;
 AnyIntVar MuscleElemNo = 1; ///< The number of this element of the muscle
 AnyIntVar MuscleElemAmount = 1; ///< The total amount of elements for this muscle
 F0 = .PCSAfactor*PCSA; // Maximum force output at optimum fiber length
 Lf0 = .FiberLengthScalePelvis
       * MuscleParameters.OptimalFiberlength
       * cos(pi/180*MuscleParameters.Pennationangle);
 Vol0 = .StrengthScalePelvis
        * MuscleParameters.VolumeScaleFactor
        * MuscleParameters.VolumeMuscleBelly/MuscleElemAmount;
 AnyVar PCSA = Vol0/Lf0;///< PCSA is calculated as muscle volume divided between muscle branches, divided by fiber length and corrected for the pennation angle not used in the simple muscle model
};


///////////////////////////////////
//     Gracilis (2 elements)     //
///////////////////////////////////
AnyMuscleModel Gracilis1Par =
{
 AnyFolder &MuscleParameters = .CadaverMusPar.Gracilis;
 AnyIntVar MuscleElemNo = 1; ///< The number of this element of the muscle
 AnyIntVar MuscleElemAmount = 2; ///< The total amount of elements for this muscle
 F0 = .PCSAfactor*PCSA; // Maximum force output at optimum fiber length
 Lf0 = .FiberLengthScaleThigh
       * MuscleParameters.OptimalFiberlength
       * cos(pi/180*MuscleParameters.Pennationangle);
 Vol0 = .StrengthScaleThigh
        * MuscleParameters.VolumeScaleFactor
        * MuscleParameters.VolumeMuscleBelly/MuscleElemAmount;
 AnyVar PCSA = Vol0/Lf0;///< PCSA is calculated as muscle volume divided between muscle branches, divided by fiber length and corrected for the pennation angle not used in the simple muscle model
};

AnyMuscleModel Gracilis2Par =
{
 AnyFolder &MuscleParameters = .CadaverMusPar.Gracilis;
 AnyIntVar MuscleElemNo = 2; ///< The number of this element of the muscle
 AnyIntVar MuscleElemAmount = 2; ///< The total amount of elements for this muscle
 F0 = .PCSAfactor*PCSA; // Maximum force output at optimum fiber length
 Lf0 = .FiberLengthScaleThigh
       * MuscleParameters.OptimalFiberlength
       * cos(pi/180*MuscleParameters.Pennationangle);
 Vol0 = .StrengthScaleThigh
        * MuscleParameters.VolumeScaleFactor
        * MuscleParameters.VolumeMuscleBelly/MuscleElemAmount;
 AnyVar PCSA = Vol0/Lf0;///< PCSA is calculated as muscle volume divided between muscle branches, divided by fiber length and corrected for the pennation angle not used in the simple muscle model
};


///////////////////////////////////////////
//     IliacusLateralis (3 elements)     //
///////////////////////////////////////////
AnyMuscleModel IliacusLateralis1Par =
{
 AnyFolder &MuscleParameters = .CadaverMusPar.IliacusLateralis;
 AnyIntVar MuscleElemNo = 1; ///< The number of this element of the muscle
 AnyIntVar MuscleElemAmount = 3; ///< The total amount of elements for this muscle
 F0 = .PCSAfactor*PCSA; // Maximum force output at optimum fiber length
 Lf0 = .FiberLengthScalePelvis
       * MuscleParameters.OptimalFiberlength
       * cos(pi/180*MuscleParameters.Pennationangle);
 Vol0 = .StrengthScalePelvis
        * MuscleParameters.VolumeScaleFactor
        * MuscleParameters.VolumeMuscleBelly/MuscleElemAmount;
 AnyVar PCSA = Vol0/Lf0;///< PCSA is calculated as muscle volume divided between muscle branches, divided by fiber length and corrected for the pennation angle not used in the simple muscle model
};

AnyMuscleModel IliacusLateralis2Par =
{
 AnyFolder &MuscleParameters = .CadaverMusPar.IliacusLateralis;
 AnyIntVar MuscleElemNo = 2; ///< The number of this element of the muscle
 AnyIntVar MuscleElemAmount = 3; ///< The total amount of elements for this muscle
 F0 = .PCSAfactor*PCSA; // Maximum force output at optimum fiber length
 Lf0 = .FiberLengthScalePelvis
       * MuscleParameters.OptimalFiberlength
       * cos(pi/180*MuscleParameters.Pennationangle);
 Vol0 = .StrengthScalePelvis
        * MuscleParameters.VolumeScaleFactor
        * MuscleParameters.VolumeMuscleBelly/MuscleElemAmount;
 AnyVar PCSA = Vol0/Lf0;///< PCSA is calculated as muscle volume divided between muscle branches, divided by fiber length and corrected for the pennation angle not used in the simple muscle model
};

AnyMuscleModel IliacusLateralis3Par =
{
 AnyFolder &MuscleParameters = .CadaverMusPar.IliacusLateralis;
 AnyIntVar MuscleElemNo = 3; ///< The number of this element of the muscle
 AnyIntVar MuscleElemAmount = 3; ///< The total amount of elements for this muscle
 F0 = .PCSAfactor*PCSA; // Maximum force output at optimum fiber length
 Lf0 = .FiberLengthScalePelvis
       * MuscleParameters.OptimalFiberlength
       * cos(pi/180*MuscleParameters.Pennationangle);
 Vol0 = .StrengthScalePelvis
        * MuscleParameters.VolumeScaleFactor
        * MuscleParameters.VolumeMuscleBelly/MuscleElemAmount;
 AnyVar PCSA = Vol0/Lf0;///< PCSA is calculated as muscle volume divided between muscle branches, divided by fiber length and corrected for the pennation angle not used in the simple muscle model
};


/////////////////////////////////////
//     IliacusMid (3 elements)     //
/////////////////////////////////////
AnyMuscleModel IliacusMid1Par =
{
 AnyFolder &MuscleParameters = .CadaverMusPar.IliacusMid;
 AnyIntVar MuscleElemNo = 1; ///< The number of this element of the muscle
 AnyIntVar MuscleElemAmount = 3; ///< The total amount of elements for this muscle
 F0 = .PCSAfactor*PCSA; // Maximum force output at optimum fiber length
 Lf0 = .FiberLengthScalePelvis
       * MuscleParameters.OptimalFiberlength
       * cos(pi/180*MuscleParameters.Pennationangle);
 Vol0 = .StrengthScalePelvis
        * MuscleParameters.VolumeScaleFactor
        * MuscleParameters.VolumeMuscleBelly/MuscleElemAmount;
 AnyVar PCSA = Vol0/Lf0;///< PCSA is calculated as muscle volume divided between muscle branches, divided by fiber length and corrected for the pennation angle not used in the simple muscle model
};

AnyMuscleModel IliacusMid2Par =
{
 AnyFolder &MuscleParameters = .CadaverMusPar.IliacusMid;
 AnyIntVar MuscleElemNo = 2; ///< The number of this element of the muscle
 AnyIntVar MuscleElemAmount = 3; ///< The total amount of elements for this muscle
 F0 = .PCSAfactor*PCSA; // Maximum force output at optimum fiber length
 Lf0 = .FiberLengthScalePelvis
       * MuscleParameters.OptimalFiberlength
       * cos(pi/180*MuscleParameters.Pennationangle);
 Vol0 = .StrengthScalePelvis
        * MuscleParameters.VolumeScaleFactor
        * MuscleParameters.VolumeMuscleBelly/MuscleElemAmount;
 AnyVar PCSA = Vol0/Lf0;///< PCSA is calculated as muscle volume divided between muscle branches, divided by fiber length and corrected for the pennation angle not used in the simple muscle model
};

AnyMuscleModel IliacusMid3Par =
{
 AnyFolder &MuscleParameters = .CadaverMusPar.IliacusMid;
 AnyIntVar MuscleElemNo = 3; ///< The number of this element of the muscle
 AnyIntVar MuscleElemAmount = 3; ///< The total amount of elements for this muscle
 F0 = .PCSAfactor*PCSA; // Maximum force output at optimum fiber length
 Lf0 = .FiberLengthScalePelvis
       * MuscleParameters.OptimalFiberlength
       * cos(pi/180*MuscleParameters.Pennationangle);
 Vol0 = .StrengthScalePelvis
        * MuscleParameters.VolumeScaleFactor
        * MuscleParameters.VolumeMuscleBelly/MuscleElemAmount;
 AnyVar PCSA = Vol0/Lf0;///< PCSA is calculated as muscle volume divided between muscle branches, divided by fiber length and corrected for the pennation angle not used in the simple muscle model
};


//////////////////////////////////////////
//     IliacusMedialis (3 elements)     //
//////////////////////////////////////////
AnyMuscleModel IliacusMedialis1Par =
{
 AnyFolder &MuscleParameters = .CadaverMusPar.IliacusMedialis;
 AnyIntVar MuscleElemNo = 1; ///< The number of this element of the muscle
 AnyIntVar MuscleElemAmount = 3; ///< The total amount of elements for this muscle
 F0 = .PCSAfactor*PCSA; // Maximum force output at optimum fiber length
 Lf0 = .FiberLengthScalePelvis
       * MuscleParameters.OptimalFiberlength
       * cos(pi/180*MuscleParameters.Pennationangle);
 Vol0 = .StrengthScalePelvis
        * MuscleParameters.VolumeScaleFactor
        * MuscleParameters.VolumeMuscleBelly/MuscleElemAmount;
 AnyVar PCSA = Vol0/Lf0;///< PCSA is calculated as muscle volume divided between muscle branches, divided by fiber length and corrected for the pennation angle not used in the simple muscle model
};

AnyMuscleModel IliacusMedialis2Par =
{
 AnyFolder &MuscleParameters = .CadaverMusPar.IliacusMedialis;
 AnyIntVar MuscleElemNo = 2; ///< The number of this element of the muscle
 AnyIntVar MuscleElemAmount = 3; ///< The total amount of elements for this muscle
 F0 = .PCSAfactor*PCSA; // Maximum force output at optimum fiber length
 Lf0 = .FiberLengthScalePelvis
       * MuscleParameters.OptimalFiberlength
       * cos(pi/180*MuscleParameters.Pennationangle);
 Vol0 = .StrengthScalePelvis
        * MuscleParameters.VolumeScaleFactor
        * MuscleParameters.VolumeMuscleBelly/MuscleElemAmount;
 AnyVar PCSA = Vol0/Lf0;///< PCSA is calculated as muscle volume divided between muscle branches, divided by fiber length and corrected for the pennation angle not used in the simple muscle model
};

AnyMuscleModel IliacusMedialis3Par =
{
 AnyFolder &MuscleParameters = .CadaverMusPar.IliacusMedialis;
 AnyIntVar MuscleElemNo = 3; ///< The number of this element of the muscle
 AnyIntVar MuscleElemAmount = 3; ///< The total amount of elements for this muscle
 F0 = .PCSAfactor*PCSA; // Maximum force output at optimum fiber length
 Lf0 = .FiberLengthScalePelvis
       * MuscleParameters.OptimalFiberlength
       * cos(pi/180*MuscleParameters.Pennationangle);
 Vol0 = .StrengthScalePelvis
        * MuscleParameters.VolumeScaleFactor
        * MuscleParameters.VolumeMuscleBelly/MuscleElemAmount;
 AnyVar PCSA = Vol0/Lf0;///< PCSA is calculated as muscle volume divided between muscle branches, divided by fiber length and corrected for the pennation angle not used in the simple muscle model
};


////////////////////////////////////////////////////
//     ObturatorExternusInferior (2 elements)     //
////////////////////////////////////////////////////
AnyMuscleModel ObturatorExternusInferior1Par =
{
 AnyFolder &MuscleParameters = .CadaverMusPar.ObturatorExternusInferior;
 AnyIntVar MuscleElemNo = 1; ///< The number of this element of the muscle
 AnyIntVar MuscleElemAmount = 2; ///< The total amount of elements for this muscle
 F0 = .PCSAfactor*PCSA; // Maximum force output at optimum fiber length
 Lf0 = .FiberLengthScalePelvis
       * MuscleParameters.OptimalFiberlength
       * cos(pi/180*MuscleParameters.Pennationangle);
 Vol0 = .StrengthScalePelvis
        * MuscleParameters.VolumeScaleFactor
        * MuscleParameters.VolumeMuscleBelly/MuscleElemAmount;
 AnyVar PCSA = Vol0/Lf0;///< PCSA is calculated as muscle volume divided between muscle branches, divided by fiber length and corrected for the pennation angle not used in the simple muscle model
};

AnyMuscleModel ObturatorExternusInferior2Par =
{
 AnyFolder &MuscleParameters = .CadaverMusPar.ObturatorExternusInferior;
 AnyIntVar MuscleElemNo = 2; ///< The number of this element of the muscle
 AnyIntVar MuscleElemAmount = 2; ///< The total amount of elements for this muscle
 F0 = .PCSAfactor*PCSA; // Maximum force output at optimum fiber length
 Lf0 = .FiberLengthScalePelvis
       * MuscleParameters.OptimalFiberlength
       * cos(pi/180*MuscleParameters.Pennationangle);
 Vol0 = .StrengthScalePelvis
        * MuscleParameters.VolumeScaleFactor
        * MuscleParameters.VolumeMuscleBelly/MuscleElemAmount;
 AnyVar PCSA = Vol0/Lf0;///< PCSA is calculated as muscle volume divided between muscle branches, divided by fiber length and corrected for the pennation angle not used in the simple muscle model
};


////////////////////////////////////////////////////
//     ObturatorExternusSuperior (3 elements)     //
////////////////////////////////////////////////////
AnyMuscleModel ObturatorExternusSuperior1Par =
{
 AnyFolder &MuscleParameters = .CadaverMusPar.ObturatorExternusSuperior;
 AnyIntVar MuscleElemNo = 1; ///< The number of this element of the muscle
 AnyIntVar MuscleElemAmount = 3; ///< The total amount of elements for this muscle
 F0 = .PCSAfactor*PCSA; // Maximum force output at optimum fiber length
 Lf0 = .FiberLengthScalePelvis
       * MuscleParameters.OptimalFiberlength
       * cos(pi/180*MuscleParameters.Pennationangle);
 Vol0 = .StrengthScalePelvis
        * MuscleParameters.VolumeScaleFactor
        * MuscleParameters.VolumeMuscleBelly/MuscleElemAmount;
 AnyVar PCSA = Vol0/Lf0;///< PCSA is calculated as muscle volume divided between muscle branches, divided by fiber length and corrected for the pennation angle not used in the simple muscle model
};

AnyMuscleModel ObturatorExternusSuperior2Par =
{
 AnyFolder &MuscleParameters = .CadaverMusPar.ObturatorExternusSuperior;
 AnyIntVar MuscleElemNo = 2; ///< The number of this element of the muscle
 AnyIntVar MuscleElemAmount = 3; ///< The total amount of elements for this muscle
 F0 = .PCSAfactor*PCSA; // Maximum force output at optimum fiber length
 Lf0 = .FiberLengthScalePelvis
       * MuscleParameters.OptimalFiberlength
       * cos(pi/180*MuscleParameters.Pennationangle);
 Vol0 = .StrengthScalePelvis
        * MuscleParameters.VolumeScaleFactor
        * MuscleParameters.VolumeMuscleBelly/MuscleElemAmount;
 AnyVar PCSA = Vol0/Lf0;///< PCSA is calculated as muscle volume divided between muscle branches, divided by fiber length and corrected for the pennation angle not used in the simple muscle model
};

AnyMuscleModel ObturatorExternusSuperior3Par =
{
 AnyFolder &MuscleParameters = .CadaverMusPar.ObturatorExternusSuperior;
 AnyIntVar MuscleElemNo = 3; ///< The number of this element of the muscle
 AnyIntVar MuscleElemAmount = 3; ///< The total amount of elements for this muscle
 F0 = .PCSAfactor*PCSA; // Maximum force output at optimum fiber length
 Lf0 = .FiberLengthScalePelvis
       * MuscleParameters.OptimalFiberlength
       * cos(pi/180*MuscleParameters.Pennationangle);
 Vol0 = .StrengthScalePelvis
        * MuscleParameters.VolumeScaleFactor
        * MuscleParameters.VolumeMuscleBelly/MuscleElemAmount;
 AnyVar PCSA = Vol0/Lf0;///< PCSA is calculated as muscle volume divided between muscle branches, divided by fiber length and corrected for the pennation angle not used in the simple muscle model
};


////////////////////////////////////////////
//     ObturatorInternus (6 elements)     //
////////////////////////////////////////////
AnyMuscleModel ObturatorInternus1Par =
{
 AnyFolder &MuscleParameters = .CadaverMusPar.ObturatorInternus;
 AnyIntVar MuscleElemNo = 1; ///< The number of this element of the muscle
 AnyIntVar MuscleElemAmount = 6; ///< The total amount of elements for this muscle
 F0 = .PCSAfactor*PCSA; // Maximum force output at optimum fiber length
 Lf0 = .FiberLengthScalePelvis
       * MuscleParameters.OptimalFiberlength
       * cos(pi/180*MuscleParameters.Pennationangle);
 Vol0 = .StrengthScalePelvis
        * MuscleParameters.VolumeScaleFactor
        * MuscleParameters.VolumeMuscleBelly/MuscleElemAmount;
 AnyVar PCSA = Vol0/Lf0;///< PCSA is calculated as muscle volume divided between muscle branches, divided by fiber length and corrected for the pennation angle not used in the simple muscle model
};

AnyMuscleModel ObturatorInternus2Par =
{
 AnyFolder &MuscleParameters = .CadaverMusPar.ObturatorInternus;
 AnyIntVar MuscleElemNo = 2; ///< The number of this element of the muscle
 AnyIntVar MuscleElemAmount = 6; ///< The total amount of elements for this muscle
 F0 = .PCSAfactor*PCSA; // Maximum force output at optimum fiber length
 Lf0 = .FiberLengthScalePelvis
       * MuscleParameters.OptimalFiberlength
       * cos(pi/180*MuscleParameters.Pennationangle);
 Vol0 = .StrengthScalePelvis
        * MuscleParameters.VolumeScaleFactor
        * MuscleParameters.VolumeMuscleBelly/MuscleElemAmount;
 AnyVar PCSA = Vol0/Lf0;///< PCSA is calculated as muscle volume divided between muscle branches, divided by fiber length and corrected for the pennation angle not used in the simple muscle model
};

AnyMuscleModel ObturatorInternus3Par =
{
 AnyFolder &MuscleParameters = .CadaverMusPar.ObturatorInternus;
 AnyIntVar MuscleElemNo = 3; ///< The number of this element of the muscle
 AnyIntVar MuscleElemAmount = 6; ///< The total amount of elements for this muscle
 F0 = .PCSAfactor*PCSA; // Maximum force output at optimum fiber length
 Lf0 = .FiberLengthScalePelvis
       * MuscleParameters.OptimalFiberlength
       * cos(pi/180*MuscleParameters.Pennationangle);
 Vol0 = .StrengthScalePelvis
        * MuscleParameters.VolumeScaleFactor
        * MuscleParameters.VolumeMuscleBelly/MuscleElemAmount;
 AnyVar PCSA = Vol0/Lf0;///< PCSA is calculated as muscle volume divided between muscle branches, divided by fiber length and corrected for the pennation angle not used in the simple muscle model
};

AnyMuscleModel ObturatorInternus4Par =
{
 AnyFolder &MuscleParameters = .CadaverMusPar.ObturatorInternus;
 AnyIntVar MuscleElemNo = 4; ///< The number of this element of the muscle
 AnyIntVar MuscleElemAmount = 6; ///< The total amount of elements for this muscle
 F0 = .PCSAfactor*PCSA; // Maximum force output at optimum fiber length
 Lf0 = .FiberLengthScalePelvis
       * MuscleParameters.OptimalFiberlength
       * cos(pi/180*MuscleParameters.Pennationangle);
 Vol0 = .StrengthScalePelvis
        * MuscleParameters.VolumeScaleFactor
        * MuscleParameters.VolumeMuscleBelly/MuscleElemAmount;
 AnyVar PCSA = Vol0/Lf0;///< PCSA is calculated as muscle volume divided between muscle branches, divided by fiber length and corrected for the pennation angle not used in the simple muscle model
};

AnyMuscleModel ObturatorInternus5Par =
{
 AnyFolder &MuscleParameters = .CadaverMusPar.ObturatorInternus;
 AnyIntVar MuscleElemNo = 5; ///< The number of this element of the muscle
 AnyIntVar MuscleElemAmount = 6; ///< The total amount of elements for this muscle
 F0 = .PCSAfactor*PCSA; // Maximum force output at optimum fiber length
 Lf0 = .FiberLengthScalePelvis
       * MuscleParameters.OptimalFiberlength
       * cos(pi/180*MuscleParameters.Pennationangle);
 Vol0 = .StrengthScalePelvis
        * MuscleParameters.VolumeScaleFactor
        * MuscleParameters.VolumeMuscleBelly/MuscleElemAmount;
 AnyVar PCSA = Vol0/Lf0;///< PCSA is calculated as muscle volume divided between muscle branches, divided by fiber length and corrected for the pennation angle not used in the simple muscle model
};

AnyMuscleModel ObturatorInternus6Par =
{
 AnyFolder &MuscleParameters = .CadaverMusPar.ObturatorInternus;
 AnyIntVar MuscleElemNo = 6; ///< The number of this element of the muscle
 AnyIntVar MuscleElemAmount = 6; ///< The total amount of elements for this muscle
 F0 = .PCSAfactor*PCSA; // Maximum force output at optimum fiber length
 Lf0 = .FiberLengthScalePelvis
       * MuscleParameters.OptimalFiberlength
       * cos(pi/180*MuscleParameters.Pennationangle);
 Vol0 = .StrengthScalePelvis
        * MuscleParameters.VolumeScaleFactor
        * MuscleParameters.VolumeMuscleBelly/MuscleElemAmount;
 AnyVar PCSA = Vol0/Lf0;///< PCSA is calculated as muscle volume divided between muscle branches, divided by fiber length and corrected for the pennation angle not used in the simple muscle model
};


////////////////////////////////////
//     Pectineus (4 elements)     //
////////////////////////////////////
AnyMuscleModel Pectineus1Par =
{
 AnyFolder &MuscleParameters = .CadaverMusPar.Pectineus;
 AnyIntVar MuscleElemNo = 1; ///< The number of this element of the muscle
 AnyIntVar MuscleElemAmount = 4; ///< The total amount of elements for this muscle
 F0 = .PCSAfactor*PCSA; // Maximum force output at optimum fiber length
 Lf0 = .FiberLengthScaleThigh
       * MuscleParameters.OptimalFiberlength
       * cos(pi/180*MuscleParameters.Pennationangle);
 Vol0 = .StrengthScaleThigh
        * MuscleParameters.VolumeScaleFactor
        * MuscleParameters.VolumeMuscleBelly/MuscleElemAmount;
 AnyVar PCSA = Vol0/Lf0;///< PCSA is calculated as muscle volume divided between muscle branches, divided by fiber length and corrected for the pennation angle not used in the simple muscle model
};

AnyMuscleModel Pectineus2Par =
{
 AnyFolder &MuscleParameters = .CadaverMusPar.Pectineus;
 AnyIntVar MuscleElemNo = 2; ///< The number of this element of the muscle
 AnyIntVar MuscleElemAmount = 4; ///< The total amount of elements for this muscle
 F0 = .PCSAfactor*PCSA; // Maximum force output at optimum fiber length
 Lf0 = .FiberLengthScaleThigh
       * MuscleParameters.OptimalFiberlength
       * cos(pi/180*MuscleParameters.Pennationangle);
 Vol0 = .StrengthScaleThigh
        * MuscleParameters.VolumeScaleFactor
        * MuscleParameters.VolumeMuscleBelly/MuscleElemAmount;
 AnyVar PCSA = Vol0/Lf0;///< PCSA is calculated as muscle volume divided between muscle branches, divided by fiber length and corrected for the pennation angle not used in the simple muscle model
};

AnyMuscleModel Pectineus3Par =
{
 AnyFolder &MuscleParameters = .CadaverMusPar.Pectineus;
 AnyIntVar MuscleElemNo = 3; ///< The number of this element of the muscle
 AnyIntVar MuscleElemAmount = 4; ///< The total amount of elements for this muscle
 F0 = .PCSAfactor*PCSA; // Maximum force output at optimum fiber length
 Lf0 = .FiberLengthScaleThigh
       * MuscleParameters.OptimalFiberlength
       * cos(pi/180*MuscleParameters.Pennationangle);
 Vol0 = .StrengthScaleThigh
        * MuscleParameters.VolumeScaleFactor
        * MuscleParameters.VolumeMuscleBelly/MuscleElemAmount;
 AnyVar PCSA = Vol0/Lf0;///< PCSA is calculated as muscle volume divided between muscle branches, divided by fiber length and corrected for the pennation angle not used in the simple muscle model
};

AnyMuscleModel Pectineus4Par =
{
 AnyFolder &MuscleParameters = .CadaverMusPar.Pectineus;
 AnyIntVar MuscleElemNo = 4; ///< The number of this element of the muscle
 AnyIntVar MuscleElemAmount = 4; ///< The total amount of elements for this muscle
 F0 = .PCSAfactor*PCSA; // Maximum force output at optimum fiber length
 Lf0 = .FiberLengthScaleThigh
       * MuscleParameters.OptimalFiberlength
       * cos(pi/180*MuscleParameters.Pennationangle);
 Vol0 = .StrengthScaleThigh
        * MuscleParameters.VolumeScaleFactor
        * MuscleParameters.VolumeMuscleBelly/MuscleElemAmount;
 AnyVar PCSA = Vol0/Lf0;///< PCSA is calculated as muscle volume divided between muscle branches, divided by fiber length and corrected for the pennation angle not used in the simple muscle model
};


/////////////////////////////////////////
//     PeroneusBrevis (3 elements)     //
/////////////////////////////////////////
AnyMuscleModel PeroneusBrevis1Par =
{
 AnyFolder &MuscleParameters = .CadaverMusPar.PeroneusBrevis;
 AnyIntVar MuscleElemNo = 1; ///< The number of this element of the muscle
 AnyIntVar MuscleElemAmount = 3; ///< The total amount of elements for this muscle
 F0 = .PCSAfactor*PCSA; // Maximum force output at optimum fiber length
 Lf0 = .FiberLengthScaleShank
       * MuscleParameters.OptimalFiberlength
       * cos(pi/180*MuscleParameters.Pennationangle);
 Vol0 = .StrengthScaleShank
        * MuscleParameters.VolumeScaleFactor
        * MuscleParameters.VolumeMuscleBelly/MuscleElemAmount;
 AnyVar PCSA = Vol0/Lf0;///< PCSA is calculated as muscle volume divided between muscle branches, divided by fiber length and corrected for the pennation angle not used in the simple muscle model
};

AnyMuscleModel PeroneusBrevis2Par =
{
 AnyFolder &MuscleParameters = .CadaverMusPar.PeroneusBrevis;
 AnyIntVar MuscleElemNo = 2; ///< The number of this element of the muscle
 AnyIntVar MuscleElemAmount = 3; ///< The total amount of elements for this muscle
 F0 = .PCSAfactor*PCSA; // Maximum force output at optimum fiber length
 Lf0 = .FiberLengthScaleShank
       * MuscleParameters.OptimalFiberlength
       * cos(pi/180*MuscleParameters.Pennationangle);
 Vol0 = .StrengthScaleShank
        * MuscleParameters.VolumeScaleFactor
        * MuscleParameters.VolumeMuscleBelly/MuscleElemAmount;
 AnyVar PCSA = Vol0/Lf0;///< PCSA is calculated as muscle volume divided between muscle branches, divided by fiber length and corrected for the pennation angle not used in the simple muscle model
};

AnyMuscleModel PeroneusBrevis3Par =
{
 AnyFolder &MuscleParameters = .CadaverMusPar.PeroneusBrevis;
 AnyIntVar MuscleElemNo = 3; ///< The number of this element of the muscle
 AnyIntVar MuscleElemAmount = 3; ///< The total amount of elements for this muscle
 F0 = .PCSAfactor*PCSA; // Maximum force output at optimum fiber length
 Lf0 = .FiberLengthScaleShank
       * MuscleParameters.OptimalFiberlength
       * cos(pi/180*MuscleParameters.Pennationangle);
 Vol0 = .StrengthScaleShank
        * MuscleParameters.VolumeScaleFactor
        * MuscleParameters.VolumeMuscleBelly/MuscleElemAmount;
 AnyVar PCSA = Vol0/Lf0;///< PCSA is calculated as muscle volume divided between muscle branches, divided by fiber length and corrected for the pennation angle not used in the simple muscle model
};


/////////////////////////////////////////
//     PeroneusLongus (3 elements)     //
/////////////////////////////////////////
AnyMuscleModel PeroneusLongus1Par =
{
 AnyFolder &MuscleParameters = .CadaverMusPar.PeroneusLongus;
 AnyIntVar MuscleElemNo = 1; ///< The number of this element of the muscle
 AnyIntVar MuscleElemAmount = 3; ///< The total amount of elements for this muscle
 F0 = .PCSAfactor*PCSA; // Maximum force output at optimum fiber length
 Lf0 = .FiberLengthScaleShank
       * MuscleParameters.OptimalFiberlength
       * cos(pi/180*MuscleParameters.Pennationangle);
 Vol0 = .StrengthScaleShank
        * MuscleParameters.VolumeScaleFactor
        * MuscleParameters.VolumeMuscleBelly/MuscleElemAmount;
 AnyVar PCSA = Vol0/Lf0;///< PCSA is calculated as muscle volume divided between muscle branches, divided by fiber length and corrected for the pennation angle not used in the simple muscle model
};

AnyMuscleModel PeroneusLongus2Par =
{
 AnyFolder &MuscleParameters = .CadaverMusPar.PeroneusLongus;
 AnyIntVar MuscleElemNo = 2; ///< The number of this element of the muscle
 AnyIntVar MuscleElemAmount = 3; ///< The total amount of elements for this muscle
 F0 = .PCSAfactor*PCSA; // Maximum force output at optimum fiber length
 Lf0 = .FiberLengthScaleShank
       * MuscleParameters.OptimalFiberlength
       * cos(pi/180*MuscleParameters.Pennationangle);
 Vol0 = .StrengthScaleShank
        * MuscleParameters.VolumeScaleFactor
        * MuscleParameters.VolumeMuscleBelly/MuscleElemAmount;
 AnyVar PCSA = Vol0/Lf0;///< PCSA is calculated as muscle volume divided between muscle branches, divided by fiber length and corrected for the pennation angle not used in the simple muscle model
};

AnyMuscleModel PeroneusLongus3Par =
{
 AnyFolder &MuscleParameters = .CadaverMusPar.PeroneusLongus;
 AnyIntVar MuscleElemNo = 3; ///< The number of this element of the muscle
 AnyIntVar MuscleElemAmount = 3; ///< The total amount of elements for this muscle
 F0 = .PCSAfactor*PCSA; // Maximum force output at optimum fiber length
 Lf0 = .FiberLengthScaleShank
       * MuscleParameters.OptimalFiberlength
       * cos(pi/180*MuscleParameters.Pennationangle);
 Vol0 = .StrengthScaleShank
        * MuscleParameters.VolumeScaleFactor
        * MuscleParameters.VolumeMuscleBelly/MuscleElemAmount;
 AnyVar PCSA = Vol0/Lf0;///< PCSA is calculated as muscle volume divided between muscle branches, divided by fiber length and corrected for the pennation angle not used in the simple muscle model
};


//////////////////////////////////////////
//     PeroneusTertius (3 elements)     //
//////////////////////////////////////////
AnyMuscleModel PeroneusTertius1Par =
{
 AnyFolder &MuscleParameters = .CadaverMusPar.PeroneusTertius;
 AnyIntVar MuscleElemNo = 1; ///< The number of this element of the muscle
 AnyIntVar MuscleElemAmount = 3; ///< The total amount of elements for this muscle
 F0 = .PCSAfactor*PCSA; // Maximum force output at optimum fiber length
 Lf0 = .FiberLengthScaleShank
       * MuscleParameters.OptimalFiberlength
       * cos(pi/180*MuscleParameters.Pennationangle);
 Vol0 = .StrengthScaleShank
        * MuscleParameters.VolumeScaleFactor
        * MuscleParameters.VolumeMuscleBelly/MuscleElemAmount;
 AnyVar PCSA = Vol0/Lf0;///< PCSA is calculated as muscle volume divided between muscle branches, divided by fiber length and corrected for the pennation angle not used in the simple muscle model
};

AnyMuscleModel PeroneusTertius2Par =
{
 AnyFolder &MuscleParameters = .CadaverMusPar.PeroneusTertius;
 AnyIntVar MuscleElemNo = 2; ///< The number of this element of the muscle
 AnyIntVar MuscleElemAmount = 3; ///< The total amount of elements for this muscle
 F0 = .PCSAfactor*PCSA; // Maximum force output at optimum fiber length
 Lf0 = .FiberLengthScaleShank
       * MuscleParameters.OptimalFiberlength
       * cos(pi/180*MuscleParameters.Pennationangle);
 Vol0 = .StrengthScaleShank
        * MuscleParameters.VolumeScaleFactor
        * MuscleParameters.VolumeMuscleBelly/MuscleElemAmount;
 AnyVar PCSA = Vol0/Lf0;///< PCSA is calculated as muscle volume divided between muscle branches, divided by fiber length and corrected for the pennation angle not used in the simple muscle model
};

AnyMuscleModel PeroneusTertius3Par =
{
 AnyFolder &MuscleParameters = .CadaverMusPar.PeroneusTertius;
 AnyIntVar MuscleElemNo = 3; ///< The number of this element of the muscle
 AnyIntVar MuscleElemAmount = 3; ///< The total amount of elements for this muscle
 F0 = .PCSAfactor*PCSA; // Maximum force output at optimum fiber length
 Lf0 = .FiberLengthScaleShank
       * MuscleParameters.OptimalFiberlength
       * cos(pi/180*MuscleParameters.Pennationangle);
 Vol0 = .StrengthScaleShank
        * MuscleParameters.VolumeScaleFactor
        * MuscleParameters.VolumeMuscleBelly/MuscleElemAmount;
 AnyVar PCSA = Vol0/Lf0;///< PCSA is calculated as muscle volume divided between muscle branches, divided by fiber length and corrected for the pennation angle not used in the simple muscle model
};


/////////////////////////////////////
//     Piriformis (1 element )     //
/////////////////////////////////////
AnyMuscleModel Piriformis1Par =
{
 AnyFolder &MuscleParameters = .CadaverMusPar.Piriformis;
 AnyIntVar MuscleElemNo = 1; ///< The number of this element of the muscle
 AnyIntVar MuscleElemAmount = 1; ///< The total amount of elements for this muscle
 F0 = .PCSAfactor*PCSA; // Maximum force output at optimum fiber length
 Lf0 = .FiberLengthScalePelvis
       * MuscleParameters.OptimalFiberlength
       * cos(pi/180*MuscleParameters.Pennationangle);
 Vol0 = .StrengthScalePelvis
        * MuscleParameters.VolumeScaleFactor
        * MuscleParameters.VolumeMuscleBelly/MuscleElemAmount;
 AnyVar PCSA = Vol0/Lf0;///< PCSA is calculated as muscle volume divided between muscle branches, divided by fiber length and corrected for the pennation angle not used in the simple muscle model
};


////////////////////////////////////
//     Plantaris (1 element )     //
////////////////////////////////////
AnyMuscleModel Plantaris1Par =
{
 AnyFolder &MuscleParameters = .CadaverMusPar.Plantaris;
 AnyIntVar MuscleElemNo = 1; ///< The number of this element of the muscle
 AnyIntVar MuscleElemAmount = 1; ///< The total amount of elements for this muscle
 F0 = .PCSAfactor*PCSA; // Maximum force output at optimum fiber length
 Lf0 = .FiberLengthScaleShank
       * MuscleParameters.OptimalFiberlength
       * cos(pi/180*MuscleParameters.Pennationangle);
 Vol0 = .StrengthScaleShank
        * MuscleParameters.VolumeScaleFactor
        * MuscleParameters.VolumeMuscleBelly/MuscleElemAmount;
 AnyVar PCSA = Vol0/Lf0;///< PCSA is calculated as muscle volume divided between muscle branches, divided by fiber length and corrected for the pennation angle not used in the simple muscle model
};


////////////////////////////////////
//     Popliteus (3 elements)     //
////////////////////////////////////
AnyMuscleModel Popliteus1Par =
{
 AnyFolder &MuscleParameters = .CadaverMusPar.Popliteus;
 AnyIntVar MuscleElemNo = 1; ///< The number of this element of the muscle
 AnyIntVar MuscleElemAmount = 3; ///< The total amount of elements for this muscle
 F0 = .PCSAfactor*PCSA; // Maximum force output at optimum fiber length
 Lf0 = .FiberLengthScaleShank
       * MuscleParameters.OptimalFiberlength
       * cos(pi/180*MuscleParameters.Pennationangle);
 Vol0 = .StrengthScaleShank
        * MuscleParameters.VolumeScaleFactor
        * MuscleParameters.VolumeMuscleBelly/MuscleElemAmount;
 AnyVar PCSA = Vol0/Lf0;///< PCSA is calculated as muscle volume divided between muscle branches, divided by fiber length and corrected for the pennation angle not used in the simple muscle model
};

AnyMuscleModel Popliteus2Par =
{
 AnyFolder &MuscleParameters = .CadaverMusPar.Popliteus;
 AnyIntVar MuscleElemNo = 2; ///< The number of this element of the muscle
 AnyIntVar MuscleElemAmount = 3; ///< The total amount of elements for this muscle
 F0 = .PCSAfactor*PCSA; // Maximum force output at optimum fiber length
 Lf0 = .FiberLengthScaleShank
       * MuscleParameters.OptimalFiberlength
       * cos(pi/180*MuscleParameters.Pennationangle);
 Vol0 = .StrengthScaleShank
        * MuscleParameters.VolumeScaleFactor
        * MuscleParameters.VolumeMuscleBelly/MuscleElemAmount;
 AnyVar PCSA = Vol0/Lf0;///< PCSA is calculated as muscle volume divided between muscle branches, divided by fiber length and corrected for the pennation angle not used in the simple muscle model
};

AnyMuscleModel Popliteus3Par =
{
 AnyFolder &MuscleParameters = .CadaverMusPar.Popliteus;
 AnyIntVar MuscleElemNo = 3; ///< The number of this element of the muscle
 AnyIntVar MuscleElemAmount = 3; ///< The total amount of elements for this muscle
 F0 = .PCSAfactor*PCSA; // Maximum force output at optimum fiber length
 Lf0 = .FiberLengthScaleShank
       * MuscleParameters.OptimalFiberlength
       * cos(pi/180*MuscleParameters.Pennationangle);
 Vol0 = .StrengthScaleShank
        * MuscleParameters.VolumeScaleFactor
        * MuscleParameters.VolumeMuscleBelly/MuscleElemAmount;
 AnyVar PCSA = Vol0/Lf0;///< PCSA is calculated as muscle volume divided between muscle branches, divided by fiber length and corrected for the pennation angle not used in the simple muscle model
};


/////////////////////////////////////
//     PsoasMinor (1 element )     //
/////////////////////////////////////
AnyMuscleModel PsoasMinor1Par =
{
 AnyFolder &MuscleParameters = .CadaverMusPar.PsoasMinor;
 AnyIntVar MuscleElemNo = 1; ///< The number of this element of the muscle
 AnyIntVar MuscleElemAmount = 1; ///< The total amount of elements for this muscle
 F0 = .PCSAfactor*PCSA; // Maximum force output at optimum fiber length
 Lf0 = .FiberLengthScalePelvis
       * MuscleParameters.OptimalFiberlength
       * cos(pi/180*MuscleParameters.Pennationangle);
 Vol0 = .StrengthScalePelvis
        * MuscleParameters.VolumeScaleFactor
        * MuscleParameters.VolumeMuscleBelly/MuscleElemAmount;
 AnyVar PCSA = Vol0/Lf0;///< PCSA is calculated as muscle volume divided between muscle branches, divided by fiber length and corrected for the pennation angle not used in the simple muscle model
};
/////////////////////////////////////
//     PsoasMajor (11 elements)     //
/////////////////////////////////////
AnyMuscleModel PsoasMajor1Par =
{
 AnyFolder &MuscleParameters = .CadaverMusPar.PsoasMajor;
 AnyIntVar MuscleElemNo = 1; ///< The number of this element of the muscle
 AnyIntVar MuscleElemAmount = 11; ///< The total amount of elements for this muscle
 F0 = .PCSAfactor*PCSA; // Maximum force output at optimum fiber length
 Lf0 = .FiberLengthScalePelvis
       * MuscleParameters.OptimalFiberlength
       * cos(pi/180*MuscleParameters.Pennationangle);
 Vol0 = .StrengthScalePelvis
        * MuscleParameters.VolumeScaleFactor
        * MuscleParameters.VolumeMuscleBelly/MuscleElemAmount;
 AnyVar PCSA = Vol0/Lf0;///< PCSA is calculated as muscle volume divided between muscle branches, divided by fiber length and corrected for the pennation angle not used in the simple muscle model
};

AnyMuscleModel PsoasMajor2Par =
{
 AnyFolder &MuscleParameters = .CadaverMusPar.PsoasMajor;
 AnyIntVar MuscleElemNo = 2; ///< The number of this element of the muscle
 AnyIntVar MuscleElemAmount = 11; ///< The total amount of elements for this muscle
 F0 = .PCSAfactor*PCSA; // Maximum force output at optimum fiber length
 Lf0 = .FiberLengthScalePelvis
       * MuscleParameters.OptimalFiberlength
       * cos(pi/180*MuscleParameters.Pennationangle);
 Vol0 = .StrengthScalePelvis
        * MuscleParameters.VolumeScaleFactor
        * MuscleParameters.VolumeMuscleBelly/MuscleElemAmount;
 AnyVar PCSA = Vol0/Lf0;///< PCSA is calculated as muscle volume divided between muscle branches, divided by fiber length and corrected for the pennation angle not used in the simple muscle model
};

AnyMuscleModel PsoasMajor3Par =
{
 AnyFolder &MuscleParameters = .CadaverMusPar.PsoasMajor;
 AnyIntVar MuscleElemNo = 3; ///< The number of this element of the muscle
 AnyIntVar MuscleElemAmount = 11; ///< The total amount of elements for this muscle
 F0 = .PCSAfactor*PCSA; // Maximum force output at optimum fiber length
 Lf0 = .FiberLengthScalePelvis
       * MuscleParameters.OptimalFiberlength
       * cos(pi/180*MuscleParameters.Pennationangle);
 Vol0 = .StrengthScalePelvis
        * MuscleParameters.VolumeScaleFactor
        * MuscleParameters.VolumeMuscleBelly/MuscleElemAmount;
 AnyVar PCSA = Vol0/Lf0;///< PCSA is calculated as muscle volume divided between muscle branches, divided by fiber length and corrected for the pennation angle not used in the simple muscle model
};

AnyMuscleModel PsoasMajor4Par =
{
 AnyFolder &MuscleParameters = .CadaverMusPar.PsoasMajor;
 AnyIntVar MuscleElemNo = 4; ///< The number of this element of the muscle
 AnyIntVar MuscleElemAmount = 11; ///< The total amount of elements for this muscle
 F0 = .PCSAfactor*PCSA; // Maximum force output at optimum fiber length
 Lf0 = .FiberLengthScalePelvis
       * MuscleParameters.OptimalFiberlength
       * cos(pi/180*MuscleParameters.Pennationangle);
 Vol0 = .StrengthScalePelvis
        * MuscleParameters.VolumeScaleFactor
        * MuscleParameters.VolumeMuscleBelly/MuscleElemAmount;
 AnyVar PCSA = Vol0/Lf0;///< PCSA is calculated as muscle volume divided between muscle branches, divided by fiber length and corrected for the pennation angle not used in the simple muscle model
};

AnyMuscleModel PsoasMajor5Par =
{
 AnyFolder &MuscleParameters = .CadaverMusPar.PsoasMajor;
 AnyIntVar MuscleElemNo = 5; ///< The number of this element of the muscle
 AnyIntVar MuscleElemAmount = 11; ///< The total amount of elements for this muscle
 F0 = .PCSAfactor*PCSA; // Maximum force output at optimum fiber length
 Lf0 = .FiberLengthScalePelvis
       * MuscleParameters.OptimalFiberlength
       * cos(pi/180*MuscleParameters.Pennationangle);
 Vol0 = .StrengthScalePelvis
        * MuscleParameters.VolumeScaleFactor
        * MuscleParameters.VolumeMuscleBelly/MuscleElemAmount;
 AnyVar PCSA = Vol0/Lf0;///< PCSA is calculated as muscle volume divided between muscle branches, divided by fiber length and corrected for the pennation angle not used in the simple muscle model
};

AnyMuscleModel PsoasMajor6Par =
{
 AnyFolder &MuscleParameters = .CadaverMusPar.PsoasMajor;
 AnyIntVar MuscleElemNo = 6; ///< The number of this element of the muscle
 AnyIntVar MuscleElemAmount = 11; ///< The total amount of elements for this muscle
 F0 = .PCSAfactor*PCSA; // Maximum force output at optimum fiber length
 Lf0 = .FiberLengthScalePelvis
       * MuscleParameters.OptimalFiberlength
       * cos(pi/180*MuscleParameters.Pennationangle);
 Vol0 = .StrengthScalePelvis
        * MuscleParameters.VolumeScaleFactor
        * MuscleParameters.VolumeMuscleBelly/MuscleElemAmount;
 AnyVar PCSA = Vol0/Lf0;///< PCSA is calculated as muscle volume divided between muscle branches, divided by fiber length and corrected for the pennation angle not used in the simple muscle model
};

AnyMuscleModel PsoasMajor7Par =
{
 AnyFolder &MuscleParameters = .CadaverMusPar.PsoasMajor;
 AnyIntVar MuscleElemNo = 7; ///< The number of this element of the muscle
 AnyIntVar MuscleElemAmount = 11; ///< The total amount of elements for this muscle
 F0 = .PCSAfactor*PCSA; // Maximum force output at optimum fiber length
 Lf0 = .FiberLengthScalePelvis
       * MuscleParameters.OptimalFiberlength
       * cos(pi/180*MuscleParameters.Pennationangle);
 Vol0 = .StrengthScalePelvis
        * MuscleParameters.VolumeScaleFactor
        * MuscleParameters.VolumeMuscleBelly/MuscleElemAmount;
 AnyVar PCSA = Vol0/Lf0;///< PCSA is calculated as muscle volume divided between muscle branches, divided by fiber length and corrected for the pennation angle not used in the simple muscle model
};

AnyMuscleModel PsoasMajor8Par =
{
 AnyFolder &MuscleParameters = .CadaverMusPar.PsoasMajor;
 AnyIntVar MuscleElemNo = 8; ///< The number of this element of the muscle
 AnyIntVar MuscleElemAmount = 11; ///< The total amount of elements for this muscle
 F0 = .PCSAfactor*PCSA; // Maximum force output at optimum fiber length
 Lf0 = .FiberLengthScalePelvis
       * MuscleParameters.OptimalFiberlength
       * cos(pi/180*MuscleParameters.Pennationangle);
 Vol0 = .StrengthScalePelvis
        * MuscleParameters.VolumeScaleFactor
        * MuscleParameters.VolumeMuscleBelly/MuscleElemAmount;
 AnyVar PCSA = Vol0/Lf0;///< PCSA is calculated as muscle volume divided between muscle branches, divided by fiber length and corrected for the pennation angle not used in the simple muscle model
};

AnyMuscleModel PsoasMajor9Par =
{
 AnyFolder &MuscleParameters = .CadaverMusPar.PsoasMajor;
 AnyIntVar MuscleElemNo = 9; ///< The number of this element of the muscle
 AnyIntVar MuscleElemAmount = 11; ///< The total amount of elements for this muscle
 F0 = .PCSAfactor*PCSA; // Maximum force output at optimum fiber length
 Lf0 = .FiberLengthScalePelvis
       * MuscleParameters.OptimalFiberlength
       * cos(pi/180*MuscleParameters.Pennationangle);
 Vol0 = .StrengthScalePelvis
        * MuscleParameters.VolumeScaleFactor
        * MuscleParameters.VolumeMuscleBelly/MuscleElemAmount;
 AnyVar PCSA = Vol0/Lf0;///< PCSA is calculated as muscle volume divided between muscle branches, divided by fiber length and corrected for the pennation angle not used in the simple muscle model
};

AnyMuscleModel PsoasMajor10Par =
{
 AnyFolder &MuscleParameters = .CadaverMusPar.PsoasMajor;
 AnyIntVar MuscleElemNo = 10; ///< The number of this element of the muscle
 AnyIntVar MuscleElemAmount = 11; ///< The total amount of elements for this muscle
 F0 = .PCSAfactor*PCSA; // Maximum force output at optimum fiber length
 Lf0 = .FiberLengthScalePelvis
       * MuscleParameters.OptimalFiberlength
       * cos(pi/180*MuscleParameters.Pennationangle);
 Vol0 = .StrengthScalePelvis
        * MuscleParameters.VolumeScaleFactor
        * MuscleParameters.VolumeMuscleBelly/MuscleElemAmount;
 AnyVar PCSA = Vol0/Lf0;///< PCSA is calculated as muscle volume divided between muscle branches, divided by fiber length and corrected for the pennation angle not used in the simple muscle model
};

AnyMuscleModel PsoasMajor11Par =
{
 AnyFolder &MuscleParameters = .CadaverMusPar.PsoasMajor;
 AnyIntVar MuscleElemNo = 11; ///< The number of this element of the muscle
 AnyIntVar MuscleElemAmount = 11; ///< The total amount of elements for this muscle
 F0 = .PCSAfactor*PCSA; // Maximum force output at optimum fiber length
 Lf0 = .FiberLengthScalePelvis
       * MuscleParameters.OptimalFiberlength
       * cos(pi/180*MuscleParameters.Pennationangle);
 Vol0 = .StrengthScalePelvis
        * MuscleParameters.VolumeScaleFactor
        * MuscleParameters.VolumeMuscleBelly/MuscleElemAmount;
 AnyVar PCSA = Vol0/Lf0;///< PCSA is calculated as muscle volume divided between muscle branches, divided by fiber length and corrected for the pennation angle not used in the simple muscle model
};


///////////////////////////////////////////
//     QuadratusFemoris (4 elements)     //
///////////////////////////////////////////
AnyMuscleModel QuadratusFemoris1Par =
{
 AnyFolder &MuscleParameters = .CadaverMusPar.QuadratusFemoris;
 AnyIntVar MuscleElemNo = 1; ///< The number of this element of the muscle
 AnyIntVar MuscleElemAmount = 4; ///< The total amount of elements for this muscle
 F0 = .PCSAfactor*PCSA; // Maximum force output at optimum fiber length
 Lf0 = .FiberLengthScalePelvis
       * MuscleParameters.OptimalFiberlength
       * cos(pi/180*MuscleParameters.Pennationangle);
 Vol0 = .StrengthScalePelvis
        * MuscleParameters.VolumeScaleFactor
        * MuscleParameters.VolumeMuscleBelly/MuscleElemAmount;
 AnyVar PCSA = Vol0/Lf0;///< PCSA is calculated as muscle volume divided between muscle branches, divided by fiber length and corrected for the pennation angle not used in the simple muscle model
};

AnyMuscleModel QuadratusFemoris2Par =
{
 AnyFolder &MuscleParameters = .CadaverMusPar.QuadratusFemoris;
 AnyIntVar MuscleElemNo = 2; ///< The number of this element of the muscle
 AnyIntVar MuscleElemAmount = 4; ///< The total amount of elements for this muscle
 F0 = .PCSAfactor*PCSA; // Maximum force output at optimum fiber length
 Lf0 = .FiberLengthScalePelvis
       * MuscleParameters.OptimalFiberlength
       * cos(pi/180*MuscleParameters.Pennationangle);
 Vol0 = .StrengthScalePelvis
        * MuscleParameters.VolumeScaleFactor
        * MuscleParameters.VolumeMuscleBelly/MuscleElemAmount;
 AnyVar PCSA = Vol0/Lf0;///< PCSA is calculated as muscle volume divided between muscle branches, divided by fiber length and corrected for the pennation angle not used in the simple muscle model
};

AnyMuscleModel QuadratusFemoris3Par =
{
 AnyFolder &MuscleParameters = .CadaverMusPar.QuadratusFemoris;
 AnyIntVar MuscleElemNo = 3; ///< The number of this element of the muscle
 AnyIntVar MuscleElemAmount = 4; ///< The total amount of elements for this muscle
 F0 = .PCSAfactor*PCSA; // Maximum force output at optimum fiber length
 Lf0 = .FiberLengthScalePelvis
       * MuscleParameters.OptimalFiberlength
       * cos(pi/180*MuscleParameters.Pennationangle);
 Vol0 = .StrengthScalePelvis
        * MuscleParameters.VolumeScaleFactor
        * MuscleParameters.VolumeMuscleBelly/MuscleElemAmount;
 AnyVar PCSA = Vol0/Lf0;///< PCSA is calculated as muscle volume divided between muscle branches, divided by fiber length and corrected for the pennation angle not used in the simple muscle model
};

AnyMuscleModel QuadratusFemoris4Par =
{
 AnyFolder &MuscleParameters = .CadaverMusPar.QuadratusFemoris;
 AnyIntVar MuscleElemNo = 4; ///< The number of this element of the muscle
 AnyIntVar MuscleElemAmount = 4; ///< The total amount of elements for this muscle
 F0 = .PCSAfactor*PCSA; // Maximum force output at optimum fiber length
 Lf0 = .FiberLengthScalePelvis
       * MuscleParameters.OptimalFiberlength
       * cos(pi/180*MuscleParameters.Pennationangle);
 Vol0 = .StrengthScalePelvis
        * MuscleParameters.VolumeScaleFactor
        * MuscleParameters.VolumeMuscleBelly/MuscleElemAmount;
 AnyVar PCSA = Vol0/Lf0;///< PCSA is calculated as muscle volume divided between muscle branches, divided by fiber length and corrected for the pennation angle not used in the simple muscle model
};


////////////////////////////////////////
//     RectusFemoris (2 elements)     //
////////////////////////////////////////
AnyMuscleModel RectusFemoris1Par =
{
 AnyFolder &MuscleParameters = .CadaverMusPar.RectusFemoris;
 AnyIntVar MuscleElemNo = 1; ///< The number of this element of the muscle
 AnyIntVar MuscleElemAmount = 2; ///< The total amount of elements for this muscle
 F0 = .PCSAfactor*PCSA; // Maximum force output at optimum fiber length
 Lf0 = .FiberLengthScaleThigh
       * MuscleParameters.OptimalFiberlength
       * cos(pi/180*MuscleParameters.Pennationangle);
 Vol0 = .StrengthScaleThigh
        * MuscleParameters.VolumeScaleFactor
        * MuscleParameters.VolumeMuscleBelly/MuscleElemAmount;
 AnyVar PCSA = Vol0/Lf0;///< PCSA is calculated as muscle volume divided between muscle branches, divided by fiber length and corrected for the pennation angle not used in the simple muscle model
};

AnyMuscleModel RectusFemoris2Par =
{
 AnyFolder &MuscleParameters = .CadaverMusPar.RectusFemoris;
 AnyIntVar MuscleElemNo = 2; ///< The number of this element of the muscle
 AnyIntVar MuscleElemAmount = 2; ///< The total amount of elements for this muscle
 F0 = .PCSAfactor*PCSA; // Maximum force output at optimum fiber length
 Lf0 = .FiberLengthScaleThigh
       * MuscleParameters.OptimalFiberlength
       * cos(pi/180*MuscleParameters.Pennationangle);
 Vol0 = .StrengthScaleThigh
        * MuscleParameters.VolumeScaleFactor
        * MuscleParameters.VolumeMuscleBelly/MuscleElemAmount;
 AnyVar PCSA = Vol0/Lf0;///< PCSA is calculated as muscle volume divided between muscle branches, divided by fiber length and corrected for the pennation angle not used in the simple muscle model
};


////////////////////////////////////
//     Sartorius (1 element )     //
////////////////////////////////////
AnyMuscleModel Sartorius1Par =
{
 AnyFolder &MuscleParameters = .CadaverMusPar.Sartorius;
 AnyIntVar MuscleElemNo = 1; ///< The number of this element of the muscle
 AnyIntVar MuscleElemAmount = 1; ///< The total amount of elements for this muscle
 F0 = .PCSAfactor*PCSA; // Maximum force output at optimum fiber length
 Lf0 = .FiberLengthScaleThigh
       * MuscleParameters.OptimalFiberlength
       * cos(pi/180*MuscleParameters.Pennationangle);
 Vol0 = .StrengthScaleThigh
        * MuscleParameters.VolumeScaleFactor
        * MuscleParameters.VolumeMuscleBelly/MuscleElemAmount;
 AnyVar PCSA = Vol0/Lf0;///< PCSA is calculated as muscle volume divided between muscle branches, divided by fiber length and corrected for the pennation angle not used in the simple muscle model
};


//////////////////////////////////////////
//     Semimembranosus (3 elements)     //
//////////////////////////////////////////
AnyMuscleModel Semimembranosus1Par =
{
 AnyFolder &MuscleParameters = .CadaverMusPar.Semimembranosus;
 AnyIntVar MuscleElemNo = 1; ///< The number of this element of the muscle
 AnyIntVar MuscleElemAmount = 3; ///< The total amount of elements for this muscle
 F0 = .PCSAfactor*PCSA; // Maximum force output at optimum fiber length
 Lf0 = .FiberLengthScaleThigh
       * MuscleParameters.OptimalFiberlength
       * cos(pi/180*MuscleParameters.Pennationangle);
 Vol0 = .StrengthScaleThigh
        * MuscleParameters.VolumeScaleFactor
        * MuscleParameters.VolumeMuscleBelly/MuscleElemAmount;
 AnyVar PCSA = Vol0/Lf0;///< PCSA is calculated as muscle volume divided between muscle branches, divided by fiber length and corrected for the pennation angle not used in the simple muscle model
};

AnyMuscleModel Semimembranosus2Par =
{
 AnyFolder &MuscleParameters = .CadaverMusPar.Semimembranosus;
 AnyIntVar MuscleElemNo = 2; ///< The number of this element of the muscle
 AnyIntVar MuscleElemAmount = 3; ///< The total amount of elements for this muscle
 F0 = .PCSAfactor*PCSA; // Maximum force output at optimum fiber length
 Lf0 = .FiberLengthScaleThigh
       * MuscleParameters.OptimalFiberlength
       * cos(pi/180*MuscleParameters.Pennationangle);
 Vol0 = .StrengthScaleThigh
        * MuscleParameters.VolumeScaleFactor
        * MuscleParameters.VolumeMuscleBelly/MuscleElemAmount;
 AnyVar PCSA = Vol0/Lf0;///< PCSA is calculated as muscle volume divided between muscle branches, divided by fiber length and corrected for the pennation angle not used in the simple muscle model
};

AnyMuscleModel Semimembranosus3Par =
{
 AnyFolder &MuscleParameters = .CadaverMusPar.Semimembranosus;
 AnyIntVar MuscleElemNo = 3; ///< The number of this element of the muscle
 AnyIntVar MuscleElemAmount = 3; ///< The total amount of elements for this muscle
 F0 = .PCSAfactor*PCSA; // Maximum force output at optimum fiber length
 Lf0 = .FiberLengthScaleThigh
       * MuscleParameters.OptimalFiberlength
       * cos(pi/180*MuscleParameters.Pennationangle);
 Vol0 = .StrengthScaleThigh
        * MuscleParameters.VolumeScaleFactor
        * MuscleParameters.VolumeMuscleBelly/MuscleElemAmount;
 AnyVar PCSA = Vol0/Lf0;///< PCSA is calculated as muscle volume divided between muscle branches, divided by fiber length and corrected for the pennation angle not used in the simple muscle model
};


/////////////////////////////////////////
//     Semitendinosus (1 element )     //
/////////////////////////////////////////
AnyMuscleModel Semitendinosus1Par =
{
 AnyFolder &MuscleParameters = .CadaverMusPar.Semitendinosus;
 AnyIntVar MuscleElemNo = 1; ///< The number of this element of the muscle
 AnyIntVar MuscleElemAmount = 1; ///< The total amount of elements for this muscle
 F0 = .PCSAfactor*PCSA; // Maximum force output at optimum fiber length
 Lf0 = .FiberLengthScaleThigh
       * MuscleParameters.OptimalFiberlength
       * cos(pi/180*MuscleParameters.Pennationangle);
 Vol0 = .StrengthScaleThigh
        * MuscleParameters.VolumeScaleFactor
        * MuscleParameters.VolumeMuscleBelly/MuscleElemAmount;
 AnyVar PCSA = Vol0/Lf0;///< PCSA is calculated as muscle volume divided between muscle branches, divided by fiber length and corrected for the pennation angle not used in the simple muscle model
};


/////////////////////////////////////////
//     SoleusMedialis (3 elements)     //
/////////////////////////////////////////
AnyMuscleModel SoleusMedialis1Par =
{
 AnyFolder &MuscleParameters = .CadaverMusPar.SoleusMedialis;
 AnyIntVar MuscleElemNo = 1; ///< The number of this element of the muscle
 AnyIntVar MuscleElemAmount = 3; ///< The total amount of elements for this muscle
 F0 = .PCSAfactor*PCSA; // Maximum force output at optimum fiber length
 Lf0 = .FiberLengthScaleShank
       * MuscleParameters.OptimalFiberlength
       * cos(pi/180*MuscleParameters.Pennationangle);
 Vol0 = .StrengthScaleShank
        * MuscleParameters.VolumeScaleFactor
        * MuscleParameters.VolumeMuscleBelly/MuscleElemAmount;
 AnyVar PCSA = Vol0/Lf0;///< PCSA is calculated as muscle volume divided between muscle branches, divided by fiber length and corrected for the pennation angle not used in the simple muscle model
};

AnyMuscleModel SoleusMedialis2Par =
{
 AnyFolder &MuscleParameters = .CadaverMusPar.SoleusMedialis;
 AnyIntVar MuscleElemNo = 2; ///< The number of this element of the muscle
 AnyIntVar MuscleElemAmount = 3; ///< The total amount of elements for this muscle
 F0 = .PCSAfactor*PCSA; // Maximum force output at optimum fiber length
 Lf0 = .FiberLengthScaleShank
       * MuscleParameters.OptimalFiberlength
       * cos(pi/180*MuscleParameters.Pennationangle);
 Vol0 = .StrengthScaleShank
        * MuscleParameters.VolumeScaleFactor
        * MuscleParameters.VolumeMuscleBelly/MuscleElemAmount;
 AnyVar PCSA = Vol0/Lf0;///< PCSA is calculated as muscle volume divided between muscle branches, divided by fiber length and corrected for the pennation angle not used in the simple muscle model
};

AnyMuscleModel SoleusMedialis3Par =
{
 AnyFolder &MuscleParameters = .CadaverMusPar.SoleusMedialis;
 AnyIntVar MuscleElemNo = 3; ///< The number of this element of the muscle
 AnyIntVar MuscleElemAmount = 3; ///< The total amount of elements for this muscle
 F0 = .PCSAfactor*PCSA; // Maximum force output at optimum fiber length
 Lf0 = .FiberLengthScaleShank
       * MuscleParameters.OptimalFiberlength
       * cos(pi/180*MuscleParameters.Pennationangle);
 Vol0 = .StrengthScaleShank
        * MuscleParameters.VolumeScaleFactor
        * MuscleParameters.VolumeMuscleBelly/MuscleElemAmount;
 AnyVar PCSA = Vol0/Lf0;///< PCSA is calculated as muscle volume divided between muscle branches, divided by fiber length and corrected for the pennation angle not used in the simple muscle model
};


//////////////////////////////////////////
//     SoleusLateralis (3 elements)     //
//////////////////////////////////////////
AnyMuscleModel SoleusLateralis1Par =
{
 AnyFolder &MuscleParameters = .CadaverMusPar.SoleusLateralis;
 AnyIntVar MuscleElemNo = 1; ///< The number of this element of the muscle
 AnyIntVar MuscleElemAmount = 3; ///< The total amount of elements for this muscle
 F0 = .PCSAfactor*PCSA; // Maximum force output at optimum fiber length
 Lf0 = .FiberLengthScaleShank
       * MuscleParameters.OptimalFiberlength
       * cos(pi/180*MuscleParameters.Pennationangle);
 Vol0 = .StrengthScaleShank
        * MuscleParameters.VolumeScaleFactor
        * MuscleParameters.VolumeMuscleBelly/MuscleElemAmount;
 AnyVar PCSA = Vol0/Lf0;///< PCSA is calculated as muscle volume divided between muscle branches, divided by fiber length and corrected for the pennation angle not used in the simple muscle model
};

AnyMuscleModel SoleusLateralis2Par =
{
 AnyFolder &MuscleParameters = .CadaverMusPar.SoleusLateralis;
 AnyIntVar MuscleElemNo = 2; ///< The number of this element of the muscle
 AnyIntVar MuscleElemAmount = 3; ///< The total amount of elements for this muscle
 F0 = .PCSAfactor*PCSA; // Maximum force output at optimum fiber length
 Lf0 = .FiberLengthScaleShank
       * MuscleParameters.OptimalFiberlength
       * cos(pi/180*MuscleParameters.Pennationangle);
 Vol0 = .StrengthScaleShank
        * MuscleParameters.VolumeScaleFactor
        * MuscleParameters.VolumeMuscleBelly/MuscleElemAmount;
 AnyVar PCSA = Vol0/Lf0;///< PCSA is calculated as muscle volume divided between muscle branches, divided by fiber length and corrected for the pennation angle not used in the simple muscle model
};

AnyMuscleModel SoleusLateralis3Par =
{
 AnyFolder &MuscleParameters = .CadaverMusPar.SoleusLateralis;
 AnyIntVar MuscleElemNo = 3; ///< The number of this element of the muscle
 AnyIntVar MuscleElemAmount = 3; ///< The total amount of elements for this muscle
 F0 = .PCSAfactor*PCSA; // Maximum force output at optimum fiber length
 Lf0 = .FiberLengthScaleShank
       * MuscleParameters.OptimalFiberlength
       * cos(pi/180*MuscleParameters.Pennationangle);
 Vol0 = .StrengthScaleShank
        * MuscleParameters.VolumeScaleFactor
        * MuscleParameters.VolumeMuscleBelly/MuscleElemAmount;
 AnyVar PCSA = Vol0/Lf0;///< PCSA is calculated as muscle volume divided between muscle branches, divided by fiber length and corrected for the pennation angle not used in the simple muscle model
};


/////////////////////////////////////////////
//     TensorFasciaeLatae (2 elements)     //
/////////////////////////////////////////////
AnyMuscleModel TensorFasciaeLatae1Par =
{
 AnyFolder &MuscleParameters = .CadaverMusPar.TensorFasciaeLatae;
 AnyIntVar MuscleElemNo = 1; ///< The number of this element of the muscle
 AnyIntVar MuscleElemAmount = 2; ///< The total amount of elements for this muscle
 F0 = .PCSAfactor*PCSA; // Maximum force output at optimum fiber length
 Lf0 = .FiberLengthScaleThigh
       * MuscleParameters.OptimalFiberlength
       * cos(pi/180*MuscleParameters.Pennationangle);
 Vol0 = .StrengthScaleThigh
        * MuscleParameters.VolumeScaleFactor
        * MuscleParameters.VolumeMuscleBelly/MuscleElemAmount;
 AnyVar PCSA = Vol0/Lf0;///< PCSA is calculated as muscle volume divided between muscle branches, divided by fiber length and corrected for the pennation angle not used in the simple muscle model
};

AnyMuscleModel TensorFasciaeLatae2Par =
{
 AnyFolder &MuscleParameters = .CadaverMusPar.TensorFasciaeLatae;
 AnyIntVar MuscleElemNo = 2; ///< The number of this element of the muscle
 AnyIntVar MuscleElemAmount = 2; ///< The total amount of elements for this muscle
 F0 = .PCSAfactor*PCSA; // Maximum force output at optimum fiber length
 Lf0 = .FiberLengthScaleThigh
       * MuscleParameters.OptimalFiberlength
       * cos(pi/180*MuscleParameters.Pennationangle);
 Vol0 = .StrengthScaleThigh
        * MuscleParameters.VolumeScaleFactor
        * MuscleParameters.VolumeMuscleBelly/MuscleElemAmount;
 AnyVar PCSA = Vol0/Lf0;///< PCSA is calculated as muscle volume divided between muscle branches, divided by fiber length and corrected for the pennation angle not used in the simple muscle model
};


///////////////////////////////////////////
//     TibialisAnterior (3 elements)     //
///////////////////////////////////////////
AnyMuscleModel TibialisAnterior1Par =
{
 AnyFolder &MuscleParameters = .CadaverMusPar.TibialisAnterior;
 AnyIntVar MuscleElemNo = 1; ///< The number of this element of the muscle
 AnyIntVar MuscleElemAmount = 3; ///< The total amount of elements for this muscle
 F0 = .PCSAfactor*PCSA; // Maximum force output at optimum fiber length
 Lf0 = .FiberLengthScaleShank
       * MuscleParameters.OptimalFiberlength
       * cos(pi/180*MuscleParameters.Pennationangle);
 Vol0 = .StrengthScaleShank
        * MuscleParameters.VolumeScaleFactor
        * MuscleParameters.VolumeMuscleBelly/MuscleElemAmount;
 AnyVar PCSA = Vol0/Lf0;///< PCSA is calculated as muscle volume divided between muscle branches, divided by fiber length and corrected for the pennation angle not used in the simple muscle model
};

AnyMuscleModel TibialisAnterior2Par =
{
 AnyFolder &MuscleParameters = .CadaverMusPar.TibialisAnterior;
 AnyIntVar MuscleElemNo = 2; ///< The number of this element of the muscle
 AnyIntVar MuscleElemAmount = 3; ///< The total amount of elements for this muscle
 F0 = .PCSAfactor*PCSA; // Maximum force output at optimum fiber length
 Lf0 = .FiberLengthScaleShank
       * MuscleParameters.OptimalFiberlength
       * cos(pi/180*MuscleParameters.Pennationangle);
 Vol0 = .StrengthScaleShank
        * MuscleParameters.VolumeScaleFactor
        * MuscleParameters.VolumeMuscleBelly/MuscleElemAmount;
 AnyVar PCSA = Vol0/Lf0;///< PCSA is calculated as muscle volume divided between muscle branches, divided by fiber length and corrected for the pennation angle not used in the simple muscle model
};

AnyMuscleModel TibialisAnterior3Par =
{
 AnyFolder &MuscleParameters = .CadaverMusPar.TibialisAnterior;
 AnyIntVar MuscleElemNo = 3; ///< The number of this element of the muscle
 AnyIntVar MuscleElemAmount = 3; ///< The total amount of elements for this muscle
 F0 = .PCSAfactor*PCSA; // Maximum force output at optimum fiber length
 Lf0 = .FiberLengthScaleShank
       * MuscleParameters.OptimalFiberlength
       * cos(pi/180*MuscleParameters.Pennationangle);
 Vol0 = .StrengthScaleShank
        * MuscleParameters.VolumeScaleFactor
        * MuscleParameters.VolumeMuscleBelly/MuscleElemAmount;
 AnyVar PCSA = Vol0/Lf0;///< PCSA is calculated as muscle volume divided between muscle branches, divided by fiber length and corrected for the pennation angle not used in the simple muscle model
};


////////////////////////////////////////////////////
//     TibialisPosteriorMedialis (3 elements)     //
////////////////////////////////////////////////////
AnyMuscleModel TibialisPosteriorMedialis1Par =
{
 AnyFolder &MuscleParameters = .CadaverMusPar.TibialisPosteriorMedialis;
 AnyIntVar MuscleElemNo = 1; ///< The number of this element of the muscle
 AnyIntVar MuscleElemAmount = 3; ///< The total amount of elements for this muscle
 F0 = .PCSAfactor*PCSA; // Maximum force output at optimum fiber length
 Lf0 = .FiberLengthScaleShank
       * MuscleParameters.OptimalFiberlength
       * cos(pi/180*MuscleParameters.Pennationangle);
 Vol0 = .StrengthScaleShank
        * MuscleParameters.VolumeScaleFactor
        * MuscleParameters.VolumeMuscleBelly/MuscleElemAmount;
 AnyVar PCSA = Vol0/Lf0;///< PCSA is calculated as muscle volume divided between muscle branches, divided by fiber length and corrected for the pennation angle not used in the simple muscle model
};

AnyMuscleModel TibialisPosteriorMedialis2Par =
{
 AnyFolder &MuscleParameters = .CadaverMusPar.TibialisPosteriorMedialis;
 AnyIntVar MuscleElemNo = 2; ///< The number of this element of the muscle
 AnyIntVar MuscleElemAmount = 3; ///< The total amount of elements for this muscle
 F0 = .PCSAfactor*PCSA; // Maximum force output at optimum fiber length
 Lf0 = .FiberLengthScaleShank
       * MuscleParameters.OptimalFiberlength
       * cos(pi/180*MuscleParameters.Pennationangle);
 Vol0 = .StrengthScaleShank
        * MuscleParameters.VolumeScaleFactor
        * MuscleParameters.VolumeMuscleBelly/MuscleElemAmount;
 AnyVar PCSA = Vol0/Lf0;///< PCSA is calculated as muscle volume divided between muscle branches, divided by fiber length and corrected for the pennation angle not used in the simple muscle model
};

AnyMuscleModel TibialisPosteriorMedialis3Par =
{
 AnyFolder &MuscleParameters = .CadaverMusPar.TibialisPosteriorMedialis;
 AnyIntVar MuscleElemNo = 3; ///< The number of this element of the muscle
 AnyIntVar MuscleElemAmount = 3; ///< The total amount of elements for this muscle
 F0 = .PCSAfactor*PCSA; // Maximum force output at optimum fiber length
 Lf0 = .FiberLengthScaleShank
       * MuscleParameters.OptimalFiberlength
       * cos(pi/180*MuscleParameters.Pennationangle);
 Vol0 = .StrengthScaleShank
        * MuscleParameters.VolumeScaleFactor
        * MuscleParameters.VolumeMuscleBelly/MuscleElemAmount;
 AnyVar PCSA = Vol0/Lf0;///< PCSA is calculated as muscle volume divided between muscle branches, divided by fiber length and corrected for the pennation angle not used in the simple muscle model
};


/////////////////////////////////////////////////////
//     TibialisPosteriorLateralis (3 elements)     //
/////////////////////////////////////////////////////
AnyMuscleModel TibialisPosteriorLateralis1Par =
{
 AnyFolder &MuscleParameters = .CadaverMusPar.TibialisPosteriorLateralis;
 AnyIntVar MuscleElemNo = 1; ///< The number of this element of the muscle
 AnyIntVar MuscleElemAmount = 3; ///< The total amount of elements for this muscle
 F0 = .PCSAfactor*PCSA; // Maximum force output at optimum fiber length
 Lf0 = .FiberLengthScaleShank
       * MuscleParameters.OptimalFiberlength
       * cos(pi/180*MuscleParameters.Pennationangle);
 Vol0 = .StrengthScaleShank
        * MuscleParameters.VolumeScaleFactor
        * MuscleParameters.VolumeMuscleBelly/MuscleElemAmount;
 AnyVar PCSA = Vol0/Lf0;///< PCSA is calculated as muscle volume divided between muscle branches, divided by fiber length and corrected for the pennation angle not used in the simple muscle model
};

AnyMuscleModel TibialisPosteriorLateralis2Par =
{
 AnyFolder &MuscleParameters = .CadaverMusPar.TibialisPosteriorLateralis;
 AnyIntVar MuscleElemNo = 2; ///< The number of this element of the muscle
 AnyIntVar MuscleElemAmount = 3; ///< The total amount of elements for this muscle
 F0 = .PCSAfactor*PCSA; // Maximum force output at optimum fiber length
 Lf0 = .FiberLengthScaleShank
       * MuscleParameters.OptimalFiberlength
       * cos(pi/180*MuscleParameters.Pennationangle);
 Vol0 = .StrengthScaleShank
        * MuscleParameters.VolumeScaleFactor
        * MuscleParameters.VolumeMuscleBelly/MuscleElemAmount;
 AnyVar PCSA = Vol0/Lf0;///< PCSA is calculated as muscle volume divided between muscle branches, divided by fiber length and corrected for the pennation angle not used in the simple muscle model
};

AnyMuscleModel TibialisPosteriorLateralis3Par =
{
 AnyFolder &MuscleParameters = .CadaverMusPar.TibialisPosteriorLateralis;
 AnyIntVar MuscleElemNo = 3; ///< The number of this element of the muscle
 AnyIntVar MuscleElemAmount = 3; ///< The total amount of elements for this muscle
 F0 = .PCSAfactor*PCSA; // Maximum force output at optimum fiber length
 Lf0 = .FiberLengthScaleShank
       * MuscleParameters.OptimalFiberlength
       * cos(pi/180*MuscleParameters.Pennationangle);
 Vol0 = .StrengthScaleShank
        * MuscleParameters.VolumeScaleFactor
        * MuscleParameters.VolumeMuscleBelly/MuscleElemAmount;
 AnyVar PCSA = Vol0/Lf0;///< PCSA is calculated as muscle volume divided between muscle branches, divided by fiber length and corrected for the pennation angle not used in the simple muscle model
};


////////////////////////////////////////////
//     VastusIntermedius (6 elements)     //
////////////////////////////////////////////
AnyMuscleModel VastusIntermedius1Par =
{
 AnyFolder &MuscleParameters = .CadaverMusPar.VastusIntermedius;
 AnyIntVar MuscleElemNo = 1; ///< The number of this element of the muscle
 AnyIntVar MuscleElemAmount = 6; ///< The total amount of elements for this muscle
 F0 = .PCSAfactor*PCSA; // Maximum force output at optimum fiber length
 Lf0 = .FiberLengthScaleThigh
       * MuscleParameters.OptimalFiberlength
       * cos(pi/180*MuscleParameters.Pennationangle);
 Vol0 = .StrengthScaleThigh
        * MuscleParameters.VolumeScaleFactor
        * MuscleParameters.VolumeMuscleBelly/MuscleElemAmount;
 AnyVar PCSA = Vol0/Lf0;///< PCSA is calculated as muscle volume divided between muscle branches, divided by fiber length and corrected for the pennation angle not used in the simple muscle model
};

AnyMuscleModel VastusIntermedius2Par =
{
 AnyFolder &MuscleParameters = .CadaverMusPar.VastusIntermedius;
 AnyIntVar MuscleElemNo = 2; ///< The number of this element of the muscle
 AnyIntVar MuscleElemAmount = 6; ///< The total amount of elements for this muscle
 F0 = .PCSAfactor*PCSA; // Maximum force output at optimum fiber length
 Lf0 = .FiberLengthScaleThigh
       * MuscleParameters.OptimalFiberlength
       * cos(pi/180*MuscleParameters.Pennationangle);
 Vol0 = .StrengthScaleThigh
        * MuscleParameters.VolumeScaleFactor
        * MuscleParameters.VolumeMuscleBelly/MuscleElemAmount;
 AnyVar PCSA = Vol0/Lf0;///< PCSA is calculated as muscle volume divided between muscle branches, divided by fiber length and corrected for the pennation angle not used in the simple muscle model
};

AnyMuscleModel VastusIntermedius3Par =
{
 AnyFolder &MuscleParameters = .CadaverMusPar.VastusIntermedius;
 AnyIntVar MuscleElemNo = 3; ///< The number of this element of the muscle
 AnyIntVar MuscleElemAmount = 6; ///< The total amount of elements for this muscle
 F0 = .PCSAfactor*PCSA; // Maximum force output at optimum fiber length
 Lf0 = .FiberLengthScaleThigh
       * MuscleParameters.OptimalFiberlength
       * cos(pi/180*MuscleParameters.Pennationangle);
 Vol0 = .StrengthScaleThigh
        * MuscleParameters.VolumeScaleFactor
        * MuscleParameters.VolumeMuscleBelly/MuscleElemAmount;
 AnyVar PCSA = Vol0/Lf0;///< PCSA is calculated as muscle volume divided between muscle branches, divided by fiber length and corrected for the pennation angle not used in the simple muscle model
};

AnyMuscleModel VastusIntermedius4Par =
{
 AnyFolder &MuscleParameters = .CadaverMusPar.VastusIntermedius;
 AnyIntVar MuscleElemNo = 4; ///< The number of this element of the muscle
 AnyIntVar MuscleElemAmount = 6; ///< The total amount of elements for this muscle
 F0 = .PCSAfactor*PCSA; // Maximum force output at optimum fiber length
 Lf0 = .FiberLengthScaleThigh
       * MuscleParameters.OptimalFiberlength
       * cos(pi/180*MuscleParameters.Pennationangle);
 Vol0 = .StrengthScaleThigh
        * MuscleParameters.VolumeScaleFactor
        * MuscleParameters.VolumeMuscleBelly/MuscleElemAmount;
 AnyVar PCSA = Vol0/Lf0;///< PCSA is calculated as muscle volume divided between muscle branches, divided by fiber length and corrected for the pennation angle not used in the simple muscle model
};

AnyMuscleModel VastusIntermedius5Par =
{
 AnyFolder &MuscleParameters = .CadaverMusPar.VastusIntermedius;
 AnyIntVar MuscleElemNo = 5; ///< The number of this element of the muscle
 AnyIntVar MuscleElemAmount = 6; ///< The total amount of elements for this muscle
 F0 = .PCSAfactor*PCSA; // Maximum force output at optimum fiber length
 Lf0 = .FiberLengthScaleThigh
       * MuscleParameters.OptimalFiberlength
       * cos(pi/180*MuscleParameters.Pennationangle);
 Vol0 = .StrengthScaleThigh
        * MuscleParameters.VolumeScaleFactor
        * MuscleParameters.VolumeMuscleBelly/MuscleElemAmount;
 AnyVar PCSA = Vol0/Lf0;///< PCSA is calculated as muscle volume divided between muscle branches, divided by fiber length and corrected for the pennation angle not used in the simple muscle model
};

AnyMuscleModel VastusIntermedius6Par =
{
 AnyFolder &MuscleParameters = .CadaverMusPar.VastusIntermedius;
 AnyIntVar MuscleElemNo = 6; ///< The number of this element of the muscle
 AnyIntVar MuscleElemAmount = 6; ///< The total amount of elements for this muscle
 F0 = .PCSAfactor*PCSA; // Maximum force output at optimum fiber length
 Lf0 = .FiberLengthScaleThigh
       * MuscleParameters.OptimalFiberlength
       * cos(pi/180*MuscleParameters.Pennationangle);
 Vol0 = .StrengthScaleThigh
        * MuscleParameters.VolumeScaleFactor
        * MuscleParameters.VolumeMuscleBelly/MuscleElemAmount;
 AnyVar PCSA = Vol0/Lf0;///< PCSA is calculated as muscle volume divided between muscle branches, divided by fiber length and corrected for the pennation angle not used in the simple muscle model
};


//////////////////////////////////////////////////
//     VastusLateralisInferior (6 elements)     //
//////////////////////////////////////////////////
AnyMuscleModel VastusLateralisInferior1Par =
{
 AnyFolder &MuscleParameters = .CadaverMusPar.VastusLateralisInferior;
 AnyIntVar MuscleElemNo = 1; ///< The number of this element of the muscle
 AnyIntVar MuscleElemAmount = 6; ///< The total amount of elements for this muscle
 F0 = .PCSAfactor*PCSA; // Maximum force output at optimum fiber length
 Lf0 = .FiberLengthScaleThigh
       * MuscleParameters.OptimalFiberlength
       * cos(pi/180*MuscleParameters.Pennationangle);
 Vol0 = .StrengthScaleThigh
        * MuscleParameters.VolumeScaleFactor
        * MuscleParameters.VolumeMuscleBelly/MuscleElemAmount;
 AnyVar PCSA = Vol0/Lf0;///< PCSA is calculated as muscle volume divided between muscle branches, divided by fiber length and corrected for the pennation angle not used in the simple muscle model
};

AnyMuscleModel VastusLateralisInferior2Par =
{
 AnyFolder &MuscleParameters = .CadaverMusPar.VastusLateralisInferior;
 AnyIntVar MuscleElemNo = 2; ///< The number of this element of the muscle
 AnyIntVar MuscleElemAmount = 6; ///< The total amount of elements for this muscle
 F0 = .PCSAfactor*PCSA; // Maximum force output at optimum fiber length
 Lf0 = .FiberLengthScaleThigh
       * MuscleParameters.OptimalFiberlength
       * cos(pi/180*MuscleParameters.Pennationangle);
 Vol0 = .StrengthScaleThigh
        * MuscleParameters.VolumeScaleFactor
        * MuscleParameters.VolumeMuscleBelly/MuscleElemAmount;
 AnyVar PCSA = Vol0/Lf0;///< PCSA is calculated as muscle volume divided between muscle branches, divided by fiber length and corrected for the pennation angle not used in the simple muscle model
};

AnyMuscleModel VastusLateralisInferior3Par =
{
 AnyFolder &MuscleParameters = .CadaverMusPar.VastusLateralisInferior;
 AnyIntVar MuscleElemNo = 3; ///< The number of this element of the muscle
 AnyIntVar MuscleElemAmount = 6; ///< The total amount of elements for this muscle
 F0 = .PCSAfactor*PCSA; // Maximum force output at optimum fiber length
 Lf0 = .FiberLengthScaleThigh
       * MuscleParameters.OptimalFiberlength
       * cos(pi/180*MuscleParameters.Pennationangle);
 Vol0 = .StrengthScaleThigh
        * MuscleParameters.VolumeScaleFactor
        * MuscleParameters.VolumeMuscleBelly/MuscleElemAmount;
 AnyVar PCSA = Vol0/Lf0;///< PCSA is calculated as muscle volume divided between muscle branches, divided by fiber length and corrected for the pennation angle not used in the simple muscle model
};

AnyMuscleModel VastusLateralisInferior4Par =
{
 AnyFolder &MuscleParameters = .CadaverMusPar.VastusLateralisInferior;
 AnyIntVar MuscleElemNo = 4; ///< The number of this element of the muscle
 AnyIntVar MuscleElemAmount = 6; ///< The total amount of elements for this muscle
 F0 = .PCSAfactor*PCSA; // Maximum force output at optimum fiber length
 Lf0 = .FiberLengthScaleThigh
       * MuscleParameters.OptimalFiberlength
       * cos(pi/180*MuscleParameters.Pennationangle);
 Vol0 = .StrengthScaleThigh
        * MuscleParameters.VolumeScaleFactor
        * MuscleParameters.VolumeMuscleBelly/MuscleElemAmount;
 AnyVar PCSA = Vol0/Lf0;///< PCSA is calculated as muscle volume divided between muscle branches, divided by fiber length and corrected for the pennation angle not used in the simple muscle model
};

AnyMuscleModel VastusLateralisInferior5Par =
{
 AnyFolder &MuscleParameters = .CadaverMusPar.VastusLateralisInferior;
 AnyIntVar MuscleElemNo = 5; ///< The number of this element of the muscle
 AnyIntVar MuscleElemAmount = 6; ///< The total amount of elements for this muscle
 F0 = .PCSAfactor*PCSA; // Maximum force output at optimum fiber length
 Lf0 = .FiberLengthScaleThigh
       * MuscleParameters.OptimalFiberlength
       * cos(pi/180*MuscleParameters.Pennationangle);
 Vol0 = .StrengthScaleThigh
        * MuscleParameters.VolumeScaleFactor
        * MuscleParameters.VolumeMuscleBelly/MuscleElemAmount;
 AnyVar PCSA = Vol0/Lf0;///< PCSA is calculated as muscle volume divided between muscle branches, divided by fiber length and corrected for the pennation angle not used in the simple muscle model
};

AnyMuscleModel VastusLateralisInferior6Par =
{
 AnyFolder &MuscleParameters = .CadaverMusPar.VastusLateralisInferior;
 AnyIntVar MuscleElemNo = 6; ///< The number of this element of the muscle
 AnyIntVar MuscleElemAmount = 6; ///< The total amount of elements for this muscle
 F0 = .PCSAfactor*PCSA; // Maximum force output at optimum fiber length
 Lf0 = .FiberLengthScaleThigh
       * MuscleParameters.OptimalFiberlength
       * cos(pi/180*MuscleParameters.Pennationangle);
 Vol0 = .StrengthScaleThigh
        * MuscleParameters.VolumeScaleFactor
        * MuscleParameters.VolumeMuscleBelly/MuscleElemAmount;
 AnyVar PCSA = Vol0/Lf0;///< PCSA is calculated as muscle volume divided between muscle branches, divided by fiber length and corrected for the pennation angle not used in the simple muscle model
};


//////////////////////////////////////////////////
//     VastusLateralisSuperior (2 elements)     //
//////////////////////////////////////////////////
AnyMuscleModel VastusLateralisSuperior1Par =
{
 AnyFolder &MuscleParameters = .CadaverMusPar.VastusLateralisSuperior;
 AnyIntVar MuscleElemNo = 1; ///< The number of this element of the muscle
 AnyIntVar MuscleElemAmount = 2; ///< The total amount of elements for this muscle
 F0 = .PCSAfactor*PCSA; // Maximum force output at optimum fiber length
 Lf0 = .FiberLengthScaleThigh
       * MuscleParameters.OptimalFiberlength
       * cos(pi/180*MuscleParameters.Pennationangle);
 Vol0 = .StrengthScaleThigh
        * MuscleParameters.VolumeScaleFactor
        * MuscleParameters.VolumeMuscleBelly/MuscleElemAmount;
 AnyVar PCSA = Vol0/Lf0;///< PCSA is calculated as muscle volume divided between muscle branches, divided by fiber length and corrected for the pennation angle not used in the simple muscle model
};

AnyMuscleModel VastusLateralisSuperior2Par =
{
 AnyFolder &MuscleParameters = .CadaverMusPar.VastusLateralisSuperior;
 AnyIntVar MuscleElemNo = 2; ///< The number of this element of the muscle
 AnyIntVar MuscleElemAmount = 2; ///< The total amount of elements for this muscle
 F0 = .PCSAfactor*PCSA; // Maximum force output at optimum fiber length
 Lf0 = .FiberLengthScaleThigh
       * MuscleParameters.OptimalFiberlength
       * cos(pi/180*MuscleParameters.Pennationangle);
 Vol0 = .StrengthScaleThigh
        * MuscleParameters.VolumeScaleFactor
        * MuscleParameters.VolumeMuscleBelly/MuscleElemAmount;
 AnyVar PCSA = Vol0/Lf0;///< PCSA is calculated as muscle volume divided between muscle branches, divided by fiber length and corrected for the pennation angle not used in the simple muscle model
};


/////////////////////////////////////////////////
//     VastusMedialisInferior (2 elements)     //
/////////////////////////////////////////////////
AnyMuscleModel VastusMedialisInferior1Par =
{
 AnyFolder &MuscleParameters = .CadaverMusPar.VastusMedialisInferior;
 AnyIntVar MuscleElemNo = 1; ///< The number of this element of the muscle
 AnyIntVar MuscleElemAmount = 2; ///< The total amount of elements for this muscle
 F0 = .PCSAfactor*PCSA; // Maximum force output at optimum fiber length
 Lf0 = .FiberLengthScaleThigh
       * MuscleParameters.OptimalFiberlength
       * cos(pi/180*MuscleParameters.Pennationangle);
 Vol0 = .StrengthScaleThigh
        * MuscleParameters.VolumeScaleFactor
        * MuscleParameters.VolumeMuscleBelly/MuscleElemAmount;
 AnyVar PCSA = Vol0/Lf0;///< PCSA is calculated as muscle volume divided between muscle branches, divided by fiber length and corrected for the pennation angle not used in the simple muscle model
};

AnyMuscleModel VastusMedialisInferior2Par =
{
 AnyFolder &MuscleParameters = .CadaverMusPar.VastusMedialisInferior;
 AnyIntVar MuscleElemNo = 2; ///< The number of this element of the muscle
 AnyIntVar MuscleElemAmount = 2; ///< The total amount of elements for this muscle
 F0 = .PCSAfactor*PCSA; // Maximum force output at optimum fiber length
 Lf0 = .FiberLengthScaleThigh
       * MuscleParameters.OptimalFiberlength
       * cos(pi/180*MuscleParameters.Pennationangle);
 Vol0 = .StrengthScaleThigh
        * MuscleParameters.VolumeScaleFactor
        * MuscleParameters.VolumeMuscleBelly/MuscleElemAmount;
 AnyVar PCSA = Vol0/Lf0;///< PCSA is calculated as muscle volume divided between muscle branches, divided by fiber length and corrected for the pennation angle not used in the simple muscle model
};


////////////////////////////////////////////
//     VastusMedialisMid (2 elements)     //
////////////////////////////////////////////
AnyMuscleModel VastusMedialisMid1Par =
{
 AnyFolder &MuscleParameters = .CadaverMusPar.VastusMedialisMid;
 AnyIntVar MuscleElemNo = 1; ///< The number of this element of the muscle
 AnyIntVar MuscleElemAmount = 2; ///< The total amount of elements for this muscle
 F0 = .PCSAfactor*PCSA; // Maximum force output at optimum fiber length
 Lf0 = .FiberLengthScaleThigh
       * MuscleParameters.OptimalFiberlength
       * cos(pi/180*MuscleParameters.Pennationangle);
 Vol0 = .StrengthScaleThigh
        * MuscleParameters.VolumeScaleFactor
        * MuscleParameters.VolumeMuscleBelly/MuscleElemAmount;
 AnyVar PCSA = Vol0/Lf0;///< PCSA is calculated as muscle volume divided between muscle branches, divided by fiber length and corrected for the pennation angle not used in the simple muscle model
};

AnyMuscleModel VastusMedialisMid2Par =
{
 AnyFolder &MuscleParameters = .CadaverMusPar.VastusMedialisMid;
 AnyIntVar MuscleElemNo = 2; ///< The number of this element of the muscle
 AnyIntVar MuscleElemAmount = 2; ///< The total amount of elements for this muscle
 F0 = .PCSAfactor*PCSA; // Maximum force output at optimum fiber length
 Lf0 = .FiberLengthScaleThigh
       * MuscleParameters.OptimalFiberlength
       * cos(pi/180*MuscleParameters.Pennationangle);
 Vol0 = .StrengthScaleThigh
        * MuscleParameters.VolumeScaleFactor
        * MuscleParameters.VolumeMuscleBelly/MuscleElemAmount;
 AnyVar PCSA = Vol0/Lf0;///< PCSA is calculated as muscle volume divided between muscle branches, divided by fiber length and corrected for the pennation angle not used in the simple muscle model
};


/////////////////////////////////////////////////
//     VastusMedialisSuperior (6 elements)     //
/////////////////////////////////////////////////
AnyMuscleModel VastusMedialisSuperior1Par =
{
 AnyFolder &MuscleParameters = .CadaverMusPar.VastusMedialisSuperior;
 AnyIntVar MuscleElemNo = 1; ///< The number of this element of the muscle
 AnyIntVar MuscleElemAmount = 6; ///< The total amount of elements for this muscle
 F0 = .PCSAfactor*PCSA; // Maximum force output at optimum fiber length
 Lf0 = .FiberLengthScaleThigh
       * MuscleParameters.OptimalFiberlength
       * cos(pi/180*MuscleParameters.Pennationangle);
 Vol0 = .StrengthScaleThigh
        * MuscleParameters.VolumeScaleFactor
        * MuscleParameters.VolumeMuscleBelly/MuscleElemAmount;
 AnyVar PCSA = Vol0/Lf0;///< PCSA is calculated as muscle volume divided between muscle branches, divided by fiber length and corrected for the pennation angle not used in the simple muscle model
};

AnyMuscleModel VastusMedialisSuperior2Par =
{
 AnyFolder &MuscleParameters = .CadaverMusPar.VastusMedialisSuperior;
 AnyIntVar MuscleElemNo = 2; ///< The number of this element of the muscle
 AnyIntVar MuscleElemAmount = 6; ///< The total amount of elements for this muscle
 F0 = .PCSAfactor*PCSA; // Maximum force output at optimum fiber length
 Lf0 = .FiberLengthScaleThigh
       * MuscleParameters.OptimalFiberlength
       * cos(pi/180*MuscleParameters.Pennationangle);
 Vol0 = .StrengthScaleThigh
        * MuscleParameters.VolumeScaleFactor
        * MuscleParameters.VolumeMuscleBelly/MuscleElemAmount;
 AnyVar PCSA = Vol0/Lf0;///< PCSA is calculated as muscle volume divided between muscle branches, divided by fiber length and corrected for the pennation angle not used in the simple muscle model
};

AnyMuscleModel VastusMedialisSuperior3Par =
{
 AnyFolder &MuscleParameters = .CadaverMusPar.VastusMedialisSuperior;
 AnyIntVar MuscleElemNo = 3; ///< The number of this element of the muscle
 AnyIntVar MuscleElemAmount = 6; ///< The total amount of elements for this muscle
 F0 = .PCSAfactor*PCSA; // Maximum force output at optimum fiber length
 Lf0 = .FiberLengthScaleThigh
       * MuscleParameters.OptimalFiberlength
       * cos(pi/180*MuscleParameters.Pennationangle);
 Vol0 = .StrengthScaleThigh
        * MuscleParameters.VolumeScaleFactor
        * MuscleParameters.VolumeMuscleBelly/MuscleElemAmount;
 AnyVar PCSA = Vol0/Lf0;///< PCSA is calculated as muscle volume divided between muscle branches, divided by fiber length and corrected for the pennation angle not used in the simple muscle model
};

AnyMuscleModel VastusMedialisSuperior4Par =
{
 AnyFolder &MuscleParameters = .CadaverMusPar.VastusMedialisSuperior;
 AnyIntVar MuscleElemNo = 4; ///< The number of this element of the muscle
 AnyIntVar MuscleElemAmount = 6; ///< The total amount of elements for this muscle
 F0 = .PCSAfactor*PCSA; // Maximum force output at optimum fiber length
 Lf0 = .FiberLengthScaleThigh
       * MuscleParameters.OptimalFiberlength
       * cos(pi/180*MuscleParameters.Pennationangle);
 Vol0 = .StrengthScaleThigh
        * MuscleParameters.VolumeScaleFactor
        * MuscleParameters.VolumeMuscleBelly/MuscleElemAmount;
 AnyVar PCSA = Vol0/Lf0;///< PCSA is calculated as muscle volume divided between muscle branches, divided by fiber length and corrected for the pennation angle not used in the simple muscle model
};

AnyMuscleModel VastusMedialisSuperior5Par =
{
 AnyFolder &MuscleParameters = .CadaverMusPar.VastusMedialisSuperior;
 AnyIntVar MuscleElemNo = 5; ///< The number of this element of the muscle
 AnyIntVar MuscleElemAmount = 6; ///< The total amount of elements for this muscle
 F0 = .PCSAfactor*PCSA; // Maximum force output at optimum fiber length
 Lf0 = .FiberLengthScaleThigh
       * MuscleParameters.OptimalFiberlength
       * cos(pi/180*MuscleParameters.Pennationangle);
 Vol0 = .StrengthScaleThigh
        * MuscleParameters.VolumeScaleFactor
        * MuscleParameters.VolumeMuscleBelly/MuscleElemAmount;
 AnyVar PCSA = Vol0/Lf0;///< PCSA is calculated as muscle volume divided between muscle branches, divided by fiber length and corrected for the pennation angle not used in the simple muscle model
};

AnyMuscleModel VastusMedialisSuperior6Par =
{
 AnyFolder &MuscleParameters = .CadaverMusPar.VastusMedialisSuperior;
 AnyIntVar MuscleElemNo = 6; ///< The number of this element of the muscle
 AnyIntVar MuscleElemAmount = 6; ///< The total amount of elements for this muscle
 F0 = .PCSAfactor*PCSA; // Maximum force output at optimum fiber length
 Lf0 = .FiberLengthScaleThigh
       * MuscleParameters.OptimalFiberlength
       * cos(pi/180*MuscleParameters.Pennationangle);
 Vol0 = .StrengthScaleThigh
        * MuscleParameters.VolumeScaleFactor
        * MuscleParameters.VolumeMuscleBelly/MuscleElemAmount;
 AnyVar PCSA = Vol0/Lf0;///< PCSA is calculated as muscle volume divided between muscle branches, divided by fiber length and corrected for the pennation angle not used in the simple muscle model
};
