/*

  It contains all the muscle parameter data of the intrinsic foot.

  Please note that it is necessary to calibrate the model. Foot data is not calibrated!

  The data for the PCSA, Lfbar and LM (used to calculate Lt0) comes from:
  Quantitative Analysis of the Intrinsic Muscles of the Foot. Kura et al. THE ANATOMICAL RECORD 249:143-151 (1997)

  This data set is prefered to the one from Yamaguchi (2007) because Yamaguchi data set is not complete.
  In addition kura data set has more statistical value (11 subjects against 4 for Yamaguchi).
  However the two data set present a good corelation.

  The data for the pennation angle comes from:
  Musculotendon Parameters and Musculoskeletal Pathways Within the Human Foot. Yamaguchi et al. Journal of Applied Biomechanics, 2007; 23:20-41. (2007)

*/

// This logic ensures that TotalTendonLength and OpatinalFiberLength are not
// created as DesignVars when they are also calibrated.
#if BM_CALIBRATION_TYPE == _CALIBRATION_TYPE_1PAR_
 #define _TENDON_LENGTH_DESIGNVAR(x) (x)
 #define _FIBER_LENGTH_DESIGNVAR(x) DesignVar(x)
#endif
#if (BM_CALIBRATION_TYPE == _CALIBRATION_TYPE_2PAR_) | (BM_CALIBRATION_TYPE == _EXPERIMENTAL_CALIBRATION_TYPE_2PAR_)
 #define _TENDON_LENGTH_DESIGNVAR(x) (x)
 #define _FIBER_LENGTH_DESIGNVAR(x) (x)
#endif
#if BM_CALIBRATION_TYPE == _CALIBRATION_TYPE_CUSTOM_
 #define _TENDON_LENGTH_DESIGNVAR(x) DesignVar(x)
 #define _FIBER_LENGTH_DESIGNVAR(x) DesignVar(x)
#endif


Muscles =
{
  AnyFolder Foot = {
    AnyVar VolumeUnitFactor ??= 1e-6; ///< Unit conversion factor for volume (1e-6 > volume in cm^3)
  #if (BM_FOOT_MODEL == _FOOT_MODEL_TOE_FLEX_GM_) | (BM_FOOT_MODEL == _FOOT_MODEL_DETAILED_GM_)

    AnyFolder AbductorHallucis =
    {
      AnyString Muscle = "AbductorHallucis"; ///< Descriptive name for the muscle, e.g. for plotting
      AnyIntVar MuscleElemAmount = 1; ///< The total amount of elements for this muscle
      AnyFloat Pennationangle ??= DesignVar(13.8); ///< Pennation angle of the muscle fibers (degres)
      AnyFloat VolumeScaleFactor ??= DesignVar(1.0); ///< Factor for scaling the muscle volume
      AnyFloat MuscleVolume ??= DesignVar(15.36); ///< Volume of the muscle  (ml)
      AnyFloat MuscleVolumeSIScaled ??= .VolumeUnitFactor*VolumeScaleFactor*MuscleVolume; ///< Scaled Volume of the muscle in SI base unit (m^3)
      AnyFloat OptimalFiberlength ??= _FIBER_LENGTH_DESIGNVAR(2.30/100); ///< Optimal working length of the muscle fiber (m)
      AnyFloat TotalTendonLength ??= _TENDON_LENGTH_DESIGNVAR(14.14/100);///< The total tendon length (m)
      AnyFloat K1 ??= DesignVar(10.00); ///< K1 constant in the muscle model.  Factor for determining shortening speed at optimum length
      AnyFloat K2 ??= DesignVar(0.00); ///< K2 constant in the muscle model.  Factor for determining shortening speed at optimum length
      AnyFloat Epsilon0 ??= DesignVar(0.0530); ///< Epsilon bar in the muscle model. Represents tendon strain at F0
      AnyFloat Fcfast ??= DesignVar(0.4); ///< Factor for determining shortening speed at optimum length
    };
  #endif


  #if (BM_FOOT_MODEL == _FOOT_MODEL_TOE_FLEX_GM_) | (BM_FOOT_MODEL == _FOOT_MODEL_DETAILED_GM_)

    AnyFolder FlexorHallucisBrevisLateralis_1 =
    {
      AnyString Muscle = "FlexorHallucisBrevisLateralis_1"; ///< Descriptive name for the muscle, e.g. for plotting
      AnyIntVar MuscleElemAmount = 1; ///< The total amount of elements for this muscle
      AnyFloat Pennationangle ??= DesignVar(20.1); ///< Pennation angle of the muscle fibers (degres)
      AnyFloat VolumeScaleFactor ??= DesignVar(1.0); ///< Factor for scaling the muscle volume
      AnyFloat MuscleVolume ??= DesignVar(1.75); ///< Volume of the muscle  (ml)
      AnyFloat MuscleVolumeSIScaled ??= .VolumeUnitFactor*VolumeScaleFactor*MuscleVolume; ///< Scaled Volume of the muscle in SI base unit (m^3)
      AnyFloat OptimalFiberlength ??= _FIBER_LENGTH_DESIGNVAR(1.65/100); ///< Optimal working length of the muscle fiber (m)
      AnyFloat TotalTendonLength ??= _TENDON_LENGTH_DESIGNVAR(8.75/100);///< The total tendon length (m)
      AnyFloat K1 ??= DesignVar(10.00); ///< K1 constant in the muscle model.  Factor for determining shortening speed at optimum length
      AnyFloat K2 ??= DesignVar(0.00); ///< K2 constant in the muscle model.  Factor for determining shortening speed at optimum length
      AnyFloat Epsilon0 ??= DesignVar(0.0530); ///< Epsilon bar in the muscle model. Represents tendon strain at F0
      AnyFloat Fcfast ??= DesignVar(0.4); ///< Factor for determining shortening speed at optimum length
    };
  #endif


  #if (BM_FOOT_MODEL == _FOOT_MODEL_TOE_FLEX_GM_) | (BM_FOOT_MODEL == _FOOT_MODEL_DETAILED_GM_)

    AnyFolder FlexorHallucisBrevisLateralis_2 =
    {
      AnyString Muscle = "FlexorHallucisBrevisLateralis_2"; ///< Descriptive name for the muscle, e.g. for plotting
      AnyIntVar MuscleElemAmount = 1; ///< The total amount of elements for this muscle
      AnyFloat Pennationangle ??= DesignVar(20.1); ///< Pennation angle of the muscle fibers (degres)
      AnyFloat VolumeScaleFactor ??= DesignVar(1.0); ///< Factor for scaling the muscle volume
      AnyFloat MuscleVolume ??= DesignVar(1.75); ///< Volume of the muscle  (ml)
      AnyFloat MuscleVolumeSIScaled ??= .VolumeUnitFactor*VolumeScaleFactor*MuscleVolume; ///< Scaled Volume of the muscle in SI base unit (m^3)
      AnyFloat OptimalFiberlength ??= _FIBER_LENGTH_DESIGNVAR(1.65/100); ///< Optimal working length of the muscle fiber (m)
      AnyFloat TotalTendonLength ??= _TENDON_LENGTH_DESIGNVAR(7.97/100);///< The total tendon length (m)
      AnyFloat K1 ??= DesignVar(10.00); ///< K1 constant in the muscle model.  Factor for determining shortening speed at optimum length
      AnyFloat K2 ??= DesignVar(0.00); ///< K2 constant in the muscle model.  Factor for determining shortening speed at optimum length
      AnyFloat Epsilon0 ??= DesignVar(0.0530); ///< Epsilon bar in the muscle model. Represents tendon strain at F0
      AnyFloat Fcfast ??= DesignVar(0.4); ///< Factor for determining shortening speed at optimum length
    };
  #endif


  #if (BM_FOOT_MODEL == _FOOT_MODEL_TOE_FLEX_GM_) | (BM_FOOT_MODEL == _FOOT_MODEL_DETAILED_GM_)

    AnyFolder FlexorHallucisBrevisMedialis =
    {
      AnyString Muscle = "FlexorHallucisBrevisMedialis"; ///< Descriptive name for the muscle, e.g. for plotting
      AnyIntVar MuscleElemAmount = 1; ///< The total amount of elements for this muscle
      AnyFloat Pennationangle ??= DesignVar(8.9); ///< Pennation angle of the muscle fibers (degres)
      AnyFloat VolumeScaleFactor ??= DesignVar(1.0); ///< Factor for scaling the muscle volume
      AnyFloat MuscleVolume ??= DesignVar(3.15); ///< Volume of the muscle  (ml)
      AnyFloat MuscleVolumeSIScaled ??= .VolumeUnitFactor*VolumeScaleFactor*MuscleVolume; ///< Scaled Volume of the muscle in SI base unit (m^3)
      AnyFloat OptimalFiberlength ??= _FIBER_LENGTH_DESIGNVAR(1.75/100); ///< Optimal working length of the muscle fiber (m)
      AnyFloat TotalTendonLength ??= _TENDON_LENGTH_DESIGNVAR(7.69/100);///< The total tendon length (m)
      AnyFloat K1 ??= DesignVar(10.00); ///< K1 constant in the muscle model.  Factor for determining shortening speed at optimum length
      AnyFloat K2 ??= DesignVar(0.00); ///< K2 constant in the muscle model.  Factor for determining shortening speed at optimum length
      AnyFloat Epsilon0 ??= DesignVar(0.0530); ///< Epsilon bar in the muscle model. Represents tendon strain at F0
      AnyFloat Fcfast ??= DesignVar(0.4); ///< Factor for determining shortening speed at optimum length
    };
  #endif


  #if (BM_FOOT_MODEL == _FOOT_MODEL_TOE_FLEX_GM_) | (BM_FOOT_MODEL == _FOOT_MODEL_DETAILED_GM_)

    AnyFolder AdductorHallucisOblique1 =
    {
      AnyString Muscle = "AdductorHallucisOblique1"; ///< Descriptive name for the muscle, e.g. for plotting
      AnyIntVar MuscleElemAmount = 1; ///< The total amount of elements for this muscle
      AnyFloat Pennationangle ??= DesignVar(19.2); ///< Pennation angle of the muscle fibers (degres)
      AnyFloat VolumeScaleFactor ??= DesignVar(1.0); ///< Factor for scaling the muscle volume
      AnyFloat MuscleVolume ??= DesignVar(1.84); ///< Volume of the muscle  (ml)
      AnyFloat MuscleVolumeSIScaled ??= .VolumeUnitFactor*VolumeScaleFactor*MuscleVolume; ///< Scaled Volume of the muscle in SI base unit (m^3)
      AnyFloat OptimalFiberlength ??= _FIBER_LENGTH_DESIGNVAR(1.86/100); ///< Optimal working length of the muscle fiber (m)
      AnyFloat TotalTendonLength ??= _TENDON_LENGTH_DESIGNVAR(5.08/100);///< The total tendon length (m)
      AnyFloat K1 ??= DesignVar(10.00); ///< K1 constant in the muscle model.  Factor for determining shortening speed at optimum length
      AnyFloat K2 ??= DesignVar(0.00); ///< K2 constant in the muscle model.  Factor for determining shortening speed at optimum length
      AnyFloat Epsilon0 ??= DesignVar(0.0530); ///< Epsilon bar in the muscle model. Represents tendon strain at F0
      AnyFloat Fcfast ??= DesignVar(0.4); ///< Factor for determining shortening speed at optimum length
    };
  #endif


  #if (BM_FOOT_MODEL == _FOOT_MODEL_TOE_FLEX_GM_) | (BM_FOOT_MODEL == _FOOT_MODEL_DETAILED_GM_)

    AnyFolder AdductorHallucisOblique2 =
    {
      AnyString Muscle = "AdductorHallucisOblique2"; ///< Descriptive name for the muscle, e.g. for plotting
      AnyIntVar MuscleElemAmount = 1; ///< The total amount of elements for this muscle
      AnyFloat Pennationangle ??= DesignVar(19.2); ///< Pennation angle of the muscle fibers (degres)
      AnyFloat VolumeScaleFactor ??= DesignVar(1.0); ///< Factor for scaling the muscle volume
      AnyFloat MuscleVolume ??= DesignVar(1.84); ///< Volume of the muscle  (ml)
      AnyFloat MuscleVolumeSIScaled ??= .VolumeUnitFactor*VolumeScaleFactor*MuscleVolume; ///< Scaled Volume of the muscle in SI base unit (m^3)
      AnyFloat OptimalFiberlength ??= _FIBER_LENGTH_DESIGNVAR(1.86/100); ///< Optimal working length of the muscle fiber (m)
      AnyFloat TotalTendonLength ??= _TENDON_LENGTH_DESIGNVAR(5.24/100);///< The total tendon length (m)
      AnyFloat K1 ??= DesignVar(10.00); ///< K1 constant in the muscle model.  Factor for determining shortening speed at optimum length
      AnyFloat K2 ??= DesignVar(0.00); ///< K2 constant in the muscle model.  Factor for determining shortening speed at optimum length
      AnyFloat Epsilon0 ??= DesignVar(0.0530); ///< Epsilon bar in the muscle model. Represents tendon strain at F0
      AnyFloat Fcfast ??= DesignVar(0.4); ///< Factor for determining shortening speed at optimum length
    };
  #endif


  #if (BM_FOOT_MODEL == _FOOT_MODEL_TOE_FLEX_GM_) | (BM_FOOT_MODEL == _FOOT_MODEL_DETAILED_GM_)

    AnyFolder AdductorHallucisOblique3 =
    {
      AnyString Muscle = "AdductorHallucisOblique3"; ///< Descriptive name for the muscle, e.g. for plotting
      AnyIntVar MuscleElemAmount = 1; ///< The total amount of elements for this muscle
      AnyFloat Pennationangle ??= DesignVar(19.2); ///< Pennation angle of the muscle fibers (degres)
      AnyFloat VolumeScaleFactor ??= DesignVar(1.0); ///< Factor for scaling the muscle volume
      AnyFloat MuscleVolume ??= DesignVar(1.84); ///< Volume of the muscle  (ml)
      AnyFloat MuscleVolumeSIScaled ??= .VolumeUnitFactor*VolumeScaleFactor*MuscleVolume; ///< Scaled Volume of the muscle in SI base unit (m^3)
      AnyFloat OptimalFiberlength ??= _FIBER_LENGTH_DESIGNVAR(1.86/100); ///< Optimal working length of the muscle fiber (m)
      AnyFloat TotalTendonLength ??= _TENDON_LENGTH_DESIGNVAR(5.89/100);///< The total tendon length (m)
      AnyFloat K1 ??= DesignVar(10.00); ///< K1 constant in the muscle model.  Factor for determining shortening speed at optimum length
      AnyFloat K2 ??= DesignVar(0.00); ///< K2 constant in the muscle model.  Factor for determining shortening speed at optimum length
      AnyFloat Epsilon0 ??= DesignVar(0.0530); ///< Epsilon bar in the muscle model. Represents tendon strain at F0
      AnyFloat Fcfast ??= DesignVar(0.4); ///< Factor for determining shortening speed at optimum length
    };
  #endif


  #if (BM_FOOT_MODEL == _FOOT_MODEL_TOE_FLEX_GM_) | (BM_FOOT_MODEL == _FOOT_MODEL_DETAILED_GM_)

    AnyFolder AdductorHallucisOblique4 =
    {
      AnyString Muscle = "AdductorHallucisOblique4"; ///< Descriptive name for the muscle, e.g. for plotting
      AnyIntVar MuscleElemAmount = 1; ///< The total amount of elements for this muscle
      AnyFloat Pennationangle ??= DesignVar(19.2); ///< Pennation angle of the muscle fibers (degres)
      AnyFloat VolumeScaleFactor ??= DesignVar(1.0); ///< Factor for scaling the muscle volume
      AnyFloat MuscleVolume ??= DesignVar(1.84); ///< Volume of the muscle  (ml)
      AnyFloat MuscleVolumeSIScaled ??= .VolumeUnitFactor*VolumeScaleFactor*MuscleVolume; ///< Scaled Volume of the muscle in SI base unit (m^3)
      AnyFloat OptimalFiberlength ??= _FIBER_LENGTH_DESIGNVAR(1.86/100); ///< Optimal working length of the muscle fiber (m)
      AnyFloat TotalTendonLength ??= _TENDON_LENGTH_DESIGNVAR(7.49/100);///< The total tendon length (m)
      AnyFloat K1 ??= DesignVar(10.00); ///< K1 constant in the muscle model.  Factor for determining shortening speed at optimum length
      AnyFloat K2 ??= DesignVar(0.00); ///< K2 constant in the muscle model.  Factor for determining shortening speed at optimum length
      AnyFloat Epsilon0 ??= DesignVar(0.0530); ///< Epsilon bar in the muscle model. Represents tendon strain at F0
      AnyFloat Fcfast ??= DesignVar(0.4); ///< Factor for determining shortening speed at optimum length
    };
  #endif


  #if (BM_FOOT_MODEL == _FOOT_MODEL_TOE_FLEX_GM_) | (BM_FOOT_MODEL == _FOOT_MODEL_DETAILED_GM_)

    AnyFolder AdductorHallucisOblique5 =
    {
      AnyString Muscle = "AdductorHallucisOblique5"; ///< Descriptive name for the muscle, e.g. for plotting
      AnyIntVar MuscleElemAmount = 1; ///< The total amount of elements for this muscle
      AnyFloat Pennationangle ??= DesignVar(19.2); ///< Pennation angle of the muscle fibers (degres)
      AnyFloat VolumeScaleFactor ??= DesignVar(1.0); ///< Factor for scaling the muscle volume
      AnyFloat MuscleVolume ??= DesignVar(1.84); ///< Volume of the muscle  (ml)
      AnyFloat MuscleVolumeSIScaled ??= .VolumeUnitFactor*VolumeScaleFactor*MuscleVolume; ///< Scaled Volume of the muscle in SI base unit (m^3)
      AnyFloat OptimalFiberlength ??= _FIBER_LENGTH_DESIGNVAR(1.86/100); ///< Optimal working length of the muscle fiber (m)
      AnyFloat TotalTendonLength ??= _TENDON_LENGTH_DESIGNVAR(6.67/100);///< The total tendon length (m)
      AnyFloat K1 ??= DesignVar(10.00); ///< K1 constant in the muscle model.  Factor for determining shortening speed at optimum length
      AnyFloat K2 ??= DesignVar(0.00); ///< K2 constant in the muscle model.  Factor for determining shortening speed at optimum length
      AnyFloat Epsilon0 ??= DesignVar(0.0530); ///< Epsilon bar in the muscle model. Represents tendon strain at F0
      AnyFloat Fcfast ??= DesignVar(0.4); ///< Factor for determining shortening speed at optimum length
    };
  #endif


  #if (BM_FOOT_MODEL == _FOOT_MODEL_TOE_FLEX_GM_) | (BM_FOOT_MODEL == _FOOT_MODEL_DETAILED_GM_)

    AnyFolder AdductorHallucisTransverse1 =
    {
      AnyString Muscle = "AdductorHallucisTransverse1"; ///< Descriptive name for the muscle, e.g. for plotting
      AnyIntVar MuscleElemAmount = 1; ///< The total amount of elements for this muscle
      AnyFloat Pennationangle ??= DesignVar(9.9); ///< Pennation angle of the muscle fibers (degres)
      AnyFloat VolumeScaleFactor ??= DesignVar(1.0); ///< Factor for scaling the muscle volume
      AnyFloat MuscleVolume ??= DesignVar(0.39); ///< Volume of the muscle  (ml)
      AnyFloat MuscleVolumeSIScaled ??= .VolumeUnitFactor*VolumeScaleFactor*MuscleVolume; ///< Scaled Volume of the muscle in SI base unit (m^3)
      AnyFloat OptimalFiberlength ??= _FIBER_LENGTH_DESIGNVAR(1.87/100); ///< Optimal working length of the muscle fiber (m)
      AnyFloat TotalTendonLength ??= _TENDON_LENGTH_DESIGNVAR(2.33/100);///< The total tendon length (m)
      AnyFloat K1 ??= DesignVar(10.00); ///< K1 constant in the muscle model.  Factor for determining shortening speed at optimum length
      AnyFloat K2 ??= DesignVar(0.00); ///< K2 constant in the muscle model.  Factor for determining shortening speed at optimum length
      AnyFloat Epsilon0 ??= DesignVar(0.0530); ///< Epsilon bar in the muscle model. Represents tendon strain at F0
      AnyFloat Fcfast ??= DesignVar(0.4); ///< Factor for determining shortening speed at optimum length
    };
  #endif


  #if (BM_FOOT_MODEL == _FOOT_MODEL_TOE_FLEX_GM_) | (BM_FOOT_MODEL == _FOOT_MODEL_DETAILED_GM_)

    AnyFolder AdductorHallucisTransverse2 =
    {
      AnyString Muscle = "AdductorHallucisTransverse2"; ///< Descriptive name for the muscle, e.g. for plotting
      AnyIntVar MuscleElemAmount = 1; ///< The total amount of elements for this muscle
      AnyFloat Pennationangle ??= DesignVar(9.9); ///< Pennation angle of the muscle fibers (degres)
      AnyFloat VolumeScaleFactor ??= DesignVar(1.0); ///< Factor for scaling the muscle volume
      AnyFloat MuscleVolume ??= DesignVar(0.39); ///< Volume of the muscle  (ml)
      AnyFloat MuscleVolumeSIScaled ??= .VolumeUnitFactor*VolumeScaleFactor*MuscleVolume; ///< Scaled Volume of the muscle in SI base unit (m^3)
      AnyFloat OptimalFiberlength ??= _FIBER_LENGTH_DESIGNVAR(1.87/100); ///< Optimal working length of the muscle fiber (m)
      AnyFloat TotalTendonLength ??= _TENDON_LENGTH_DESIGNVAR(3.70/100);///< The total tendon length (m)
      AnyFloat K1 ??= DesignVar(10.00); ///< K1 constant in the muscle model.  Factor for determining shortening speed at optimum length
      AnyFloat K2 ??= DesignVar(0.00); ///< K2 constant in the muscle model.  Factor for determining shortening speed at optimum length
      AnyFloat Epsilon0 ??= DesignVar(0.0530); ///< Epsilon bar in the muscle model. Represents tendon strain at F0
      AnyFloat Fcfast ??= DesignVar(0.4); ///< Factor for determining shortening speed at optimum length
    };
  #endif


  #if (BM_FOOT_MODEL == _FOOT_MODEL_TOE_FLEX_GM_) | (BM_FOOT_MODEL == _FOOT_MODEL_DETAILED_GM_)

    AnyFolder AdductorHallucisTransverse3 =
    {
      AnyString Muscle = "AdductorHallucisTransverse3"; ///< Descriptive name for the muscle, e.g. for plotting
      AnyIntVar MuscleElemAmount = 1; ///< The total amount of elements for this muscle
      AnyFloat Pennationangle ??= DesignVar(9.9); ///< Pennation angle of the muscle fibers (degres)
      AnyFloat VolumeScaleFactor ??= DesignVar(1.0); ///< Factor for scaling the muscle volume
      AnyFloat MuscleVolume ??= DesignVar(0.39); ///< Volume of the muscle  (ml)
      AnyFloat MuscleVolumeSIScaled ??= .VolumeUnitFactor*VolumeScaleFactor*MuscleVolume; ///< Scaled Volume of the muscle in SI base unit (m^3)
      AnyFloat OptimalFiberlength ??= _FIBER_LENGTH_DESIGNVAR(1.87/100); ///< Optimal working length of the muscle fiber (m)
      AnyFloat TotalTendonLength ??= _TENDON_LENGTH_DESIGNVAR(5.32/100);///< The total tendon length (m)
      AnyFloat K1 ??= DesignVar(10.00); ///< K1 constant in the muscle model.  Factor for determining shortening speed at optimum length
      AnyFloat K2 ??= DesignVar(0.00); ///< K2 constant in the muscle model.  Factor for determining shortening speed at optimum length
      AnyFloat Epsilon0 ??= DesignVar(0.0530); ///< Epsilon bar in the muscle model. Represents tendon strain at F0
      AnyFloat Fcfast ??= DesignVar(0.4); ///< Factor for determining shortening speed at optimum length
    };
  #endif


  #if (BM_FOOT_MODEL == _FOOT_MODEL_TOE_FLEX_GM_) | (BM_FOOT_MODEL == _FOOT_MODEL_DETAILED_GM_)

    AnyFolder ExtensorHallucisBrevis =
    {
      AnyString Muscle = "ExtensorHallucisBrevis"; ///< Descriptive name for the muscle, e.g. for plotting
      AnyIntVar MuscleElemAmount = 1; ///< The total amount of elements for this muscle
      AnyFloat Pennationangle ??= DesignVar(13.1); ///< Pennation angle of the muscle fibers (degres)
      AnyFloat VolumeScaleFactor ??= DesignVar(1.0); ///< Factor for scaling the muscle volume
      AnyFloat MuscleVolume ??= DesignVar(3.74); ///< Volume of the muscle  (ml)
      AnyFloat MuscleVolumeSIScaled ??= .VolumeUnitFactor*VolumeScaleFactor*MuscleVolume; ///< Scaled Volume of the muscle in SI base unit (m^3)
      AnyFloat OptimalFiberlength ??= _FIBER_LENGTH_DESIGNVAR(2.79/100); ///< Optimal working length of the muscle fiber (m)
      AnyFloat TotalTendonLength ??= _TENDON_LENGTH_DESIGNVAR(14.13/100);///< The total tendon length (m)
      AnyFloat K1 ??= DesignVar(10.00); ///< K1 constant in the muscle model.  Factor for determining shortening speed at optimum length
      AnyFloat K2 ??= DesignVar(0.00); ///< K2 constant in the muscle model.  Factor for determining shortening speed at optimum length
      AnyFloat Epsilon0 ??= DesignVar(0.0530); ///< Epsilon bar in the muscle model. Represents tendon strain at F0
      AnyFloat Fcfast ??= DesignVar(0.4); ///< Factor for determining shortening speed at optimum length
    };
  #endif


  #if (BM_FOOT_MODEL == _FOOT_MODEL_TOE_FLEX_GM_) | (BM_FOOT_MODEL == _FOOT_MODEL_DETAILED_GM_)

    AnyFolder DorsalInterosseous1Part1 =
    {
      AnyString Muscle = "DorsalInterosseous1Part1"; ///< Descriptive name for the muscle, e.g. for plotting
      AnyIntVar MuscleElemAmount = 1; ///< The total amount of elements for this muscle
      AnyFloat Pennationangle ??= DesignVar(20.9); ///< Pennation angle of the muscle fibers (degres)
      AnyFloat VolumeScaleFactor ??= DesignVar(1.0); ///< Factor for scaling the muscle volume
      AnyFloat MuscleVolume ??= DesignVar(1.37); ///< Volume of the muscle  (ml)
      AnyFloat MuscleVolumeSIScaled ??= .VolumeUnitFactor*VolumeScaleFactor*MuscleVolume; ///< Scaled Volume of the muscle in SI base unit (m^3)
      AnyFloat OptimalFiberlength ??= _FIBER_LENGTH_DESIGNVAR(1.61/100); ///< Optimal working length of the muscle fiber (m)
      AnyFloat TotalTendonLength ??= _TENDON_LENGTH_DESIGNVAR(5.24/100);///< The total tendon length (m)
      AnyFloat K1 ??= DesignVar(10.00); ///< K1 constant in the muscle model.  Factor for determining shortening speed at optimum length
      AnyFloat K2 ??= DesignVar(0.00); ///< K2 constant in the muscle model.  Factor for determining shortening speed at optimum length
      AnyFloat Epsilon0 ??= DesignVar(0.0530); ///< Epsilon bar in the muscle model. Represents tendon strain at F0
      AnyFloat Fcfast ??= DesignVar(0.4); ///< Factor for determining shortening speed at optimum length
    };
  #endif


  #if (BM_FOOT_MODEL == _FOOT_MODEL_TOE_FLEX_GM_) | (BM_FOOT_MODEL == _FOOT_MODEL_DETAILED_GM_)

    AnyFolder DorsalInterosseous1Part2 =
    {
      AnyString Muscle = "DorsalInterosseous1Part2"; ///< Descriptive name for the muscle, e.g. for plotting
      AnyIntVar MuscleElemAmount = 1; ///< The total amount of elements for this muscle
      AnyFloat Pennationangle ??= DesignVar(20.9); ///< Pennation angle of the muscle fibers (degres)
      AnyFloat VolumeScaleFactor ??= DesignVar(1.0); ///< Factor for scaling the muscle volume
      AnyFloat MuscleVolume ??= DesignVar(1.37); ///< Volume of the muscle  (ml)
      AnyFloat MuscleVolumeSIScaled ??= .VolumeUnitFactor*VolumeScaleFactor*MuscleVolume; ///< Scaled Volume of the muscle in SI base unit (m^3)
      AnyFloat OptimalFiberlength ??= _FIBER_LENGTH_DESIGNVAR(1.61/100); ///< Optimal working length of the muscle fiber (m)
      AnyFloat TotalTendonLength ??= _TENDON_LENGTH_DESIGNVAR(4.09/100);///< The total tendon length (m)
      AnyFloat K1 ??= DesignVar(10.00); ///< K1 constant in the muscle model.  Factor for determining shortening speed at optimum length
      AnyFloat K2 ??= DesignVar(0.00); ///< K2 constant in the muscle model.  Factor for determining shortening speed at optimum length
      AnyFloat Epsilon0 ??= DesignVar(0.0530); ///< Epsilon bar in the muscle model. Represents tendon strain at F0
      AnyFloat Fcfast ??= DesignVar(0.4); ///< Factor for determining shortening speed at optimum length
    };
  #endif


  #if (BM_FOOT_MODEL == _FOOT_MODEL_TOE_FLEX_GM_) | (BM_FOOT_MODEL == _FOOT_MODEL_DETAILED_GM_)

    AnyFolder DorsalInterosseous2Part1 =
    {
      AnyString Muscle = "DorsalInterosseous2Part1"; ///< Descriptive name for the muscle, e.g. for plotting
      AnyIntVar MuscleElemAmount = 1; ///< The total amount of elements for this muscle
      AnyFloat Pennationangle ??= DesignVar(17.1); ///< Pennation angle of the muscle fibers (degres)
      AnyFloat VolumeScaleFactor ??= DesignVar(1.0); ///< Factor for scaling the muscle volume
      AnyFloat MuscleVolume ??= DesignVar(1.29); ///< Volume of the muscle  (ml)
      AnyFloat MuscleVolumeSIScaled ??= .VolumeUnitFactor*VolumeScaleFactor*MuscleVolume; ///< Scaled Volume of the muscle in SI base unit (m^3)
      AnyFloat OptimalFiberlength ??= _FIBER_LENGTH_DESIGNVAR(1.53/100); ///< Optimal working length of the muscle fiber (m)
      AnyFloat TotalTendonLength ??= _TENDON_LENGTH_DESIGNVAR(5.22/100);///< The total tendon length (m)
      AnyFloat K1 ??= DesignVar(10.00); ///< K1 constant in the muscle model.  Factor for determining shortening speed at optimum length
      AnyFloat K2 ??= DesignVar(0.00); ///< K2 constant in the muscle model.  Factor for determining shortening speed at optimum length
      AnyFloat Epsilon0 ??= DesignVar(0.0530); ///< Epsilon bar in the muscle model. Represents tendon strain at F0
      AnyFloat Fcfast ??= DesignVar(0.4); ///< Factor for determining shortening speed at optimum length
    };
  #endif


  #if (BM_FOOT_MODEL == _FOOT_MODEL_TOE_FLEX_GM_) | (BM_FOOT_MODEL == _FOOT_MODEL_DETAILED_GM_)

    AnyFolder DorsalInterosseous2Part2 =
    {
      AnyString Muscle = "DorsalInterosseous2Part2"; ///< Descriptive name for the muscle, e.g. for plotting
      AnyIntVar MuscleElemAmount = 1; ///< The total amount of elements for this muscle
      AnyFloat Pennationangle ??= DesignVar(17.1); ///< Pennation angle of the muscle fibers (degres)
      AnyFloat VolumeScaleFactor ??= DesignVar(1.0); ///< Factor for scaling the muscle volume
      AnyFloat MuscleVolume ??= DesignVar(1.29); ///< Volume of the muscle  (ml)
      AnyFloat MuscleVolumeSIScaled ??= .VolumeUnitFactor*VolumeScaleFactor*MuscleVolume; ///< Scaled Volume of the muscle in SI base unit (m^3)
      AnyFloat OptimalFiberlength ??= _FIBER_LENGTH_DESIGNVAR(1.53/100); ///< Optimal working length of the muscle fiber (m)
      AnyFloat TotalTendonLength ??= _TENDON_LENGTH_DESIGNVAR(5.21/100);///< The total tendon length (m)
      AnyFloat K1 ??= DesignVar(10.00); ///< K1 constant in the muscle model.  Factor for determining shortening speed at optimum length
      AnyFloat K2 ??= DesignVar(0.00); ///< K2 constant in the muscle model.  Factor for determining shortening speed at optimum length
      AnyFloat Epsilon0 ??= DesignVar(0.0530); ///< Epsilon bar in the muscle model. Represents tendon strain at F0
      AnyFloat Fcfast ??= DesignVar(0.4); ///< Factor for determining shortening speed at optimum length
    };
  #endif


  #if (BM_FOOT_MODEL == _FOOT_MODEL_TOE_FLEX_GM_) | (BM_FOOT_MODEL == _FOOT_MODEL_DETAILED_GM_)

    AnyFolder DorsalInterosseous3Part1 =
    {
      AnyString Muscle = "DorsalInterosseous3Part1"; ///< Descriptive name for the muscle, e.g. for plotting
      AnyIntVar MuscleElemAmount = 1; ///< The total amount of elements for this muscle
      AnyFloat Pennationangle ??= DesignVar(14.7); ///< Pennation angle of the muscle fibers (degres)
      AnyFloat VolumeScaleFactor ??= DesignVar(1.0); ///< Factor for scaling the muscle volume
      AnyFloat MuscleVolume ??= DesignVar(1.28); ///< Volume of the muscle  (ml)
      AnyFloat MuscleVolumeSIScaled ??= .VolumeUnitFactor*VolumeScaleFactor*MuscleVolume; ///< Scaled Volume of the muscle in SI base unit (m^3)
      AnyFloat OptimalFiberlength ??= _FIBER_LENGTH_DESIGNVAR(1.56/100); ///< Optimal working length of the muscle fiber (m)
      AnyFloat TotalTendonLength ??= _TENDON_LENGTH_DESIGNVAR(4.85/100);///< The total tendon length (m)
      AnyFloat K1 ??= DesignVar(10.00); ///< K1 constant in the muscle model.  Factor for determining shortening speed at optimum length
      AnyFloat K2 ??= DesignVar(0.00); ///< K2 constant in the muscle model.  Factor for determining shortening speed at optimum length
      AnyFloat Epsilon0 ??= DesignVar(0.0530); ///< Epsilon bar in the muscle model. Represents tendon strain at F0
      AnyFloat Fcfast ??= DesignVar(0.4); ///< Factor for determining shortening speed at optimum length
    };
  #endif


  #if (BM_FOOT_MODEL == _FOOT_MODEL_TOE_FLEX_GM_) | (BM_FOOT_MODEL == _FOOT_MODEL_DETAILED_GM_)

    AnyFolder DorsalInterosseous3Part2 =
    {
      AnyString Muscle = "DorsalInterosseous3Part2"; ///< Descriptive name for the muscle, e.g. for plotting
      AnyIntVar MuscleElemAmount = 1; ///< The total amount of elements for this muscle
      AnyFloat Pennationangle ??= DesignVar(14.7); ///< Pennation angle of the muscle fibers (degres)
      AnyFloat VolumeScaleFactor ??= DesignVar(1.0); ///< Factor for scaling the muscle volume
      AnyFloat MuscleVolume ??= DesignVar(1.28); ///< Volume of the muscle  (ml)
      AnyFloat MuscleVolumeSIScaled ??= .VolumeUnitFactor*VolumeScaleFactor*MuscleVolume; ///< Scaled Volume of the muscle in SI base unit (m^3)
      AnyFloat OptimalFiberlength ??= _FIBER_LENGTH_DESIGNVAR(1.56/100); ///< Optimal working length of the muscle fiber (m)
      AnyFloat TotalTendonLength ??= _TENDON_LENGTH_DESIGNVAR(4.91/100);///< The total tendon length (m)
      AnyFloat K1 ??= DesignVar(10.00); ///< K1 constant in the muscle model.  Factor for determining shortening speed at optimum length
      AnyFloat K2 ??= DesignVar(0.00); ///< K2 constant in the muscle model.  Factor for determining shortening speed at optimum length
      AnyFloat Epsilon0 ??= DesignVar(0.0530); ///< Epsilon bar in the muscle model. Represents tendon strain at F0
      AnyFloat Fcfast ??= DesignVar(0.4); ///< Factor for determining shortening speed at optimum length
    };
  #endif


  #if (BM_FOOT_MODEL == _FOOT_MODEL_TOE_FLEX_GM_) | (BM_FOOT_MODEL == _FOOT_MODEL_DETAILED_GM_)

    AnyFolder DorsalInterosseous4Part1 =
    {
      AnyString Muscle = "DorsalInterosseous4Part1"; ///< Descriptive name for the muscle, e.g. for plotting
      AnyIntVar MuscleElemAmount = 1; ///< The total amount of elements for this muscle
      AnyFloat Pennationangle ??= DesignVar(18.4); ///< Pennation angle of the muscle fibers (degres)
      AnyFloat VolumeScaleFactor ??= DesignVar(1.0); ///< Factor for scaling the muscle volume
      AnyFloat MuscleVolume ??= DesignVar(2.18); ///< Volume of the muscle  (ml)
      AnyFloat MuscleVolumeSIScaled ??= .VolumeUnitFactor*VolumeScaleFactor*MuscleVolume; ///< Scaled Volume of the muscle in SI base unit (m^3)
      AnyFloat OptimalFiberlength ??= _FIBER_LENGTH_DESIGNVAR(1.60/100); ///< Optimal working length of the muscle fiber (m)
      AnyFloat TotalTendonLength ??= _TENDON_LENGTH_DESIGNVAR(4.52/100);///< The total tendon length (m)
      AnyFloat K1 ??= DesignVar(10.00); ///< K1 constant in the muscle model.  Factor for determining shortening speed at optimum length
      AnyFloat K2 ??= DesignVar(0.00); ///< K2 constant in the muscle model.  Factor for determining shortening speed at optimum length
      AnyFloat Epsilon0 ??= DesignVar(0.0530); ///< Epsilon bar in the muscle model. Represents tendon strain at F0
      AnyFloat Fcfast ??= DesignVar(0.4); ///< Factor for determining shortening speed at optimum length
    };
  #endif


  #if (BM_FOOT_MODEL == _FOOT_MODEL_TOE_FLEX_GM_) | (BM_FOOT_MODEL == _FOOT_MODEL_DETAILED_GM_)

    AnyFolder DorsalInterosseous4Part2 =
    {
      AnyString Muscle = "DorsalInterosseous4Part2"; ///< Descriptive name for the muscle, e.g. for plotting
      AnyIntVar MuscleElemAmount = 1; ///< The total amount of elements for this muscle
      AnyFloat Pennationangle ??= DesignVar(18.4); ///< Pennation angle of the muscle fibers (degres)
      AnyFloat VolumeScaleFactor ??= DesignVar(1.0); ///< Factor for scaling the muscle volume
      AnyFloat MuscleVolume ??= DesignVar(2.18); ///< Volume of the muscle  (ml)
      AnyFloat MuscleVolumeSIScaled ??= .VolumeUnitFactor*VolumeScaleFactor*MuscleVolume; ///< Scaled Volume of the muscle in SI base unit (m^3)
      AnyFloat OptimalFiberlength ??= _FIBER_LENGTH_DESIGNVAR(1.60/100); ///< Optimal working length of the muscle fiber (m)
      AnyFloat TotalTendonLength ??= _TENDON_LENGTH_DESIGNVAR(4.81/100);///< The total tendon length (m)
      AnyFloat K1 ??= DesignVar(10.00); ///< K1 constant in the muscle model.  Factor for determining shortening speed at optimum length
      AnyFloat K2 ??= DesignVar(0.00); ///< K2 constant in the muscle model.  Factor for determining shortening speed at optimum length
      AnyFloat Epsilon0 ??= DesignVar(0.0530); ///< Epsilon bar in the muscle model. Represents tendon strain at F0
      AnyFloat Fcfast ??= DesignVar(0.4); ///< Factor for determining shortening speed at optimum length
    };
  #endif


  #if (BM_FOOT_MODEL == _FOOT_MODEL_TOE_FLEX_GM_) | (BM_FOOT_MODEL == _FOOT_MODEL_DETAILED_GM_)

    AnyFolder ExtensorDigitoriumBrevis2 =
    {
      AnyString Muscle = "ExtensorDigitoriumBrevis2"; ///< Descriptive name for the muscle, e.g. for plotting
      AnyIntVar MuscleElemAmount = 1; ///< The total amount of elements for this muscle
      AnyFloat Pennationangle ??= DesignVar(9.3); ///< Pennation angle of the muscle fibers (degres)
      AnyFloat VolumeScaleFactor ??= DesignVar(1.0); ///< Factor for scaling the muscle volume
      AnyFloat MuscleVolume ??= DesignVar(2.21); ///< Volume of the muscle  (ml)
      AnyFloat MuscleVolumeSIScaled ??= .VolumeUnitFactor*VolumeScaleFactor*MuscleVolume; ///< Scaled Volume of the muscle in SI base unit (m^3)
      AnyFloat OptimalFiberlength ??= _FIBER_LENGTH_DESIGNVAR(2.80/100); ///< Optimal working length of the muscle fiber (m)
      AnyFloat TotalTendonLength ??= _TENDON_LENGTH_DESIGNVAR(15.23/100);///< The total tendon length (m)
      AnyFloat K1 ??= DesignVar(10.00); ///< K1 constant in the muscle model.  Factor for determining shortening speed at optimum length
      AnyFloat K2 ??= DesignVar(0.00); ///< K2 constant in the muscle model.  Factor for determining shortening speed at optimum length
      AnyFloat Epsilon0 ??= DesignVar(0.0530); ///< Epsilon bar in the muscle model. Represents tendon strain at F0
      AnyFloat Fcfast ??= DesignVar(0.4); ///< Factor for determining shortening speed at optimum length
    };
  #endif


  #if (BM_FOOT_MODEL == _FOOT_MODEL_TOE_FLEX_GM_) | (BM_FOOT_MODEL == _FOOT_MODEL_DETAILED_GM_)

    AnyFolder ExtensorDigitoriumBrevis3 =
    {
      AnyString Muscle = "ExtensorDigitoriumBrevis3"; ///< Descriptive name for the muscle, e.g. for plotting
      AnyIntVar MuscleElemAmount = 1; ///< The total amount of elements for this muscle
      AnyFloat Pennationangle ??= DesignVar(10.2); ///< Pennation angle of the muscle fibers (degres)
      AnyFloat VolumeScaleFactor ??= DesignVar(1.0); ///< Factor for scaling the muscle volume
      AnyFloat MuscleVolume ??= DesignVar(1.35); ///< Volume of the muscle  (ml)
      AnyFloat MuscleVolumeSIScaled ??= .VolumeUnitFactor*VolumeScaleFactor*MuscleVolume; ///< Scaled Volume of the muscle in SI base unit (m^3)
      AnyFloat OptimalFiberlength ??= _FIBER_LENGTH_DESIGNVAR(2.64/100); ///< Optimal working length of the muscle fiber (m)
      AnyFloat TotalTendonLength ??= _TENDON_LENGTH_DESIGNVAR(14.17/100);///< The total tendon length (m)
      AnyFloat K1 ??= DesignVar(10.00); ///< K1 constant in the muscle model.  Factor for determining shortening speed at optimum length
      AnyFloat K2 ??= DesignVar(0.00); ///< K2 constant in the muscle model.  Factor for determining shortening speed at optimum length
      AnyFloat Epsilon0 ??= DesignVar(0.0530); ///< Epsilon bar in the muscle model. Represents tendon strain at F0
      AnyFloat Fcfast ??= DesignVar(0.4); ///< Factor for determining shortening speed at optimum length
    };
  #endif


  #if (BM_FOOT_MODEL == _FOOT_MODEL_TOE_FLEX_GM_) | (BM_FOOT_MODEL == _FOOT_MODEL_DETAILED_GM_)

    AnyFolder ExtensorDigitoriumBrevis4 =
    {
      AnyString Muscle = "ExtensorDigitoriumBrevis4"; ///< Descriptive name for the muscle, e.g. for plotting
      AnyIntVar MuscleElemAmount = 1; ///< The total amount of elements for this muscle
      AnyFloat Pennationangle ??= DesignVar(9.6); ///< Pennation angle of the muscle fibers (degres)
      AnyFloat VolumeScaleFactor ??= DesignVar(1.0); ///< Factor for scaling the muscle volume
      AnyFloat MuscleVolume ??= DesignVar(1.02); ///< Volume of the muscle  (ml)
      AnyFloat MuscleVolumeSIScaled ??= .VolumeUnitFactor*VolumeScaleFactor*MuscleVolume; ///< Scaled Volume of the muscle in SI base unit (m^3)
      AnyFloat OptimalFiberlength ??= _FIBER_LENGTH_DESIGNVAR(2.31/100); ///< Optimal working length of the muscle fiber (m)
      AnyFloat TotalTendonLength ??= _TENDON_LENGTH_DESIGNVAR(13.01/100);///< The total tendon length (m)
      AnyFloat K1 ??= DesignVar(10.00); ///< K1 constant in the muscle model.  Factor for determining shortening speed at optimum length
      AnyFloat K2 ??= DesignVar(0.00); ///< K2 constant in the muscle model.  Factor for determining shortening speed at optimum length
      AnyFloat Epsilon0 ??= DesignVar(0.0530); ///< Epsilon bar in the muscle model. Represents tendon strain at F0
      AnyFloat Fcfast ??= DesignVar(0.4); ///< Factor for determining shortening speed at optimum length
    };
  #endif


  #if (BM_FOOT_MODEL == _FOOT_MODEL_TOE_FLEX_GM_) | (BM_FOOT_MODEL == _FOOT_MODEL_DETAILED_GM_)

    AnyFolder PlantarInterosseous1 =
    {
      AnyString Muscle = "PlantarInterosseous1"; ///< Descriptive name for the muscle, e.g. for plotting
      AnyIntVar MuscleElemAmount = 1; ///< The total amount of elements for this muscle
      AnyFloat Pennationangle ??= DesignVar(14.0); ///< Pennation angle of the muscle fibers (degres)
      AnyFloat VolumeScaleFactor ??= DesignVar(1.0); ///< Factor for scaling the muscle volume
      AnyFloat MuscleVolume ??= DesignVar(1.67); ///< Volume of the muscle  (ml)
      AnyFloat MuscleVolumeSIScaled ??= .VolumeUnitFactor*VolumeScaleFactor*MuscleVolume; ///< Scaled Volume of the muscle in SI base unit (m^3)
      AnyFloat OptimalFiberlength ??= _FIBER_LENGTH_DESIGNVAR(1.36/100); ///< Optimal working length of the muscle fiber (m)
      AnyFloat TotalTendonLength ??= _TENDON_LENGTH_DESIGNVAR(6.54/100);///< The total tendon length (m)
      AnyFloat K1 ??= DesignVar(10.00); ///< K1 constant in the muscle model.  Factor for determining shortening speed at optimum length
      AnyFloat K2 ??= DesignVar(0.00); ///< K2 constant in the muscle model.  Factor for determining shortening speed at optimum length
      AnyFloat Epsilon0 ??= DesignVar(0.0530); ///< Epsilon bar in the muscle model. Represents tendon strain at F0
      AnyFloat Fcfast ??= DesignVar(0.4); ///< Factor for determining shortening speed at optimum length
    };
  #endif


  #if (BM_FOOT_MODEL == _FOOT_MODEL_TOE_FLEX_GM_) | (BM_FOOT_MODEL == _FOOT_MODEL_DETAILED_GM_)

    AnyFolder PlantarInterosseous2Part1 =
    {
      AnyString Muscle = "PlantarInterosseous2Part1"; ///< Descriptive name for the muscle, e.g. for plotting
      AnyIntVar MuscleElemAmount = 1; ///< The total amount of elements for this muscle
      AnyFloat Pennationangle ??= DesignVar(10.0); ///< Pennation angle of the muscle fibers (degres)
      AnyFloat VolumeScaleFactor ??= DesignVar(1.0); ///< Factor for scaling the muscle volume
      AnyFloat MuscleVolume ??= DesignVar(0.65); ///< Volume of the muscle  (ml)
      AnyFloat MuscleVolumeSIScaled ??= .VolumeUnitFactor*VolumeScaleFactor*MuscleVolume; ///< Scaled Volume of the muscle in SI base unit (m^3)
      AnyFloat OptimalFiberlength ??= _FIBER_LENGTH_DESIGNVAR(1.39/100); ///< Optimal working length of the muscle fiber (m)
      AnyFloat TotalTendonLength ??= _TENDON_LENGTH_DESIGNVAR(4.63/100);///< The total tendon length (m)
      AnyFloat K1 ??= DesignVar(10.00); ///< K1 constant in the muscle model.  Factor for determining shortening speed at optimum length
      AnyFloat K2 ??= DesignVar(0.00); ///< K2 constant in the muscle model.  Factor for determining shortening speed at optimum length
      AnyFloat Epsilon0 ??= DesignVar(0.0530); ///< Epsilon bar in the muscle model. Represents tendon strain at F0
      AnyFloat Fcfast ??= DesignVar(0.4); ///< Factor for determining shortening speed at optimum length
    };
  #endif


  #if (BM_FOOT_MODEL == _FOOT_MODEL_TOE_FLEX_GM_) | (BM_FOOT_MODEL == _FOOT_MODEL_DETAILED_GM_)

    AnyFolder PlantarInterosseous2Part2 =
    {
      AnyString Muscle = "PlantarInterosseous2Part2"; ///< Descriptive name for the muscle, e.g. for plotting
      AnyIntVar MuscleElemAmount = 1; ///< The total amount of elements for this muscle
      AnyFloat Pennationangle ??= DesignVar(10.0); ///< Pennation angle of the muscle fibers (degres)
      AnyFloat VolumeScaleFactor ??= DesignVar(1.0); ///< Factor for scaling the muscle volume
      AnyFloat MuscleVolume ??= DesignVar(0.65); ///< Volume of the muscle  (ml)
      AnyFloat MuscleVolumeSIScaled ??= .VolumeUnitFactor*VolumeScaleFactor*MuscleVolume; ///< Scaled Volume of the muscle in SI base unit (m^3)
      AnyFloat OptimalFiberlength ??= _FIBER_LENGTH_DESIGNVAR(1.39/100); ///< Optimal working length of the muscle fiber (m)
      AnyFloat TotalTendonLength ??= _TENDON_LENGTH_DESIGNVAR(5.16/100);///< The total tendon length (m)
      AnyFloat K1 ??= DesignVar(10.00); ///< K1 constant in the muscle model.  Factor for determining shortening speed at optimum length
      AnyFloat K2 ??= DesignVar(0.00); ///< K2 constant in the muscle model.  Factor for determining shortening speed at optimum length
      AnyFloat Epsilon0 ??= DesignVar(0.0530); ///< Epsilon bar in the muscle model. Represents tendon strain at F0
      AnyFloat Fcfast ??= DesignVar(0.4); ///< Factor for determining shortening speed at optimum length
    };
  #endif


  #if (BM_FOOT_MODEL == _FOOT_MODEL_TOE_FLEX_GM_) | (BM_FOOT_MODEL == _FOOT_MODEL_DETAILED_GM_)

    AnyFolder PlantarInterosseous2Part3 =
    {
      AnyString Muscle = "PlantarInterosseous2Part3"; ///< Descriptive name for the muscle, e.g. for plotting
      AnyIntVar MuscleElemAmount = 1; ///< The total amount of elements for this muscle
      AnyFloat Pennationangle ??= DesignVar(10.0); ///< Pennation angle of the muscle fibers (degres)
      AnyFloat VolumeScaleFactor ??= DesignVar(1.0); ///< Factor for scaling the muscle volume
      AnyFloat MuscleVolume ??= DesignVar(0.65); ///< Volume of the muscle  (ml)
      AnyFloat MuscleVolumeSIScaled ??= .VolumeUnitFactor*VolumeScaleFactor*MuscleVolume; ///< Scaled Volume of the muscle in SI base unit (m^3)
      AnyFloat OptimalFiberlength ??= _FIBER_LENGTH_DESIGNVAR(1.39/100); ///< Optimal working length of the muscle fiber (m)
      AnyFloat TotalTendonLength ??= _TENDON_LENGTH_DESIGNVAR(6.46/100);///< The total tendon length (m)
      AnyFloat K1 ??= DesignVar(10.00); ///< K1 constant in the muscle model.  Factor for determining shortening speed at optimum length
      AnyFloat K2 ??= DesignVar(0.00); ///< K2 constant in the muscle model.  Factor for determining shortening speed at optimum length
      AnyFloat Epsilon0 ??= DesignVar(0.0530); ///< Epsilon bar in the muscle model. Represents tendon strain at F0
      AnyFloat Fcfast ??= DesignVar(0.4); ///< Factor for determining shortening speed at optimum length
    };
  #endif


  #if (BM_FOOT_MODEL == _FOOT_MODEL_TOE_FLEX_GM_) | (BM_FOOT_MODEL == _FOOT_MODEL_DETAILED_GM_)

    AnyFolder PlantarInterosseous3Part1 =
    {
      AnyString Muscle = "PlantarInterosseous3Part1"; ///< Descriptive name for the muscle, e.g. for plotting
      AnyIntVar MuscleElemAmount = 1; ///< The total amount of elements for this muscle
      AnyFloat Pennationangle ??= DesignVar(8.5); ///< Pennation angle of the muscle fibers (degres)
      AnyFloat VolumeScaleFactor ??= DesignVar(1.0); ///< Factor for scaling the muscle volume
      AnyFloat MuscleVolume ??= DesignVar(0.65); ///< Volume of the muscle  (ml)
      AnyFloat MuscleVolumeSIScaled ??= .VolumeUnitFactor*VolumeScaleFactor*MuscleVolume; ///< Scaled Volume of the muscle in SI base unit (m^3)
      AnyFloat OptimalFiberlength ??= _FIBER_LENGTH_DESIGNVAR(1.42/100); ///< Optimal working length of the muscle fiber (m)
      AnyFloat TotalTendonLength ??= _TENDON_LENGTH_DESIGNVAR(4.47/100);///< The total tendon length (m)
      AnyFloat K1 ??= DesignVar(10.00); ///< K1 constant in the muscle model.  Factor for determining shortening speed at optimum length
      AnyFloat K2 ??= DesignVar(0.00); ///< K2 constant in the muscle model.  Factor for determining shortening speed at optimum length
      AnyFloat Epsilon0 ??= DesignVar(0.0530); ///< Epsilon bar in the muscle model. Represents tendon strain at F0
      AnyFloat Fcfast ??= DesignVar(0.4); ///< Factor for determining shortening speed at optimum length
    };
  #endif


  #if (BM_FOOT_MODEL == _FOOT_MODEL_TOE_FLEX_GM_) | (BM_FOOT_MODEL == _FOOT_MODEL_DETAILED_GM_)

    AnyFolder PlantarInterosseous3Part2 =
    {
      AnyString Muscle = "PlantarInterosseous3Part2"; ///< Descriptive name for the muscle, e.g. for plotting
      AnyIntVar MuscleElemAmount = 1; ///< The total amount of elements for this muscle
      AnyFloat Pennationangle ??= DesignVar(8.5); ///< Pennation angle of the muscle fibers (degres)
      AnyFloat VolumeScaleFactor ??= DesignVar(1.0); ///< Factor for scaling the muscle volume
      AnyFloat MuscleVolume ??= DesignVar(0.65); ///< Volume of the muscle  (ml)
      AnyFloat MuscleVolumeSIScaled ??= .VolumeUnitFactor*VolumeScaleFactor*MuscleVolume; ///< Scaled Volume of the muscle in SI base unit (m^3)
      AnyFloat OptimalFiberlength ??= _FIBER_LENGTH_DESIGNVAR(1.42/100); ///< Optimal working length of the muscle fiber (m)
      AnyFloat TotalTendonLength ??= _TENDON_LENGTH_DESIGNVAR(5.77/100);///< The total tendon length (m)
      AnyFloat K1 ??= DesignVar(10.00); ///< K1 constant in the muscle model.  Factor for determining shortening speed at optimum length
      AnyFloat K2 ??= DesignVar(0.00); ///< K2 constant in the muscle model.  Factor for determining shortening speed at optimum length
      AnyFloat Epsilon0 ??= DesignVar(0.0530); ///< Epsilon bar in the muscle model. Represents tendon strain at F0
      AnyFloat Fcfast ??= DesignVar(0.4); ///< Factor for determining shortening speed at optimum length
    };
  #endif


  #if (BM_FOOT_MODEL == _FOOT_MODEL_TOE_FLEX_GM_) | (BM_FOOT_MODEL == _FOOT_MODEL_DETAILED_GM_)

    AnyFolder PlantarInterosseous3Part3 =
    {
      AnyString Muscle = "PlantarInterosseous3Part3"; ///< Descriptive name for the muscle, e.g. for plotting
      AnyIntVar MuscleElemAmount = 1; ///< The total amount of elements for this muscle
      AnyFloat Pennationangle ??= DesignVar(8.5); ///< Pennation angle of the muscle fibers (degres)
      AnyFloat VolumeScaleFactor ??= DesignVar(1.0); ///< Factor for scaling the muscle volume
      AnyFloat MuscleVolume ??= DesignVar(0.65); ///< Volume of the muscle  (ml)
      AnyFloat MuscleVolumeSIScaled ??= .VolumeUnitFactor*VolumeScaleFactor*MuscleVolume; ///< Scaled Volume of the muscle in SI base unit (m^3)
      AnyFloat OptimalFiberlength ??= _FIBER_LENGTH_DESIGNVAR(1.42/100); ///< Optimal working length of the muscle fiber (m)
      AnyFloat TotalTendonLength ??= _TENDON_LENGTH_DESIGNVAR(5.36/100);///< The total tendon length (m)
      AnyFloat K1 ??= DesignVar(10.00); ///< K1 constant in the muscle model.  Factor for determining shortening speed at optimum length
      AnyFloat K2 ??= DesignVar(0.00); ///< K2 constant in the muscle model.  Factor for determining shortening speed at optimum length
      AnyFloat Epsilon0 ??= DesignVar(0.0530); ///< Epsilon bar in the muscle model. Represents tendon strain at F0
      AnyFloat Fcfast ??= DesignVar(0.4); ///< Factor for determining shortening speed at optimum length
    };
  #endif


  #if (BM_FOOT_MODEL == _FOOT_MODEL_TOE_FLEX_GM_) | (BM_FOOT_MODEL == _FOOT_MODEL_DETAILED_GM_)

    AnyFolder FlexorDigitorumBrevis2 =
    {
      AnyString Muscle = "FlexorDigitorumBrevis2"; ///< Descriptive name for the muscle, e.g. for plotting
      AnyIntVar MuscleElemAmount = 1; ///< The total amount of elements for this muscle
      AnyFloat Pennationangle ??= DesignVar(14.2); ///< Pennation angle of the muscle fibers (degres)
      AnyFloat VolumeScaleFactor ??= DesignVar(1.0); ///< Factor for scaling the muscle volume
      AnyFloat MuscleVolume ??= DesignVar(4.52); ///< Volume of the muscle  (ml)
      AnyFloat MuscleVolumeSIScaled ??= .VolumeUnitFactor*VolumeScaleFactor*MuscleVolume; ///< Scaled Volume of the muscle in SI base unit (m^3)
      AnyFloat OptimalFiberlength ??= _FIBER_LENGTH_DESIGNVAR(2.54/100); ///< Optimal working length of the muscle fiber (m)
      AnyFloat TotalTendonLength ??= _TENDON_LENGTH_DESIGNVAR(15.64/100);///< The total tendon length (m)
      AnyFloat K1 ??= DesignVar(10.00); ///< K1 constant in the muscle model.  Factor for determining shortening speed at optimum length
      AnyFloat K2 ??= DesignVar(0.00); ///< K2 constant in the muscle model.  Factor for determining shortening speed at optimum length
      AnyFloat Epsilon0 ??= DesignVar(0.0530); ///< Epsilon bar in the muscle model. Represents tendon strain at F0
      AnyFloat Fcfast ??= DesignVar(0.4); ///< Factor for determining shortening speed at optimum length
    };
  #endif


  #if (BM_FOOT_MODEL == _FOOT_MODEL_TOE_FLEX_GM_) | (BM_FOOT_MODEL == _FOOT_MODEL_DETAILED_GM_)

    AnyFolder FlexorDigitorumBrevis3 =
    {
      AnyString Muscle = "FlexorDigitorumBrevis3"; ///< Descriptive name for the muscle, e.g. for plotting
      AnyIntVar MuscleElemAmount = 1; ///< The total amount of elements for this muscle
      AnyFloat Pennationangle ??= DesignVar(29.7); ///< Pennation angle of the muscle fibers (degres)
      AnyFloat VolumeScaleFactor ??= DesignVar(1.0); ///< Factor for scaling the muscle volume
      AnyFloat MuscleVolume ??= DesignVar(3.40); ///< Volume of the muscle  (ml)
      AnyFloat MuscleVolumeSIScaled ??= .VolumeUnitFactor*VolumeScaleFactor*MuscleVolume; ///< Scaled Volume of the muscle in SI base unit (m^3)
      AnyFloat OptimalFiberlength ??= _FIBER_LENGTH_DESIGNVAR(2.28/100); ///< Optimal working length of the muscle fiber (m)
      AnyFloat TotalTendonLength ??= _TENDON_LENGTH_DESIGNVAR(15.71/100);///< The total tendon length (m)
      AnyFloat K1 ??= DesignVar(10.00); ///< K1 constant in the muscle model.  Factor for determining shortening speed at optimum length
      AnyFloat K2 ??= DesignVar(0.00); ///< K2 constant in the muscle model.  Factor for determining shortening speed at optimum length
      AnyFloat Epsilon0 ??= DesignVar(0.0530); ///< Epsilon bar in the muscle model. Represents tendon strain at F0
      AnyFloat Fcfast ??= DesignVar(0.4); ///< Factor for determining shortening speed at optimum length
    };
  #endif


  #if (BM_FOOT_MODEL == _FOOT_MODEL_TOE_FLEX_GM_) | (BM_FOOT_MODEL == _FOOT_MODEL_DETAILED_GM_)

    AnyFolder FlexorDigitorumBrevis4 =
    {
      AnyString Muscle = "FlexorDigitorumBrevis4"; ///< Descriptive name for the muscle, e.g. for plotting
      AnyIntVar MuscleElemAmount = 1; ///< The total amount of elements for this muscle
      AnyFloat Pennationangle ??= DesignVar(23.8); ///< Pennation angle of the muscle fibers (degres)
      AnyFloat VolumeScaleFactor ??= DesignVar(1.0); ///< Factor for scaling the muscle volume
      AnyFloat MuscleVolume ??= DesignVar(2.62); ///< Volume of the muscle  (ml)
      AnyFloat MuscleVolumeSIScaled ??= .VolumeUnitFactor*VolumeScaleFactor*MuscleVolume; ///< Scaled Volume of the muscle in SI base unit (m^3)
      AnyFloat OptimalFiberlength ??= _FIBER_LENGTH_DESIGNVAR(2.08/100); ///< Optimal working length of the muscle fiber (m)
      AnyFloat TotalTendonLength ??= _TENDON_LENGTH_DESIGNVAR(14.70/100);///< The total tendon length (m)
      AnyFloat K1 ??= DesignVar(10.00); ///< K1 constant in the muscle model.  Factor for determining shortening speed at optimum length
      AnyFloat K2 ??= DesignVar(0.00); ///< K2 constant in the muscle model.  Factor for determining shortening speed at optimum length
      AnyFloat Epsilon0 ??= DesignVar(0.0530); ///< Epsilon bar in the muscle model. Represents tendon strain at F0
      AnyFloat Fcfast ??= DesignVar(0.4); ///< Factor for determining shortening speed at optimum length
    };
  #endif


  #if (BM_FOOT_MODEL == _FOOT_MODEL_TOE_FLEX_GM_) | (BM_FOOT_MODEL == _FOOT_MODEL_DETAILED_GM_)

    AnyFolder FlexorDigitorumBrevis5 =
    {
      AnyString Muscle = "FlexorDigitorumBrevis5"; ///< Descriptive name for the muscle, e.g. for plotting
      AnyIntVar MuscleElemAmount = 1; ///< The total amount of elements for this muscle
      AnyFloat Pennationangle ??= DesignVar(20.0); ///< Pennation angle of the muscle fibers (degres)
      AnyFloat VolumeScaleFactor ??= DesignVar(1.0); ///< Factor for scaling the muscle volume
      AnyFloat MuscleVolume ??= DesignVar(0.64); ///< Volume of the muscle  (ml)
      AnyFloat MuscleVolumeSIScaled ??= .VolumeUnitFactor*VolumeScaleFactor*MuscleVolume; ///< Scaled Volume of the muscle in SI base unit (m^3)
      AnyFloat OptimalFiberlength ??= _FIBER_LENGTH_DESIGNVAR(1.82/100); ///< Optimal working length of the muscle fiber (m)
      AnyFloat TotalTendonLength ??= _TENDON_LENGTH_DESIGNVAR(14.00/100);///< The total tendon length (m)
      AnyFloat K1 ??= DesignVar(10.00); ///< K1 constant in the muscle model.  Factor for determining shortening speed at optimum length
      AnyFloat K2 ??= DesignVar(0.00); ///< K2 constant in the muscle model.  Factor for determining shortening speed at optimum length
      AnyFloat Epsilon0 ??= DesignVar(0.0530); ///< Epsilon bar in the muscle model. Represents tendon strain at F0
      AnyFloat Fcfast ??= DesignVar(0.4); ///< Factor for determining shortening speed at optimum length
    };
  #endif


  #if (BM_FOOT_MODEL == _FOOT_MODEL_TOE_FLEX_GM_) | (BM_FOOT_MODEL == _FOOT_MODEL_DETAILED_GM_)

    AnyFolder QuadratusPlantarMedialis1 =
    {
      AnyString Muscle = "QuadratusPlantarMedialis1"; ///< Descriptive name for the muscle, e.g. for plotting
      AnyIntVar MuscleElemAmount = 1; ///< The total amount of elements for this muscle
      AnyFloat Pennationangle ??= DesignVar(15.6); ///< Pennation angle of the muscle fibers (degres)
      AnyFloat VolumeScaleFactor ??= DesignVar(1.0); ///< Factor for scaling the muscle volume
      AnyFloat MuscleVolume ??= DesignVar(1.80); ///< Volume of the muscle  (ml)
      AnyFloat MuscleVolumeSIScaled ??= .VolumeUnitFactor*VolumeScaleFactor*MuscleVolume; ///< Scaled Volume of the muscle in SI base unit (m^3)
      AnyFloat OptimalFiberlength ??= _FIBER_LENGTH_DESIGNVAR(2.75/100); ///< Optimal working length of the muscle fiber (m)
      AnyFloat TotalTendonLength ??= _TENDON_LENGTH_DESIGNVAR(3.33/100);///< The total tendon length (m)
      AnyFloat K1 ??= DesignVar(10.00); ///< K1 constant in the muscle model.  Factor for determining shortening speed at optimum length
      AnyFloat K2 ??= DesignVar(0.00); ///< K2 constant in the muscle model.  Factor for determining shortening speed at optimum length
      AnyFloat Epsilon0 ??= DesignVar(0.0530); ///< Epsilon bar in the muscle model. Represents tendon strain at F0
      AnyFloat Fcfast ??= DesignVar(0.4); ///< Factor for determining shortening speed at optimum length
    };
  #endif


  #if (BM_FOOT_MODEL == _FOOT_MODEL_TOE_FLEX_GM_) | (BM_FOOT_MODEL == _FOOT_MODEL_DETAILED_GM_)

    AnyFolder QuadratusPlantarMedialis2 =
    {
      AnyString Muscle = "QuadratusPlantarMedialis2"; ///< Descriptive name for the muscle, e.g. for plotting
      AnyIntVar MuscleElemAmount = 1; ///< The total amount of elements for this muscle
      AnyFloat Pennationangle ??= DesignVar(15.6); ///< Pennation angle of the muscle fibers (degres)
      AnyFloat VolumeScaleFactor ??= DesignVar(1.0); ///< Factor for scaling the muscle volume
      AnyFloat MuscleVolume ??= DesignVar(1.80); ///< Volume of the muscle  (ml)
      AnyFloat MuscleVolumeSIScaled ??= .VolumeUnitFactor*VolumeScaleFactor*MuscleVolume; ///< Scaled Volume of the muscle in SI base unit (m^3)
      AnyFloat OptimalFiberlength ??= _FIBER_LENGTH_DESIGNVAR(2.75/100); ///< Optimal working length of the muscle fiber (m)
      AnyFloat TotalTendonLength ??= _TENDON_LENGTH_DESIGNVAR(4.82/100);///< The total tendon length (m)
      AnyFloat K1 ??= DesignVar(10.00); ///< K1 constant in the muscle model.  Factor for determining shortening speed at optimum length
      AnyFloat K2 ??= DesignVar(0.00); ///< K2 constant in the muscle model.  Factor for determining shortening speed at optimum length
      AnyFloat Epsilon0 ??= DesignVar(0.0530); ///< Epsilon bar in the muscle model. Represents tendon strain at F0
      AnyFloat Fcfast ??= DesignVar(0.4); ///< Factor for determining shortening speed at optimum length
    };
  #endif


  #if (BM_FOOT_MODEL == _FOOT_MODEL_TOE_FLEX_GM_) | (BM_FOOT_MODEL == _FOOT_MODEL_DETAILED_GM_)

    AnyFolder QuadratusPlantarMedialis3 =
    {
      AnyString Muscle = "QuadratusPlantarMedialis3"; ///< Descriptive name for the muscle, e.g. for plotting
      AnyIntVar MuscleElemAmount = 1; ///< The total amount of elements for this muscle
      AnyFloat Pennationangle ??= DesignVar(15.6); ///< Pennation angle of the muscle fibers (degres)
      AnyFloat VolumeScaleFactor ??= DesignVar(1.0); ///< Factor for scaling the muscle volume
      AnyFloat MuscleVolume ??= DesignVar(1.80); ///< Volume of the muscle  (ml)
      AnyFloat MuscleVolumeSIScaled ??= .VolumeUnitFactor*VolumeScaleFactor*MuscleVolume; ///< Scaled Volume of the muscle in SI base unit (m^3)
      AnyFloat OptimalFiberlength ??= _FIBER_LENGTH_DESIGNVAR(2.75/100); ///< Optimal working length of the muscle fiber (m)
      AnyFloat TotalTendonLength ??= _TENDON_LENGTH_DESIGNVAR(5.24/100);///< The total tendon length (m)
      AnyFloat K1 ??= DesignVar(10.00); ///< K1 constant in the muscle model.  Factor for determining shortening speed at optimum length
      AnyFloat K2 ??= DesignVar(0.00); ///< K2 constant in the muscle model.  Factor for determining shortening speed at optimum length
      AnyFloat Epsilon0 ??= DesignVar(0.0530); ///< Epsilon bar in the muscle model. Represents tendon strain at F0
      AnyFloat Fcfast ??= DesignVar(0.4); ///< Factor for determining shortening speed at optimum length
    };
  #endif


  #if (BM_FOOT_MODEL == _FOOT_MODEL_TOE_FLEX_GM_) | (BM_FOOT_MODEL == _FOOT_MODEL_DETAILED_GM_)

    AnyFolder QuadratusPlantarLateralis1 =
    {
      AnyString Muscle = "QuadratusPlantarLateralis1"; ///< Descriptive name for the muscle, e.g. for plotting
      AnyIntVar MuscleElemAmount = 1; ///< The total amount of elements for this muscle
      AnyFloat Pennationangle ??= DesignVar(6.9); ///< Pennation angle of the muscle fibers (degres)
      AnyFloat VolumeScaleFactor ??= DesignVar(1.0); ///< Factor for scaling the muscle volume
      AnyFloat MuscleVolume ??= DesignVar(0.78); ///< Volume of the muscle  (ml)
      AnyFloat MuscleVolumeSIScaled ??= .VolumeUnitFactor*VolumeScaleFactor*MuscleVolume; ///< Scaled Volume of the muscle in SI base unit (m^3)
      AnyFloat OptimalFiberlength ??= _FIBER_LENGTH_DESIGNVAR(2.34/100); ///< Optimal working length of the muscle fiber (m)
      AnyFloat TotalTendonLength ??= _TENDON_LENGTH_DESIGNVAR(1.77/100);///< The total tendon length (m)
      AnyFloat K1 ??= DesignVar(10.00); ///< K1 constant in the muscle model.  Factor for determining shortening speed at optimum length
      AnyFloat K2 ??= DesignVar(0.00); ///< K2 constant in the muscle model.  Factor for determining shortening speed at optimum length
      AnyFloat Epsilon0 ??= DesignVar(0.0530); ///< Epsilon bar in the muscle model. Represents tendon strain at F0
      AnyFloat Fcfast ??= DesignVar(0.4); ///< Factor for determining shortening speed at optimum length
    };
  #endif


  #if (BM_FOOT_MODEL == _FOOT_MODEL_TOE_FLEX_GM_) | (BM_FOOT_MODEL == _FOOT_MODEL_DETAILED_GM_)

    AnyFolder QuadratusPlantarLateralis2 =
    {
      AnyString Muscle = "QuadratusPlantarLateralis2"; ///< Descriptive name for the muscle, e.g. for plotting
      AnyIntVar MuscleElemAmount = 1; ///< The total amount of elements for this muscle
      AnyFloat Pennationangle ??= DesignVar(6.9); ///< Pennation angle of the muscle fibers (degres)
      AnyFloat VolumeScaleFactor ??= DesignVar(1.0); ///< Factor for scaling the muscle volume
      AnyFloat MuscleVolume ??= DesignVar(0.78); ///< Volume of the muscle  (ml)
      AnyFloat MuscleVolumeSIScaled ??= .VolumeUnitFactor*VolumeScaleFactor*MuscleVolume; ///< Scaled Volume of the muscle in SI base unit (m^3)
      AnyFloat OptimalFiberlength ??= _FIBER_LENGTH_DESIGNVAR(2.34/100); ///< Optimal working length of the muscle fiber (m)
      AnyFloat TotalTendonLength ??= _TENDON_LENGTH_DESIGNVAR(3.54/100);///< The total tendon length (m)
      AnyFloat K1 ??= DesignVar(10.00); ///< K1 constant in the muscle model.  Factor for determining shortening speed at optimum length
      AnyFloat K2 ??= DesignVar(0.00); ///< K2 constant in the muscle model.  Factor for determining shortening speed at optimum length
      AnyFloat Epsilon0 ??= DesignVar(0.0530); ///< Epsilon bar in the muscle model. Represents tendon strain at F0
      AnyFloat Fcfast ??= DesignVar(0.4); ///< Factor for determining shortening speed at optimum length
    };
  #endif


  #if (BM_FOOT_MODEL == _FOOT_MODEL_TOE_FLEX_GM_) | (BM_FOOT_MODEL == _FOOT_MODEL_DETAILED_GM_)

    AnyFolder QuadratusPlantarLateralis3 =
    {
      AnyString Muscle = "QuadratusPlantarLateralis3"; ///< Descriptive name for the muscle, e.g. for plotting
      AnyIntVar MuscleElemAmount = 1; ///< The total amount of elements for this muscle
      AnyFloat Pennationangle ??= DesignVar(6.9); ///< Pennation angle of the muscle fibers (degres)
      AnyFloat VolumeScaleFactor ??= DesignVar(1.0); ///< Factor for scaling the muscle volume
      AnyFloat MuscleVolume ??= DesignVar(0.78); ///< Volume of the muscle  (ml)
      AnyFloat MuscleVolumeSIScaled ??= .VolumeUnitFactor*VolumeScaleFactor*MuscleVolume; ///< Scaled Volume of the muscle in SI base unit (m^3)
      AnyFloat OptimalFiberlength ??= _FIBER_LENGTH_DESIGNVAR(2.34/100); ///< Optimal working length of the muscle fiber (m)
      AnyFloat TotalTendonLength ??= _TENDON_LENGTH_DESIGNVAR(5.38/100);///< The total tendon length (m)
      AnyFloat K1 ??= DesignVar(10.00); ///< K1 constant in the muscle model.  Factor for determining shortening speed at optimum length
      AnyFloat K2 ??= DesignVar(0.00); ///< K2 constant in the muscle model.  Factor for determining shortening speed at optimum length
      AnyFloat Epsilon0 ??= DesignVar(0.0530); ///< Epsilon bar in the muscle model. Represents tendon strain at F0
      AnyFloat Fcfast ??= DesignVar(0.4); ///< Factor for determining shortening speed at optimum length
    };
  #endif


  #if (BM_FOOT_MODEL == _FOOT_MODEL_TOE_FLEX_GM_) | (BM_FOOT_MODEL == _FOOT_MODEL_DETAILED_GM_)

    AnyFolder Lumbrical2 =
    {
      AnyString Muscle = "Lumbrical2"; ///< Descriptive name for the muscle, e.g. for plotting
      AnyIntVar MuscleElemAmount = 1; ///< The total amount of elements for this muscle
      AnyFloat Pennationangle ??= DesignVar(5.6); ///< Pennation angle of the muscle fibers (degres)
      AnyFloat VolumeScaleFactor ??= DesignVar(1.0); ///< Factor for scaling the muscle volume
      AnyFloat MuscleVolume ??= DesignVar(0.90); ///< Volume of the muscle  (ml)
      AnyFloat MuscleVolumeSIScaled ??= .VolumeUnitFactor*VolumeScaleFactor*MuscleVolume; ///< Scaled Volume of the muscle in SI base unit (m^3)
      AnyFloat OptimalFiberlength ??= _FIBER_LENGTH_DESIGNVAR(2.24/100); ///< Optimal working length of the muscle fiber (m)
      AnyFloat TotalTendonLength ??= _TENDON_LENGTH_DESIGNVAR(6.33/100);///< The total tendon length (m)
      AnyFloat K1 ??= DesignVar(10.00); ///< K1 constant in the muscle model.  Factor for determining shortening speed at optimum length
      AnyFloat K2 ??= DesignVar(0.00); ///< K2 constant in the muscle model.  Factor for determining shortening speed at optimum length
      AnyFloat Epsilon0 ??= DesignVar(0.0530); ///< Epsilon bar in the muscle model. Represents tendon strain at F0
      AnyFloat Fcfast ??= DesignVar(0.4); ///< Factor for determining shortening speed at optimum length
    };
  #endif


  #if (BM_FOOT_MODEL == _FOOT_MODEL_TOE_FLEX_GM_) | (BM_FOOT_MODEL == _FOOT_MODEL_DETAILED_GM_)

    AnyFolder Lumbrical3 =
    {
      AnyString Muscle = "Lumbrical3"; ///< Descriptive name for the muscle, e.g. for plotting
      AnyIntVar MuscleElemAmount = 1; ///< The total amount of elements for this muscle
      AnyFloat Pennationangle ??= DesignVar(0.0); ///< Pennation angle of the muscle fibers (degres)
      AnyFloat VolumeScaleFactor ??= DesignVar(1.0); ///< Factor for scaling the muscle volume
      AnyFloat MuscleVolume ??= DesignVar(0.89); ///< Volume of the muscle  (ml)
      AnyFloat MuscleVolumeSIScaled ??= .VolumeUnitFactor*VolumeScaleFactor*MuscleVolume; ///< Scaled Volume of the muscle in SI base unit (m^3)
      AnyFloat OptimalFiberlength ??= _FIBER_LENGTH_DESIGNVAR(2.23/100); ///< Optimal working length of the muscle fiber (m)
      AnyFloat TotalTendonLength ??= _TENDON_LENGTH_DESIGNVAR(5.76/100);///< The total tendon length (m)
      AnyFloat K1 ??= DesignVar(10.00); ///< K1 constant in the muscle model.  Factor for determining shortening speed at optimum length
      AnyFloat K2 ??= DesignVar(0.00); ///< K2 constant in the muscle model.  Factor for determining shortening speed at optimum length
      AnyFloat Epsilon0 ??= DesignVar(0.0530); ///< Epsilon bar in the muscle model. Represents tendon strain at F0
      AnyFloat Fcfast ??= DesignVar(0.4); ///< Factor for determining shortening speed at optimum length
    };
  #endif


  #if (BM_FOOT_MODEL == _FOOT_MODEL_TOE_FLEX_GM_) | (BM_FOOT_MODEL == _FOOT_MODEL_DETAILED_GM_)

    AnyFolder Lumbrical4 =
    {
      AnyString Muscle = "Lumbrical4"; ///< Descriptive name for the muscle, e.g. for plotting
      AnyIntVar MuscleElemAmount = 1; ///< The total amount of elements for this muscle
      AnyFloat Pennationangle ??= DesignVar(5.2); ///< Pennation angle of the muscle fibers (degres)
      AnyFloat VolumeScaleFactor ??= DesignVar(1.0); ///< Factor for scaling the muscle volume
      AnyFloat MuscleVolume ??= DesignVar(0.63); ///< Volume of the muscle  (ml)
      AnyFloat MuscleVolumeSIScaled ??= .VolumeUnitFactor*VolumeScaleFactor*MuscleVolume; ///< Scaled Volume of the muscle in SI base unit (m^3)
      AnyFloat OptimalFiberlength ??= _FIBER_LENGTH_DESIGNVAR(2.11/100); ///< Optimal working length of the muscle fiber (m)
      AnyFloat TotalTendonLength ??= _TENDON_LENGTH_DESIGNVAR(5.15/100);///< The total tendon length (m)
      AnyFloat K1 ??= DesignVar(10.00); ///< K1 constant in the muscle model.  Factor for determining shortening speed at optimum length
      AnyFloat K2 ??= DesignVar(0.00); ///< K2 constant in the muscle model.  Factor for determining shortening speed at optimum length
      AnyFloat Epsilon0 ??= DesignVar(0.0530); ///< Epsilon bar in the muscle model. Represents tendon strain at F0
      AnyFloat Fcfast ??= DesignVar(0.4); ///< Factor for determining shortening speed at optimum length
    };
  #endif


  #if (BM_FOOT_MODEL == _FOOT_MODEL_TOE_FLEX_GM_) | (BM_FOOT_MODEL == _FOOT_MODEL_DETAILED_GM_)

    AnyFolder Lumbrical5 =
    {
      AnyString Muscle = "Lumbrical5"; ///< Descriptive name for the muscle, e.g. for plotting
      AnyIntVar MuscleElemAmount = 1; ///< The total amount of elements for this muscle
      AnyFloat Pennationangle ??= DesignVar(10.0); ///< Pennation angle of the muscle fibers (degres)
      AnyFloat VolumeScaleFactor ??= DesignVar(1.0); ///< Factor for scaling the muscle volume
      AnyFloat MuscleVolume ??= DesignVar(0.29); ///< Volume of the muscle  (ml)
      AnyFloat MuscleVolumeSIScaled ??= .VolumeUnitFactor*VolumeScaleFactor*MuscleVolume; ///< Scaled Volume of the muscle in SI base unit (m^3)
      AnyFloat OptimalFiberlength ??= _FIBER_LENGTH_DESIGNVAR(1.62/100); ///< Optimal working length of the muscle fiber (m)
      AnyFloat TotalTendonLength ??= _TENDON_LENGTH_DESIGNVAR(4.70/100);///< The total tendon length (m)
      AnyFloat K1 ??= DesignVar(10.00); ///< K1 constant in the muscle model.  Factor for determining shortening speed at optimum length
      AnyFloat K2 ??= DesignVar(0.00); ///< K2 constant in the muscle model.  Factor for determining shortening speed at optimum length
      AnyFloat Epsilon0 ??= DesignVar(0.0530); ///< Epsilon bar in the muscle model. Represents tendon strain at F0
      AnyFloat Fcfast ??= DesignVar(0.4); ///< Factor for determining shortening speed at optimum length
    };
  #endif


  #if (BM_FOOT_MODEL == _FOOT_MODEL_TOE_FLEX_GM_) | (BM_FOOT_MODEL == _FOOT_MODEL_DETAILED_GM_)

    AnyFolder AbductorDigitiMinimi1 =
    {
      AnyString Muscle = "AbductorDigitiMinimi1"; ///< Descriptive name for the muscle, e.g. for plotting
      AnyIntVar MuscleElemAmount = 1; ///< The total amount of elements for this muscle
      AnyFloat Pennationangle ??= DesignVar(3.9); ///< Pennation angle of the muscle fibers (degres)
      AnyFloat VolumeScaleFactor ??= DesignVar(1.0); ///< Factor for scaling the muscle volume
      AnyFloat MuscleVolume ??= DesignVar(3.02); ///< Volume of the muscle  (ml)
      AnyFloat MuscleVolumeSIScaled ??= .VolumeUnitFactor*VolumeScaleFactor*MuscleVolume; ///< Scaled Volume of the muscle in SI base unit (m^3)
      AnyFloat OptimalFiberlength ??= _FIBER_LENGTH_DESIGNVAR(2.39/100); ///< Optimal working length of the muscle fiber (m)
      AnyFloat TotalTendonLength ??= _TENDON_LENGTH_DESIGNVAR(10.87/100);///< The total tendon length (m)
      AnyFloat K1 ??= DesignVar(10.00); ///< K1 constant in the muscle model.  Factor for determining shortening speed at optimum length
      AnyFloat K2 ??= DesignVar(0.00); ///< K2 constant in the muscle model.  Factor for determining shortening speed at optimum length
      AnyFloat Epsilon0 ??= DesignVar(0.0530); ///< Epsilon bar in the muscle model. Represents tendon strain at F0
      AnyFloat Fcfast ??= DesignVar(0.4); ///< Factor for determining shortening speed at optimum length
    };
  #endif


  #if (BM_FOOT_MODEL == _FOOT_MODEL_TOE_FLEX_GM_) | (BM_FOOT_MODEL == _FOOT_MODEL_DETAILED_GM_)

    AnyFolder AbductorDigitiMinimi2 =
    {
      AnyString Muscle = "AbductorDigitiMinimi2"; ///< Descriptive name for the muscle, e.g. for plotting
      AnyIntVar MuscleElemAmount = 1; ///< The total amount of elements for this muscle
      AnyFloat Pennationangle ??= DesignVar(3.9); ///< Pennation angle of the muscle fibers (degres)
      AnyFloat VolumeScaleFactor ??= DesignVar(1.0); ///< Factor for scaling the muscle volume
      AnyFloat MuscleVolume ??= DesignVar(3.02); ///< Volume of the muscle  (ml)
      AnyFloat MuscleVolumeSIScaled ??= .VolumeUnitFactor*VolumeScaleFactor*MuscleVolume; ///< Scaled Volume of the muscle in SI base unit (m^3)
      AnyFloat OptimalFiberlength ??= _FIBER_LENGTH_DESIGNVAR(2.39/100); ///< Optimal working length of the muscle fiber (m)
      AnyFloat TotalTendonLength ??= _TENDON_LENGTH_DESIGNVAR(11.16/100);///< The total tendon length (m)
      AnyFloat K1 ??= DesignVar(10.00); ///< K1 constant in the muscle model.  Factor for determining shortening speed at optimum length
      AnyFloat K2 ??= DesignVar(0.00); ///< K2 constant in the muscle model.  Factor for determining shortening speed at optimum length
      AnyFloat Epsilon0 ??= DesignVar(0.0530); ///< Epsilon bar in the muscle model. Represents tendon strain at F0
      AnyFloat Fcfast ??= DesignVar(0.4); ///< Factor for determining shortening speed at optimum length
    };
  #endif


  #if (BM_FOOT_MODEL == _FOOT_MODEL_TOE_FLEX_GM_) | (BM_FOOT_MODEL == _FOOT_MODEL_DETAILED_GM_)

    AnyFolder AbductorDigitiMinimi3 =
    {
      AnyString Muscle = "AbductorDigitiMinimi3"; ///< Descriptive name for the muscle, e.g. for plotting
      AnyIntVar MuscleElemAmount = 1; ///< The total amount of elements for this muscle
      AnyFloat Pennationangle ??= DesignVar(3.9); ///< Pennation angle of the muscle fibers (degres)
      AnyFloat VolumeScaleFactor ??= DesignVar(1.0); ///< Factor for scaling the muscle volume
      AnyFloat MuscleVolume ??= DesignVar(3.02); ///< Volume of the muscle  (ml)
      AnyFloat MuscleVolumeSIScaled ??= .VolumeUnitFactor*VolumeScaleFactor*MuscleVolume; ///< Scaled Volume of the muscle in SI base unit (m^3)
      AnyFloat OptimalFiberlength ??= _FIBER_LENGTH_DESIGNVAR(2.39/100); ///< Optimal working length of the muscle fiber (m)
      AnyFloat TotalTendonLength ??= _TENDON_LENGTH_DESIGNVAR(11.43/100);///< The total tendon length (m)
      AnyFloat K1 ??= DesignVar(10.00); ///< K1 constant in the muscle model.  Factor for determining shortening speed at optimum length
      AnyFloat K2 ??= DesignVar(0.00); ///< K2 constant in the muscle model.  Factor for determining shortening speed at optimum length
      AnyFloat Epsilon0 ??= DesignVar(0.0530); ///< Epsilon bar in the muscle model. Represents tendon strain at F0
      AnyFloat Fcfast ??= DesignVar(0.4); ///< Factor for determining shortening speed at optimum length
    };
  #endif


  #if (BM_FOOT_MODEL == _FOOT_MODEL_TOE_FLEX_GM_) | (BM_FOOT_MODEL == _FOOT_MODEL_DETAILED_GM_)

    AnyFolder FlexorDigitiMinimiBrevis =
    {
      AnyString Muscle = "FlexorDigitiMinimiBrevis"; ///< Descriptive name for the muscle, e.g. for plotting
      AnyIntVar MuscleElemAmount = 1; ///< The total amount of elements for this muscle
      AnyFloat Pennationangle ??= DesignVar(14.5); ///< Pennation angle of the muscle fibers (degres)
      AnyFloat VolumeScaleFactor ??= DesignVar(1.0); ///< Factor for scaling the muscle volume
      AnyFloat MuscleVolume ??= DesignVar(3.54); ///< Volume of the muscle  (ml)
      AnyFloat MuscleVolumeSIScaled ??= .VolumeUnitFactor*VolumeScaleFactor*MuscleVolume; ///< Scaled Volume of the muscle in SI base unit (m^3)
      AnyFloat OptimalFiberlength ??= _FIBER_LENGTH_DESIGNVAR(1.77/100); ///< Optimal working length of the muscle fiber (m)
      AnyFloat TotalTendonLength ??= _TENDON_LENGTH_DESIGNVAR(4.78/100);///< The total tendon length (m)
      AnyFloat K1 ??= DesignVar(10.00); ///< K1 constant in the muscle model.  Factor for determining shortening speed at optimum length
      AnyFloat K2 ??= DesignVar(0.00); ///< K2 constant in the muscle model.  Factor for determining shortening speed at optimum length
      AnyFloat Epsilon0 ??= DesignVar(0.0530); ///< Epsilon bar in the muscle model. Represents tendon strain at F0
      AnyFloat Fcfast ??= DesignVar(0.4); ///< Factor for determining shortening speed at optimum length
    };
  #endif

}; // Foot
}; // Muscles


#undef _TENDON_LENGTH_DESIGNVAR
#undef _FIBER_LENGTH_DESIGNVAR
