_CODE_MACRO_(PsoasMajor_PMT12I_TM)
_CODE_MACRO_(PsoasMajor_PML1I_TM)
_CODE_MACRO_(PsoasMajor_PML1T_TM)
_CODE_MACRO_(PsoasMajor_PML2I_TM)
_CODE_MACRO_(PsoasMajor_PML2T_TM)
_CODE_MACRO_(PsoasMajor_PML3I_TM)
_CODE_MACRO_(PsoasMajor_PML3T_TM)
_CODE_MACRO_(PsoasMajor_PML4I_TM)
_CODE_MACRO_(PsoasMajor_PML4T_TM)
_CODE_MACRO_(PsoasMajor_PML5_TM)
_CODE_MACRO_(PsoasMajor_PML5T_TM)

_CODE_MACRO_(SoleusMedialis1)
_CODE_MACRO_(SoleusMedialis2)
_CODE_MACRO_(SoleusMedialis3)
_CODE_MACRO_(SoleusLateralis1)
_CODE_MACRO_(SoleusLateralis2)
_CODE_MACRO_(SoleusLateralis3)
_CODE_MACRO_(GastrocnemiusLateralis1)
_CODE_MACRO_(GastrocnemiusMedialis1)
_CODE_MACRO_(FlexorDigitorumLongus1)
_CODE_MACRO_(FlexorDigitorumLongus2)
_CODE_MACRO_(FlexorDigitorumLongus3)
#if BM_LEG_MORPHOLOGY == 2
_CODE_MACRO_(FlexorDigitorumLongus4)
#endif
_CODE_MACRO_(FlexorHallucisLongus1)
_CODE_MACRO_(FlexorHallucisLongus2)
_CODE_MACRO_(FlexorHallucisLongus3)
_CODE_MACRO_(TibialisPosteriorLateralis1)
_CODE_MACRO_(TibialisPosteriorLateralis2)
_CODE_MACRO_(TibialisPosteriorLateralis3)
_CODE_MACRO_(TibialisPosteriorMedialis1)
_CODE_MACRO_(TibialisPosteriorMedialis2)
_CODE_MACRO_(TibialisPosteriorMedialis3)
_CODE_MACRO_(TibialisAnterior1)
_CODE_MACRO_(TibialisAnterior2)
_CODE_MACRO_(TibialisAnterior3)
_CODE_MACRO_(PeroneusBrevis1)
_CODE_MACRO_(PeroneusBrevis2)
_CODE_MACRO_(PeroneusBrevis3)
_CODE_MACRO_(PeroneusLongus1)
_CODE_MACRO_(PeroneusLongus2)
_CODE_MACRO_(PeroneusLongus3)
#if BM_LEG_MORPHOLOGY == 1
_CODE_MACRO_(PeroneusTertius1)
_CODE_MACRO_(PeroneusTertius2)
_CODE_MACRO_(PeroneusTertius3)
#endif
_CODE_MACRO_(ExtensorDigitorumLongus1)
_CODE_MACRO_(ExtensorDigitorumLongus2)
_CODE_MACRO_(ExtensorDigitorumLongus3)
#if BM_LEG_MORPHOLOGY == 2
_CODE_MACRO_(ExtensorDigitorumLongus4)
#endif
_CODE_MACRO_(ExtensorHallucisLongus1)
_CODE_MACRO_(ExtensorHallucisLongus2)
_CODE_MACRO_(ExtensorHallucisLongus3)
_CODE_MACRO_(VastusLateralisInferior1)
_CODE_MACRO_(VastusLateralisInferior2)
_CODE_MACRO_(VastusLateralisInferior3)
_CODE_MACRO_(VastusLateralisInferior4)
_CODE_MACRO_(VastusLateralisInferior5)
_CODE_MACRO_(VastusLateralisInferior6)
_CODE_MACRO_(VastusLateralisSuperior1)
_CODE_MACRO_(VastusLateralisSuperior2)
_CODE_MACRO_(VastusMedialisInferior1)
_CODE_MACRO_(VastusMedialisInferior2)
_CODE_MACRO_(VastusMedialisMid1)
_CODE_MACRO_(VastusMedialisMid2)
_CODE_MACRO_(VastusMedialisSuperior1)
_CODE_MACRO_(VastusMedialisSuperior2)
_CODE_MACRO_(VastusMedialisSuperior3)
_CODE_MACRO_(VastusMedialisSuperior4)
#if BM_LEG_MORPHOLOGY == 1
_CODE_MACRO_(VastusMedialisSuperior5)
_CODE_MACRO_(VastusMedialisSuperior6)
#endif
_CODE_MACRO_(VastusIntermedius1)
_CODE_MACRO_(VastusIntermedius2)
_CODE_MACRO_(VastusIntermedius3)
_CODE_MACRO_(VastusIntermedius4)
_CODE_MACRO_(VastusIntermedius5)
_CODE_MACRO_(VastusIntermedius6)
#if BM_LEG_MORPHOLOGY == 1
_CODE_MACRO_(RectusFemoris1)
_CODE_MACRO_(RectusFemoris2)
#endif
#if BM_LEG_MORPHOLOGY == 2
_CODE_MACRO_(RectusFemoris1)
_CODE_MACRO_(RectusFemoris2)
#endif
_CODE_MACRO_(Semitendinosus1)
_CODE_MACRO_(Semimembranosus1)
#if BM_LEG_MORPHOLOGY == 2
_CODE_MACRO_(Semimembranosus2)
_CODE_MACRO_(Semimembranosus3)
#endif
_CODE_MACRO_(BicepsFemorisCaputLongum1)
_CODE_MACRO_(BicepsFemorisCaputBreve1)
_CODE_MACRO_(BicepsFemorisCaputBreve2)
_CODE_MACRO_(BicepsFemorisCaputBreve3)
#if BM_LEG_MORPHOLOGY == 1
_CODE_MACRO_(SartoriusProximal1)
_CODE_MACRO_(SartoriusDistal1)
#endif
#if BM_LEG_MORPHOLOGY == 2
_CODE_MACRO_(Sartorius1)
#endif
_CODE_MACRO_(IliacusLateralis1)
_CODE_MACRO_(IliacusLateralis2)
#if BM_LEG_MORPHOLOGY == 1
_CODE_MACRO_(IliacusLateralis3)
#endif
_CODE_MACRO_(IliacusMid1)
_CODE_MACRO_(IliacusMid2)
#if BM_LEG_MORPHOLOGY == 1
_CODE_MACRO_(IliacusMid3)
#endif
_CODE_MACRO_(IliacusMedialis1)
_CODE_MACRO_(IliacusMedialis2)
#if BM_LEG_MORPHOLOGY == 1
_CODE_MACRO_(IliacusMedialis3)
#endif
_CODE_MACRO_(GluteusMinimusAnterior1)
#if BM_LEG_MORPHOLOGY == 2
_CODE_MACRO_(GluteusMinimusAnterior2)
#endif
_CODE_MACRO_(GluteusMinimusMid1)
#if BM_LEG_MORPHOLOGY == 2
_CODE_MACRO_(GluteusMinimusMid2)
#endif
_CODE_MACRO_(GluteusMinimusPosterior1)
#if BM_LEG_MORPHOLOGY == 2
_CODE_MACRO_(GluteusMinimusPosterior2)
#endif
_CODE_MACRO_(GluteusMediusAnterior1)
_CODE_MACRO_(GluteusMediusAnterior2)
_CODE_MACRO_(GluteusMediusAnterior3)
#if TLEM_MORPHOLOGY == 1
_CODE_MACRO_(GluteusMediusAnterior4)
_CODE_MACRO_(GluteusMediusAnterior5)
_CODE_MACRO_(GluteusMediusAnterior6)
#endif
_CODE_MACRO_(GluteusMediusPosterior1)
_CODE_MACRO_(GluteusMediusPosterior2)
_CODE_MACRO_(GluteusMediusPosterior3)
_CODE_MACRO_(GluteusMediusPosterior4)
#if TLEM_MORPHOLOGY == 1
_CODE_MACRO_(GluteusMediusPosterior5)
_CODE_MACRO_(GluteusMediusPosterior6)
#endif
_CODE_MACRO_(GluteusMaximusSuperior1)
_CODE_MACRO_(GluteusMaximusSuperior2)
_CODE_MACRO_(GluteusMaximusSuperior3)
_CODE_MACRO_(GluteusMaximusSuperior4)
_CODE_MACRO_(GluteusMaximusSuperior5)
_CODE_MACRO_(GluteusMaximusSuperior6)
_CODE_MACRO_(GluteusMaximusInferior1)
_CODE_MACRO_(GluteusMaximusInferior2)
_CODE_MACRO_(GluteusMaximusInferior3)
_CODE_MACRO_(GluteusMaximusInferior4)
_CODE_MACRO_(GluteusMaximusInferior5)
_CODE_MACRO_(GluteusMaximusInferior6)
_CODE_MACRO_(TensorFasciaeLatae1)
_CODE_MACRO_(TensorFasciaeLatae2)
_CODE_MACRO_(Piriformis1)
_CODE_MACRO_(Gracilis1)
_CODE_MACRO_(Gracilis2)
_CODE_MACRO_(AdductorLongus1)
_CODE_MACRO_(AdductorLongus2)
_CODE_MACRO_(AdductorLongus3)
_CODE_MACRO_(AdductorLongus4)
_CODE_MACRO_(AdductorLongus5)
_CODE_MACRO_(AdductorLongus6)
_CODE_MACRO_(AdductorMagnusDistal1)
_CODE_MACRO_(AdductorMagnusDistal2)
_CODE_MACRO_(AdductorMagnusDistal3)
_CODE_MACRO_(AdductorMagnusMid1)
_CODE_MACRO_(AdductorMagnusMid2)
_CODE_MACRO_(AdductorMagnusMid3)
_CODE_MACRO_(AdductorMagnusMid4)
_CODE_MACRO_(AdductorMagnusMid5)
_CODE_MACRO_(AdductorMagnusMid6)
_CODE_MACRO_(AdductorMagnusProximal1)
_CODE_MACRO_(AdductorMagnusProximal2)
_CODE_MACRO_(AdductorMagnusProximal3)
_CODE_MACRO_(AdductorMagnusProximal4)
_CODE_MACRO_(AdductorBrevisProximal1)
_CODE_MACRO_(AdductorBrevisProximal2)
_CODE_MACRO_(AdductorBrevisMid1)
_CODE_MACRO_(AdductorBrevisMid2)
_CODE_MACRO_(AdductorBrevisDistal1)
_CODE_MACRO_(AdductorBrevisDistal2)
_CODE_MACRO_(GemellusInferior1)
_CODE_MACRO_(GemellusSuperior1)
_CODE_MACRO_(ObturatorExternusSuperior1)
_CODE_MACRO_(ObturatorExternusSuperior2)
_CODE_MACRO_(ObturatorExternusSuperior3)
_CODE_MACRO_(ObturatorExternusInferior1)
_CODE_MACRO_(ObturatorExternusInferior2)
_CODE_MACRO_(ObturatorInternus1)
_CODE_MACRO_(ObturatorInternus2)
_CODE_MACRO_(ObturatorInternus3)
#if BM_LEG_MORPHOLOGY == 2
_CODE_MACRO_(ObturatorInternus4)
_CODE_MACRO_(ObturatorInternus5)
_CODE_MACRO_(ObturatorInternus6)
#endif
_CODE_MACRO_(Pectineus1)
_CODE_MACRO_(Pectineus2)
_CODE_MACRO_(Pectineus3)
_CODE_MACRO_(Pectineus4)
_CODE_MACRO_(Plantaris1)
_CODE_MACRO_(Popliteus1)
_CODE_MACRO_(Popliteus2)
#if BM_LEG_MORPHOLOGY == 2
_CODE_MACRO_(Popliteus3)
#endif
_CODE_MACRO_(QuadratusFemoris1)
_CODE_MACRO_(QuadratusFemoris2)
_CODE_MACRO_(QuadratusFemoris3)
_CODE_MACRO_(QuadratusFemoris4)
