AnyFolder GluteusMaximusCal ={
  AnyComponentDefinition obj = {};

  AnyFolder &Pelvis = ...HumanFolderRef.Trunk.SegmentsLumbar.PelvisSeg;
  AnyFolder &Sacrum = ...HumanFolderRef.Trunk.SegmentsLumbar.SacrumSeg;

  AnyFolder &LegSegSide = .SideHumanFolderRef.Leg.Seg;

  AnyFolder &LegJointsSide = .SideHumanFolderRef.Leg.Jnt;
  AnyFolder &SacrumPelvisJnt = ...HumanFolderRef.Trunk.JointsLumbar.SacrumPelvisJnt;


  AnyFixedRefFrame ground = {
    AnyRefNode node = {
      ARel=..Pelvis.Axes0;
      sRel=..Pelvis.r0;
    };
  };

  AnyKinEq PelvisFix = {
    AnyKinLinear PelvisSacrumLinFix = {
      AnyRefFrame &ground = ..ground.node;
      AnyRefFrame &Pelvis = .....HumanFolderRef.Trunk.SegmentsLumbar.PelvisSeg;
    };
    AnyKinRotational PelvisSacrumRotFix = {
      Type = RotAxesAngles;
      AnyRefFrame &ground = ..ground.node;
      AnyRefFrame &Pelvis = .....HumanFolderRef.Trunk.SegmentsLumbar.PelvisSeg;
    };
  };

  AnyKinEqSimpleDriver PelvisSacrumFix = {
    AnyKinMeasure& Jnt = .SacrumPelvisJnt;
    DriverPos = {0,0,0};
    DriverVel = {0,0,0};
    Reaction.Type = {Off,Off,Off};
  };

  AnyKinEqInterPolDriver Hip = {
    AnyKinRotational &Spherical = ..SideInterfaceFolderRef.HipFlexion.HipMeasure;
    Type = PiecewiseLinear;
    T =      {0.0, 1.0 };
    Data = { {-20,  130},
             {10,  -15},
             {45,  0}
           }*pi/180; // Flexion - Abduction - external rotation

    Reaction.Type = {Off, Off, Off};
  };

  AnyKinEqInterPolDriver Knee = {
    AnyKinMeasure& Hinge = ..SideInterfaceFolderRef.KneeFlexion;
    Type = PiecewiseLinear;
    T =      {0.0, 1.0 };
    Data = {{5,150}}*pi/180; // ? degrees knee flexion
    Reaction.Type = {Off};
  };

  AnyKinEqInterPolDriver Ankle = {
    AnyKinMeasure& Hinge = ..SideInterfaceFolderRef.AnklePlantarFlexion;
    Type = PiecewiseLinear;
    T =      {0.0, 1.0 };
    Data = {{0,40}}*pi/180; // 0 to 40 % plantar flexion
    Reaction.Type = {Off};
  };

  AnyKinEqInterPolDriver SubTalar = {
    AnyKinMeasure& Hinge = ..SideInterfaceFolderRef.SubTalarEversion;
    Type = PiecewiseLinear;
    T =      {0.0, 1.0 };
    Data = {{0,0}}*pi/180;
    Reaction.Type = {Off};
  };

  AnyString MusPrefix = CompleteNameOf(&.SideHumanFolderRef.Leg.Mus);

  AnyObjectPtrArray GluteusMaximusMuscles = ObjSearch(MusPrefix+".GluteusMaximus*", "AnyMuscle");
  AnyFloat  GluteusMaximusRmin = repmat(NumElemOf(GluteusMaximusMuscles), 0.5);
  AnyFloat  GluteusMaximusRmax = repmat(NumElemOf(GluteusMaximusMuscles), 1.2);
};

// The study: Operations to be performed on the model
AnyBodyCalibrationStudy LegCalibrationStudyGluteusMaximus = {
  Output.Settings.CreateOutputOnLoad = Off;
  AnyFolder &ref=.GluteusMaximusCal;
  nStep = 2;
  MuscleArr = arrcat(
                ref.GluteusMaximusMuscles
              );
  RminMuscleFiber = arrcat(
                      ref.GluteusMaximusRmin
                   );
  RmaxMuscleFiber = arrcat(
                      ref.GluteusMaximusRmax
                   );
  InitialConditions.SolverType = KinSolOverDeterminate;
};
