/*
  This dataset is based on the PhD thesis by Martijn D. Klein Horsman titled
  "The Twente Lower Extremity Model (TLEM): Consistent Dynamic Simulation of the
  Human Locomotor Apparatus"

  Some model parameters from the orginal dataset have later been modified.
  The model is therefore denoted as TLEM 1.1.

  Use the following paper when citing:
    Klein Horsman, M.D., Koopman, H.F.J.M., van der Helm, F.C.T., Prosé, L.P.,
    Veeger, H.E.J., 2007. Morphological muscle and joint parameters for
    musculoskeletal modelling of the lower extremity. Clin. Biomech. 22,
    239-247. doi:10.1016/j.clinbiomech.2006.10.003
*/

Pelvis = {
  AnyVec3 HipJoint =  {-0.037621, -0.087801, 0.089675}*.TF';
  AnyVec3 RASIS = AsisIpsilateral*.TF';
  AnyVec3 LASIS = AsisColateral*.TF';
  AnyVec3 RPSIS = PsisIpsilateral*.TF';
  AnyVec3 LPSIS = PsisColateral*.TF';
  AnyVec3 RPT = PubicTubercleIpsilateral*.TF';
  AnyVec3 LPT = PubicTubercleColateral*.TF';
};

Thigh = {
  AnyFunTransform3D &Scale = ..Seg.Thigh.Scale;

  AnyVec3 KneeJoint = {0.0384, -0.4078, 0.0138}*.TF';
  AnyVec3 PatellaFemurJoint = {0.0351, -0.3851, 0.0190}*.TF';
  AnyVec3 KneeJointAxis = ..Sign*{ -0.528, -0.107, 0.843}*.TF'/vnorm({ -0.528, -0.107, 0.843});
  AnyVec3 PatellaFemurJointAxis = ..Sign*{-0.465,0.024,0.885}*.TF'/vnorm({-0.465,0.024,0.885});
  AnyVec3 HipJoint = {0.0, 0.0, 0.0}*.TF';
  AnyVec3 KneeJointsRelUnscaled = KneeJoint;
};

Patella = {
  AnyFunTransform3D &Scale = ..Seg.Patella.Scale;
  AnyVec3 PatellaFemurJoint = {0.0351, -0.3851, 0.0190}*.TF';
  AnyVec3 PatellaFemurJointAxis = ..Sign*{-0.465,0.024,0.885}*.TF'/vnorm({-0.465,0.024,0.885});
  AnyVec3 HipJoint = {0.0, 0.0, 0.0}*.TF';
};

Shank = {
  AnyFunTransform3D &Scale = ..Seg.Shank.Scale;
  AnyVec3 KneeJoint = {0.0384, -0.4078, 0.0138}*.TF';
  AnyVec3 KneeJointAxis = ..Sign*{ -0.528, -0.107, 0.843}*.TF'/vnorm({ -0.528, -0.107, 0.843});

  AnyVec3 AnkleJoint = {0.06817091, -0.8370684, 0.01270102}*.TF';
  AnyVec3 AnkleJointAxis = ..Sign*{-0.683553, -0.2060334, 0.7002182}*.TF'/vnorm({-0.683553, -0.2060334, 0.7002182 });

  // Bony Landmarks transformed transformed to the shank coordinate system in the neutral configuration
  AnyVec3 LateralFemuralCondyleInNeutralConf = (..ModelParameters.Thigh.EpicondylusFemorisLateralis *.Thigh.RotNeutral'+.Thigh.PosNeutral-.Shank.PosNeutral)*.Shank.RotNeutral;
  // Bony Landmarks transformed transformed to the shank coordinate system in the neutral configuration
  AnyVec3 MedialFemuralCondyleInNeutralConf = (..ModelParameters.Thigh.EpicondylusFemorisMedialis *.Thigh.RotNeutral'+.Thigh.PosNeutral-.Shank.PosNeutral)*.Shank.RotNeutral;
};

Talus = {
  //AnyFunTransform3D &Scale = ..Seg.Talus.Scale;

  // Recalculated into Talus' coordnate system in the neutral configuration
  AnyVec3 KneeJoint = {0.1957086, -0.450982, 0.1546587}*.TF';
  AnyVec3 SubTalarJoint ={  0.070, -0.851, 0.015}*.TF';
  AnyVec3 SubTalarJointAxis = ..Sign*{ -0.9416034, -0.2229949, -0.2523019}*.TF'/vnorm({ -0.9416034, -0.2229949, -0.2523019 } );

  AnyVec3 AnkleJoint= {0.07193621, -0.8337968, 0.01235645}*.TF';
  AnyVec3 AnkleJointAxis = ..Sign*{-0.683553, -0.2060334, 0.7002182}*.TF'/vnorm({-0.683553, -0.2060334,0.7002182 });


  // Neutral definition of subtalar joint
  AnyVec3 LateralTibialEpicondyle = (..Seg.Shank.StdPar.LateralTibialEpicondyle *.Shank.RotNeutral'+.Shank.PosNeutral-.Talus.PosNeutral)*.Talus.RotNeutral;
  AnyVec3 MedialTibialEpicondyle = (..Seg.Shank.StdPar.MedialTibialEpicondyle *.Shank.RotNeutral'+.Shank.PosNeutral-.Talus.PosNeutral)*.Talus.RotNeutral;
  AnyVec3 LateralMalleolus = (..Seg.Shank.StdPar.LateralMalleolus *.Shank.RotNeutral'+.Shank.PosNeutral-.Talus.PosNeutral)*.Talus.RotNeutral;
  AnyVec3 MedialMalleolus = (..Seg.Shank.StdPar.MedialMalleolus *.Shank.RotNeutral'+.Shank.PosNeutral-.Talus.PosNeutral)*.Talus.RotNeutral;

  AnyVec3 KneeJointInNeutralConfig = (.Thigh.KneeJointsRelUnscaled *.Thigh.RotNeutral'+.Thigh.PosNeutral-.Talus.PosNeutral)*.Talus.RotNeutral;
};

Foot = {
  //AnyFunTransform3D &Scale = ..Seg.Foot.Scale;
  // Joint Parameters
  AnyVec3 MetatarsalJoint1Node ={0.18, -0.9600, 0.05}*.TF';
  AnyVec3 MetatarsalJoint2Node = {0.1650, -0.9600, 0.065}*.TF';
  AnyVec3 MetatarsalJoint3Node = {0.1450, -0.9600,0.0700  }*.TF';
  AnyVec3 MetatarsalJoint4Node = {0.1350, -0.9600, 0.0800 }*.TF';
  AnyVec3 MetatarsalJoint5Node = {0.12, -0.95500, 0.095 }*.TF';
  AnyVec3 ToeJoint = {0.18, -0.94, 0.05}*.TF';

  AnyVec3 AnkleJoint= .Talus.AnkleJoint;
  AnyVec3 AnkleJointAxis = .Talus.AnkleJointAxis;
  AnyVec3 SubTalarJoint = {0.070, -0.851, 0.015}*.TF';
  AnyVec3 SubTalarJointAxis = ..Sign*{ -0.9416034, -0.2229949, -0.2523019}*.TF'/vnorm({ -0.9416034, -0.2229949, -0.2523019 } );
  // Recalculated into Foot's coordnate system in the neutral configuration
  AnyVec3 KneeJoint =  {0.1793069, -0.4413312, 0.141487}*.TF';
  AnyVec3 LateralMalleolus = (..Seg.Shank.StdPar.LateralMalleolus *.Shank.RotNeutral'+.Shank.PosNeutral-.Foot.PosNeutral)*.Foot.RotNeutral;
  AnyVec3 MedialMalleolus = (..Seg.Shank.StdPar.MedialMalleolus *.Shank.RotNeutral'+.Shank.PosNeutral-.Foot.PosNeutral)*.Foot.RotNeutral;
  AnyVec3 LateralTibialEpicondyle = (..Seg.Shank.StdPar.LateralTibialEpicondyle *.Shank.RotNeutral'+.Shank.PosNeutral-.Foot.PosNeutral)*.Foot.RotNeutral;
  AnyVec3 MedialTibialEpicondyle = (..Seg.Shank.StdPar.MedialTibialEpicondyle *.Shank.RotNeutral'+.Shank.PosNeutral-.Foot.PosNeutral)*.Foot.RotNeutral;
};

//This is the unscaled length of the patellar ligament, this length is used to constrain the patella motion
AnyVar PatellarLigamentLength = 0.0605;
