// This is a scaling law to display underlying body part datasets in their original size

      AnyVar HandLength = ...StandardParameters.Hand.HandLength;
      AnyVar HandBreadth = ...StandardParameters.Hand.HandBreadth;
      AnyFunTransform3DIdentity ScaleFunction = {};
      AnyFolder Carpals    = {  AnyFunTransform3DIdentity ScaleFunction = {};    };


    AnyFolder Thumb_MC ={
      AnyVar StdSegmentLength = 0.049;
      AnyVar StdHandLength = ..Hand.HandLength;

      AnyFunTransform3DLin ScaleFunction = {
        AnyVar  ls = (0.260844*.StdHandLength)/.StdSegmentLength;
        ScaleMat ={{1,0,0},{0,ls,0},{0,0,1}};
        Offset = {0,0,0};
      };
    };


    AnyFolder Thumb_PP ={

      AnyVar StdSegmentLength = 0.034;
      AnyVar StdHandLength = ..Hand.HandLength;

      AnyFunTransform3DLin ScaleFunction = {
        AnyVar  ls = (0.180002*.StdHandLength)/.StdSegmentLength;
        ScaleMat ={{1,0,0},{0,ls,0},{0,0,1}};
        Offset = {0,0,0};
      };
    };

    AnyFolder Thumb_DP ={

      AnyVar StdSegmentLength = 0.022;
      AnyVar StdHandLength = ..Hand.HandLength;

      AnyFunTransform3DLin ScaleFunction = {
        AnyVar  ls = (0.138805*.StdHandLength)/.StdSegmentLength;
        ScaleMat ={{1,0,0},{0,ls,0},{0,0,1}};
        Offset = {0,0,0};
      };
    };


    AnyFolder Finger_MC ={

      AnyVar StdSegmentLength = 0.07;
      AnyVar StdHandLength = ..Hand.HandLength;

      AnyFunTransform3DLin ScaleFunction2 = {
        AnyVar  ls = (0.375286*.StdHandLength)/.StdSegmentLength;
        ScaleMat ={{1,0,0},{0,ls,0},{0,0,1}};
        Offset = {0,0,0};
      };
      AnyFunTransform3DLin ScaleFunction3 = {
        AnyVar  ls = (0.360913*.StdHandLength)/.StdSegmentLength;
        ScaleMat ={{1,0,0},{0,ls,0},{0,0,1}};
        Offset = {0,0,0};
      };
      AnyFunTransform3DLin ScaleFunction4 = {
        AnyVar  ls = (0.319616*.StdHandLength)/.StdSegmentLength;
        ScaleMat ={{1,0,0},{0,ls,0},{0,0,1}};
        Offset = {0,0,0};
      };
      AnyFunTransform3DLin ScaleFunction5 = {
        AnyVar  ls = (0.292675*.StdHandLength)/.StdSegmentLength;

        ScaleMat ={{1,0,0},{0,ls,0},{0,0,1}};
        Offset = {0,0,0};
      };
    };


    AnyFolder Finger_PP ={

      AnyVar StdSegmentLength = 0.0521;
      AnyVar StdHandLength = ..Hand.HandLength;


      AnyFunTransform3DLin ScaleFunction2 = {
        AnyVar  ls = (0.253760*.StdHandLength)/.StdSegmentLength;
        ScaleMat ={{1,0,0},{0,ls,0},{0,0,1}};
        Offset = {0,0,0};
      };
      AnyFunTransform3DLin ScaleFunction3 = {
        AnyVar  ls = (0.280868*.StdHandLength)/.StdSegmentLength;
        ScaleMat ={{1,0,0},{0,ls,0},{0,0,1}};
        Offset = {0,0,0};
      };
      AnyFunTransform3DLin ScaleFunction4 = {
        AnyVar  ls = (0.261700*.StdHandLength)/.StdSegmentLength;
        ScaleMat ={{1,0,0},{0,ls,0},{0,0,1}};
        Offset = {0,0,0};
      };
      AnyFunTransform3DLin ScaleFunction5 = {
        AnyVar  ls = (0.208756*.StdHandLength)/.StdSegmentLength;
        ScaleMat ={{1,0,0},{0,ls,0},{0,0,1}};
        Offset = {0,0,0};
      };
    };


    AnyFolder Finger_MP ={

      AnyVar StdSegmentLength = 0.03;
      AnyVar StdHandLength = ..Hand.HandLength;

      AnyFunTransform3DLin ScaleFunction2 = {
        AnyVar  ls = (0.159697*.StdHandLength)/.StdSegmentLength;
        ScaleMat ={{1,0,0},{0,ls,0},{0,0,1}};
        Offset = {0,0,0};
      };
      AnyFunTransform3DLin ScaleFunction3 = {
        AnyVar  ls = (0.194885*.StdHandLength)/.StdSegmentLength;
        ScaleMat ={{1,0,0},{0,ls,0},{0,0,1}};
        Offset = {0,0,0};
      };
      AnyFunTransform3DLin ScaleFunction4 = {
        AnyVar  ls = (0.185207*.StdHandLength)/.StdSegmentLength;
        ScaleMat ={{1,0,0},{0,ls,0},{0,0,1}};
        Offset = {0,0,0};
      };
      AnyFunTransform3DLin ScaleFunction5 = {
        AnyVar  ls = (0.129041*.StdHandLength)/.StdSegmentLength;
        ScaleMat ={{1,0,0},{0,ls,0},{0,0,1}};
        Offset = {0,0,0};
      };
    };

    AnyFolder Finger_DP ={

      AnyVar StdSegmentLength = 0.022;
      AnyVar StdHandLength = ..Hand.HandLength;

      AnyFunTransform3DLin ScaleFunction2 = {
        AnyVar  ls = (0.104295*.StdHandLength)/.StdSegmentLength;
        ScaleMat ={{1,0,0},{0,ls,0},{0,0,1}};
        Offset = {0,0,0};
      };
      AnyFunTransform3DLin ScaleFunction3 = {
        AnyVar  ls = (0.111260*.StdHandLength)/.StdSegmentLength;
        ScaleMat ={{1,0,0},{0,ls,0},{0,0,1}};
        Offset = {0,0,0};
      };
      AnyFunTransform3DLin ScaleFunction4 = {
        AnyVar  ls = (0.113941*.StdHandLength)/.StdSegmentLength;
        ScaleMat ={{1,0,0},{0,ls,0},{0,0,1}};
        Offset = {0,0,0};
      };
      AnyFunTransform3DLin ScaleFunction5 = {
        AnyVar  ls = (0.099599*.StdHandLength)/.StdSegmentLength;
        ScaleMat ={{1,0,0},{0,ls,0},{0,0,1}};
        Offset = {0,0,0};
      };
    };
