        AnyFloat LengthScale = ....Anthropometrics.SegmentScaleFactors.Left.Hand.LengthScale;
        AnyFloat DepthScale  = ....Anthropometrics.SegmentScaleFactors.Left.Hand.DepthScale;
        AnyFloat WidthScale  = ....Anthropometrics.SegmentScaleFactors.Left.Hand.WidthScale;

        AnyFunTransform3DLin ScaleFunction = {
          ScaleMat ={
            {.LengthScale, 0.0, 0.0},   // fingers aligned axis
            {0.0, .WidthScale, 0.0},    // mediolateral width
            {0.0, 0.0, .DepthScale}     // hand thickness
          };
          Offset = {0,0,0};
        };


      AnyFolder Carpals = {
        AnyFloat LengthScale = .....Anthropometrics.SegmentScaleFactors.Left.Hand.LengthScale;
        AnyFloat DepthScale  = .....Anthropometrics.SegmentScaleFactors.Left.CarpalsLength.DepthScale;
        AnyFloat WidthScale  = .....Anthropometrics.SegmentScaleFactors.Left.CarpalsLength.WidthScale;

        AnyFunTransform3DLin ScaleFunction = {
          ScaleMat = {
            {.LengthScale, 0.0, 0.0}, // long axis
            {0.0, .WidthScale, 0.0},  // mediolateral width
            {0.0, 0.0, .DepthScale}   // depth
          };
          Offset = {0,0,0};
        };
      };

      AnyFolder Thumb_MC ={
        AnyFloat LengthScale = .....Anthropometrics.SegmentScaleFactors.Left.Hand.LengthScale;
        AnyFloat DepthScale  = .....Anthropometrics.SegmentScaleFactors.Left.ThumbMCLength.DepthScale;
        AnyFloat WidthScale  = .....Anthropometrics.SegmentScaleFactors.Left.ThumbMCLength.WidthScale;

        AnyFunTransform3DLin ScaleFunction = {
          ScaleMat = {
            {.WidthScale, 0.0, 0.0}, // mediolateral width
            {0.0, .LengthScale, 0.0},  // long axis
            {0.0, 0.0, .DepthScale}   // depth
          };
          Offset = {0,0,0};
        };
      };

      AnyFolder Thumb_PP ={
        AnyFloat LengthScale = .....Anthropometrics.SegmentScaleFactors.Left.Hand.LengthScale;
        AnyFloat DepthScale  = .....Anthropometrics.SegmentScaleFactors.Left.ThumbPPLength.DepthScale;
        AnyFloat WidthScale  = .....Anthropometrics.SegmentScaleFactors.Left.ThumbPPLength.WidthScale;

        AnyFunTransform3DLin ScaleFunction = {
          ScaleMat = {
            {.WidthScale, 0.0, 0.0}, // mediolateral width
            {0.0, .LengthScale, 0.0},  // long axis
            {0.0, 0.0, .DepthScale}   // depth
          };
          Offset = {0,0,0};
        };
      };

      AnyFolder Thumb_DP ={
        AnyFloat LengthScale = .....Anthropometrics.SegmentScaleFactors.Left.Hand.LengthScale;
        AnyFloat DepthScale  = .....Anthropometrics.SegmentScaleFactors.Left.ThumbDPLength.DepthScale;
        AnyFloat WidthScale  = .....Anthropometrics.SegmentScaleFactors.Left.ThumbDPLength.WidthScale;

        AnyFunTransform3DLin ScaleFunction = {
          ScaleMat = {
            {.WidthScale, 0.0, 0.0}, // mediolateral width
            {0.0, .LengthScale, 0.0},  // long axis
            {0.0, 0.0, .DepthScale}   // depth
          };
          Offset = {0,0,0};
        };
      };

      AnyFolder Finger_MC ={
        AnyFloat Finger2LengthScale = .....Anthropometrics.SegmentScaleFactors.Left.Hand.LengthScale*0.375286/0.360913;
        AnyFloat Finger2DepthScale  = .....Anthropometrics.SegmentScaleFactors.Left.Finger2MCLength.DepthScale;
        AnyFloat Finger2WidthScale  = .....Anthropometrics.SegmentScaleFactors.Left.Finger2MCLength.WidthScale;

        AnyFloat Finger3LengthScale = .....Anthropometrics.SegmentScaleFactors.Left.Hand.LengthScale*0.375286/0.360913;
        AnyFloat Finger3DepthScale  = .....Anthropometrics.SegmentScaleFactors.Left.Finger3MCLength.DepthScale;
        AnyFloat Finger3WidthScale  = .....Anthropometrics.SegmentScaleFactors.Left.Finger3MCLength.WidthScale;

        AnyFloat Finger4LengthScale = .....Anthropometrics.SegmentScaleFactors.Left.Hand.LengthScale*0.319616/0.360913;
        AnyFloat Finger4DepthScale  = .....Anthropometrics.SegmentScaleFactors.Left.Finger4MCLength.DepthScale;
        AnyFloat Finger4WidthScale  = .....Anthropometrics.SegmentScaleFactors.Left.Finger4MCLength.WidthScale;

        AnyFloat Finger5LengthScale = .....Anthropometrics.SegmentScaleFactors.Left.Hand.LengthScale*0.292675/0.360913;
        AnyFloat Finger5DepthScale  = .....Anthropometrics.SegmentScaleFactors.Left.Finger5MCLength.DepthScale;
        AnyFloat Finger5WidthScale  = .....Anthropometrics.SegmentScaleFactors.Left.Finger5MCLength.WidthScale;

        AnyFunTransform3DLin ScaleFunction2 = {
          ScaleMat = {
            {.Finger2WidthScale, 0.0, 0.0}, // mediolateral width
            {0.0, .Finger2LengthScale, 0.0}, // long axis
            {0.0, 0.0, .Finger2DepthScale}   // depth
          };
          Offset = {0,0,0};
        };

        AnyFunTransform3DLin ScaleFunction3 = {
          ScaleMat = {
            {.Finger3WidthScale, 0.0, 0.0}, // mediolateral width
            {0.0, .Finger3LengthScale, 0.0}, // long axis
            {0.0, 0.0, .Finger3DepthScale}   // depth
          };
          Offset = {0,0,0};
        };


        AnyFunTransform3DLin ScaleFunction4 = {
          ScaleMat = {
            {.Finger4WidthScale, 0.0, 0.0}, // mediolateral width
            {0.0, .Finger4LengthScale, 0.0}, // long axis
            {0.0, 0.0, .Finger4DepthScale}   // depth
          };
          Offset = {0,0,0};
        };

        AnyFunTransform3DLin ScaleFunction5 = {
          ScaleMat = {
            {.Finger5WidthScale, 0.0, 0.0}, // mediolateral width
            {0.0, .Finger5LengthScale, 0.0}, // long axis
            {0.0, 0.0, .Finger5DepthScale}   // depth
          };
          Offset = {0,0,0};
        };
      };

      AnyFolder Finger_PP ={
        AnyFloat Finger2LengthScale = .....Anthropometrics.SegmentScaleFactors.Left.Hand.LengthScale*0.253760/0.280868;
        AnyFloat Finger2DepthScale  = .....Anthropometrics.SegmentScaleFactors.Left.Finger2PPLength.DepthScale;
        AnyFloat Finger2WidthScale  = .....Anthropometrics.SegmentScaleFactors.Left.Finger2PPLength.WidthScale;

        AnyFloat Finger3LengthScale = .....Anthropometrics.SegmentScaleFactors.Left.Hand.LengthScale*0.280868/0.280868;
        AnyFloat Finger3DepthScale  = .....Anthropometrics.SegmentScaleFactors.Left.Finger3PPLength.DepthScale;
        AnyFloat Finger3WidthScale  = .....Anthropometrics.SegmentScaleFactors.Left.Finger3PPLength.WidthScale;

        AnyFloat Finger4LengthScale = .....Anthropometrics.SegmentScaleFactors.Left.Hand.LengthScale;
        AnyFloat Finger4DepthScale  = .....Anthropometrics.SegmentScaleFactors.Left.Finger4PPLength.DepthScale*0.280868/0.280868;
        AnyFloat Finger4WidthScale  = .....Anthropometrics.SegmentScaleFactors.Left.Finger4PPLength.WidthScale;

        AnyFloat Finger5LengthScale = .....Anthropometrics.SegmentScaleFactors.Left.Hand.LengthScale*0.208756/0.280868;
        AnyFloat Finger5DepthScale  = .....Anthropometrics.SegmentScaleFactors.Left.Finger5PPLength.DepthScale;
        AnyFloat Finger5WidthScale  = .....Anthropometrics.SegmentScaleFactors.Left.Finger5PPLength.WidthScale;

        AnyFunTransform3DLin ScaleFunction2 = {
          ScaleMat = {
            {.Finger2WidthScale, 0.0, 0.0}, // mediolateral width
            {0.0, .Finger2LengthScale, 0.0}, // long axis
            {0.0, 0.0, .Finger2DepthScale}   // depth
          };
          Offset = {0,0,0};
        };

        AnyFunTransform3DLin ScaleFunction3 = {
          ScaleMat = {
            {.Finger3WidthScale, 0.0, 0.0}, // mediolateral width
            {0.0, .Finger3LengthScale, 0.0}, // long axis
            {0.0, 0.0, .Finger3DepthScale}   // depth
          };
          Offset = {0,0,0};
        };


        AnyFunTransform3DLin ScaleFunction4 = {
          ScaleMat = {
            {.Finger4WidthScale, 0.0, 0.0}, // mediolateral width
            {0.0, .Finger4LengthScale, 0.0}, // long axis
            {0.0, 0.0, .Finger4DepthScale}   // depth
          };
          Offset = {0,0,0};
        };

        AnyFunTransform3DLin ScaleFunction5 = {
          ScaleMat = {
            {.Finger5WidthScale, 0.0, 0.0}, // mediolateral width
            {0.0, .Finger5LengthScale, 0.0}, // long axis
            {0.0, 0.0, .Finger5DepthScale}   // depth
          };
          Offset = {0,0,0};
        };
      };


      AnyFolder Finger_MP ={
        AnyFloat Finger2LengthScale = .....Anthropometrics.SegmentScaleFactors.Left.Hand.LengthScale*0.159697/0.194885;
        AnyFloat Finger2DepthScale  = .....Anthropometrics.SegmentScaleFactors.Left.Finger2MPLength.DepthScale;
        AnyFloat Finger2WidthScale  = .....Anthropometrics.SegmentScaleFactors.Left.Finger2MPLength.WidthScale;

        AnyFloat Finger3LengthScale = .....Anthropometrics.SegmentScaleFactors.Left.Hand.LengthScale*0.194885/0.194885;
        AnyFloat Finger3DepthScale  = .....Anthropometrics.SegmentScaleFactors.Left.Finger3MPLength.DepthScale;
        AnyFloat Finger3WidthScale  = .....Anthropometrics.SegmentScaleFactors.Left.Finger3MPLength.WidthScale;

        AnyFloat Finger4LengthScale = .....Anthropometrics.SegmentScaleFactors.Left.Hand.LengthScale*0.185207/0.194885;
        AnyFloat Finger4DepthScale  = .....Anthropometrics.SegmentScaleFactors.Left.Finger4MPLength.DepthScale;
        AnyFloat Finger4WidthScale  = .....Anthropometrics.SegmentScaleFactors.Left.Finger4MPLength.WidthScale;

        AnyFloat Finger5LengthScale = .....Anthropometrics.SegmentScaleFactors.Left.Hand.LengthScale*0.129041/0.194885;
        AnyFloat Finger5DepthScale  = .....Anthropometrics.SegmentScaleFactors.Left.Finger5MPLength.DepthScale;
        AnyFloat Finger5WidthScale  = .....Anthropometrics.SegmentScaleFactors.Left.Finger5MPLength.WidthScale;

        AnyFunTransform3DLin ScaleFunction2 = {
          ScaleMat = {
            {.Finger2WidthScale, 0.0, 0.0}, // mediolateral width
            {0.0, .Finger2LengthScale, 0.0}, // long axis
            {0.0, 0.0, .Finger2DepthScale}   // depth
          };
          Offset = {0,0,0};
        };

        AnyFunTransform3DLin ScaleFunction3 = {
          ScaleMat = {
            {.Finger3WidthScale, 0.0, 0.0}, // mediolateral width
            {0.0, .Finger3LengthScale, 0.0}, // long axis
            {0.0, 0.0, .Finger3DepthScale}   // depth
          };
          Offset = {0,0,0};
        };


        AnyFunTransform3DLin ScaleFunction4 = {
          ScaleMat = {
            {.Finger4WidthScale, 0.0, 0.0}, // mediolateral width
            {0.0, .Finger4LengthScale, 0.0}, // long axis
            {0.0, 0.0, .Finger4DepthScale}   // depth
          };
          Offset = {0,0,0};
        };

        AnyFunTransform3DLin ScaleFunction5 = {
          ScaleMat = {
            {.Finger5WidthScale, 0.0, 0.0}, // mediolateral width
            {0.0, .Finger5LengthScale, 0.0}, // long axis
            {0.0, 0.0, .Finger5DepthScale}   // depth
          };
          Offset = {0,0,0};
        };
      };

      AnyFolder Finger_DP ={
        AnyFloat Finger2LengthScale = .....Anthropometrics.SegmentScaleFactors.Left.Hand.LengthScale*0.104295/0.111260;
        AnyFloat Finger2DepthScale  = .....Anthropometrics.SegmentScaleFactors.Left.Finger2DPLength.DepthScale;
        AnyFloat Finger2WidthScale  = .....Anthropometrics.SegmentScaleFactors.Left.Finger2DPLength.WidthScale;

        AnyFloat Finger3LengthScale = .....Anthropometrics.SegmentScaleFactors.Left.Hand.LengthScale*0.111260/0.111260;
        AnyFloat Finger3DepthScale  = .....Anthropometrics.SegmentScaleFactors.Left.Finger3DPLength.DepthScale;
        AnyFloat Finger3WidthScale  = .....Anthropometrics.SegmentScaleFactors.Left.Finger3DPLength.WidthScale;

        AnyFloat Finger4LengthScale = .....Anthropometrics.SegmentScaleFactors.Left.Hand.LengthScale*0.113941/0.111260;
        AnyFloat Finger4DepthScale  = .....Anthropometrics.SegmentScaleFactors.Left.Finger4DPLength.DepthScale;
        AnyFloat Finger4WidthScale  = .....Anthropometrics.SegmentScaleFactors.Left.Finger4DPLength.WidthScale;

        AnyFloat Finger5LengthScale = .....Anthropometrics.SegmentScaleFactors.Left.Hand.LengthScale*0.099599/0.111260;
        AnyFloat Finger5DepthScale  = .....Anthropometrics.SegmentScaleFactors.Left.Finger5DPLength.DepthScale;
        AnyFloat Finger5WidthScale  = .....Anthropometrics.SegmentScaleFactors.Left.Finger5DPLength.WidthScale;

        AnyFunTransform3DLin ScaleFunction2 = {
          ScaleMat = {
            {.Finger2WidthScale, 0.0, 0.0}, // mediolateral width
            {0.0, .Finger2LengthScale, 0.0}, // long axis
            {0.0, 0.0, .Finger2DepthScale}   // depth
          };
          Offset = {0,0,0};
        };

        AnyFunTransform3DLin ScaleFunction3 = {
          ScaleMat = {
            {.Finger3WidthScale, 0.0, 0.0}, // mediolateral width
            {0.0, .Finger3LengthScale, 0.0}, // long axis
            {0.0, 0.0, .Finger3DepthScale}   // depth
          };
          Offset = {0,0,0};
        };


        AnyFunTransform3DLin ScaleFunction4 = {
          ScaleMat = {
            {.Finger4WidthScale, 0.0, 0.0}, // mediolateral width
            {0.0, .Finger4LengthScale, 0.0}, // long axis
            {0.0, 0.0, .Finger4DepthScale}   // depth
          };
          Offset = {0,0,0};
        };

        AnyFunTransform3DLin ScaleFunction5 = {
          ScaleMat = {
            {.Finger5WidthScale, 0.0, 0.0}, // mediolateral width
            {0.0, .Finger5LengthScale, 0.0}, // long axis
            {0.0, 0.0, .Finger5DepthScale}   // depth
          };
          Offset = {0,0,0};
        };
      };
