AnyFolder Scaling = {

  #include "<ANYBODY_PATH_BODY>/BodyModels/GenericBodyModel/BodyModel.StandardParameters.any"

  AnyFolder MassScaling = {
    AnyFolder Pelvis = { AnyVar MassScale = ..AnthroDataSubjectRef.AnthroData.pelvis / ..StandardParameters.Pelvis.Mass; };
    AnyFolder Head = { AnyVar MassScale = (..AnthroDataSubjectRef.AnthroData.head) / (..StandardParameters.Head.Mass); };
    AnyFolder Cervical = { AnyVar MassScale = .Head.MassScale;};
    AnyFolder Trunk = { AnyVar MassScale = ( ..AnthroDataSubjectRef.AnthroData.thorax) / (..StandardParameters.Trunk.Mass  ); }; //Ratio of mass of thorax plus lumbar mass
    AnyFolder Lumbar = { AnyVar MassScale = (..AnthroDataSubjectRef.AnthroData.lumbar) / (..StandardParameters.Lumbar.Mass); };//Ratio of mass of lumbar mass
    AnyFolder Right =
    {
      AnyFolder Clavicula = { AnyVar MassScale = (...AnthroDataSubjectRef.AnthroData.clavicle_r ) / (...StandardParameters.Clavicula.Mass + ...StandardParameters.Scapula.Mass); };
      AnyFolder Scapula   = { AnyVar MassScale = (...AnthroDataSubjectRef.AnthroData.clavicle_r ) / (...StandardParameters.Clavicula.Mass + ...StandardParameters.Scapula.Mass); };
      AnyFolder Humerus   = { AnyVar MassScale = ...AnthroDataSubjectRef.AnthroData.upper_arm_r / ...StandardParameters.Humerus.Mass; };
      AnyFolder Ulna      = { AnyVar MassScale = ...AnthroDataSubjectRef.AnthroData.lower_arm_r / (2*...StandardParameters.Ulna.Mass); };
      AnyFolder Radius    = { AnyVar MassScale = ...AnthroDataSubjectRef.AnthroData.lower_arm_r / (2*...StandardParameters.Ulna.Mass);  };
      AnyFolder Hand      = { AnyVar MassScale = ...AnthroDataSubjectRef.AnthroData.hand_r / ...StandardParameters.Hand.Mass; };
	  AnyFolder Foot = { AnyVar MassScale = (...AnthroDataSubjectRef.AnthroData.Right.foot + ...AnthroDataSubjectRef.AnthroData.Right.ball) / ...StandardParameters.Right.Foot.Mass; };
      AnyFolder Talus = { AnyVar MassScale = ...AnthroDataSubjectRef.AnthroData.Right.talus / ...StandardParameters.Right.Talus.Mass; };
      AnyFolder Shank = { AnyVar MassScale = ...AnthroDataSubjectRef.AnthroData.Right.lower_leg / ...StandardParameters.Right.Shank.Mass; };
      AnyFolder Thigh = { AnyVar MassScale = ...AnthroDataSubjectRef.AnthroData.Right.thigh / ...StandardParameters.Right.Thigh.Mass; };
    };
    AnyFolder Left =
    {
      AnyFolder Clavicula = { AnyVar MassScale = (...AnthroDataSubjectRef.AnthroData.clavicle_l ) / (...StandardParameters.Clavicula.Mass + ...StandardParameters.Scapula.Mass); };
      AnyFolder Scapula   = { AnyVar MassScale = (...AnthroDataSubjectRef.AnthroData.clavicle_l ) / (...StandardParameters.Clavicula.Mass + ...StandardParameters.Scapula.Mass); };
      AnyFolder Humerus   = { AnyVar MassScale = ...AnthroDataSubjectRef.AnthroData.upper_arm_l / ...StandardParameters.Humerus.Mass; };
      AnyFolder Ulna      = { AnyVar MassScale = ...AnthroDataSubjectRef.AnthroData.lower_arm_l / (2*...StandardParameters.Ulna.Mass); };
      AnyFolder Radius    = { AnyVar MassScale = ...AnthroDataSubjectRef.AnthroData.lower_arm_l / (2*...StandardParameters.Ulna.Mass);  };
      AnyFolder Hand      = { AnyVar MassScale = ...AnthroDataSubjectRef.AnthroData.hand_l / ...StandardParameters.Hand.Mass; };

      AnyFolder Foot = { AnyVar MassScale = (...AnthroDataSubjectRef.AnthroData.Left.foot+ ...AnthroDataSubjectRef.AnthroData.Left.ball) / ...StandardParameters.Left.Foot.Mass; };
      AnyFolder Talus = { AnyVar MassScale = ...AnthroDataSubjectRef.AnthroData.Left.talus / ...StandardParameters.Left.Talus.Mass; };
      AnyFolder Shank = { AnyVar MassScale = ...AnthroDataSubjectRef.AnthroData.Left.lower_leg / ...StandardParameters.Left.Shank.Mass; };
      AnyFolder Thigh = { AnyVar MassScale = ...AnthroDataSubjectRef.AnthroData.Left.thigh / ...StandardParameters.Left.Thigh.Mass; };
    };
  };

  AnyFolder StrengthScaling = {
    AnyVar p = (2/3); //Power
    AnyFolder Pelvis = { AnyVar StrengthScale = (..AnthroDataSubjectRef.AnthroData.pelvis/ ..StandardParameters.Pelvis.Mass)^.p; };
    AnyFolder Spine = { AnyVar StrengthScale = ((..AnthroDataSubjectRef.AnthroData.thorax + ..AnthroDataSubjectRef.AnthroData.lumbar) / (..StandardParameters.Trunk.Mass + ..StandardParameters.Lumbar.Mass))^.p; };

    AnyFolder Right =
    {
      AnyFolder Humerus = { AnyVar StrengthScale = (...AnthroDataSubjectRef.AnthroData.upper_arm_r /    ...StandardParameters.Humerus.Mass)^..p; };
      AnyFolder Ulna    = { AnyVar StrengthScale = (...AnthroDataSubjectRef.AnthroData.lower_arm_r / (2*...StandardParameters.Ulna.Mass) )^..p; };
      AnyFolder Hand    = { AnyVar StrengthScale = (...AnthroDataSubjectRef.AnthroData.hand_r      /    ...StandardParameters.Hand.Mass)^..p; };
      AnyFolder Shank = { AnyVar StrengthScale = (...AnthroDataSubjectRef.AnthroData.Right.lower_leg/ ...StandardParameters.Right.Shank.Mass)^..p; };
      AnyFolder Thigh = { AnyVar StrengthScale = (...AnthroDataSubjectRef.AnthroData.Right.thigh/ ...StandardParameters.Right.Thigh.Mass)^..p; };
      AnyFolder Foot =  { AnyVar StrengthScale = (...AnthroDataSubjectRef.AnthroData.Right.foot/ ...StandardParameters.Right.Foot.Mass)^..p; };
    };
    AnyFolder Left =
    {
      AnyFolder Humerus = { AnyVar StrengthScale = (...AnthroDataSubjectRef.AnthroData.upper_arm_l /    ...StandardParameters.Humerus.Mass)^..p; };
      AnyFolder Ulna    = { AnyVar StrengthScale = (...AnthroDataSubjectRef.AnthroData.lower_arm_l / (2*...StandardParameters.Ulna.Mass) )^..p; };
      AnyFolder Hand    = { AnyVar StrengthScale = (...AnthroDataSubjectRef.AnthroData.hand_l      /    ...StandardParameters.Hand.Mass)^..p; };
      AnyFolder Shank = { AnyVar StrengthScale = (...AnthroDataSubjectRef.AnthroData.Left.lower_leg/ ...StandardParameters.Left.Shank.Mass)^..p; };
      AnyFolder Thigh = { AnyVar StrengthScale = (...AnthroDataSubjectRef.AnthroData.Left.thigh/ ...StandardParameters.Left.Thigh.Mass)^..p; };
      AnyFolder Foot =  { AnyVar StrengthScale = (...AnthroDataSubjectRef.AnthroData.Left.foot/ ...StandardParameters.Left.Foot.Mass)^..p; };
    };
  };

  AnyFolder FiberLengthScaling = {
    AnyFolder Pelvis = { AnyVar FiberLengthScale = ..AnthroDataSubjectRef.AnthroSegmentLengths.PelvisWidth / ..StandardParameters.Pelvis.Width; };
    AnyFolder Right =
    {
      AnyFolder Shank = { AnyVar FiberLengthScale  = ...AnthroDataSubjectRef.AnthroSegmentLengths.Right.ShankLength / ...StandardParameters.Right.Shank.Length; };
      AnyFolder Thigh = { AnyVar FiberLengthScale  = ...AnthroDataSubjectRef.AnthroSegmentLengths.Right.ThighLength / ...StandardParameters.Right.Thigh.Length; };
      AnyFolder Foot = { AnyVar FiberLengthScale  = ...AnthroDataSubjectRef.AnthroSegmentLengths.Right.FootLength / ...StandardParameters.Right.Foot.Length; };
    };
    AnyFolder Left =
    {
      AnyFolder Shank = { AnyVar FiberLengthScale  = ...AnthroDataSubjectRef.AnthroSegmentLengths.Left.ShankLength / ...StandardParameters.Left.Shank.Length; };
      AnyFolder Thigh = { AnyVar FiberLengthScale  = ...AnthroDataSubjectRef.AnthroSegmentLengths.Left.ThighLength / ...StandardParameters.Left.Thigh.Length; };
      AnyFolder Foot = { AnyVar FiberLengthScale  = ...AnthroDataSubjectRef.AnthroSegmentLengths.Left.FootLength / ...StandardParameters.Left.Foot.Length; };
    };
  };

  AnyFolder GeometricalScaling = {

    AnyFolder Right ={

      AnyFolder Clavicula = {
        AnyFunTransform3DLin ScaleFunction = {
          AnyMat33 ARel= {      {-0.280836,  0.188095, -0.941144},      {-0.004752,  0.980323, 0.197343},       { 0.959744, 0.059893,  -0.274416}}';
          ScaleMat = ARel*...Trunk.ScaleFunction.ScaleMat*(ARel');
          Offset = {0,0,0}*ARel';
        };
      };

      AnyFolder Scapula = {
        AnyFunTransform3DLin ScaleFunction = {
          AnyMat33 ARel ={{0.561294, -0.097357, -0.821870},    {0.151325, 0.988389, -0.013736},    {0.813664, -0.116660, 0.569509}}';
          ScaleMat = ARel*...Trunk.ScaleFunction.ScaleMat*(ARel');
          Offset = {0,0,0}*ARel';
        };
      };

      AnyFolder Humerus = {
        AnyVar GeomScale = (...AnthroDataSubjectRef.AnthroSegmentLengths.UpperArmLength / ...StandardParameters.Humerus.Length);
        AnyFunTransform3DLin ScaleFunction = {
          ScaleMat ={{.GeomScale,0,0},{0,.GeomScale,0},{0,0,.GeomScale}};
          Offset = {0,0,0};
        };
      };

      AnyFolder Ulna = {
        AnyVar GeomScale = (...AnthroDataSubjectRef.AnthroSegmentLengths.LowerArmLength / ...StandardParameters.Ulna.Length);
        AnyFunTransform3DLin ScaleFunction = {
          ScaleMat ={{.GeomScale,0,0},{0,.GeomScale,0},{0,0,.GeomScale}};
          Offset = {0,0,0};
        };
      };

      AnyFolder Radius = {
        AnyFunTransform3DLin ScaleFunction = {
          //This Arel is used for mapping the scaling of ulna into the radius coordinate system
          //which is rotated, Arel has been found for a neutral position
          AnyMat33 ARel = {{-0.145873, -0.989303, -0.000001}, {0.989303, -0.145873, 0.000001}, {-0.000001, -0.000000, 1.000000}};
          AnyMat33 ScaleXYZ = ..Ulna.ScaleFunction.ScaleMat;
          ScaleMat = ARel'*ScaleXYZ*ARel;
          Offset = {0,0,0}*ARel;      };
      };

      AnyFolder Hand = {
        AnyVar HandLength = ...AnthroDataSubjectRef.AnthroSegmentLengths.HandLength;
        AnyVar HandBreadth = ...AnthroDataSubjectRef.AnthroSegmentLengths.HandBreadth;
        AnyFunTransform3DLin ScaleFunction = {
          AnyVar BreadthScale = .HandBreadth/....StandardParameters.Hand.HandBreadth;
          AnyVar LengthScale =  .HandLength/....StandardParameters.Hand.HandLength;

          ScaleMat ={{LengthScale,0,0},{0,BreadthScale,0},{0,0,BreadthScale}};

          Offset = {0,0,0};
        };
      };

      AnyFolder Foot  = {
        AnyVar GeomScale = (...AnthroDataSubjectRef.AnthroSegmentLengths.Right.FootLength / ...StandardParameters.Right.Foot.Length);
        AnyFunTransform3DLin ScaleFunction = {

          ScaleMat ={{.GeomScale,0,0},{0,.GeomScale,0},{0,0,.GeomScale}};
          Offset = {0,0,0};
        };
      };
      // Talus segment will use the GeometricalScalfing function of the Foot segment, not the following one.
      AnyFolder Talus  = {
        AnyFunTransform3DLin ScaleFunction = {
          ScaleMat =..Foot.ScaleFunction.ScaleMat;
          Offset = {0,0,0};
        };
      };


      AnyFolder Shank = {
        AnyVar GeomScale = (...AnthroDataSubjectRef.AnthroSegmentLengths.Right.ShankLength / ...StandardParameters.Right.Shank.Length);
        AnyFunTransform3DLin ScaleFunction = {
          ScaleMat ={{.GeomScale,0,0},{0,.GeomScale,0},{0,0,.GeomScale}};
          Offset = {0,0,0};
        };
      };

      AnyFolder Thigh = {
        AnyVar GeomScale = (...AnthroDataSubjectRef.AnthroSegmentLengths.Right.ThighLength / ...StandardParameters.Right.Thigh.Length);
        AnyFunTransform3DLin ScaleFunction = {
          ScaleMat ={{.GeomScale,0,0},{0,.GeomScale,0},{0,0,.GeomScale}};
          Offset = {0,0,0};
        };
      };

      AnyFolder Patella = {
        AnyFunTransform3D &ScaleFunction = .Thigh.ScaleFunction;
      };

    };//Right
    AnyFolder Left ={

      AnyFolder Clavicula = {
        AnyFunTransform3DLin ScaleFunction = {
          AnyMat33 ARel= {      {-0.280836,  0.188095, -0.941144},      {-0.004752,  0.980323, 0.197343},       { 0.959744, 0.059893,  -0.274416}}';
          ScaleMat = ARel*...Trunk.ScaleFunction.ScaleMat*(ARel');
          Offset = {0,0,0}*ARel';
        };
      };

      AnyFolder Scapula = {
        AnyFunTransform3DLin ScaleFunction = {
          AnyMat33 ARel ={{0.561294, -0.097357, -0.821870},    {0.151325, 0.988389, -0.013736},    {0.813664, -0.116660, 0.569509}}';
          ScaleMat = ARel*...Trunk.ScaleFunction.ScaleMat*(ARel');
          Offset = {0,0,0}*ARel';
        };
      };

      AnyFolder Humerus = {
        AnyVar GeomScale = (...AnthroDataSubjectRef.AnthroSegmentLengths.UpperArmLength / ...StandardParameters.Humerus.Length);
        AnyFunTransform3DLin ScaleFunction = {
          ScaleMat ={{.GeomScale,0,0},{0,.GeomScale,0},{0,0,.GeomScale}};
          Offset = {0,0,0};
        };
      };

      AnyFolder Ulna = {
        AnyVar GeomScale = (...AnthroDataSubjectRef.AnthroSegmentLengths.LowerArmLength / ...StandardParameters.Ulna.Length);
        AnyFunTransform3DLin ScaleFunction = {
          ScaleMat ={{.GeomScale,0,0},{0,.GeomScale,0},{0,0,.GeomScale}};
          Offset = {0,0,0};
        };
      };

      AnyFolder Radius = {
        AnyFunTransform3DLin ScaleFunction = {
          //This Arel is used for mapping the scaling of ulna into the radius coordinate system
          //which is rotated, Arel has been found for a neutral position
          AnyMat33 ARel = {{-0.145873, -0.989303, -0.000001}, {0.989303, -0.145873, 0.000001}, {-0.000001, -0.000000, 1.000000}};
          AnyMat33 ScaleXYZ = ..Ulna.ScaleFunction.ScaleMat;
          ScaleMat = ARel'*ScaleXYZ*ARel;
          Offset = {0,0,0}*ARel;      };
      };

      AnyFolder Hand = {
        AnyVar HandLength = ...AnthroDataSubjectRef.AnthroSegmentLengths.HandLength;
        AnyVar HandBreadth = ...AnthroDataSubjectRef.AnthroSegmentLengths.HandBreadth;
        AnyFunTransform3DLin ScaleFunction = {
          AnyVar BreadthScale = .HandBreadth/....StandardParameters.Hand.HandBreadth;
          AnyVar LengthScale =  .HandLength/....StandardParameters.Hand.HandLength;

          ScaleMat ={{LengthScale,0,0},{0,BreadthScale,0},{0,0,BreadthScale}};

          Offset = {0,0,0};
        };
      };


      AnyFolder Foot  = {
        AnyVar    GeomScale = (...AnthroDataSubjectRef.AnthroSegmentLengths.Left.FootLength / ...StandardParameters.Left.Foot.Length);
        AnyFunTransform3DLin ScaleFunction = {
          ScaleMat ={{.GeomScale,0,0},{0,.GeomScale,0},{0,0,.GeomScale}};
          Offset = {0,0,0};
        };
      };
      // Talus segment will use the GeometricalScalfing function of the Foot segment, not the following one.
      AnyFolder Talus  = {
        AnyFunTransform3DLin ScaleFunction = {
          ScaleMat =..Foot.ScaleFunction.ScaleMat;
          Offset = {0,0,0};
        };
      };


      AnyFolder Shank = {
        AnyVar GeomScale = (...AnthroDataSubjectRef.AnthroSegmentLengths.Left.ShankLength / ...StandardParameters.Left.Shank.Length);
        AnyFunTransform3DLin ScaleFunction = {
          ScaleMat ={{.GeomScale,0,0},{0,.GeomScale,0},{0,0,.GeomScale}};
          Offset = {0,0,0};
        };
      };

      AnyFolder Thigh = {
        AnyVar GeomScale = (...AnthroDataSubjectRef.AnthroSegmentLengths.Left.ThighLength / ...StandardParameters.Left.Thigh.Length);
        AnyFunTransform3DLin ScaleFunction = {
          ScaleMat ={{.GeomScale,0,0},{0,.GeomScale,0},{0,0,.GeomScale}};
          Offset = {0,0,0};
        };
      };

      AnyFolder Patella = {
        AnyFunTransform3D &ScaleFunction = .Thigh.ScaleFunction;
      };

    };//Left

    // Common law for the upper body
    // *****************************

    AnyFolder Pelvis = {
      AnyVar GeomScale = (..AnthroDataSubjectRef.AnthroSegmentLengths.PelvisWidth / ..StandardParameters.Pelvis.Width);
      AnyFunTransform3DLin ScaleFunction = {
        ScaleMat ={{.GeomScale,0,0},{0,.GeomScale,0},{0,0,.GeomScale}};
        Offset = {0,0,0};
      };
    };

    AnyFolder Trunk = {
      AnyVar GeomScale = (..AnthroDataSubjectRef.AnthroSegmentLengths.TrunkHeight / ..StandardParameters.Trunk.Height);
      AnyFunTransform3DLin ScaleFunction = {
        ScaleMat ={{.GeomScale,0,0},{0,.GeomScale,0},{0,0,.GeomScale}};
        Offset = {0,0,0};
      };
    };

    AnyFolder Head = {
      AnyVar GeomScale = (..AnthroDataSubjectRef.AnthroSegmentLengths.HeadHeight / ..StandardParameters.Head.Height);
      AnyFunTransform3DLin ScaleFunction = {
        ScaleMat ={{.GeomScale,0,0},{0,.GeomScale,0},{0,0,.GeomScale}};
        Offset = {0,0,0};
      };
    };


    AnyFolder Cervical = {
      AnyFunTransform3DLin &ScaleFunction = .Head.ScaleFunction;
    };

    AnyFolder Lumbar = {
      AnyVar GeomScale = (..AnthroDataSubjectRef.AnthroSegmentLengths.TrunkHeight / ..StandardParameters.Trunk.Height);
      AnyFunTransform3DLin ScaleFunction = {
        ScaleMat ={{.GeomScale,0,0},{0,.GeomScale,0},{0,0,.GeomScale}};
        Offset = {0,0,0};
      };
    };

    AnyFolder &PelvisSeg = Pelvis;
    AnyFolder &SkullSeg = Head;
    AnyFolder &ThoraxSeg = Trunk;

    AnyFolder &C1Seg = Cervical;
    AnyFolder &C2Seg = Cervical;
    AnyFolder &C3Seg = Cervical;
    AnyFolder &C4Seg = Cervical;
    AnyFolder &C5Seg = Cervical;
    AnyFolder &C6Seg = Cervical;
    AnyFolder &C7Seg = Cervical;

    AnyFolder &L1Seg = Lumbar;
    AnyFolder &L2Seg = Lumbar;
    AnyFolder &L3Seg = Lumbar;
    AnyFolder &L4Seg = Lumbar;
    AnyFolder &L5Seg = Lumbar;
    AnyFolder &SacrumSeg = PelvisSeg;

  };

};
