AnyDrawLine DimensionLine = {
  AnyRefFrame &ref1 = .refframe1;
  DirAxis=.DirAxis;
  p0 = {0,0,0};
  p1 = (.refframe2.r - .refframe1.r);
  Offset = .Offset;
  Text = .Text;
  GlobalCoord = On;
  Line.RGB = .RGB;
  Line.Thickness =.Thickness;
  TextFont.Width = 12;
  TextFont.Height = 24;
};
