  AnyRefNode P101 = {sRel = {.ra,0,0};};
  AnyRefNode P102 = {sRel ={cos(10/180*pi)*.ra,0,sin(10/180*pi)*.ra};};
  AnyRefNode P103 = {sRel ={cos(20/180*pi)*.ra,0,sin(20/180*pi)*.ra};};
  AnyRefNode P104 = {sRel ={cos(30/180*pi)*.ra,0,sin(30/180*pi)*.ra};};
  AnyRefNode P105 = {sRel ={cos(40/180*pi)*.ra,0,sin(40/180*pi)*.ra};};
  AnyRefNode P106 = {sRel ={cos(50/180*pi)*.ra,0,sin(50/180*pi)*.ra};};
  AnyRefNode P107 = {sRel ={cos(60/180*pi)*.ra,0,sin(60/180*pi)*.ra};};
  AnyRefNode P108 = {sRel ={cos(70/180*pi)*.ra,0,sin(70/180*pi)*.ra};};
  AnyRefNode P109 = {sRel ={cos(80/180*pi)*.ra,0,sin(80/180*pi)*.ra};};
  AnyRefNode P110 = {sRel ={cos(90/180*pi)*.ra,0,sin(90/180*pi)*.ra};};

  AnyRefNode P111 = {sRel ={-cos(90/180*pi)*.ra,0,sin(90/180*pi)*.ra};};
  AnyRefNode P112 = {sRel ={-cos(80/180*pi)*.ra,0,sin(80/180*pi)*.ra};};
  AnyRefNode P113 = {sRel ={-cos(70/180*pi)*.ra,0,sin(70/180*pi)*.ra};};
  AnyRefNode P114 = {sRel ={-cos(60/180*pi)*.ra,0,sin(60/180*pi)*.ra};};
  AnyRefNode P115 = {sRel ={-cos(50/180*pi)*.ra,0,sin(50/180*pi)*.ra};};
  AnyRefNode P116 = {sRel ={-cos(40/180*pi)*.ra,0,sin(40/180*pi)*.ra};};
  AnyRefNode P117 = {sRel ={-cos(30/180*pi)*.ra,0,sin(30/180*pi)*.ra};};
  AnyRefNode P118 = {sRel ={-cos(20/180*pi)*.ra,0,sin(20/180*pi)*.ra};};
  AnyRefNode P119 = {sRel ={-cos(10/180*pi)*.ra,0,sin(10/180*pi)*.ra};};
  AnyRefNode P120 = {sRel = {-.ra,0,0};};

  AnyRefNode P121 = {sRel = {-.ra,0,0};};
  AnyRefNode P122 = {sRel ={-cos(10/180*pi)*.ra,0,-sin(10/180*pi)*.ra};};
  AnyRefNode P123 = {sRel ={-cos(20/180*pi)*.ra,0,-sin(20/180*pi)*.ra};};
  AnyRefNode P124 = {sRel ={-cos(30/180*pi)*.ra,0,-sin(30/180*pi)*.ra};};
  AnyRefNode P125 = {sRel ={-cos(40/180*pi)*.ra,0,-sin(40/180*pi)*.ra};};
  AnyRefNode P126 = {sRel ={-cos(50/180*pi)*.ra,0,-sin(50/180*pi)*.ra};};
  AnyRefNode P127 = {sRel ={-cos(60/180*pi)*.ra,0,-sin(60/180*pi)*.ra};};
  AnyRefNode P128 = {sRel ={-cos(70/180*pi)*.ra,0,-sin(70/180*pi)*.ra};};
  AnyRefNode P129 = {sRel ={-cos(80/180*pi)*.ra,0,-sin(80/180*pi)*.ra};};
  AnyRefNode P130 = {sRel ={-cos(90/180*pi)*.ra,0,-sin(90/180*pi)*.ra};};

  AnyRefNode P131 = {sRel ={cos(90/180*pi)*.ra,0,-sin(90/180*pi)*.ra};};
  AnyRefNode P132 = {sRel ={cos(80/180*pi)*.ra,0,-sin(80/180*pi)*.ra};};
  AnyRefNode P133 = {sRel ={cos(70/180*pi)*.ra,0,-sin(70/180*pi)*.ra};};
  AnyRefNode P134 = {sRel ={cos(60/180*pi)*.ra,0,-sin(60/180*pi)*.ra};};
  AnyRefNode P135 = {sRel ={cos(50/180*pi)*.ra,0,-sin(50/180*pi)*.ra};};
  AnyRefNode P136 = {sRel ={cos(40/180*pi)*.ra,0,-sin(40/180*pi)*.ra};};
  AnyRefNode P137 = {sRel ={cos(30/180*pi)*.ra,0,-sin(30/180*pi)*.ra};};
  AnyRefNode P138 = {sRel ={cos(20/180*pi)*.ra,0,-sin(20/180*pi)*.ra};};
  AnyRefNode P139 = {sRel ={cos(10/180*pi)*.ra,0,-sin(10/180*pi)*.ra};};
  AnyRefNode P140 = {sRel = {.ra,0,0};};

  AnyDrawPLine drw =
  {
    Thickness = .th;
    RGB = {0,0,1};
  };
