// Define ellipsoid's raduis, sRel, and ARel based on center points of insertion nodes
AnyFloat Rxy ??= vnorm( (DiaphNode.sRel - SegNode.sRel) )/2.5;
AnyFloat Rz = Rxy*3;
AnyFloat DistanceRatio ??= 0.2;
AnyFloat AdjustorDirection ??= {0,1,0};
Radius = {Rxy, Rxy, Rz};
AnyMatrix RotMatrix = RotMat(SegNode.sRel, .DomeNodeLateral6.sRel, (.DomeNodeLateral6.ARel*{0,-0.01,0}')'+.DomeNodeLateral6.sRel);
sRel ??= (DiaphNode.sRel + SegNode.sRel)/2 + Rxy*DistanceRatio * (RotMatrix*(AdjustorDirection/vnorm(AdjustorDirection))')';
ARel ??= RotMatrix;
//viewSurface = {Visible = On; Opacity = 0.1; RGB = {0.5, 0.1, 0.1}; Transparency = 0.3; };
