AnyRefNode Translate ={

  AnyVec3 a ??= {0,0,0};
  AnyVec3 b ??= {0,0,0};
  AnyVar Sign ??=1;

  AnyVar a_dot_b = a[0]*b[0]+a[1]*b[1]+a[2]*b[2];
  AnyVar Angle =acos(a_dot_b/(vnorm(a)*vnorm(b)));
  AnyVar MinL=min({vnorm(a),vnorm(b)});
  AnyVar radius= iffun(eqfun(Angle,0.0),MinL,...Factor/(Angle+0.00001));
  AnyVar Radius = min({MinL,radius})*...Factor2;
  AnyVec3 a_normal=  {a[2],0,-a[0]}/vnorm(a);
  AnyVec3 b_normal=  {b[2],0,-b[0]}/vnorm(b);
  AnyVec3 Average_normal= (a_normal*vnorm(a) +b_normal*vnorm(b))/(vnorm(a)+vnorm(b));

  ARel=RotMat(.sRel,.sRel+ Average_normal,.sRel+{0,1,0})*RotMat(-pi*0.5,y)*RotMat(0.5*(1-Sign)*pi,y);

  MACRO_MOTION_OUTPUT_OFF;

  AnySurfCylinder InwardCyl = {
    sRel = {0,-0.5*Length,-Radius*(2-....Shrink)} * RotMat(.Sign*pi*0.25,z)';
    ARel = RotMat(.Sign*pi*0.25,z) * RotMat(-pi*0.5,x);
    Length = 0.12;
    Radius = .Radius;
    AnyVar radius = .Radius;
    CapRatio = 1.5;
    CapRatio2 = 1.5;
    MACRO_MOTION_OUTPUT_OFF;
  };
  AnySurfCylinder OutwardCyl = {
    sRel = {0,-0.5*Length,-Radius*(2-....Shrink)} * RotMat(.Sign*-pi*0.25,z)';
    ARel = RotMat(.Sign*-pi*0.25,z) * RotMat(-pi*0.5,x);
    Length = 0.12;
    Radius = .Radius;
    AnyVar radius = .Radius;
    CapRatio = 1.5;
    CapRatio2 = 1.5;
    MACRO_MOTION_OUTPUT_OFF;
   };
//
  AnySurfCylinder VerticalCyl = {
    sRel = {0,-0.5*Length,-Radius*(2-....Shrink)};
    ARel = RotMat(-pi*0.5,x);
    Length = 0.17;
    Radius = .Radius;
    AnyVar radius = .Radius;
    CapRatio = 1.5;
    CapRatio2 = 1.5;
    MACRO_MOTION_OUTPUT_OFF;
  };

  AnySurfCylinder HorizontalCyl = {
    sRel = {0,-0.5*Length,-Radius*(2-....Shrink)} * RotMat(-pi*0.5,z)';
    ARel = RotMat(-pi*0.5,z) * RotMat(-pi*0.5,x);
    Length = 0.12;
    Radius = .Radius;
    AnyVar radius = .Radius;
    CapRatio = 1.5;
    CapRatio2 = 1.5;
    MACRO_MOTION_OUTPUT_OFF;
  };
};
