AnyFolder ShowCoP ={
  AnyFolder Up_layer ={
    AnyVar fx = ..up_layer.Flocal[0]; AnyVar fy = ..up_layer.Flocal[1]; AnyVar fz = ..up_layer.Flocal[2];
    AnyVar mx = ..up_layer.Mlocal[0]; AnyVar my = ..up_layer.Mlocal[1]; AnyVar mz = ..up_layer.Mlocal[2];
    AnyVar fyy =iffun(gtfun(abs(fy),0),fy,fy+1000000);  //avoid zero division
    AnyVar Vx= mz/fyy;    AnyVar Vz= -mx/fyy;    AnyVar Vy= 0;
    AnyRefFrame& ref_layer = ..up_layer.ref;

    AnyFixedRefFrame Global = {
      AnyDrawSphere COP_ball_global = {
        Visible =Off;   RGB = .....RGB_up;
        Position = ..ref_layer.r+{..Vx,..Vy,..Vz} * ..ref_layer.Axes';
        ScaleXYZ = 0.005 * {1,1,1};
        GlobalCoord = On;
      };
    };
  };

  AnyFolder Down_layer ={
    AnyVar fx = ..down_layer.Flocal[0]; AnyVar fy = ..down_layer.Flocal[1]; AnyVar fz = ..down_layer.Flocal[2];
    AnyVar mx = ..down_layer.Mlocal[0]; AnyVar my = ..down_layer.Mlocal[1]; AnyVar mz = ..down_layer.Mlocal[2];
    AnyVar fyy =iffun(gtfun(abs(fy),0),fy,fy+1000000);//avoid zero division
    AnyVar Vx= mz/fyy;    AnyVar Vz= -mx/fyy;    AnyVar Vy= 0;
    AnyRefFrame& ref_layer = ..down_layer.ref;

    AnyFixedRefFrame Global ={
      AnyDrawSphere COP_ball_global = {
        Visible =Off;
        RGB = .....RGB_up;
        Position = ..ref_layer.r+{..Vx,..Vy,..Vz}*..ref_layer.Axes';
        ScaleXYZ = 0.005 *{1,1,1};
        GlobalCoord = On;
      };
    };
  };

  AnyFolder Up_slider ={
    AnyVar fx = ..up_slider.Flocal[0]; AnyVar fy = ..up_slider.Flocal[1]; AnyVar fz = ..up_slider.Flocal[2];
    AnyVar mx = ..up_slider.Mlocal[0]; AnyVar my = ..up_slider.Mlocal[1]; AnyVar mz = ..up_slider.Mlocal[2];
    AnyVar fyy =iffun(gtfun(abs(fy),0),fy,fy+1000000);
    AnyVar Vx= mz/fyy;    AnyVar Vz= -mx/fyy;    AnyVar Vy= 0;
    AnyRefFrame& ref_layer = ..up_slider.ref;

    AnyFixedRefFrame Global ={
      AnyDrawSphere COP_ball_global = {
        Visible =Off;
        RGB = .....RGB_up;
        Position = ..ref_layer.r+{..Vx,..Vy,..Vz}*..ref_layer.Axes';
        ScaleXYZ = 0.005 *{1,1,1};
        GlobalCoord = On;
      };
    };
  };

  AnyFolder Down_slider ={
    AnyVar fx = ..down_slider.Flocal[0]; AnyVar fy = ..down_slider.Flocal[1]; AnyVar fz = ..down_slider.Flocal[2];
    AnyVar mx = ..down_slider.Mlocal[0]; AnyVar my = ..down_slider.Mlocal[1]; AnyVar mz = ..down_slider.Mlocal[2];
    AnyVar fyy =iffun(gtfun(abs(fy),0),fy,fy+1000000);
    AnyVar Vx= mz/fyy;    AnyVar Vz= -mx/fyy;    AnyVar Vy= 0;
    AnyRefFrame& ref_layer = ..down_slider.ref;

    AnyFixedRefFrame Global ={
      AnyDrawSphere COP_ball_global = {
        Visible =Off;    RGB = .....RGB_up;
        Position = ..ref_layer.r+{..Vx,..Vy,..Vz}*..ref_layer.Axes';
        ScaleXYZ = 0.005 *{1,1,1};
        GlobalCoord = On;
      };
    };
  };

  AnyFolder Up_layer_cavity ={
    AnyVar fx = ..up_layer_cavity.Flocal[0]; AnyVar fy = ..up_layer_cavity.Flocal[1]; AnyVar fz = ..up_layer_cavity.Flocal[2];
    AnyVar mx = ..up_layer_cavity.Mlocal[0]; AnyVar my = ..up_layer_cavity.Mlocal[1]; AnyVar mz = ..up_layer_cavity.Mlocal[2];
    AnyVar fyy =iffun(gtfun(abs(fy),0),fy,fy+1000000);  //avoid zero division
    AnyVar Vx= mz/fyy;    AnyVar Vz= -mx/fyy;    AnyVar Vy= 0;
    AnyRefFrame& ref_layer = ..up_layer.ref;

    AnyFixedRefFrame Global ={
      AnyDrawSphere COP_ball_global = {
        Visible =Off;   RGB = .....RGB_up;
        Position = ..ref_layer.r+{..Vx,..Vy,..Vz}*..ref_layer.Axes';
        ScaleXYZ = 0.005 *{1,1,1};
        GlobalCoord = On;
      };
    };
  };

  AnyFolder Down_layer_cavity ={
    AnyVar fx = ..down_layer_cavity.Flocal[0]; AnyVar fy = ..down_layer_cavity.Flocal[1]; AnyVar fz = ..down_layer_cavity.Flocal[2];
    AnyVar mx = ..down_layer_cavity.Mlocal[0]; AnyVar my = ..down_layer_cavity.Mlocal[1]; AnyVar mz = ..down_layer_cavity.Mlocal[2];
    AnyVar fyy =iffun(gtfun(abs(fy),0),fy,fy+1000000);//avoid zero division
    AnyVar Vx= mz/fyy;    AnyVar Vz= -mx/fyy;    AnyVar Vy= 0;
    AnyRefFrame& ref_layer = ..down_layer.ref;

    AnyFixedRefFrame Global ={
      AnyDrawSphere COP_ball_global = {
        Visible =Off;
        RGB = .....RGB_up;
        Position = ..ref_layer.r+{..Vx,..Vy,..Vz}*..ref_layer.Axes';
        ScaleXYZ = 0.005 *{1,1,1};
        GlobalCoord = On;
      };
    };
  };

  AnyFolder Up_slider_cavity ={
    AnyVar fx = ..up_slider_cavity.Flocal[0]; AnyVar fy = ..up_slider_cavity.Flocal[1]; AnyVar fz = ..up_slider_cavity.Flocal[2];
    AnyVar mx = ..up_slider_cavity.Mlocal[0]; AnyVar my = ..up_slider_cavity.Mlocal[1]; AnyVar mz = ..up_slider_cavity.Mlocal[2];
    AnyVar fyy =iffun(gtfun(abs(fy),0),fy,fy+1000000);
    AnyVar Vx= mz/fyy;    AnyVar Vz= -mx/fyy;    AnyVar Vy= 0;
    AnyRefFrame& ref_layer = ..up_slider.ref;

    AnyFixedRefFrame Global ={
      AnyDrawSphere COP_ball_global = {
        Visible =Off;
        RGB = .....RGB_up;
        Position = ..ref_layer.r+{..Vx,..Vy,..Vz}*..ref_layer.Axes';
        ScaleXYZ = 0.005 *{1,1,1};
        GlobalCoord = On;
      };
    };
  };

  AnyFolder Down_slider_cavity ={
    AnyVar fx = ..down_slider_cavity.Flocal[0]; AnyVar fy = ..down_slider_cavity.Flocal[1]; AnyVar fz = ..down_slider_cavity.Flocal[2];
    AnyVar mx = ..down_slider_cavity.Mlocal[0]; AnyVar my = ..down_slider_cavity.Mlocal[1]; AnyVar mz = ..down_slider_cavity.Mlocal[2];
    AnyVar fyy =iffun(gtfun(abs(fy),0),fy,fy+1000000);
    AnyVar Vx= mz/fyy;    AnyVar Vz= -mx/fyy;    AnyVar Vy= 0;
    AnyRefFrame& ref_layer = ..down_slider.ref;

    AnyFixedRefFrame Global ={
      AnyDrawSphere COP_ball_global = {
        Visible =Off;    RGB = .....RGB_up;
        Position = ..ref_layer.r+{..Vx,..Vy,..Vz}*..ref_layer.Axes';
        ScaleXYZ = 0.005 *{1,1,1};
        GlobalCoord = On;
      };
    };
  };

  AnyFixedRefFrame Global_down ={
    AnyDrawSphere COP_Both = {
      RGB = {0,1,0};
      AnyVar Fy1=..Down_slider.fyy;
      AnyVar Fy2=..Down_layer.fyy;
      AnyVar Fy3=..Down_slider_cavity.fyy;
      AnyVar Fy4=..Down_layer_cavity.fyy;
      AnyVar FyTotal =  Fy1 + Fy2 + Fy3 + Fy4;
      GlobalCoord = On;
      Position =
      (Fy1/FyTotal) * ..Down_slider.Global.COP_ball_global.Position+
      (Fy2/FyTotal) * ..Down_layer.Global.COP_ball_global.Position+
      (Fy3/FyTotal) * ..Down_slider_cavity.Global.COP_ball_global.Position+
      (Fy4/FyTotal) * ..Down_layer_cavity.Global.COP_ball_global.Position;
      ScaleXYZ = 0.0075 *{1,1,1};
    };
  };

  AnyFixedRefFrame Global_up ={
    AnyDrawSphere COP_Both = {
      RGB = {0,0,1};
      AnyVar Fy1 = ..Up_slider.fyy;
      AnyVar Fy2 = ..Up_layer.fyy;
      AnyVar Fy3 = ..Up_slider_cavity.fyy;
      AnyVar Fy4 = ..Up_layer_cavity.fyy;

      AnyVar FyTotal =  Fy1 + Fy2 + Fy3 + Fy4;
      GlobalCoord = On;
      Position =
      (Fy1/FyTotal) * ..Up_slider.Global.COP_ball_global.Position+
      (Fy2/FyTotal) * ..Up_layer.Global.COP_ball_global.Position+
      (Fy3/FyTotal) * ..Up_slider_cavity.Global.COP_ball_global.Position+
      (Fy4/FyTotal) * ..Up_layer_cavity.Global.COP_ball_global.Position;

      ScaleXYZ = 0.0075 *{1,1,1};
    };
  };
};
