  //This will run calibration on the lumbar spine ligaments
  AnyFolder LumbarLigCalibration0={
    //AnyFolder &HumanFolderRef=..HumanFolderRef;
    #include "LumbarLigCal0.any"

  };
  // This will calibrate the Sacro Illiac ligaments
  AnyFolder SILigCal = {
    #include "SILigCal.any"
  };

  CalibrationSequence ={
    AnyOperation &LumbarLigCal0 = .LumbarLigCalibration0.LumbarLigCalibrationStudy0.LigamentLengthAdjustment;
    AnyOperation &SILigCal = .SILigCal.SILigCalibrationStudy.LigamentLengthAdjustment;
  };
