  //This will run calibration on the lumbar spine ligaments
  AnyFolder ThoraxCalibration={
    //AnyFolder &HumanFolderRef=..HumanFolderRef;
    #include "ThoraxCal.any"
  };

  CalibrationSequence ={
    AnyOperation &ThoraxCal = .ThoraxCalibration.ThoraxCalibrationStudy.FiberAndTendonLengthAdjustment;
  };
