AnyFolder ContactPoints ={

  AnyFolder &refLumbar=.SegmentsLumbar;
  AnyFolder &refThorax=.SegmentsThorax;

  AnyFolder &Pelvis =refLumbar.PelvisSeg;

  Pelvis={


    AnyRefNode PosteriorRContactNode = {
      sRel= .Scale({0.033,0.05,0.1});
//      AnyDrawNode  drw={
//        ScaleXYZ={0.005,.005,.005};
//        RGB={0,0,1};
//      };
    };

    AnyRefNode PosteriorlContactNode = {
      sRel= .Scale({0.033,0.05,-0.1});
//      AnyDrawNode  drw={
//        ScaleXYZ={0.005,.005,.005};
//        RGB={0,0,1};
//      };
    };

    AnyRefNode Tuber_ischiadicum1RContactNode={
      sRel=.Tuber_ischiadicumR.sRel+.Scale({0.085,0.01,0});
      //AnyDrawRefFrame test={ScaleXYZ={.1,.1,.1};};
    };

    AnyRefNode Tuber_ischiadicum1LContactNode={
      sRel=.Tuber_ischiadicumL.sRel+.Scale({0.085,0.01,0});
      //AnyDrawRefFrame test={ScaleXYZ={.1,.1,.1};};
    };

    AnyRefNode Tuber_ischiadicum2RContactNode={
      sRel=.Tuber_ischiadicumR.sRel+.Scale({0.065,0.005,0});
      //AnyDrawRefFrame test={ScaleXYZ={.1,.1,.1};};
    };


    AnyRefNode Tuber_ischiadicum2MidContactNode={
      sRel=0.5*(.Tuber_ischiadicum2RContactNode.sRel+.Tuber_ischiadicum2LContactNode.sRel);
      //AnyDrawRefFrame test={ScaleXYZ={.1,.1,.1};};
    };


    AnyRefNode Tuber_ischiadicum2LContactNode={
      sRel=.Tuber_ischiadicumL.sRel+.Scale({0.065,0.005,0});
      //AnyDrawRefFrame test={ScaleXYZ={.1,.1,.1};};
    };


    AnyRefNode Tuber_ischiadicum3RContactNode={
      sRel=.Tuber_ischiadicumR.sRel+.Scale({0.025,0,0});
      //AnyDrawRefFrame test={ScaleXYZ={.1,.1,.1};};
    };

    AnyRefNode Tuber_ischiadicum3LContactNode={
      sRel=.Tuber_ischiadicumL.sRel+.Scale({0.025,0,0});
      //AnyDrawRefFrame test={ScaleXYZ={.1,.1,.1};};
    };


    AnyRefNode Tuber_ischiadicum4RContactNode={
      sRel=.Tuber_ischiadicumR.sRel+.Scale({-0.015,0.01,0});
      //AnyDrawRefFrame test={ScaleXYZ={.1,.1,.1};};
    };

    AnyRefNode Tuber_ischiadicum4LContactNode={
      sRel=.Tuber_ischiadicumL.sRel+.Scale({-0.015,0.01,0});
      //AnyDrawRefFrame test={ScaleXYZ={.1,.1,.1};};
    };
  };


  AnyFolder &Sacrum = refLumbar.SacrumSeg;

  Sacrum={

    AnyRefNode SacrumContactNode = {
      sRel= .Scale({-0.006,-0.025,0});
//      AnyDrawNode  drw={
//        ScaleXYZ={0.005,.005,.005};
//        RGB={0,0,1};
//      };
    };

    AnyRefNode SacrumRContactNode = {
      sRel= .Scale({-0.006,-0.025,0.05});
//      AnyDrawNode  drw={
//        ScaleXYZ={0.005,.005,.005};
//        RGB={0,0,1};
//      };
    };
    AnyRefNode SacrumLContactNode = {
      sRel= .Scale({-0.006,-0.025,-0.05});
//      AnyDrawNode  drw={
//        ScaleXYZ={0.005,.005,.005};
//        RGB={0,0,1};
//      };
    };
  };


  AnyFolder &L5 = refLumbar.L5Seg;
  L5={

    AnyRefNode L5RContactNode = {
      sRel= .Scale({-0.01,0.008,0.05});
//      AnyDrawNode drw={
//        ScaleXYZ={0.005,.005,.005};
//        RGB={0,0,1};
//      };
    };
    AnyRefNode L5LContactNode = {
      sRel= .Scale({-0.01,0.008,-0.05});
//      AnyDrawNode drw={
//        ScaleXYZ={0.005,.005,.005};
//        RGB={0,0,1};
//      };
    };

  };

  AnyFolder &L4 = refLumbar.L4Seg;
  L4={


    AnyRefNode L4RContactNode = {
      sRel =.Scale( {-0.01,0.03,0.05});
//      AnyDrawNode drw={
//        ScaleXYZ={0.005,.005,.005};
//        RGB={0,0,1};
//      };
    };
    AnyRefNode L4LContactNode = {
      sRel =.Scale( {-0.01,0.03,-0.05});
//      AnyDrawNode drw={
//        ScaleXYZ={0.005,.005,.005};
//        RGB={0,0,1};
//      };
    };

  };

  AnyFolder &L3 = refLumbar.L3Seg;
  L3={

    AnyRefNode L3RContactNode = {
      sRel = .Scale({-0.01,0.05,0.05});
//      AnyDrawNode drw={
//        ScaleXYZ={0.005,.005,.005};
//        RGB={0,0,1};
//      };
    };
    AnyRefNode L3LContactNode = {
      sRel = .Scale({-0.01,0.05,-0.05});
//      AnyDrawNode drw={
//        ScaleXYZ={0.005,.005,.005};
//        RGB={0,0,1};
//      };
    };

  };

  AnyFolder &L2 = refLumbar.L2Seg;
  L2={

    AnyRefNode L2RContactNode = {
      sRel =.Scale( {-0.01,0.07,0});
//      AnyDrawNode drw={
//        ScaleXYZ={0.005,.005,.005};
//        RGB={0,0,1};
//      };
    };
    AnyRefNode L2LContactNode = {
      sRel =.Scale( {-0.01,0.07,0});
//      AnyDrawNode drw={
//        ScaleXYZ={0.005,.005,.005};
//        RGB={0,0,1};
//      };
    };

  };

  AnyFolder &L1 = refLumbar.L1Seg;
  L1={


    AnyRefNode L1RContactNode = {
      sRel =.Scale( {-0.02,0.10,0.05});
//      AnyDrawNode drw={
//        ScaleXYZ={0.005,.005,.005};
//        RGB={0,0,1};
//      };
    };

    AnyRefNode L1LContactNode = {
      sRel =.Scale( {-0.02,0.10,-0.05});
//      AnyDrawNode drw={
//        ScaleXYZ={0.005,.005,.005};
//        RGB={0,0,1};
//      };
    };
  };


  AnyFolder &Skull = refThorax.SkullSeg;
  Skull={
    AnyRefNode SkullContactNode = {
      sRel= .Scale({-0.11,0.03,0});
//      AnyDrawNode drw={
//        ScaleXYZ={0.005,.005,.0050};
//        RGB={0,0,1};
//      };
    };


  };

};
