/*
Definitions of the Joints in the lumbar spine. From PelvisL5 to T12L1
*/

AnyFolder Diagnostics = {
AnyVar LinStrength =0.01; // N  This is the strenght og the apllied muscles
  AnyVar RotStrength =0.01; // Nm  This is the strenght og the apllied muscles


  AnyFolder SacrumPelvisJnt={
    AnyKinMeasure& DOF = ..JointsLumbar.SacrumPelvisJnt;
    AnyFolder dof0={
      AnyVar Strength=..RotStrength;
      AnyVar dof= 0;
      #include "<ANYBODY_PATH_MODELUTILS>/Diagnostics/DiagnosticMuscle.any"
    };
    AnyFolder dof1={
      AnyVar Strength=..RotStrength;
      AnyVar dof= 1;
      #include "<ANYBODY_PATH_MODELUTILS>/Diagnostics/DiagnosticMuscle.any"
    };
    AnyFolder dof2={
      AnyVar Strength=..RotStrength;
      AnyVar dof= 2;
      #include "<ANYBODY_PATH_MODELUTILS>/Diagnostics/DiagnosticMuscle.any"
    };

  };


  AnyFolder L5SacrumJnt={
    AnyKinMeasure& DOF = ..JointsLumbar.L5SacrumJnt;
    AnyFolder dof0={
      AnyVar Strength=..RotStrength;
      AnyVar dof= 0;
      #include "<ANYBODY_PATH_MODELUTILS>/Diagnostics/DiagnosticMuscle.any"
    };
    AnyFolder dof1={
      AnyVar Strength=..RotStrength;
      AnyVar dof= 1;
      #include "<ANYBODY_PATH_MODELUTILS>/Diagnostics/DiagnosticMuscle.any"
    };
    AnyFolder dof2={
      AnyVar Strength=..RotStrength;
      AnyVar dof= 2;
      #include "<ANYBODY_PATH_MODELUTILS>/Diagnostics/DiagnosticMuscle.any"
    };

  };


  AnyFolder L4L5Jnt={
    AnyKinMeasure& DOF = ..JointsLumbar.L4L5Jnt;
    AnyFolder dof0={
      AnyVar Strength=..RotStrength;
      AnyVar dof= 0;
      #include "<ANYBODY_PATH_MODELUTILS>/Diagnostics/DiagnosticMuscle.any"
    };
    AnyFolder dof1={
      AnyVar Strength=..RotStrength;
      AnyVar dof= 1;
      #include "<ANYBODY_PATH_MODELUTILS>/Diagnostics/DiagnosticMuscle.any"
    };
    AnyFolder dof2={
      AnyVar Strength=..RotStrength;
      AnyVar dof= 2;
      #include "<ANYBODY_PATH_MODELUTILS>/Diagnostics/DiagnosticMuscle.any"
    };

  };


  AnyFolder L3L4Jnt={
    AnyKinMeasure& DOF = ..JointsLumbar.L3L4Jnt;
    AnyFolder dof0={
      AnyVar Strength=..RotStrength;
      AnyVar dof= 0;
      #include "<ANYBODY_PATH_MODELUTILS>/Diagnostics/DiagnosticMuscle.any"
    };
    AnyFolder dof1={
      AnyVar Strength=..RotStrength;
      AnyVar dof= 1;
      #include "<ANYBODY_PATH_MODELUTILS>/Diagnostics/DiagnosticMuscle.any"
    };
    AnyFolder dof2={
      AnyVar Strength=..RotStrength;
      AnyVar dof= 2;
      #include "<ANYBODY_PATH_MODELUTILS>/Diagnostics/DiagnosticMuscle.any"
    };

  };

  AnyFolder L2L3Jnt={
    AnyKinMeasure& DOF = ..JointsLumbar.L2L3Jnt;
    AnyFolder dof0={
      AnyVar Strength=..RotStrength;
      AnyVar dof= 0;
      #include "<ANYBODY_PATH_MODELUTILS>/Diagnostics/DiagnosticMuscle.any"
    };
    AnyFolder dof1={
      AnyVar Strength=..RotStrength;
      AnyVar dof= 1;
      #include "<ANYBODY_PATH_MODELUTILS>/Diagnostics/DiagnosticMuscle.any"
    };
    AnyFolder dof2={
      AnyVar Strength=..RotStrength;
      AnyVar dof= 2;
      #include "<ANYBODY_PATH_MODELUTILS>/Diagnostics/DiagnosticMuscle.any"
    };

  };

  AnyFolder L1L2Jnt={
    AnyKinMeasure& DOF = ..JointsLumbar.L1L2Jnt;
    AnyFolder dof0={
      AnyVar Strength=..RotStrength;
      AnyVar dof= 0;
      #include "<ANYBODY_PATH_MODELUTILS>/Diagnostics/DiagnosticMuscle.any"
    };
    AnyFolder dof1={
      AnyVar Strength=..RotStrength;
      AnyVar dof= 1;
      #include "<ANYBODY_PATH_MODELUTILS>/Diagnostics/DiagnosticMuscle.any"
    };
    AnyFolder dof2={
      AnyVar Strength=..RotStrength;
      AnyVar dof= 2;
      #include "<ANYBODY_PATH_MODELUTILS>/Diagnostics/DiagnosticMuscle.any"
    };

  };


  AnyFolder T12L1Jnt={
    AnyKinMeasure& DOF = ..JointsLumbar.T12L1Jnt;
    AnyFolder dof0={
      AnyVar Strength=..RotStrength;
      AnyVar dof= 0;
      #include "<ANYBODY_PATH_MODELUTILS>/Diagnostics/DiagnosticMuscle.any"
    };
    AnyFolder dof1={
      AnyVar Strength=..RotStrength;
      AnyVar dof= 1;
      #include "<ANYBODY_PATH_MODELUTILS>/Diagnostics/DiagnosticMuscle.any"
    };
    AnyFolder dof2={
      AnyVar Strength=..RotStrength;
      AnyVar dof= 2;
      #include "<ANYBODY_PATH_MODELUTILS>/Diagnostics/DiagnosticMuscle.any"
    };

  };

  AnyFolder NeckJnt={
    AnyKinMeasure& DOF = ..JointsLumbar.NeckJnt;
    AnyFolder dof0={
      AnyVar Strength=..RotStrength;
      AnyVar dof= 0;
      #include "<ANYBODY_PATH_MODELUTILS>/Diagnostics/DiagnosticMuscle.any"
    };


  };

  //Buckle Muscles
  AnyFolder LinComb={
    AnyKinMeasure& DOF = ..Buckle.JointsAndDrivers.LinComb;
    AnyFolder dof0={
      AnyVar Strength=..LinStrength;
      AnyVar dof= 0;
      #include "<ANYBODY_PATH_MODELUTILS>/Diagnostics/DiagnosticMuscle.any"
    };
    AnyFolder dof1={
      AnyVar Strength=..LinStrength;
      AnyVar dof= 1;
      #include "<ANYBODY_PATH_MODELUTILS>/Diagnostics/DiagnosticMuscle.any"
    };
    AnyFolder dof2={
      AnyVar Strength=..LinStrength;
      AnyVar dof= 2;
      #include "<ANYBODY_PATH_MODELUTILS>/Diagnostics/DiagnosticMuscle.any"
    };

  };

  AnyFolder RotComb={
    AnyKinMeasure& DOF = ..Buckle.JointsAndDrivers.RotComb;
    AnyFolder dof0={
      AnyVar Strength=..RotStrength;
      AnyVar dof= 0;
      #include "<ANYBODY_PATH_MODELUTILS>/Diagnostics/DiagnosticMuscle.any"
    };
    AnyFolder dof1={
      AnyVar Strength=..RotStrength;
      AnyVar dof= 1;
      #include "<ANYBODY_PATH_MODELUTILS>/Diagnostics/DiagnosticMuscle.any"
    };
    AnyFolder dof2={
      AnyVar Strength=..RotStrength;
      AnyVar dof= 2;
      #include "<ANYBODY_PATH_MODELUTILS>/Diagnostics/DiagnosticMuscle.any"
    };

  };


};// End of JointsLumbar
