Trunk = {

//  // Adjust the initial posture
//  AnyVar Extension ??= DesignVar(0);
//  AnyVar LateralBending ??= DesignVar(0);
//  AnyVar Rotation ??= DesignVar(0);


  AnyFolder PelvisSacrumExtension={

    // Change the following variables to adjust the moment arm study
    AnyVector RangeOfMotion = DesignVar({-5,5});

    /////////////////////////////////////////

    // The following should not be changed
    AnyFolder &TrunkHumanFolderRef =...BodyModel.Trunk;
    AnyFolder &TrunkHumanInterfaceRef = ...BodyModel.Interface.Trunk;
    #include "EvaluateMomentArmsStudy_IVJs.any"
    AnyString OutputFileName = "MomentArms_Trunk_PelvisSacrumExtension";
    Model.Drivers = {
      AnyKinEqSimpleDriver TrunkDriver= {
        AnyKinMeasure& TrunkMeasure = ....Measure_Spine;
        DriverPos = {
          0,0,...RangeOfMotion[0], //SacrumPelvis
          0,0,0, //L5Sacrum
          0,0,0, //L4L5
          0,0,0, //L3L4
          0,0,0, //L2L3
          0,0,0, //L1L2
          0,0,0, //T12L1
          0,0,0, 0,0,0, 0,0,0, 0,0,0, 0,0,0, 0,0,0, 0,0,0, 0,0,0, 0,0,0, 0,0,0, 0,0,0, //Thoracic
          0,0,0, 0,0,0, 0,0,0, 0,0,0, 0,0,0, 0,0,0, 0, 0, //Cervical
        }*pi/180;
        DriverVel = {
          0,0,...RangeOfMotion[1]-...RangeOfMotion[0], //SacrumPelvis
          0,0,0, //L5Sacrum
          0,0,0, //L4L5
          0,0,0, //L3L4
          0,0,0, //L2L3
          0,0,0, //L1L2
          0,0,0, //T12L1
          0,0,0, 0,0,0, 0,0,0, 0,0,0, 0,0,0, 0,0,0, 0,0,0, 0,0,0, 0,0,0, 0,0,0, 0,0,0, //Thoracic
          0,0,0, 0,0,0, 0,0,0, 0,0,0, 0,0,0, 0,0,0, 0, 0, //Cervical
        }*pi/180;
      };
    };
  };

  AnyFolder L5SacrumExtension={

    // Change the following variables to adjust the moment arm study
    AnyVector RangeOfMotion ??= DesignVar({-5,5});
    /////////////////////////////////////////

    // The following should not be changed
    AnyFolder &TrunkHumanFolderRef =...BodyModel.Trunk;
    AnyFolder &TrunkHumanInterfaceRef = ...BodyModel.Interface.Trunk;
    #include "EvaluateMomentArmsStudy_IVJs.any"
    AnyString OutputFileName = "MomentArms_Trunk_L5SacrumExtension";
    Model.Drivers = {
      AnyKinEqSimpleDriver TrunkDriver= {
        AnyKinMeasure& TrunkMeasure = ....Measure_Spine;
        DriverPos = {
          0,0,0, //SacrumPelvis
          0,0,...RangeOfMotion[0], //L5Sacrum
          0,0,0, //L4L5
          0,0,0, //L3L4
          0,0,0, //L2L3
          0,0,0, //L1L2
          0,0,0, //T12L1
          0,0,0, 0,0,0, 0,0,0, 0,0,0, 0,0,0, 0,0,0, 0,0,0, 0,0,0, 0,0,0, 0,0,0, 0,0,0, //Thoracic
          0,0,0, 0,0,0, 0,0,0, 0,0,0, 0,0,0, 0,0,0, 0, 0, //Cervical
        }*pi/180;
        DriverVel = {
          0,0,0, //SacrumPelvis
          0,0,...RangeOfMotion[1]-...RangeOfMotion[0], //L5Sacrum
          0,0,0, //L4L5
          0,0,0, //L3L4
          0,0,0, //L2L3
          0,0,0, //L1L2
          0,0,0, //T12L1
          0,0,0, 0,0,0, 0,0,0, 0,0,0, 0,0,0, 0,0,0, 0,0,0, 0,0,0, 0,0,0, 0,0,0, 0,0,0, //Thoracic
          0,0,0, 0,0,0, 0,0,0, 0,0,0, 0,0,0, 0,0,0, 0, 0, //Cervical
        }*pi/180;
      };
    };
  };

  AnyFolder L4L5Extension={

    // Change the following variables to adjust the moment arm study
    AnyVector RangeOfMotion ??= DesignVar({-5,5});
    /////////////////////////////////////////

    // The following should not be changed
    AnyFolder &TrunkHumanFolderRef =...BodyModel.Trunk;
    AnyFolder &TrunkHumanInterfaceRef = ...BodyModel.Interface.Trunk;
    #include "EvaluateMomentArmsStudy_IVJs.any"
    AnyString OutputFileName = "MomentArms_Trunk_L4L5Extension";
    Model.Drivers = {
      AnyKinEqSimpleDriver TrunkDriver= {
        AnyKinMeasure& TrunkMeasure = ....Measure_Spine;
        DriverPos = {
          0,0,0, //SacrumPelvis
          0,0,0, //L5Sacrum
          0,0,...RangeOfMotion[0], //L4L5
          0,0,0, //L3L4
          0,0,0, //L2L3
          0,0,0, //L1L2
          0,0,0, //T12L1
          0,0,0, 0,0,0, 0,0,0, 0,0,0, 0,0,0, 0,0,0, 0,0,0, 0,0,0, 0,0,0, 0,0,0, 0,0,0, //Thoracic
          0,0,0, 0,0,0, 0,0,0, 0,0,0, 0,0,0, 0,0,0, 0, 0, //Cervical
        }*pi/180;
        DriverVel = {
          0,0,0, //SacrumPelvis
          0,0,0, //L5Sacrum
          0,0,...RangeOfMotion[1]-...RangeOfMotion[0], //L4L5
          0,0,0, //L3L4
          0,0,0, //L2L3
          0,0,0, //L1L2
          0,0,0, //T12L1
          0,0,0, 0,0,0, 0,0,0, 0,0,0, 0,0,0, 0,0,0, 0,0,0, 0,0,0, 0,0,0, 0,0,0, 0,0,0, //Thoracic
          0,0,0, 0,0,0, 0,0,0, 0,0,0, 0,0,0, 0,0,0, 0, 0, //Cervical
        }*pi/180;
      };
    };
  };

  AnyFolder L3L4Extension={

    // Change the following variables to adjust the moment arm study
    AnyVector RangeOfMotion ??= DesignVar({-5,5});
    /////////////////////////////////////////

    // The following should not be changed
    AnyFolder &TrunkHumanFolderRef =...BodyModel.Trunk;
    AnyFolder &TrunkHumanInterfaceRef = ...BodyModel.Interface.Trunk;
    #include "EvaluateMomentArmsStudy_IVJs.any"
    AnyString OutputFileName = "MomentArms_Trunk_L3L4Extension";
    Model.Drivers = {
      AnyKinEqSimpleDriver TrunkDriver= {
        AnyKinMeasure& TrunkMeasure = ....Measure_Spine;
        DriverPos = {
          0,0,0, //SacrumPelvis
          0,0,0, //L5Sacrum
          0,0,0, //L4L5
          0,0,...RangeOfMotion[0], //L3L4
          0,0,0, //L2L3
          0,0,0, //L1L2
          0,0,0, //T12L1
          0,0,0, 0,0,0, 0,0,0, 0,0,0, 0,0,0, 0,0,0, 0,0,0, 0,0,0, 0,0,0, 0,0,0, 0,0,0, //Thoracic
          0,0,0, 0,0,0, 0,0,0, 0,0,0, 0,0,0, 0,0,0, 0, 0, //Cervical
        }*pi/180;
        DriverVel = {
          0,0,0, //SacrumPelvis
          0,0,0, //L5Sacrum
          0,0,0, //L4L5
          0,0,...RangeOfMotion[1]-...RangeOfMotion[0], //L3L4
          0,0,0, //L2L3
          0,0,0, //L1L2
          0,0,0, //T12L1
          0,0,0, 0,0,0, 0,0,0, 0,0,0, 0,0,0, 0,0,0, 0,0,0, 0,0,0, 0,0,0, 0,0,0, 0,0,0, //Thoracic
          0,0,0, 0,0,0, 0,0,0, 0,0,0, 0,0,0, 0,0,0, 0, 0, //Cervical
        }*pi/180;
      };
    };
  };

  AnyFolder L2L3Extension={

    // Change the following variables to adjust the moment arm study
    AnyVector RangeOfMotion ??= DesignVar({-5,5});
    /////////////////////////////////////////

    // The following should not be changed
    AnyFolder &TrunkHumanFolderRef =...BodyModel.Trunk;
    AnyFolder &TrunkHumanInterfaceRef = ...BodyModel.Interface.Trunk;
    #include "EvaluateMomentArmsStudy_IVJs.any"
    AnyString OutputFileName = "MomentArms_Trunk_L2L3Extension";
    Model.Drivers = {
      AnyKinEqSimpleDriver TrunkDriver= {
        AnyKinMeasure& TrunkMeasure = ....Measure_Spine;
        DriverPos = {
          0,0,0, //SacrumPelvis
          0,0,0, //L5Sacrum
          0,0,0, //L4L5
          0,0,0, //L3L4
          0,0,...RangeOfMotion[0], //L2L3
          0,0,0, //L1L2
          0,0,0, //T12L1
          0,0,0, 0,0,0, 0,0,0, 0,0,0, 0,0,0, 0,0,0, 0,0,0, 0,0,0, 0,0,0, 0,0,0, 0,0,0, //Thoracic
          0,0,0, 0,0,0, 0,0,0, 0,0,0, 0,0,0, 0,0,0, 0, 0, //Cervical
        }*pi/180;
        DriverVel = {
          0,0,0, //SacrumPelvis
          0,0,0, //L5Sacrum
          0,0,0, //L4L5
          0,0,0, //L3L4
          0,0,...RangeOfMotion[1]-...RangeOfMotion[0], //L2L3
          0,0,0, //L1L2
          0,0,0, //T12L1
          0,0,0, 0,0,0, 0,0,0, 0,0,0, 0,0,0, 0,0,0, 0,0,0, 0,0,0, 0,0,0, 0,0,0, 0,0,0, //Thoracic
          0,0,0, 0,0,0, 0,0,0, 0,0,0, 0,0,0, 0,0,0, 0, 0, //Cervical
        }*pi/180;
      };
    };
  };

  AnyFolder L1L2Extension={

    // Change the following variables to adjust the moment arm study
    AnyVector RangeOfMotion ??= DesignVar({-5,5});
    /////////////////////////////////////////

    // The following should not be changed
    AnyFolder &TrunkHumanFolderRef =...BodyModel.Trunk;
    AnyFolder &TrunkHumanInterfaceRef = ...BodyModel.Interface.Trunk;
    #include "EvaluateMomentArmsStudy_IVJs.any"
    AnyString OutputFileName = "MomentArms_Trunk_L1L2Extension";
    Model.Drivers = {
      AnyKinEqSimpleDriver TrunkDriver= {
        AnyKinMeasure& TrunkMeasure = ....Measure_Spine;
        DriverPos = {
          0,0,0, //SacrumPelvis
          0,0,0, //L5Sacrum
          0,0,0, //L4L5
          0,0,0, //L3L4
          0,0,0, //L2L3
          0,0,...RangeOfMotion[0], //L1L2
          0,0,0, //T12L1
          0,0,0, 0,0,0, 0,0,0, 0,0,0, 0,0,0, 0,0,0, 0,0,0, 0,0,0, 0,0,0, 0,0,0, 0,0,0, //Thoracic
          0,0,0, 0,0,0, 0,0,0, 0,0,0, 0,0,0, 0,0,0, 0, 0, //Cervical
        }*pi/180;
        DriverVel = {
          0,0,0, //SacrumPelvis
          0,0,0, //L5Sacrum
          0,0,0, //L4L5
          0,0,0, //L3L4
          0,0,0, //L2L3
          0,0,...RangeOfMotion[1]-...RangeOfMotion[0], //L1L2
          0,0,0, //T12L1
          0,0,0, 0,0,0, 0,0,0, 0,0,0, 0,0,0, 0,0,0, 0,0,0, 0,0,0, 0,0,0, 0,0,0, 0,0,0, //Thoracic
          0,0,0, 0,0,0, 0,0,0, 0,0,0, 0,0,0, 0,0,0, 0, 0, //Cervical
        }*pi/180;
      };
    };
  };

  AnyFolder T12L1Extension={

    // Change the following variables to adjust the moment arm study
    AnyVector RangeOfMotion ??= DesignVar({-5,5});
    /////////////////////////////////////////

    // The following should not be changed
    AnyFolder &TrunkHumanFolderRef =...BodyModel.Trunk;
    AnyFolder &TrunkHumanInterfaceRef = ...BodyModel.Interface.Trunk;
    #include "EvaluateMomentArmsStudy_IVJs.any"
    AnyString OutputFileName = "MomentArms_Trunk_T12L1Extension";
    Model.Drivers = {
      AnyKinEqSimpleDriver TrunkDriver= {
        AnyKinMeasure& TrunkMeasure = ....Measure_Spine;
        DriverPos = {
          0,0,0, //SacrumPelvis
          0,0,0, //L5Sacrum
          0,0,0, //L4L5
          0,0,0, //L3L4
          0,0,0, //L2L3
          0,0,0, //L1L2
          0,0,...RangeOfMotion[0], //T12L1
          0,0,0, 0,0,0, 0,0,0, 0,0,0, 0,0,0, 0,0,0, 0,0,0, 0,0,0, 0,0,0, 0,0,0, 0,0,0, //Thoracic
          0,0,0, 0,0,0, 0,0,0, 0,0,0, 0,0,0, 0,0,0, 0, 0, //Cervical
        }*pi/180;
        DriverVel = {
          0,0,0, //SacrumPelvis
          0,0,0, //L5Sacrum
          0,0,0, //L4L5
          0,0,0, //L3L4
          0,0,0, //L2L3
          0,0,0, //L1L2
          0,0,...RangeOfMotion[1]-...RangeOfMotion[0], //T12L1
          0,0,0, 0,0,0, 0,0,0, 0,0,0, 0,0,0, 0,0,0, 0,0,0, 0,0,0, 0,0,0, 0,0,0, 0,0,0, //Thoracic
          0,0,0, 0,0,0, 0,0,0, 0,0,0, 0,0,0, 0,0,0, 0, 0, //Cervical
        }*pi/180;
      };
    };
  };


  AnyFolder T11T12Extension={
    // Change the following variables to adjust the moment arm study
    AnyVector RangeOfMotion ??= DesignVar({-5,5});

    // The following should not be changed
    AnyFolder &TrunkHumanFolderRef =...BodyModel.Trunk;
    AnyFolder &TrunkHumanInterfaceRef = ...BodyModel.Interface.Trunk;
    #include "EvaluateMomentArmsStudy_IVJs.any"
    AnyString OutputFileName = "MomentArms_Trunk_T11T12Extension";
    Model.Drivers = {
      AnyKinEqSimpleDriver TrunkDriver= {
        AnyKinMeasure& TrunkMeasure = ....Measure_Spine;
        DriverPos = {
          0,0,0, 0,0,0, 0,0,0, 0,0,0, 0,0,0, 0,0,0, 0,0,0, //Lumbar
          0,0,...RangeOfMotion[0], //T11T12
          0,0,0, //T10T11
          0,0,0, //T9T10
          0,0,0, //T8T9
          0,0,0, //T7T8
          0,0,0, //T6T7
          0,0,0, //T5T6
          0,0,0, //T4T5
          0,0,0, //T3T4
          0,0,0, //T2T3
          0,0,0, //T1T2
          0,0,0, 0,0,0, 0,0,0, 0,0,0, 0,0,0, 0,0,0, 0, 0, //Cervical
        }*pi/180;
        DriverVel = {
          0,0,0, 0,0,0, 0,0,0, 0,0,0, 0,0,0, 0,0,0, 0,0,0, //Lumbar
          0,0,...RangeOfMotion[1]-...RangeOfMotion[0], //T11T12
          0,0,0, //T10T11
          0,0,0, //T9T10
          0,0,0, //T8T9
          0,0,0, //T7T8
          0,0,0, //T6T7
          0,0,0, //T5T6
          0,0,0, //T4T5
          0,0,0, //T3T4
          0,0,0, //T2T3
          0,0,0, //T1T2
          0,0,0, 0,0,0, 0,0,0, 0,0,0, 0,0,0, 0,0,0, 0, 0, //Cervical
        }*pi/180;
      };
    };
  };

  AnyFolder T10T11Extension={
    // Change the following variables to adjust the moment arm study
    AnyVector RangeOfMotion ??= DesignVar({-5,5});

    // The following should not be changed
    AnyFolder &TrunkHumanFolderRef =...BodyModel.Trunk;
    AnyFolder &TrunkHumanInterfaceRef = ...BodyModel.Interface.Trunk;
    #include "EvaluateMomentArmsStudy_IVJs.any"
    AnyString OutputFileName = "MomentArms_Trunk_T10T11Extension";
    Model.Drivers = {
      AnyKinEqSimpleDriver TrunkDriver= {
        AnyKinMeasure& TrunkMeasure = ....Measure_Spine;
        DriverPos = {
          0,0,0, 0,0,0, 0,0,0, 0,0,0, 0,0,0, 0,0,0, 0,0,0, //Lumbar
          0,0,0, //T11T12
          0,0,...RangeOfMotion[0], //T10T11
          0,0,0, //T9T10
          0,0,0, //T8T9
          0,0,0, //T7T8
          0,0,0, //T6T7
          0,0,0, //T5T6
          0,0,0, //T4T5
          0,0,0, //T3T4
          0,0,0, //T2T3
          0,0,0, //T1T2
          0,0,0, 0,0,0, 0,0,0, 0,0,0, 0,0,0, 0,0,0, 0, 0, //Cervical
        }*pi/180;
        DriverVel = {
          0,0,0, 0,0,0, 0,0,0, 0,0,0, 0,0,0, 0,0,0, 0,0,0, //Lumbar
          0,0,0, //T11T12
          0,0,...RangeOfMotion[1]-...RangeOfMotion[0], //T10T11
          0,0,0, //T9T10
          0,0,0, //T8T9
          0,0,0, //T7T8
          0,0,0, //T6T7
          0,0,0, //T5T6
          0,0,0, //T4T5
          0,0,0, //T3T4
          0,0,0, //T2T3
          0,0,0, //T1T2
          0,0,0, 0,0,0, 0,0,0, 0,0,0, 0,0,0, 0,0,0, 0, 0, //Cervical
        }*pi/180;
      };
    };
  };

  AnyFolder T9T10Extension={
    // Change the following variables to adjust the moment arm study
    AnyVector RangeOfMotion ??= DesignVar({-5,5});

    // The following should not be changed
    AnyFolder &TrunkHumanFolderRef =...BodyModel.Trunk;
    AnyFolder &TrunkHumanInterfaceRef = ...BodyModel.Interface.Trunk;
    #include "EvaluateMomentArmsStudy_IVJs.any"
    AnyString OutputFileName = "MomentArms_Trunk_T9T10Extension";
    Model.Drivers = {
      AnyKinEqSimpleDriver TrunkDriver= {
        AnyKinMeasure& TrunkMeasure = ....Measure_Spine;
        DriverPos = {
          0,0,0, 0,0,0, 0,0,0, 0,0,0, 0,0,0, 0,0,0, 0,0,0, //Lumbar
          0,0,0, //T11T12
          0,0,0, //T10T11
          0,0,...RangeOfMotion[0], //T9T10
          0,0,0, //T8T9
          0,0,0, //T7T8
          0,0,0, //T6T7
          0,0,0, //T5T6
          0,0,0, //T4T5
          0,0,0, //T3T4
          0,0,0, //T2T3
          0,0,0, //T1T2
          0,0,0, 0,0,0, 0,0,0, 0,0,0, 0,0,0, 0,0,0, 0, 0, //Cervical
        }*pi/180;
        DriverVel = {
          0,0,0, 0,0,0, 0,0,0, 0,0,0, 0,0,0, 0,0,0, 0,0,0, //Lumbar
          0,0,0, //T11T12
          0,0,0, //T10T11
          0,0,...RangeOfMotion[1]-...RangeOfMotion[0], //T9T10
          0,0,0, //T8T9
          0,0,0, //T7T8
          0,0,0, //T6T7
          0,0,0, //T5T6
          0,0,0, //T4T5
          0,0,0, //T3T4
          0,0,0, //T2T3
          0,0,0, //T1T2
          0,0,0, 0,0,0, 0,0,0, 0,0,0, 0,0,0, 0,0,0, 0, 0, //Cervical
        }*pi/180;
      };
    };
  };

  AnyFolder T8T9Extension={
    // Change the following variables to adjust the moment arm study
    AnyVector RangeOfMotion ??= DesignVar({-5,5});

    // The following should not be changed
    AnyFolder &TrunkHumanFolderRef =...BodyModel.Trunk;
    AnyFolder &TrunkHumanInterfaceRef = ...BodyModel.Interface.Trunk;
    #include "EvaluateMomentArmsStudy_IVJs.any"
    AnyString OutputFileName = "MomentArms_Trunk_T8T9Extension";
    Model.Drivers = {
      AnyKinEqSimpleDriver TrunkDriver= {
        AnyKinMeasure& TrunkMeasure = ....Measure_Spine;
        DriverPos = {
          0,0,0, 0,0,0, 0,0,0, 0,0,0, 0,0,0, 0,0,0, 0,0,0, //Lumbar
          0,0,0, //T11T12
          0,0,0, //T10T11
          0,0,0, //T9T10
          0,0,...RangeOfMotion[0], //T8T9
          0,0,0, //T7T8
          0,0,0, //T6T7
          0,0,0, //T5T6
          0,0,0, //T4T5
          0,0,0, //T3T4
          0,0,0, //T2T3
          0,0,0, //T1T2
          0,0,0, 0,0,0, 0,0,0, 0,0,0, 0,0,0, 0,0,0, 0, 0, //Cervical
        }*pi/180;
        DriverVel = {
          0,0,0, 0,0,0, 0,0,0, 0,0,0, 0,0,0, 0,0,0, 0,0,0, //Lumbar
          0,0,0, //T11T12
          0,0,0, //T10T11
          0,0,0, //T9T10
          0,0,...RangeOfMotion[1]-...RangeOfMotion[0], //T8T9
          0,0,0, //T7T8
          0,0,0, //T6T7
          0,0,0, //T5T6
          0,0,0, //T4T5
          0,0,0, //T3T4
          0,0,0, //T2T3
          0,0,0, //T1T2
          0,0,0, 0,0,0, 0,0,0, 0,0,0, 0,0,0, 0,0,0, 0, 0, //Cervical
        }*pi/180;
      };
    };
  };

  AnyFolder T7T8Extension={
    // Change the following variables to adjust the moment arm study
    AnyVector RangeOfMotion ??= DesignVar({-5,5});

    // The following should not be changed
    AnyFolder &TrunkHumanFolderRef =...BodyModel.Trunk;
    AnyFolder &TrunkHumanInterfaceRef = ...BodyModel.Interface.Trunk;
    #include "EvaluateMomentArmsStudy_IVJs.any"
    AnyString OutputFileName = "MomentArms_Trunk_T7T8Extension";
    Model.Drivers = {
      AnyKinEqSimpleDriver TrunkDriver= {
        AnyKinMeasure& TrunkMeasure = ....Measure_Spine;
        DriverPos = {
          0,0,0, 0,0,0, 0,0,0, 0,0,0, 0,0,0, 0,0,0, 0,0,0, //Lumbar
          0,0,0, //T11T12
          0,0,0, //T10T11
          0,0,0, //T9T10
          0,0,0, //T8T9
          0,0,...RangeOfMotion[0], //T7T8
          0,0,0, //T6T7
          0,0,0, //T5T6
          0,0,0, //T4T5
          0,0,0, //T3T4
          0,0,0, //T2T3
          0,0,0, //T1T2
          0,0,0, 0,0,0, 0,0,0, 0,0,0, 0,0,0, 0,0,0, 0, 0, //Cervical
        }*pi/180;
        DriverVel = {
          0,0,0, 0,0,0, 0,0,0, 0,0,0, 0,0,0, 0,0,0, 0,0,0, //Lumbar
          0,0,0, //T11T12
          0,0,0, //T10T11
          0,0,0, //T9T10
          0,0,0, //T8T9
          0,0,...RangeOfMotion[1]-...RangeOfMotion[0], //T7T8
          0,0,0, //T6T7
          0,0,0, //T5T6
          0,0,0, //T4T5
          0,0,0, //T3T4
          0,0,0, //T2T3
          0,0,0, //T1T2
          0,0,0, 0,0,0, 0,0,0, 0,0,0, 0,0,0, 0,0,0, 0, 0, //Cervical
        }*pi/180;
      };
    };
  };

  AnyFolder T6T7Extension={
    // Change the following variables to adjust the moment arm study
    AnyVector RangeOfMotion ??= DesignVar({-5,5});

    // The following should not be changed
    AnyFolder &TrunkHumanFolderRef =...BodyModel.Trunk;
    AnyFolder &TrunkHumanInterfaceRef = ...BodyModel.Interface.Trunk;
    #include "EvaluateMomentArmsStudy_IVJs.any"
    AnyString OutputFileName = "MomentArms_Trunk_T6T7Extension";
    Model.Drivers = {
      AnyKinEqSimpleDriver TrunkDriver= {
        AnyKinMeasure& TrunkMeasure = ....Measure_Spine;
        DriverPos = {
          0,0,0, 0,0,0, 0,0,0, 0,0,0, 0,0,0, 0,0,0, 0,0,0, //Lumbar
          0,0,0, //T11T12
          0,0,0, //T10T11
          0,0,0, //T9T10
          0,0,0, //T8T9
          0,0,0, //T7T8
          0,0,...RangeOfMotion[0], //T6T7
          0,0,0, //T5T6
          0,0,0, //T4T5
          0,0,0, //T3T4
          0,0,0, //T2T3
          0,0,0, //T1T2
          0,0,0, 0,0,0, 0,0,0, 0,0,0, 0,0,0, 0,0,0, 0, 0, //Cervical
        }*pi/180;
        DriverVel = {
          0,0,0, 0,0,0, 0,0,0, 0,0,0, 0,0,0, 0,0,0, 0,0,0, //Lumbar
          0,0,0, //T11T12
          0,0,0, //T10T11
          0,0,0, //T9T10
          0,0,0, //T8T9
          0,0,0, //T7T8
          0,0,...RangeOfMotion[1]-...RangeOfMotion[0], //T6T7
          0,0,0, //T5T6
          0,0,0, //T4T5
          0,0,0, //T3T4
          0,0,0, //T2T3
          0,0,0, //T1T2
          0,0,0, 0,0,0, 0,0,0, 0,0,0, 0,0,0, 0,0,0, 0, 0, //Cervical
        }*pi/180;
      };
    };
  };

  AnyFolder T5T6Extension={
    // Change the following variables to adjust the moment arm study
    AnyVector RangeOfMotion ??= DesignVar({-5,5});

    // The following should not be changed
    AnyFolder &TrunkHumanFolderRef =...BodyModel.Trunk;
    AnyFolder &TrunkHumanInterfaceRef = ...BodyModel.Interface.Trunk;
    #include "EvaluateMomentArmsStudy_IVJs.any"
    AnyString OutputFileName = "MomentArms_Trunk_T5T6Extension";
    Model.Drivers = {
      AnyKinEqSimpleDriver TrunkDriver= {
        AnyKinMeasure& TrunkMeasure = ....Measure_Spine;
        DriverPos = {
          0,0,0, 0,0,0, 0,0,0, 0,0,0, 0,0,0, 0,0,0, 0,0,0, //Lumbar
          0,0,0, //T11T12
          0,0,0, //T10T11
          0,0,0, //T9T10
          0,0,0, //T8T9
          0,0,0, //T7T8
          0,0,0, //T6T7
          0,0,...RangeOfMotion[0], //T5T6
          0,0,0, //T4T5
          0,0,0, //T3T4
          0,0,0, //T2T3
          0,0,0, //T1T2
          0,0,0, 0,0,0, 0,0,0, 0,0,0, 0,0,0, 0,0,0, 0, 0, //Cervical
        }*pi/180;
        DriverVel = {
          0,0,0, 0,0,0, 0,0,0, 0,0,0, 0,0,0, 0,0,0, 0,0,0, //Lumbar
          0,0,0, //T11T12
          0,0,0, //T10T11
          0,0,0, //T9T10
          0,0,0, //T8T9
          0,0,0, //T7T8
          0,0,0, //T6T7
          0,0,...RangeOfMotion[1]-...RangeOfMotion[0], //T5T6
          0,0,0, //T4T5
          0,0,0, //T3T4
          0,0,0, //T2T3
          0,0,0, //T1T2
          0,0,0, 0,0,0, 0,0,0, 0,0,0, 0,0,0, 0,0,0, 0, 0, //Cervical
        }*pi/180;
      };
    };
  };

  AnyFolder T4T5Extension={
    // Change the following variables to adjust the moment arm study
    AnyVector RangeOfMotion ??= DesignVar({-5,5});

    // The following should not be changed
    AnyFolder &TrunkHumanFolderRef =...BodyModel.Trunk;
    AnyFolder &TrunkHumanInterfaceRef = ...BodyModel.Interface.Trunk;
    #include "EvaluateMomentArmsStudy_IVJs.any"
    AnyString OutputFileName = "MomentArms_Trunk_T4T5Extension";
    Model.Drivers = {
      AnyKinEqSimpleDriver TrunkDriver= {
        AnyKinMeasure& TrunkMeasure = ....Measure_Spine;
        DriverPos = {
          0,0,0, 0,0,0, 0,0,0, 0,0,0, 0,0,0, 0,0,0, 0,0,0, //Lumbar
          0,0,0, //T11T12
          0,0,0, //T10T11
          0,0,0, //T9T10
          0,0,0, //T8T9
          0,0,0, //T7T8
          0,0,0, //T6T7
          0,0,0, //T5T6
          0,0,...RangeOfMotion[0], //T4T5
          0,0,0, //T3T4
          0,0,0, //T2T3
          0,0,0, //T1T2
          0,0,0, 0,0,0, 0,0,0, 0,0,0, 0,0,0, 0,0,0, 0, 0, //Cervical
        }*pi/180;
        DriverVel = {
          0,0,0, 0,0,0, 0,0,0, 0,0,0, 0,0,0, 0,0,0, 0,0,0, //Lumbar
          0,0,0, //T11T12
          0,0,0, //T10T11
          0,0,0, //T9T10
          0,0,0, //T8T9
          0,0,0, //T7T8
          0,0,0, //T6T7
          0,0,0, //T5T6
          0,0,...RangeOfMotion[1]-...RangeOfMotion[0], //T4T5
          0,0,0, //T3T4
          0,0,0, //T2T3
          0,0,0, //T1T2
          0,0,0, 0,0,0, 0,0,0, 0,0,0, 0,0,0, 0,0,0, 0, 0, //Cervical
        }*pi/180;
      };
    };
  };

  AnyFolder T3T4Extension={
    // Change the following variables to adjust the moment arm study
    AnyVector RangeOfMotion ??= DesignVar({-5,5});

    // The following should not be changed
    AnyFolder &TrunkHumanFolderRef =...BodyModel.Trunk;
    AnyFolder &TrunkHumanInterfaceRef = ...BodyModel.Interface.Trunk;
    #include "EvaluateMomentArmsStudy_IVJs.any"
    AnyString OutputFileName = "MomentArms_Trunk_T3T4Extension";
    Model.Drivers = {
      AnyKinEqSimpleDriver TrunkDriver= {
        AnyKinMeasure& TrunkMeasure = ....Measure_Spine;
        DriverPos = {
          0,0,0, 0,0,0, 0,0,0, 0,0,0, 0,0,0, 0,0,0, 0,0,0, //Lumbar
          0,0,0, //T11T12
          0,0,0, //T10T11
          0,0,0, //T9T10
          0,0,0, //T8T9
          0,0,0, //T7T8
          0,0,0, //T6T7
          0,0,0, //T5T6
          0,0,0, //T4T5
          0,0,...RangeOfMotion[0], //T3T4
          0,0,0, //T2T3
          0,0,0, //T1T2
          0,0,0, 0,0,0, 0,0,0, 0,0,0, 0,0,0, 0,0,0, 0, 0, //Cervical
        }*pi/180;
        DriverVel = {
          0,0,0, 0,0,0, 0,0,0, 0,0,0, 0,0,0, 0,0,0, 0,0,0, //Lumbar
          0,0,0, //T11T12
          0,0,0, //T10T11
          0,0,0, //T9T10
          0,0,0, //T8T9
          0,0,0, //T7T8
          0,0,0, //T6T7
          0,0,0, //T5T6
          0,0,0, //T4T5
          0,0,...RangeOfMotion[1]-...RangeOfMotion[0], //T3T4
          0,0,0, //T2T3
          0,0,0, //T1T2
          0,0,0, 0,0,0, 0,0,0, 0,0,0, 0,0,0, 0,0,0, 0, 0, //Cervical
        }*pi/180;
      };
    };
  };

  AnyFolder T2T3Extension={
    // Change the following variables to adjust the moment arm study
    AnyVector RangeOfMotion ??= DesignVar({-5,5});

    // The following should not be changed
    AnyFolder &TrunkHumanFolderRef =...BodyModel.Trunk;
    AnyFolder &TrunkHumanInterfaceRef = ...BodyModel.Interface.Trunk;
    #include "EvaluateMomentArmsStudy_IVJs.any"
    AnyString OutputFileName = "MomentArms_Trunk_T2T3Extension";
    Model.Drivers = {
      AnyKinEqSimpleDriver TrunkDriver= {
        AnyKinMeasure& TrunkMeasure = ....Measure_Spine;
        DriverPos = {
          0,0,0, 0,0,0, 0,0,0, 0,0,0, 0,0,0, 0,0,0, 0,0,0, //Lumbar
          0,0,0, //T11T12
          0,0,0, //T10T11
          0,0,0, //T9T10
          0,0,0, //T8T9
          0,0,0, //T7T8
          0,0,0, //T6T7
          0,0,0, //T5T6
          0,0,0, //T4T5
          0,0,0, //T3T4
          0,0,...RangeOfMotion[0], //T2T3
          0,0,0, //T1T2
          0,0,0, 0,0,0, 0,0,0, 0,0,0, 0,0,0, 0,0,0, 0, 0, //Cervical
        }*pi/180;
        DriverVel = {
          0,0,0, 0,0,0, 0,0,0, 0,0,0, 0,0,0, 0,0,0, 0,0,0, //Lumbar
          0,0,0, //T11T12
          0,0,0, //T10T11
          0,0,0, //T9T10
          0,0,0, //T8T9
          0,0,0, //T7T8
          0,0,0, //T6T7
          0,0,0, //T5T6
          0,0,0, //T4T5
          0,0,0, //T3T4
          0,0,...RangeOfMotion[1]-...RangeOfMotion[0], //T2T3
          0,0,0, //T1T2
          0,0,0, 0,0,0, 0,0,0, 0,0,0, 0,0,0, 0,0,0, 0, 0, //Cervical
        }*pi/180;
      };
    };
  };

  AnyFolder T1T2Extension={
    // Change the following variables to adjust the moment arm study
    AnyVector RangeOfMotion ??= DesignVar({-5,5});

    // The following should not be changed
    AnyFolder &TrunkHumanFolderRef =...BodyModel.Trunk;
    AnyFolder &TrunkHumanInterfaceRef = ...BodyModel.Interface.Trunk;
    #include "EvaluateMomentArmsStudy_IVJs.any"
    AnyString OutputFileName = "MomentArms_Trunk_T1T2Extension";
    Model.Drivers = {
      AnyKinEqSimpleDriver TrunkDriver= {
        AnyKinMeasure& TrunkMeasure = ....Measure_Spine;
        DriverPos = {
          0,0,0, 0,0,0, 0,0,0, 0,0,0, 0,0,0, 0,0,0, 0,0,0, //Lumbar
          0,0,0, //T11T12
          0,0,0, //T10T11
          0,0,0, //T9T10
          0,0,0, //T8T9
          0,0,0, //T7T8
          0,0,0, //T6T7
          0,0,0, //T5T6
          0,0,0, //T4T5
          0,0,0, //T3T4
          0,0,0, //T2T3
          0,0,...RangeOfMotion[0], //T1T2
          0,0,0, 0,0,0, 0,0,0, 0,0,0, 0,0,0, 0,0,0, 0, 0, //Cervical
        }*pi/180;
        DriverVel = {
          0,0,0, 0,0,0, 0,0,0, 0,0,0, 0,0,0, 0,0,0, 0,0,0, //Lumbar
          0,0,0, //T11T12
          0,0,0, //T10T11
          0,0,0, //T9T10
          0,0,0, //T8T9
          0,0,0, //T7T8
          0,0,0, //T6T7
          0,0,0, //T5T6
          0,0,0, //T4T5
          0,0,0, //T3T4
          0,0,0, //T2T3
          0,0,...RangeOfMotion[1]-...RangeOfMotion[0], //T1T2
          0,0,0, 0,0,0, 0,0,0, 0,0,0, 0,0,0, 0,0,0, 0, 0, //Cervical
        }*pi/180;
      };
    };
  };

  AnyFolder T1C7Extension={
    // Change the following variables to adjust the moment arm study
    AnyVector RangeOfMotion ??= DesignVar({-5,5});

    // The following should not be changed
    AnyFolder &TrunkHumanFolderRef =...BodyModel.Trunk;
    AnyFolder &TrunkHumanInterfaceRef = ...BodyModel.Interface.Trunk;
    #include "EvaluateMomentArmsStudy_IVJs.any"
    #include "IncludeArms_In_MomentArmStudy.any"
    AnyString OutputFileName = "MomentArms_Trunk_T1C7Extension";
    Model.Drivers = {
      AnyKinEqSimpleDriver TrunkDriver= {
        AnyKinMeasure& TrunkMeasure = ....Measure_Spine;
        DriverPos = {
          0,0,0, 0,0,0, 0,0,0, 0,0,0, 0,0,0, 0,0,0, 0,0,0, //Lumbar
          0,0,0, 0,0,0, 0,0,0, 0,0,0, 0,0,0, 0,0,0, 0,0,0, 0,0,0, 0,0,0, 0,0,0, 0,0,0, //Thoracic
          0,0,...RangeOfMotion[0], //T1C7
          0,0,0, //C7C6
          0,0,0, //C6C5
          0,0,0, //C5C4
          0,0,0, //C4C3
          0,0,0, //C3C2
          0, //C2C1
          0, //C1C0
        }*pi/180;
        DriverVel = {
          0,0,0, 0,0,0, 0,0,0, 0,0,0, 0,0,0, 0,0,0, 0,0,0, //Lumbar
          0,0,0, 0,0,0, 0,0,0, 0,0,0, 0,0,0, 0,0,0, 0,0,0, 0,0,0, 0,0,0, 0,0,0, 0,0,0, //Thoracic
          0,0,...RangeOfMotion[1]-...RangeOfMotion[0], //T1C7
          0,0,0, //C7C6
          0,0,0, //C6C5
          0,0,0, //C5C4
          0,0,0, //C4C3
          0,0,0, //C3C2
          0, //C2C1
          0, //C1C0
        }*pi/180;
      };
    };
  };

  AnyFolder C7C6Extension={
    // Change the following variables to adjust the moment arm study
    AnyVector RangeOfMotion ??= DesignVar({-5,5});

    // The following should not be changed
    AnyFolder &TrunkHumanFolderRef =...BodyModel.Trunk;
    AnyFolder &TrunkHumanInterfaceRef = ...BodyModel.Interface.Trunk;
    #include "EvaluateMomentArmsStudy_IVJs.any"
    #include "IncludeArms_In_MomentArmStudy.any"
    AnyString OutputFileName = "MomentArms_Trunk_C7C6Extension";
    Model.Drivers = {
      AnyKinEqSimpleDriver TrunkDriver= {
        AnyKinMeasure& TrunkMeasure = ....Measure_Spine;
        DriverPos = {
          0,0,0, 0,0,0, 0,0,0, 0,0,0, 0,0,0, 0,0,0, 0,0,0, //Lumbar
          0,0,0, 0,0,0, 0,0,0, 0,0,0, 0,0,0, 0,0,0, 0,0,0, 0,0,0, 0,0,0, 0,0,0, 0,0,0, //Thoracic
          0,0,0, //T1C7
          0,0,...RangeOfMotion[0], //C7C6
          0,0,0, //C6C5
          0,0,0, //C5C4
          0,0,0, //C4C3
          0,0,0, //C3C2
          0, //C2C1
          0, //C1C0
        }*pi/180;
        DriverVel = {
          0,0,0, 0,0,0, 0,0,0, 0,0,0, 0,0,0, 0,0,0, 0,0,0, //Lumbar
          0,0,0, 0,0,0, 0,0,0, 0,0,0, 0,0,0, 0,0,0, 0,0,0, 0,0,0, 0,0,0, 0,0,0, 0,0,0, //Thoracic
          0,0,0, //T1C7
          0,0,...RangeOfMotion[1]-...RangeOfMotion[0], //C7C6
          0,0,0, //C6C5
          0,0,0, //C5C4
          0,0,0, //C4C3
          0,0,0, //C3C2
          0, //C2C1
          0, //C1C0
        }*pi/180;
      };
    };
  };

  AnyFolder C6C5Extension={
    // Change the following variables to adjust the moment arm study
    AnyVector RangeOfMotion ??= DesignVar({-5,5});

    // The following should not be changed
    AnyFolder &TrunkHumanFolderRef =...BodyModel.Trunk;
    AnyFolder &TrunkHumanInterfaceRef = ...BodyModel.Interface.Trunk;
    #include "EvaluateMomentArmsStudy_IVJs.any"
    #include "IncludeArms_In_MomentArmStudy.any"
    AnyString OutputFileName = "MomentArms_Trunk_C6C5Extension";
    Model.Drivers = {
      AnyKinEqSimpleDriver TrunkDriver= {
        AnyKinMeasure& TrunkMeasure = ....Measure_Spine;
        DriverPos = {
          0,0,0, 0,0,0, 0,0,0, 0,0,0, 0,0,0, 0,0,0, 0,0,0, //Lumbar
          0,0,0, 0,0,0, 0,0,0, 0,0,0, 0,0,0, 0,0,0, 0,0,0, 0,0,0, 0,0,0, 0,0,0, 0,0,0, //Thoracic
          0,0,0, //T1C7
          0,0,0, //C7C6
          0,0,...RangeOfMotion[0], //C6C5
          0,0,0, //C5C4
          0,0,0, //C4C3
          0,0,0, //C3C2
          0, //C2C1
          0, //C1C0
        }*pi/180;
        DriverVel = {
          0,0,0, 0,0,0, 0,0,0, 0,0,0, 0,0,0, 0,0,0, 0,0,0, //Lumbar
          0,0,0, 0,0,0, 0,0,0, 0,0,0, 0,0,0, 0,0,0, 0,0,0, 0,0,0, 0,0,0, 0,0,0, 0,0,0, //Thoracic
          0,0,0, //T1C7
          0,0,0, //C7C6
          0,0,...RangeOfMotion[1]-...RangeOfMotion[0], //C6C5
          0,0,0, //C5C4
          0,0,0, //C4C3
          0,0,0, //C3C2
          0, //C2C1
          0, //C1C0
        }*pi/180;
      };
    };
  };

  AnyFolder C5C4Extension={
    // Change the following variables to adjust the moment arm study
    AnyVector RangeOfMotion ??= DesignVar({-5,5});

    // The following should not be changed
    AnyFolder &TrunkHumanFolderRef =...BodyModel.Trunk;
    AnyFolder &TrunkHumanInterfaceRef = ...BodyModel.Interface.Trunk;
    #include "EvaluateMomentArmsStudy_IVJs.any"
    #include "IncludeArms_In_MomentArmStudy.any"
    AnyString OutputFileName = "MomentArms_Trunk_C5C4Extension";
    Model.Drivers = {
      AnyKinEqSimpleDriver TrunkDriver= {
        AnyKinMeasure& TrunkMeasure = ....Measure_Spine;
        DriverPos = {
          0,0,0, 0,0,0, 0,0,0, 0,0,0, 0,0,0, 0,0,0, 0,0,0, //Lumbar
          0,0,0, 0,0,0, 0,0,0, 0,0,0, 0,0,0, 0,0,0, 0,0,0, 0,0,0, 0,0,0, 0,0,0, 0,0,0, //Thoracic
          0,0,0, //T1C7
          0,0,0, //C7C6
          0,0,0, //C6C5
          0,0,...RangeOfMotion[0], //C5C4
          0,0,0, //C4C3
          0,0,0, //C3C2
          0, //C2C1
          0, //C1C0
        }*pi/180;
        DriverVel = {
          0,0,0, 0,0,0, 0,0,0, 0,0,0, 0,0,0, 0,0,0, 0,0,0, //Lumbar
          0,0,0, 0,0,0, 0,0,0, 0,0,0, 0,0,0, 0,0,0, 0,0,0, 0,0,0, 0,0,0, 0,0,0, 0,0,0, //Thoracic
          0,0,0, //T1C7
          0,0,0, //C7C6
          0,0,0, //C6C5
          0,0,...RangeOfMotion[1]-...RangeOfMotion[0], //C5C4
          0,0,0, //C4C3
          0,0,0, //C3C2
          0, //C2C1
          0, //C1C0
        }*pi/180;
      };
    };
  };

  AnyFolder C4C3Extension={
    // Change the following variables to adjust the moment arm study
    AnyVector RangeOfMotion ??= DesignVar({-5,5});

    // The following should not be changed
    AnyFolder &TrunkHumanFolderRef =...BodyModel.Trunk;
    AnyFolder &TrunkHumanInterfaceRef = ...BodyModel.Interface.Trunk;
    #include "EvaluateMomentArmsStudy_IVJs.any"
    #include "IncludeArms_In_MomentArmStudy.any"
    AnyString OutputFileName = "MomentArms_Trunk_C4C3Extension";
    Model.Drivers = {
      AnyKinEqSimpleDriver TrunkDriver= {
        AnyKinMeasure& TrunkMeasure = ....Measure_Spine;
        DriverPos = {
          0,0,0, 0,0,0, 0,0,0, 0,0,0, 0,0,0, 0,0,0, 0,0,0, //Lumbar
          0,0,0, 0,0,0, 0,0,0, 0,0,0, 0,0,0, 0,0,0, 0,0,0, 0,0,0, 0,0,0, 0,0,0, 0,0,0, //Thoracic
          0,0,0, //T1C7
          0,0,0, //C7C6
          0,0,0, //C6C5
          0,0,0, //C5C4
          0,0,...RangeOfMotion[0], //C4C3
          0,0,0, //C3C2
          0, //C2C1
          0, //C1C0
        }*pi/180;
        DriverVel = {
          0,0,0, 0,0,0, 0,0,0, 0,0,0, 0,0,0, 0,0,0, 0,0,0, //Lumbar
          0,0,0, 0,0,0, 0,0,0, 0,0,0, 0,0,0, 0,0,0, 0,0,0, 0,0,0, 0,0,0, 0,0,0, 0,0,0, //Thoracic
          0,0,0, //T1C7
          0,0,0, //C7C6
          0,0,0, //C6C5
          0,0,0, //C5C4
          0,0,...RangeOfMotion[1]-...RangeOfMotion[0], //C4C3
          0,0,0, //C3C2
          0, //C2C1
          0, //C1C0
        }*pi/180;
      };
    };
  };

  AnyFolder C3C2Extension={
    // Change the following variables to adjust the moment arm study
    AnyVector RangeOfMotion ??= DesignVar({-5,5});

    // The following should not be changed
    AnyFolder &TrunkHumanFolderRef =...BodyModel.Trunk;
    AnyFolder &TrunkHumanInterfaceRef = ...BodyModel.Interface.Trunk;
    #include "EvaluateMomentArmsStudy_IVJs.any"
    #include "IncludeArms_In_MomentArmStudy.any"
    AnyString OutputFileName = "MomentArms_Trunk_C3C2Extension";
    Model.Drivers = {
      AnyKinEqSimpleDriver TrunkDriver= {
        AnyKinMeasure& TrunkMeasure = ....Measure_Spine;
        DriverPos = {
          0,0,0, 0,0,0, 0,0,0, 0,0,0, 0,0,0, 0,0,0, 0,0,0, //Lumbar
          0,0,0, 0,0,0, 0,0,0, 0,0,0, 0,0,0, 0,0,0, 0,0,0, 0,0,0, 0,0,0, 0,0,0, 0,0,0, //Thoracic
          0,0,0, //T1C7
          0,0,0, //C7C6
          0,0,0, //C6C5
          0,0,0, //C5C4
          0,0,0, //C4C3
          0,0,...RangeOfMotion[0], //C3C2
          0, //C2C1
          0, //C1C0
        }*pi/180;
        DriverVel = {
          0,0,0, 0,0,0, 0,0,0, 0,0,0, 0,0,0, 0,0,0, 0,0,0, //Lumbar
          0,0,0, 0,0,0, 0,0,0, 0,0,0, 0,0,0, 0,0,0, 0,0,0, 0,0,0, 0,0,0, 0,0,0, 0,0,0, //Thoracic
          0,0,0, //T1C7
          0,0,0, //C7C6
          0,0,0, //C6C5
          0,0,0, //C5C4
          0,0,0, //C4C3
          0,0,...RangeOfMotion[1]-...RangeOfMotion[0], //C3C2
          0, //C2C1
          0, //C1C0
        }*pi/180;
      };
    };
  };

//  AnyFolder C2C1Extension={
//    // Change the following variables to adjust the moment arm study
//    AnyVector RangeOfMotion ??= DesignVar({-5,5});
//
//    // The following should not be changed
//    AnyFolder &TrunkHumanFolderRef =...BodyModel.Trunk;
//    AnyFolder &TrunkHumanInterfaceRef = ...BodyModel.Interface.Trunk;
//    #include "EvaluateMomentArmsStudy_IVJs.any"
//    #include "IncludeArms_In_MomentArmStudy.any"
//    AnyString OutputFileName = "MomentArms_Trunk_C2C1Extension";
//    Model.Drivers = {
//      AnyKinEqSimpleDriver TrunkDriver= {
//        AnyKinMeasure& TrunkMeasure = ....Measure_Spine;
//        DriverPos = {
//          0,0,0, 0,0,0, 0,0,0, 0,0,0, 0,0,0, 0,0,0, 0,0,0, //Lumbar
//          0,0,0, 0,0,0, 0,0,0, 0,0,0, 0,0,0, 0,0,0, 0,0,0, 0,0,0, 0,0,0, 0,0,0, 0,0,0, //Thoracic
//          0,0,0, //T1C7
//          0,0,0, //C7C6
//          0,0,0, //C6C5
//          0,0,0, //C5C4
//          0,0,0, //C4C3
//          0,0,0, //C3C2
//          0, //C2C1
//          0, //C1C0
//        }*pi/180;
//        DriverVel = {
//          0,0,0, 0,0,0, 0,0,0, 0,0,0, 0,0,0, 0,0,0, 0,0,0, //Lumbar
//          0,0,0, 0,0,0, 0,0,0, 0,0,0, 0,0,0, 0,0,0, 0,0,0, 0,0,0, 0,0,0, 0,0,0, 0,0,0, //Thoracic
//          0,0,0, //T1C7
//          0,0,0, //C7C6
//          0,0,0, //C6C5
//          0,0,0, //C5C4
//          0,0,0, //C4C3
//          0,0,0, //C3C2
//          0, //C2C1
//          0, //C1C0
//        }*pi/180;
//      };
//    };
//  };

  AnyFolder C1C0Extension={
    // Change the following variables to adjust the moment arm study
    AnyVector RangeOfMotion ??= DesignVar({-5,5});

    // The following should not be changed
    AnyFolder &TrunkHumanFolderRef =...BodyModel.Trunk;
    AnyFolder &TrunkHumanInterfaceRef = ...BodyModel.Interface.Trunk;
    #include "EvaluateMomentArmsStudy_IVJs.any"
    #include "IncludeArms_In_MomentArmStudy.any"
    AnyString OutputFileName = "MomentArms_Trunk_C1C0Extension";
    Model.Drivers = {
      AnyKinEqSimpleDriver TrunkDriver= {
        AnyKinMeasure& TrunkMeasure = ....Measure_Spine;
        DriverPos = {
          0,0,0, 0,0,0, 0,0,0, 0,0,0, 0,0,0, 0,0,0, 0,0,0, //Lumbar
          0,0,0, 0,0,0, 0,0,0, 0,0,0, 0,0,0, 0,0,0, 0,0,0, 0,0,0, 0,0,0, 0,0,0, 0,0,0, //Thoracic
          0,0,0, //T1C7
          0,0,0, //C7C6
          0,0,0, //C6C5
          0,0,0, //C5C4
          0,0,0, //C4C3
          0,0,0, //C3C2
          0, //C2C1
          ...RangeOfMotion[0], //C1C0
        }*pi/180;
        DriverVel = {
          0,0,0, 0,0,0, 0,0,0, 0,0,0, 0,0,0, 0,0,0, 0,0,0, //Lumbar
          0,0,0, 0,0,0, 0,0,0, 0,0,0, 0,0,0, 0,0,0, 0,0,0, 0,0,0, 0,0,0, 0,0,0, 0,0,0, //Thoracic
          0,0,0, //T1C7
          0,0,0, //C7C6
          0,0,0, //C6C5
          0,0,0, //C5C4
          0,0,0, //C4C3
          0,0,0, //C3C2
          0, //C2C1
          ...RangeOfMotion[1]-...RangeOfMotion[0], //C1C0
        }*pi/180;
      };
    };
  };

  //    AnyFolder PelvisThoraxExtension={
  //
  //      // Change the following variables to adjust the moment arm study
  //      AnyVector RangeOfMotion ??= DesignVar({-60,30});
  //      AnyVar PelvisThoraxLateralBending ??= DesignVar(0);
  //      AnyVar PelvisThoraxRotation ??= DesignVar(0);
  //      /////////////////////////////////////////
  //
  //      // The following should not be changed
  //      AnyFolder &TrunkHumanFolderRef =...BodyModel.Trunk;
  //      AnyFolder &TrunkHumanInterfaceRef = ...BodyModel.Interface.Trunk;
  //      #include "EvaluateMomentArmsStudy.any"
  //      AnyString OutputFileName = "MomentArms_Trunk_PelvisThoraxExtension";
  //      Model.Drivers = {
  //        AnyKinEqSimpleDriver TrunkDriver= {
  //          AnyKinMeasure& ref = .TrunkMeasure;
  //          DriverPos = {...RangeOfMotion[0],...PelvisThoraxLateralBending,...PelvisThoraxRotation,0,0,0}*pi/180;
  //          DriverVel = {...RangeOfMotion[1]-...RangeOfMotion[0],0,0,0,0,0}*pi/180;
  //        };
  //      };
  //    };

  //    AnyFolder PelvisThoraxLateralBending={
  //      // Change the following variables to adjust the moment arm study
  //      AnyVector RangeOfMotion ??= DesignVar({-30,30});
  //      AnyVar PelvisThoraxExtension ??= DesignVar(0);
  //      AnyVar PelvisThoraxRotation ??= DesignVar(0);
  //      /////////////////////////////////////////////////////////////
  //
  //      AnyFolder &TrunkHumanFolderRef =...BodyModel.Trunk;
  //      AnyFolder &TrunkHumanInterfaceRef = ...BodyModel.Interface.Trunk;
  //      #include "EvaluateMomentArmsStudy.any"
  //      AnyString OutputFileName = "MomentArms_Trunk_PelvisThoraxLateralBending";
  //      Model.Drivers = {
  //        AnyKinEqSimpleDriver TrunkDriver= {
  //          AnyKinMeasure& ref = .TrunkMeasure;
  //          DriverPos = {...PelvisThoraxExtension,...RangeOfMotion[0],...PelvisThoraxRotation, 0,0,0}*pi/180;
  //          DriverVel = {0,...RangeOfMotion[1]-...RangeOfMotion[0],0,0,0,0}*pi/180;
  //        };
  //      };
  //    };
  //
  //    AnyFolder PelvisThoraxRotation={
  //      // Change the following variables to adjust the moment arm study
  //      AnyVector RangeOfMotion ??= DesignVar({-40,40});
  //      AnyVar PelvisThoraxExtension ??= DesignVar(0);
  //      AnyVar PelvisThoraxLateralBending ??= DesignVar(0);
  //      ////////////////////////////////////////////////////////////////
  //
  //      AnyFolder &TrunkHumanFolderRef =...BodyModel.Trunk;
  //      AnyFolder &TrunkHumanInterfaceRef = ...BodyModel.Interface.Trunk;
  //      #include "EvaluateMomentArmsStudy.any"
  //      AnyString OutputFileName = "MomentArms_Trunk_PelvisThoraxRotation";
  //      Model.Drivers = {
  //        AnyKinEqSimpleDriver TrunkDriver= {
  //          AnyKinMeasure& ref = .TrunkMeasure;
  //          DriverPos = {...PelvisThoraxExtension,...PelvisThoraxLateralBending,...RangeOfMotion[0], 0,0,0}*pi/180;
  //          DriverVel = {0,0,...RangeOfMotion[1]-...RangeOfMotion[0],0,0,0}*pi/180;
  //        };
  //      };
  //    };


};//Trunk

Run_all_studies ={
  //   AnyOperation &Trunk1 = .Trunk.PelvisThoraxExtension.Run;
  //   AnyOperation &Trunk2 = .Trunk.PelvisThoraxLateralBending.Run;
  //   AnyOperation &Trunk3 = .Trunk.PelvisThoraxRotation.Run;
  AnyOperation &PelvisSacrumExtension = .Trunk.PelvisSacrumExtension.Run;
  AnyOperation &L5SacrumExtension = .Trunk.L5SacrumExtension.Run;
  AnyOperation &L4L5Extension = .Trunk.L4L5Extension.Run;
  AnyOperation &L3L4Extension = .Trunk.L3L4Extension.Run;
  AnyOperation &L2L3Extension = .Trunk.L2L3Extension.Run;
  AnyOperation &L1L2Extension = .Trunk.L1L2Extension.Run;
  AnyOperation &T12L1Extension = .Trunk.T12L1Extension.Run;
  AnyOperation &T11T12Extension = .Trunk.T11T12Extension.Run;
  AnyOperation &T10T11Extension = .Trunk.T10T11Extension.Run;
  AnyOperation &T9T10Extension = .Trunk.T9T10Extension.Run;
  AnyOperation &T8T9Extension = .Trunk.T8T9Extension.Run;
  AnyOperation &T7T8Extension = .Trunk.T7T8Extension.Run;
  AnyOperation &T6T7Extension = .Trunk.T6T7Extension.Run;
  AnyOperation &T5T6Extension = .Trunk.T5T6Extension.Run;
  AnyOperation &T4T5Extension = .Trunk.T4T5Extension.Run;
  AnyOperation &T3T4Extension = .Trunk.T3T4Extension.Run;
  AnyOperation &T2T3Extension = .Trunk.T2T3Extension.Run;
  AnyOperation &T1T2Extension = .Trunk.T1T2Extension.Run;
  AnyOperation &T1C7Extension = .Trunk.T1C7Extension.Run;
  AnyOperation &C7C6Extension = .Trunk.C7C6Extension.Run;
  AnyOperation &C6C5Extension = .Trunk.C6C5Extension.Run;
  AnyOperation &C5C4Extension = .Trunk.C5C4Extension.Run;
  AnyOperation &C4C3Extension = .Trunk.C4C3Extension.Run;
  AnyOperation &C3C2Extension = .Trunk.C3C2Extension.Run;
//  AnyOperation &C2C1Extension = .Trunk.C2C1Extension.Run;
  AnyOperation &C1C0Extension = .Trunk.C1C0Extension.Run;
};
