IncludeForces = {
  &....Joints.Thorax.T1T2.Constraints.Reaction,
  &....Joints.Thorax.T2T3.Constraints.Reaction,
  &....Joints.Thorax.T3T4.Constraints.Reaction,
  &....Joints.Thorax.T4T5.Constraints.Reaction,
  &....Joints.Thorax.T5T6.Constraints.Reaction,
  &....Joints.Thorax.T6T7.Constraints.Reaction,
  &....Joints.Thorax.T7T8.Constraints.Reaction,
  &....Joints.Thorax.T8T9.Constraints.Reaction,
  &....Joints.Thorax.T9T10.Constraints.Reaction,
  &....Joints.Thorax.T10T11.Constraints.Reaction,

  &....Joints.RibCage.Right.R1.RotationConstraint.Reaction,
  &....Joints.RibCage.Right.R2.RotationConstraint.Reaction,
  &....Joints.RibCage.Right.R3.RotationConstraint.Reaction,
  &....Joints.RibCage.Right.R4.RotationConstraint.Reaction,
  &....Joints.RibCage.Right.R5.RotationConstraint.Reaction,
  &....Joints.RibCage.Right.R6.RotationConstraint.Reaction,
  &....Joints.RibCage.Right.R7.RotationConstraint.Reaction,
  &....Joints.RibCage.Right.R8.RotationConstraint.Reaction,
  &....Joints.RibCage.Right.R9.RotationConstraint.Reaction,
  &....Joints.RibCage.Right.R10.RotationConstraint.Reaction,

  &....Joints.RibCage.Right.R1.CostoVertebral.Constraints.Reaction,
  &....Joints.RibCage.Right.R2.CostoVertebral.Constraints.Reaction,
  &....Joints.RibCage.Right.R3.CostoVertebral.Constraints.Reaction,
  &....Joints.RibCage.Right.R4.CostoVertebral.Constraints.Reaction,
  &....Joints.RibCage.Right.R5.CostoVertebral.Constraints.Reaction,
  &....Joints.RibCage.Right.R6.CostoVertebral.Constraints.Reaction,
  &....Joints.RibCage.Right.R7.CostoVertebral.Constraints.Reaction,
  &....Joints.RibCage.Right.R8.CostoVertebral.Constraints.Reaction,
  &....Joints.RibCage.Right.R9.CostoVertebral.Constraints.Reaction,
  &....Joints.RibCage.Right.R10.CostoVertebral.Constraints.Reaction,

  &....Joints.RibCage.SternumRibConnection.Reaction,

};

AnyDrawVector drw1 = {Vec = .F*0.0005; AnyRefFrame &ref = .ref; Line.RGB=.rgb;};
