AnyFolder Intercostalis = {
  //IC_R11_Ant_R_Ins
  AnyViaPointMuscle ICR1R2_Ant = {
    AnyMuscleModel &Model = ...MuscleParametersRibCageRight.InterCostalisR1R2RPar;
    AnyRefNode &R1 = ...SegmentsRibCage.RibsRight.R1Seg.IC_R1_Ant_R_Org;
    AnyRefNode &R2 = ...SegmentsRibCage.RibsRight.R2Seg.IC_R2_Ant_R_Ins;
    AnyDrawMuscle DrwMus = {#include "../DrawSettings/MusDrawSettings.any"};
  };

  AnyViaPointMuscle ICR1R2_Int = {
    AnyMuscleModel &Model = ...MuscleParametersRibCageRight.InterCostalisR1R2RPar;
    AnyRefNode &R1 = ...SegmentsRibCage.RibsRight.R1Seg.IC_R1_Int_R_Org;
    AnyRefNode &R2 = ...SegmentsRibCage.RibsRight.R2Seg.IC_R2_Int_R_Ins;
    AnyDrawMuscle DrwMus = {#include "../DrawSettings/MusDrawSettings.any"};
  };

  AnyViaPointMuscle ICR1R2_Pos = {
    AnyMuscleModel &Model = ...MuscleParametersRibCageRight.InterCostalisR1R2RPar;
    AnyRefNode &R1 = ...SegmentsRibCage.RibsRight.R1Seg.IC_R1_Pos_R_Org;
    AnyRefNode &R2 = ...SegmentsRibCage.RibsRight.R2Seg.IC_R2_Pos_R_Ins;
    AnyDrawMuscle DrwMus = {#include "../DrawSettings/MusDrawSettings.any"};
  };


  AnyViaPointMuscle ICR2R3_Ant = {
    AnyMuscleModel &Model = ...MuscleParametersRibCageRight.InterCostalisR2R3RPar;
    AnyRefNode &R2 = ...SegmentsRibCage.RibsRight.R2Seg.IC_R2_Ant_R_Org;
    AnyRefNode &R3 = ...SegmentsRibCage.RibsRight.R3Seg.IC_R3_Ant_R_Ins;
    AnyDrawMuscle DrwMus = {#include "../DrawSettings/MusDrawSettings.any"};
  };

  AnyViaPointMuscle ICR2R3_Int = {
    AnyMuscleModel &Model = ...MuscleParametersRibCageRight.InterCostalisR2R3RPar;
    AnyRefNode &R2 = ...SegmentsRibCage.RibsRight.R2Seg.IC_R2_Int_R_Org;
    AnyRefNode &R3 = ...SegmentsRibCage.RibsRight.R3Seg.IC_R3_Int_R_Ins;
    AnyDrawMuscle DrwMus = {#include "../DrawSettings/MusDrawSettings.any"};
  };

  AnyViaPointMuscle ICR2R3_Pos = {
    AnyMuscleModel &Model = ...MuscleParametersRibCageRight.InterCostalisR2R3RPar;
    AnyRefNode &R2 = ...SegmentsRibCage.RibsRight.R2Seg.IC_R2_Pos_R_Org;
    AnyRefNode &R3 = ...SegmentsRibCage.RibsRight.R3Seg.IC_R3_Pos_R_Ins;
    AnyDrawMuscle DrwMus = {#include "../DrawSettings/MusDrawSettings.any"};
  };

  AnyViaPointMuscle ICR3R4_Ant = {
    AnyMuscleModel &Model = ...MuscleParametersRibCageRight.InterCostalisR3R4RPar;
    AnyRefNode &R3 = ...SegmentsRibCage.RibsRight.R3Seg.IC_R3_Ant_R_Org;
    AnyRefNode &R4 = ...SegmentsRibCage.RibsRight.R4Seg.IC_R4_Ant_R_Ins;
    AnyDrawMuscle DrwMus = {#include "../DrawSettings/MusDrawSettings.any"};
  };

  AnyViaPointMuscle ICR3R4_Int = {
    AnyMuscleModel &Model = ...MuscleParametersRibCageRight.InterCostalisR3R4RPar;
    AnyRefNode &R3 = ...SegmentsRibCage.RibsRight.R3Seg.IC_R3_Int_R_Org;
    AnyRefNode &R4 = ...SegmentsRibCage.RibsRight.R4Seg.IC_R4_Int_R_Ins;
    AnyDrawMuscle DrwMus = {#include "../DrawSettings/MusDrawSettings.any"};
  };

  AnyViaPointMuscle ICR3R4_Pos = {
    AnyMuscleModel &Model = ...MuscleParametersRibCageRight.InterCostalisR3R4RPar;
    AnyRefNode &R3 = ...SegmentsRibCage.RibsRight.R3Seg.IC_R3_Pos_R_Org;
    AnyRefNode &R4 = ...SegmentsRibCage.RibsRight.R4Seg.IC_R4_Pos_R_Ins;
    AnyDrawMuscle DrwMus = {#include "../DrawSettings/MusDrawSettings.any"};
  };

  AnyViaPointMuscle ICR4R5_Ant = {
    AnyMuscleModel &Model = ...MuscleParametersRibCageRight.InterCostalisR4R5RPar;
    AnyRefNode &R4 = ...SegmentsRibCage.RibsRight.R4Seg.IC_R4_Pos_R_Org;
    AnyRefNode &R5 = ...SegmentsRibCage.RibsRight.R5Seg.IC_R5_Pos_R_Ins;
    AnyDrawMuscle DrwMus = {#include "../DrawSettings/MusDrawSettings.any"};
  };

  AnyViaPointMuscle ICR4R5_Int = {
    AnyMuscleModel &Model = ...MuscleParametersRibCageRight.InterCostalisR4R5RPar;
    AnyRefNode &R4 = ...SegmentsRibCage.RibsRight.R4Seg.IC_R4_Pos_R_Org;
    AnyRefNode &R5 = ...SegmentsRibCage.RibsRight.R5Seg.IC_R5_Pos_R_Ins;
    AnyDrawMuscle DrwMus = {#include "../DrawSettings/MusDrawSettings.any"};
  };

  AnyViaPointMuscle ICR4R5_Pos = {
    AnyMuscleModel &Model = ...MuscleParametersRibCageRight.InterCostalisR4R5RPar;
    AnyRefNode &R4 = ...SegmentsRibCage.RibsRight.R4Seg.IC_R4_Pos_R_Org;
    AnyRefNode &R5 = ...SegmentsRibCage.RibsRight.R5Seg.IC_R5_Pos_R_Ins;
    AnyDrawMuscle DrwMus = {#include "../DrawSettings/MusDrawSettings.any"};
  };

  AnyViaPointMuscle ICR5R6_Ant = {
    AnyMuscleModel &Model = ...MuscleParametersRibCageRight.InterCostalisR5R6RPar;
    AnyRefNode &R5 = ...SegmentsRibCage.RibsRight.R5Seg.IC_R5_Ant_R_Org;
    AnyRefNode &R6 = ...SegmentsRibCage.RibsRight.R6Seg.IC_R6_Ant_R_Ins;
    AnyDrawMuscle DrwMus = {#include "../DrawSettings/MusDrawSettings.any"};
  };

  AnyViaPointMuscle ICR5R6_Int = {
    AnyMuscleModel &Model = ...MuscleParametersRibCageRight.InterCostalisR5R6RPar;
    AnyRefNode &R5 = ...SegmentsRibCage.RibsRight.R5Seg.IC_R5_Int_R_Org;
    AnyRefNode &R6 = ...SegmentsRibCage.RibsRight.R6Seg.IC_R6_Int_R_Ins;
    AnyDrawMuscle DrwMus = {#include "../DrawSettings/MusDrawSettings.any"};
  };

  AnyViaPointMuscle ICR5R6_Pos = {
    AnyMuscleModel &Model = ...MuscleParametersRibCageRight.InterCostalisR5R6RPar;
    AnyRefNode &R5 = ...SegmentsRibCage.RibsRight.R5Seg.IC_R5_Pos_R_Org;
    AnyRefNode &R6 = ...SegmentsRibCage.RibsRight.R6Seg.IC_R6_Pos_R_Ins;
    AnyDrawMuscle DrwMus = {#include "../DrawSettings/MusDrawSettings.any"};
  };

  AnyViaPointMuscle ICR6R7_Ant = {
    AnyMuscleModel &Model = ...MuscleParametersRibCageRight.InterCostalisR6R7RPar;
    AnyRefNode &R6 = ...SegmentsRibCage.RibsRight.R6Seg.IC_R6_Ant_R_Org;
    AnyRefNode &R7 = ...SegmentsRibCage.RibsRight.R7Seg.IC_R7_Ant_R_Ins;
    AnyDrawMuscle DrwMus = {#include "../DrawSettings/MusDrawSettings.any"};
  };

  AnyViaPointMuscle ICR6R7_Int = {
    AnyMuscleModel &Model = ...MuscleParametersRibCageRight.InterCostalisR6R7RPar;
    AnyRefNode &R6 = ...SegmentsRibCage.RibsRight.R6Seg.IC_R6_Int_R_Org;
    AnyRefNode &R7 = ...SegmentsRibCage.RibsRight.R7Seg.IC_R7_Int_R_Ins;
    AnyDrawMuscle DrwMus = {#include "../DrawSettings/MusDrawSettings.any"};
  };

  AnyViaPointMuscle ICR6R7_Pos = {
    AnyMuscleModel &Model = ...MuscleParametersRibCageRight.InterCostalisR6R7RPar;
    AnyRefNode &R6 = ...SegmentsRibCage.RibsRight.R6Seg.IC_R6_Pos_R_Org;
    AnyRefNode &R7 = ...SegmentsRibCage.RibsRight.R7Seg.IC_R7_Pos_R_Ins;
    AnyDrawMuscle DrwMus = {#include "../DrawSettings/MusDrawSettings.any"};
  };

  AnyViaPointMuscle ICR7R8_Ant = {
    AnyMuscleModel &Model = ...MuscleParametersRibCageRight.InterCostalisR7R8RPar;
    AnyRefNode &R7 = ...SegmentsRibCage.RibsRight.R7Seg.IC_R7_Ant_R_Org;
    AnyRefNode &R8 = ...SegmentsRibCage.RibsRight.R8Seg.IC_R8_Ant_R_Ins;
    AnyDrawMuscle DrwMus = {#include "../DrawSettings/MusDrawSettings.any"};
  };

  AnyViaPointMuscle ICR7R8_Int = {
    AnyMuscleModel &Model = ...MuscleParametersRibCageRight.InterCostalisR7R8RPar;
    AnyRefNode &R7 = ...SegmentsRibCage.RibsRight.R7Seg.IC_R7_Int_R_Org;
    AnyRefNode &R8 = ...SegmentsRibCage.RibsRight.R8Seg.IC_R8_Int_R_Ins;
    AnyDrawMuscle DrwMus = {#include "../DrawSettings/MusDrawSettings.any"};
  };

  AnyViaPointMuscle ICR7R8_Pos = {
    AnyMuscleModel &Model = ...MuscleParametersRibCageRight.InterCostalisR7R8RPar;
    AnyRefNode &R7 = ...SegmentsRibCage.RibsRight.R7Seg.IC_R7_Pos_R_Org;
    AnyRefNode &R8 = ...SegmentsRibCage.RibsRight.R8Seg.IC_R8_Pos_R_Ins;
    AnyDrawMuscle DrwMus = {#include "../DrawSettings/MusDrawSettings.any"};
  };

  AnyViaPointMuscle ICR8R9_Ant = {
    AnyMuscleModel &Model = ...MuscleParametersRibCageRight.InterCostalisR8R9RPar;
    AnyRefNode &R8 = ...SegmentsRibCage.RibsRight.R8Seg.IC_R8_Ant_R_Org;
    AnyRefNode &R9 = ...SegmentsRibCage.RibsRight.R9Seg.IC_R9_Ant_R_Ins;
    AnyDrawMuscle DrwMus = {#include "../DrawSettings/MusDrawSettings.any"};
  };

  AnyViaPointMuscle ICR8R9_Int = {
    AnyMuscleModel &Model = ...MuscleParametersRibCageRight.InterCostalisR8R9RPar;
    AnyRefNode &R8 = ...SegmentsRibCage.RibsRight.R8Seg.IC_R8_Int_R_Org;
    AnyRefNode &R9 = ...SegmentsRibCage.RibsRight.R9Seg.IC_R9_Int_R_Ins;
    AnyDrawMuscle DrwMus = {#include "../DrawSettings/MusDrawSettings.any"};
  };

  AnyViaPointMuscle ICR8R9_Pos = {
    AnyMuscleModel &Model = ...MuscleParametersRibCageRight.InterCostalisR8R9RPar;
    AnyRefNode &R8 = ...SegmentsRibCage.RibsRight.R8Seg.IC_R8_Pos_R_Org;
    AnyRefNode &R9 = ...SegmentsRibCage.RibsRight.R9Seg.IC_R9_Pos_R_Ins;
    AnyDrawMuscle DrwMus = {#include "../DrawSettings/MusDrawSettings.any"};
  };

  AnyViaPointMuscle ICR9R10_Ant = {
    AnyMuscleModel &Model = ...MuscleParametersRibCageRight.InterCostalisR9R10RPar;
    AnyRefNode &R9   = ...SegmentsRibCage.RibsRight.R9Seg.IC_R9_Ant_R_Org;
    AnyRefNode &R10 = ...SegmentsRibCage.RibsRight.R10Seg.IC_R10_Ant_R_Ins;
    AnyDrawMuscle DrwMus = {#include "../DrawSettings/MusDrawSettings.any"};
  };

  AnyViaPointMuscle ICR9R10_Int = {
    AnyMuscleModel &Model = ...MuscleParametersRibCageRight.InterCostalisR9R10RPar;
    AnyRefNode &R9   = ...SegmentsRibCage.RibsRight.R9Seg.IC_R9_Int_R_Org;
    AnyRefNode &R10 = ...SegmentsRibCage.RibsRight.R10Seg.IC_R10_Int_R_Ins;
    AnyDrawMuscle DrwMus = {#include "../DrawSettings/MusDrawSettings.any"};
  };

  AnyViaPointMuscle ICR9R10_Pos = {
    AnyMuscleModel &Model = ...MuscleParametersRibCageRight.InterCostalisR9R10RPar;
    AnyRefNode &R9   = ...SegmentsRibCage.RibsRight.R9Seg.IC_R9_Pos_R_Org;
    AnyRefNode &R10 = ...SegmentsRibCage.RibsRight.R10Seg.IC_R10_Pos_R_Ins;
    AnyDrawMuscle DrwMus = {#include "../DrawSettings/MusDrawSettings.any"};
  };

  AnyViaPointMuscle ICR10R11_Ant = {
    AnyMuscleModel &Model = ...MuscleParametersRibCageRight.InterCostalisR10R11RPar;
    AnyRefNode &R10 = ...SegmentsRibCage.RibsRight.R10Seg.IC_R10_Ant_R_Org;
    AnyRefNode &R11 = ...SegmentsRibCage.RibsRight.R11Seg.IC_R11_Ant_R_Ins;
    AnyDrawMuscle DrwMus = {#include "../DrawSettings/MusDrawSettings.any"};
  };

  AnyViaPointMuscle ICR10R11_Int = {
    AnyMuscleModel &Model = ...MuscleParametersRibCageRight.InterCostalisR10R11RPar;
    AnyRefNode &R10 = ...SegmentsRibCage.RibsRight.R10Seg.IC_R10_Int_R_Org;
    AnyRefNode &R11 = ...SegmentsRibCage.RibsRight.R11Seg.IC_R11_Int_R_Ins;
    AnyDrawMuscle DrwMus = {#include "../DrawSettings/MusDrawSettings.any"};
  };
  AnyViaPointMuscle ICR10R11_Pos = {
    AnyMuscleModel &Model = ...MuscleParametersRibCageRight.InterCostalisR10R11RPar;
    AnyRefNode &R10 = ...SegmentsRibCage.RibsRight.R10Seg.IC_R10_Pos_R_Org;
    AnyRefNode &R11 = ...SegmentsRibCage.RibsRight.R11Seg.IC_R11_Pos_R_Ins;
    AnyDrawMuscle DrwMus = {#include "../DrawSettings/MusDrawSettings.any"};
  };
};
