AnyFloat d ={ vnorm(Data'[0]-Data'[1]),vnorm(Data'[1]-Data'[2]),  vnorm(Data'[2]-Data'[3]),  vnorm(Data'[3]-Data'[4]),  vnorm(Data'[4]-Data'[5]),  vnorm(Data'[5]-Data'[6]),  vnorm(Data'[6]-Data'[7]),  vnorm(Data'[7]-Data'[8]),  vnorm(Data'[8]-Data'[9]),  vnorm(Data'[9]-Data'[10]),  vnorm(Data'[10]-Data'[11])   };

AnyFloat S ={
  0,
  d[0],
  d[0]+d[1],
  d[0]+d[1]+d[2],
  d[0]+d[1]+d[2]+d[3],
  d[0]+d[1]+d[2]+d[3]+d[4],
  d[0]+d[1]+d[2]+d[3]+d[4]+d[5],
  d[0]+d[1]+d[2]+d[3]+d[4]+d[5]+d[6],
  d[0]+d[1]+d[2]+d[3]+d[4]+d[5]+d[6]+d[7],
  d[0]+d[1]+d[2]+d[3]+d[4]+d[5]+d[6]+d[7]+d[8],
  d[0]+d[1]+d[2]+d[3]+d[4]+d[5]+d[6]+d[7]+d[8]+d[9],
  d[0]+d[1]+d[2]+d[3]+d[4]+d[5]+d[6]+d[7]+d[8]+d[9]+d[10]
  //d[0]+d[1]+d[2]+d[3]+d[4]+d[5]+d[6]+d[7]+d[8]+d[9]+d[10]+d[11]
};

AnyFunInterpol Fun = {
  AnyFloat L= max(.S);
  T= .S;
  Type=Bspline;
  Data = .Data;
};
