AnyFolder LongissimusCapitis = {
  AnyMuscleViaPoint LongissimusCapitisC3C0 = {
    AnyMuscleModel &MusMdl = ...MuscleParametersCervicalSpineRight.LongissimusCapitisC3C0Par;
    AnyRefNode &Org = ...SegmentsCervicalSpine.C3Seg.LongissimusCapitisC3C0NodeR;
    AnyRefNode &Ins = ...SegmentsCervicalSpine.SkullSeg.LongissimusCapitisNodeR;
    AnyDrawMuscle DrwMus = {#include "../drawSettings/MusDrawSettings.any"};
  };

  AnyMuscleViaPoint LongissimusCapitisC4C0 = {
    AnyMuscleModel &MusMdl = ...MuscleParametersCervicalSpineRight.LongissimusCapitisC4C0Par;
    AnyRefNode &Org = ...SegmentsCervicalSpine.C4Seg.LongissimusCapitisC4C0NodeR;
    AnyRefNode &Ins = ...SegmentsCervicalSpine.SkullSeg.LongissimusCapitisNodeR;
    AnyDrawMuscle DrwMus = {#include "../drawSettings/MusDrawSettings.any"};
  };

  AnyMuscleViaPoint LongissimusCapitisC5C0 = {
    AnyMuscleModel &MusMdl = ...MuscleParametersCervicalSpineRight.LongissimusCapitisC5C0Par;
    AnyRefNode &Org = ...SegmentsCervicalSpine.C5Seg.LongissimusCapitisC5C0NodeR;
    AnyRefNode &Ins = ...SegmentsCervicalSpine.SkullSeg.LongissimusCapitisNodeR;
    AnyDrawMuscle DrwMus = {#include "../drawSettings/MusDrawSettings.any"};
  };

  AnyMuscleViaPoint LongissimusCapitisC6C0 = {
    AnyMuscleModel &MusMdl = ...MuscleParametersCervicalSpineRight.LongissimusCapitisC6C0Par;
    AnyRefNode &Org = ...SegmentsCervicalSpine.C6Seg.LongissimusCapitisC6C0NodeR;
    AnyRefNode &Ins = ...SegmentsCervicalSpine.SkullSeg.LongissimusCapitisNodeR;
    AnyDrawMuscle DrwMus = {#include "../drawSettings/MusDrawSettings.any"};
  };

  AnyMuscleViaPoint LongissimusCapitisC7C0 = {
    AnyMuscleModel &MusMdl = ...MuscleParametersCervicalSpineRight.LongissimusCapitisC7C0Par;
    AnyRefNode &Org = ...SegmentsCervicalSpine.C7Seg.LongissimusCapitisC7C0NodeR;
    AnyRefNode &Ins = ...SegmentsCervicalSpine.SkullSeg.LongissimusCapitisNodeR;
    AnyDrawMuscle DrwMus = {#include "../drawSettings/MusDrawSettings.any"};
  };

  AnyMuscleViaPoint LongissimusCapitisT2C0 = {
    AnyMuscleModel &MusMdl = ...MuscleParametersCervicalSpineRight.LongissimusCapitisT2C0Par;
    AnyRefNode &Org = ...SegmentsThorax.T2Seg.LongissimusCapitisT2C0NodeR;
    AnyRefNode &Ins = ...SegmentsCervicalSpine.SkullSeg.LongissimusCapitisNodeR;
    AnyDrawMuscle DrwMus = {#include "../drawSettings/MusDrawSettings.any"};
  };

};
