AnyFolder LongusCapitis = {
  AnyMuscleViaPoint LongusCapitisC6C0 = {
    AnyMuscleModel &MusMdl = ...MuscleParametersCervicalSpineLeft.LongusCapitisC6C0Par;
    AnyRefNode &Org = ...SegmentsCervicalSpine.C6Seg.LongusCapitisC6C0NodeL;
    AnyRefNode &Ins = ...SegmentsCervicalSpine.SkullSeg.LongusCapitisC0NodeL;
    AnyDrawMuscle DrwMus = {#include "../drawSettings/MusDrawSettings.any"};
  };

  AnyMuscleViaPoint LongusCapitisC5C0 = {
    AnyMuscleModel &MusMdl = ...MuscleParametersCervicalSpineLeft.LongusCapitisC5C0Par;
    AnyRefNode &Org = ...SegmentsCervicalSpine.C5Seg.LongusCapitisC5C0NodeL;
    AnyRefNode &Ins = ...SegmentsCervicalSpine.SkullSeg.LongusCapitisC0NodeL;
    AnyDrawMuscle DrwMus = {#include "../drawSettings/MusDrawSettings.any"};
  };

  AnyMuscleViaPoint LongusCapitisC4C0 = {
    AnyMuscleModel &MusMdl = ...MuscleParametersCervicalSpineLeft.LongusCapitisC4C0Par;
    AnyRefNode &Org = ...SegmentsCervicalSpine.C4Seg.LongusCapitisC4C0NodeL;
    AnyRefNode &Ins = ...SegmentsCervicalSpine.SkullSeg.LongusCapitisC0NodeL;
    AnyDrawMuscle DrwMus = {#include "../drawSettings/MusDrawSettings.any"};
  };

  AnyMuscleViaPoint LongusCapitisC3C0 = {
    AnyMuscleModel &MusMdl = ...MuscleParametersCervicalSpineLeft.LongusCapitisC3C0Par;
    AnyRefNode &Org = ...SegmentsCervicalSpine.C3Seg.LongusCapitisC3C0NodeL;
    AnyRefNode &Ins = ...SegmentsCervicalSpine.SkullSeg.LongusCapitisC0NodeL;
    AnyDrawMuscle DrwMus = {#include "../drawSettings/MusDrawSettings.any"};
  };
};
