AnyFolder LongusColli = {
  AnyMuscleViaPoint LongusColliT1C6 = {
    AnyMuscleModel &MusMdl = ...MuscleParametersCervicalSpineLeft.LongusColliT1C6Par;
    AnyRefNode &Org = ...SegmentsThorax.T1Seg.LongusColliT1NodeL;
    AnyRefNode &Ins = ...SegmentsCervicalSpine.C6Seg.LongusColliT1C6NodeL;
    AnyDrawMuscle DrwMus = {#include "../drawSettings/MusDrawSettings.any"};
  };

  AnyMuscleViaPoint LongusColliT1C5 = {
    AnyMuscleModel &MusMdl = ...MuscleParametersCervicalSpineLeft.LongusColliT1C5Par;
    AnyRefNode &Org = ...SegmentsThorax.T1Seg.LongusColliT1NodeL;
    AnyRefNode &Via1 = ...SegmentsCervicalSpine.C6Seg.LongusColliT1C6NodeL;
    AnyRefNode &Ins = ...SegmentsCervicalSpine.C5Seg.LongusColliT1C5NodeL;
    AnyDrawMuscle DrwMus = {#include "../drawSettings/MusDrawSettings.any"};
  };

  AnyMuscleViaPoint LongusColliT1C4 = {
    AnyMuscleModel &MusMdl = ...MuscleParametersCervicalSpineLeft.LongusColliT1C4Par;
    AnyRefNode &Org = ...SegmentsThorax.T1Seg.LongusColliT1NodeL;
    AnyRefNode &Via1 = ...SegmentsCervicalSpine.C6Seg.LongusColliT1C6NodeL;
    AnyRefNode &Via2 = ...SegmentsCervicalSpine.C5Seg.LongusColliT1C5NodeL;
    AnyRefNode &Ins = ...SegmentsCervicalSpine.C4Seg.LongusColliT1C4NodeL;
    AnyDrawMuscle DrwMus = {#include "../drawSettings/MusDrawSettings.any"};
  };

  AnyMuscleViaPoint LongusColliT1C3 = {
    AnyMuscleModel &MusMdl = ...MuscleParametersCervicalSpineLeft.LongusColliT1C3Par;
    AnyRefNode &Org = ...SegmentsThorax.T1Seg.LongusColliT1NodeL;
    AnyRefNode &Via1 = ...SegmentsCervicalSpine.C6Seg.LongusColliT1C6NodeL;
    AnyRefNode &Via2 = ...SegmentsCervicalSpine.C5Seg.LongusColliT1C5NodeL;
    AnyRefNode &Via3 = ...SegmentsCervicalSpine.C4Seg.LongusColliT1C4NodeL;
    AnyRefNode &Ins = ...SegmentsCervicalSpine.C3Seg.LongusColliT1C3NodeL;
    AnyDrawMuscle DrwMus = {#include "../drawSettings/MusDrawSettings.any"};
  };

  AnyMuscleViaPoint LongusColliT1C2 = {
    AnyMuscleModel &MusMdl = ...MuscleParametersCervicalSpineLeft.LongusColliT1C2Par;
    AnyRefNode &Org = ...SegmentsThorax.T1Seg.LongusColliT1NodeL;
    AnyRefNode &Via1 = ...SegmentsCervicalSpine.C6Seg.LongusColliT1C6NodeL;
    AnyRefNode &Via2 = ...SegmentsCervicalSpine.C5Seg.LongusColliT1C5NodeL;
    AnyRefNode &Via3 = ...SegmentsCervicalSpine.C4Seg.LongusColliT1C4NodeL;
    AnyRefNode &Via4 = ...SegmentsCervicalSpine.C3Seg.LongusColliT1C3NodeL;
    AnyRefNode &Ins = ...SegmentsCervicalSpine.C2Seg.LongusColliT1C2NodeL;
    AnyDrawMuscle DrwMus = {#include "../drawSettings/MusDrawSettings.any"};
  };

  AnyMuscleViaPoint LongusColliT1C1 = {
    AnyMuscleModel &MusMdl = ...MuscleParametersCervicalSpineLeft.LongusColliT1C1Par;
    AnyRefNode &Org = ...SegmentsThorax.T1Seg.LongusColliT1NodeL;
    AnyRefNode &Via1 = ...SegmentsCervicalSpine.C6Seg.LongusColliT1C6NodeL;
    AnyRefNode &Via2 = ...SegmentsCervicalSpine.C5Seg.LongusColliT1C5NodeL;
    AnyRefNode &Via3 = ...SegmentsCervicalSpine.C4Seg.LongusColliT1C4NodeL;
    AnyRefNode &Via4 = ...SegmentsCervicalSpine.C3Seg.LongusColliT1C3NodeL;
    AnyRefNode &Via5 = ...SegmentsCervicalSpine.C2Seg.LongusColliT1C2NodeL;
    AnyRefNode &Ins = ...SegmentsCervicalSpine.C1Seg.LongusColliT1C1NodeL;
    AnyDrawMuscle DrwMus = {#include "../drawSettings/MusDrawSettings.any"};
  };

  AnyMuscleViaPoint LongusColliT1C0 = {
    AnyMuscleModel &MusMdl = ...MuscleParametersCervicalSpineLeft.LongusColliT1C0Par;
    AnyRefNode &Org = ...SegmentsThorax.T1Seg.LongusColliT1NodeL;
    AnyRefNode &Via1 = ...SegmentsCervicalSpine.C6Seg.LongusColliT1C6NodeL;
    AnyRefNode &Via2 = ...SegmentsCervicalSpine.C5Seg.LongusColliT1C5NodeL;
    AnyRefNode &Via3 = ...SegmentsCervicalSpine.C4Seg.LongusColliT1C4NodeL;
    AnyRefNode &Via4 = ...SegmentsCervicalSpine.C3Seg.LongusColliT1C3NodeL;
    AnyRefNode &Via5 = ...SegmentsCervicalSpine.C2Seg.LongusColliT1C2NodeL;
    AnyRefNode &Via6 = ...SegmentsCervicalSpine.C1Seg.LongusColliT1C1NodeL;
    AnyRefNode &Ins = ...SegmentsCervicalSpine.SkullSeg.LongusColliT1C0NodeL;
    AnyDrawMuscle DrwMus = {#include "../drawSettings/MusDrawSettings.any"};
  };
};
