///The muscles of the cervical spine on the Left side.
AnyFolder MusclesCervicalSpineLeft = {

  #include "ScalenusAndHyoidLeft.any"

  #include "LongusColliLeft.any"

  #include "LongusCapitisLeft.any"

  #include "SpleniusCapitisLeft.any"

  #include "SpleniusCervicisLeft.any"

  #include "SemispinalisCapitisLeft.any"

  #include "SemispinalisCervicisLeft.any"

  #include "LongissimusCapitisLeft.any"

  #include "LongissimusCervicisLeft.any"

  #include "MultifidusCervicisLeft.any"

}; //End of MusclesCervicalSpineLeft
