///The muscles of the cervical spine on the right side.
AnyFolder MusclesCervicalSpineRight = {

  #include "ScalenusAndHyoidRight.any" //

  #include "LongusColliRight.any" //

  #include "LongusCapitisRight.any" //

  #include "SpleniusCapitisRight.any" //

  #include "SpleniusCervicisRight.any" //

  #include "SemispinalisCapitisRight.any" //

  #include "SemispinalisCervicisRight.any" //

  #include "LongissimusCapitisRight.any" //

  #include "LongissimusCervicisRight.any" //

  #include "MultifidusCervicisRight.any"

}; //End of MusclesCervicalSpineRight
