/** Muscles of the rib cage defined based on anatomical descriptions, mostly from:
Bakkum, B.W. and G.D. Cramer,
Chapter 4 - Muscles That Influence the Spine,
in Clinical Anatomy of the Spine, Spinal Cord, and Ans (Third Edition),
G.D. Cramer and S.A. Darby, Editors. 2014, Mosby: Saint Louis. p. 98-134.
*/
AnyFolder MusclesRibCageRight = {
  //#include "ScalenusAndHyoidRight.any"
  #include "TransversusThoracisRight.any"
  #include "LevatorCostarumRight.any"
  #include "SubcostalisRight.any"
  #include "IntercostalisRight.any"

};


AnyFolder MusclesRibCageLeft = {

  //#include "ScalenusAndHyoidLeft.any"
  #include "TransversusThoracisLeft.any"
  #include "LevatorCostarumLeft.any"
  #include "SubcostalisLeft.any"
  #include "IntercostalisLeft.any"
};
