///Definitions of the muscles on the left side
AnyFolder MusclesSpineLeft = {

  #include "MultifidiLeft.any"

  #include "ErectorSpinaeLeft.any"

  #include "PsoasMajorLeft.any"

  #include "QuadratusLumborumLeft.any"

  #include "ObliquusExternusLeft.any"

  #include "ObliquusInternusLeft.any"

  #include "SemispinalisLeft.any"

  #include "ThoracicMultifidiLeft.any"

}; // End of MuscleSpineLeft
