///Definitions of the muscles on the right side
AnyFolder MusclesSpineRight = {

  #include "MultifidiRight.any"

  #include "ErectorSpinaeRight.any"

  #include "PsoasMajorRight.any"

  #include "QuadratusLumborumRight.any"

  #include "ObliquusExternusRight.any"

  #include "ObliquusInternusRight.any"

  #include "SemispinalisRigth.any"

  #include "ThoracicMultifidiRigth.any"


}; // End of MuscleSpineRight
