// ***** Nodes for the external scaling *****

SegmentsThorax.SkullSeg = {
  TopOfHead = {
//    AnyDrawNode Draw =
//    {
//      RGB = {1, 0, 0};
//      ScaleXYZ = 0.2*{0.025, 0.025, 0.025};
//    };
  };

  AnyRefNode ChinBonyTip ={
    sRel = .Scale({0.10, -0.11, 0.0});
    ARel = RotMat(-0.04,z);
//    AnyDrawNode Draw =
//    {
//      RGB = {1, 0, 0};
//      ScaleXYZ = 0.2*{0.025, 0.025, 0.025};
//    };
//    AnyDrawRefFrame DrawRef =
//    {
//      RGB = {0.91796875, 0.76953125, 0.06640625};
//      ScaleXYZ = 0.2*{1, 1, 1};
//      Transparency = 1;
//    };
  };
};


SegmentsThorax.ThoraxSeg = {
  AnyRefNode C7 ={
    sRel= .Scale({-0.036,0.47,0});
//    AnyDrawNode Draw =
//    {
//      RGB = {1, 0, 0};
//      ScaleXYZ = 0.2*{0.025, 0.025, 0.025};
//    };
//    AnyDrawRefFrame DrawRef =
//    {
//      RGB = {0.91796875, 0.76953125, 0.06640625};
//      ScaleXYZ = 0.2*{1, 1, 1};
//      Transparency = 1;
//    };
  };
};


SegmentsLumbar.PelvisSeg = {
  AnyRefNode TrochanterBonyTipR ={
    sRel = .Scale({0.03, -0.14, 0.157});
//    AnyDrawNode Draw =
//    {
//      RGB = {1, 0, 0};
//      ScaleXYZ = 0.2*{0.025, 0.025, 0.025};
//    };
  };

  AnyRefNode TrochanterBonyTipL ={
    sRel = .Scale({0.03, -0.14, -0.157});
//    AnyDrawNode Draw =
//    {
//      RGB = {1, 0, 0};
//      ScaleXYZ = 0.2*{0.025, 0.025, 0.025};
//    };
//    AnyDrawRefFrame DrawRef =
//    {
//      RGB = {0.91796875, 0.76953125, 0.06640625};
//      ScaleXYZ = 0.3*{1, 1, 1};
//      Transparency = 1;
//    };
  };
};


SegmentsLumbar.SacrumSeg = {
  AnyRefNode SacrumBonyTip ={
    sRel= .Scale({-0.02, -0.03, 0.00});
//    AnyDrawNode Draw =
//    {
//      RGB = {1, 0, 0};
//      ScaleXYZ = 0.2*{0.025, 0.025, 0.025};
//    };
  };
};


// ***** Measure of the Standard Parameters *****

//AnyFolder StandardMeasureExt ={
//
//  AnyKinLinear HeadHightExt =
//  {
//    Ref = 0;
//    AnyRefFrame &Chin = ..SegmentsThorax.SkullSeg.ChinBonyTip;
//    AnyRefFrame &TopOfHead = ..SegmentsThorax.SkullSeg.TopOfHead;
//  };
//
//
//  AnyKinLinear TrunkHightExt =
//  {
//    Ref = 0;
//    AnyRefFrame &C7 = ..SegmentsThorax.ThoraxSeg.C7;
//    AnyRefFrame &Sacrum = ..SegmentsLumbar.SacrumSeg.SacrumBonyTip;
//  };
//
//
//  AnyKinLinear PelvisWidthExt =
//  {
//    Ref = 0;
//    AnyRefFrame &C7 = ..SegmentsLumbar.PelvisSeg.TrochanterBonyTipR;
//    AnyRefFrame &Sacrum = ..SegmentsLumbar.PelvisSeg.TrochanterBonyTipL;
//  };
//
//
//};
