/// Folder containing the edges that make up the thoracic cavity volume
AnyFolder Edges = {
   AnyObjectPtrArray Edge0 = arrcat(
    ..Segments.T1Seg.ThoracicCavityNodes.Level00.Right.NodePointers,
    flip(..Segments.T1Seg.ThoracicCavityNodes.Level00.Left.NodePointers)
  );

  AnyObjectPtrArray Edge1 = arrcat(
    ..Segments.T1Seg.ThoracicCavityNodes.Level01.Right.NodePointers,
    ..Segments.Right.R1Seg.ThoracicCavityNodes.Level01.NodePointers,
    ..Segments.SternumSeg.ThoracicCavityNodes.Level01.Right.NodePointers,
    flip(..Segments.SternumSeg.ThoracicCavityNodes.Level01.Left.NodePointers),
    flip(..Segments.Left.R1Seg.ThoracicCavityNodes.Level01.NodePointers),
    flip(..Segments.T1Seg.ThoracicCavityNodes.Level01.Left.NodePointers)
  );
  AnyObjectPtrArray Edge2 = arrcat(
    ..Segments.T2Seg.ThoracicCavityNodes.Level02.Right.NodePointers,
    ..Segments.Right.R2Seg.ThoracicCavityNodes.NodePointers,
    ..Segments.SternalBodySeg.ThoracicCavityNodes.Level02.Right.NodePointers,
    flip(..Segments.SternalBodySeg.ThoracicCavityNodes.Level02.Left.NodePointers),
    flip(..Segments.Left.R2Seg.ThoracicCavityNodes.NodePointers),
    flip(..Segments.T2Seg.ThoracicCavityNodes.Level02.Left.NodePointers)
  );
  AnyObjectPtrArray Edge3 = arrcat(
    ..Segments.T3Seg.ThoracicCavityNodes.Level03.Right.NodePointers,
    ..Segments.Right.R3Seg.ThoracicCavityNodes.NodePointers,
    ..Segments.SternalBodySeg.ThoracicCavityNodes.Level03.Right.NodePointers,
    flip(..Segments.SternalBodySeg.ThoracicCavityNodes.Level03.Left.NodePointers),
    flip(..Segments.Left.R3Seg.ThoracicCavityNodes.NodePointers),
    flip(..Segments.T3Seg.ThoracicCavityNodes.Level03.Left.NodePointers)
  );
  AnyObjectPtrArray Edge4 = arrcat(
    ..Segments.T4Seg.ThoracicCavityNodes.Level04.Right.NodePointers,
    ..Segments.Right.R4Seg.ThoracicCavityNodes.NodePointers,
    ..Segments.SternalBodySeg.ThoracicCavityNodes.Level04.Right.NodePointers,
    flip(..Segments.SternalBodySeg.ThoracicCavityNodes.Level04.Left.NodePointers),
    flip(..Segments.Left.R4Seg.ThoracicCavityNodes.NodePointers),
    flip(..Segments.T4Seg.ThoracicCavityNodes.Level04.Left.NodePointers)
  );
  AnyObjectPtrArray Edge5 = arrcat(
    ..Segments.T5Seg.ThoracicCavityNodes.Level05.Right.NodePointers,
    ..Segments.Right.R5Seg.ThoracicCavityNodes.NodePointers,
    ..Segments.SternalBodySeg.ThoracicCavityNodes.Level05.Right.NodePointers,
    flip(..Segments.SternalBodySeg.ThoracicCavityNodes.Level05.Left.NodePointers),
    flip(..Segments.Left.R5Seg.ThoracicCavityNodes.NodePointers),
    flip(..Segments.T5Seg.ThoracicCavityNodes.Level05.Left.NodePointers)
  );
  AnyObjectPtrArray Edge6 = arrcat(
    ..Segments.T6Seg.ThoracicCavityNodes.Level06.Right.NodePointers,
    ..Segments.Right.R6Seg.ThoracicCavityNodes.NodePointers,
    ..Segments.SternalBodySeg.ThoracicCavityNodes.Level06.Right.NodePointers,
    flip(..Segments.SternalBodySeg.ThoracicCavityNodes.Level06.Left.NodePointers),
    flip(..Segments.Left.R6Seg.ThoracicCavityNodes.NodePointers),
    flip(..Segments.T6Seg.ThoracicCavityNodes.Level06.Left.NodePointers)
  );
  AnyObjectPtrArray Edge7 = arrcat(
    ..Segments.T7Seg.ThoracicCavityNodes.Level07.Right.NodePointers,
    ..Segments.Right.R7Seg.ThoracicCavityNodes.NodePointers,
    ..Segments.SternalBodySeg.ThoracicCavityNodes.Level07.Right.NodePointers,
    flip(..Segments.SternalBodySeg.ThoracicCavityNodes.Level07.Left.NodePointers),
    flip(..Segments.Left.R7Seg.ThoracicCavityNodes.NodePointers),
    flip(..Segments.T7Seg.ThoracicCavityNodes.Level07.Left.NodePointers)
  );
  AnyObjectPtrArray Edge8 = arrcat(
    ..Segments.T8Seg.ThoracicCavityNodes.Level08.Right.NodePointers,
    ..Segments.Right.R8Seg.ThoracicCavityNodes.NodePointers,
    ..Segments.SternalBodySeg.ThoracicCavityNodes.Level08.Right.NodePointers,
    flip(..Segments.SternalBodySeg.ThoracicCavityNodes.Level08.Left.NodePointers),
    flip(..Segments.Left.R8Seg.ThoracicCavityNodes.NodePointers),
    flip(..Segments.T8Seg.ThoracicCavityNodes.Level08.Left.NodePointers)
  );
  AnyObjectPtrArray Edge9 = arrcat(
    ..Segments.T9Seg.ThoracicCavityNodes.Level09.Right.NodePointers,
    ..Segments.Right.R9Seg.ThoracicCavityNodes.NodePointers,
    ..Segments.SternalBodySeg.ThoracicCavityNodes.Level09.Right.NodePointers,
    flip(..Segments.SternalBodySeg.ThoracicCavityNodes.Level09.Left.NodePointers),
    flip(..Segments.Left.R9Seg.ThoracicCavityNodes.NodePointers),
    flip(..Segments.T9Seg.ThoracicCavityNodes.Level09.Left.NodePointers)
  );
  AnyObjectPtrArray Edge10 = arrcat(
    ..Segments.T10Seg.ThoracicCavityNodes.Level10.Right.NodePointers,
    ..Segments.Right.R10Seg.ThoracicCavityNodes.NodePointers,
    ..Segments.SternalBodySeg.ThoracicCavityNodes.Level10.Right.NodePointers,
    flip(..Segments.SternalBodySeg.ThoracicCavityNodes.Level10.Left.NodePointers),
    flip(..Segments.Left.R10Seg.ThoracicCavityNodes.NodePointers),
    flip(..Segments.T10Seg.ThoracicCavityNodes.Level10.Left.NodePointers)
  );
};
