 SegmentsLumbar.L1Seg = {
  AnyRefNode MFL1T8NodeROrg  = {sRel = .Scale(.StdPar.Right.MFL1T8Node_pos); };
  AnyRefNode MFL1T8NodeLOrg  = {sRel = .Scale(.StdPar.Left.MFL1T8Node_pos); };
  AnyRefNode MFL1T9NodeROrg  = {sRel = .Scale(.StdPar.Right.MFL1T9Node_pos); };
  AnyRefNode MFL1T9NodeLOrg  = {sRel = .Scale(.StdPar.Left.MFL1T9Node_pos); };
  AnyRefNode MFL1T10NodeROrg = {sRel = .Scale(.StdPar.Right.MFL1T10Node_pos); };
  AnyRefNode MFL1T10NodeLOrg = {sRel = .Scale(.StdPar.Left.MFL1T10Node_pos); };
  AnyRefNode SPL1T3NodeOrg = {sRel = .Scale(.StdPar.SPL1T3Node_pos);};
  AnyRefNode SPL1T4NodeOrg = {sRel = .Scale(.StdPar.SPL1T4Node_pos);};
  AnyRefNode SPL1T5NodeOrg = {sRel = .Scale(.StdPar.SPL1T5Node_pos);};
  AnyRefNode SEL1T8NodeROrg  = {sRel = .Scale(.StdPar.Right.SEL1T8Node_pos);};
  AnyRefNode SEL1T8NodeLOrg  = {sRel = .Scale(.StdPar.Left.SEL1T8Node_pos);};
  AnyRefNode SEL1T10NodeROrg = {sRel = .Scale(.StdPar.Right.SEL1T10Node_pos);};
  AnyRefNode SEL1T10NodeLOrg = {sRel = .Scale(.StdPar.Left.SEL1T10Node_pos);};
  AnyRefNode SEL1T11NodeROrg = {sRel = .Scale(.StdPar.Right.SEL1T11Node_pos);};
  AnyRefNode SEL1T11NodeLOrg = {sRel = .Scale(.StdPar.Left.SEL1T11Node_pos);};
  AnyRefNode SPL1T2NodeOrg  = {  sRel= .Scale(.StdPar.SPL1T2Node_pos);};
  AnyRefNode SPL2T1Via1Node = {  sRel= .Scale(.StdPar.SPL2T1Node_pos);};
};

SegmentsLumbar.L2Seg = {
  AnyRefNode MFL2T9NodeROrg  = {sRel = .Scale(.StdPar.Right.MFL2T9Node_pos);};
  AnyRefNode MFL2T9NodeLOrg  = {sRel = .Scale(.StdPar.Left.MFL2T9Node_pos);};
  AnyRefNode MFL2T10NodeROrg = {sRel = .Scale(.StdPar.Right.MFL2T10Node_pos);};
  AnyRefNode MFL2T10NodeLOrg = {sRel = .Scale(.StdPar.Left.MFL2T10Node_pos);};
  AnyRefNode MFL2T11NodeROrg = {sRel = .Scale(.StdPar.Right.MFL2T11Node_pos);};
  AnyRefNode MFL2T11NodeLOrg = {sRel = .Scale(.StdPar.Left.MFL2T11Node_pos);};
  AnyRefNode SEL2T9NodeROrg  = {sRel = .Scale(.StdPar.Right.SEL2T9Node_pos);};
  AnyRefNode SEL2T9NodeLOrg  = {sRel = .Scale(.StdPar.Left.SEL2T9Node_pos);};
  AnyRefNode SEL2T10NodeROrg = {sRel = .Scale(.StdPar.Right.SEL2T10Node_pos);};
  AnyRefNode SEL2T10NodeLOrg = {sRel = .Scale(.StdPar.Left.SEL2T10Node_pos);};
  AnyRefNode SEL2T11NodeROrg = {sRel = .Scale(.StdPar.Right.SEL2T11Node_pos);};
  AnyRefNode SEL2T11NodeLOrg = {sRel = .Scale(.StdPar.Left.SEL2T11Node_pos);};
  AnyRefNode SEL2T12NodeROrg = {sRel = .Scale(.StdPar.Right.SEL2T12Node_pos);};
  AnyRefNode SEL2T12NodeLOrg = {sRel = .Scale(.StdPar.Left.SEL2T12Node_pos);};
  AnyRefNode SPL2T1NodeOrg =   {sRel = .Scale(.StdPar.SPL2T1Node_pos);};
};

SegmentsLumbar.L3Seg = {
  AnyRefNode MFL3T10NodeROrg = {sRel = .Scale(.StdPar.Right.MFL3T10Node_pos);};
  AnyRefNode MFL3T10NodeLOrg = {sRel = .Scale(.StdPar.Left.MFL3T10Node_pos);};
  AnyRefNode MFL3T11NodeROrg = {sRel = .Scale(.StdPar.Right.MFL3T11Node_pos);};
  AnyRefNode MFL3T11NodeLOrg = {sRel = .Scale(.StdPar.Left.MFL3T11Node_pos);};
  AnyRefNode MFL3T12NodeROrg = {sRel = .Scale(.StdPar.Right.MFL3T12Node_pos);};
  AnyRefNode MFL3T12NodeLOrg = {sRel = .Scale(.StdPar.Left.MFL3T12Node_pos);};
  AnyRefNode SEL3T11NodeROrg = {sRel = .Scale(.StdPar.Right.SEL3T11Node_pos);};
  AnyRefNode SEL3T11NodeLOrg = {sRel = .Scale(.StdPar.Left.SEL3T11Node_pos);};
  AnyRefNode SEL3T12NodeROrg = {sRel = .Scale(.StdPar.Right.SEL3T12Node_pos);};
  AnyRefNode SEL3T12NodeLOrg = {sRel = .Scale(.StdPar.Left.SEL3T12Node_pos);};
};

SegmentsLumbar.L4Seg = {
  AnyRefNode MFL4T11NodeROrg = {sRel = .Scale(.StdPar.Right.MFL4T11Node_pos);};
  AnyRefNode MFL4T11NodeLOrg = {sRel = .Scale(.StdPar.Left.MFL4T11Node_pos);};
  AnyRefNode MFL4T12NodeROrg = {sRel = .Scale(.StdPar.Right.MFL4T12Node_pos);};
  AnyRefNode MFL4T12NodeLOrg = {sRel = .Scale(.StdPar.Left.MFL4T12Node_pos);};
};

SegmentsLumbar.L5Seg = {
  AnyRefNode MFL5T12NodeROrg = {sRel = .Scale(.StdPar.Right.MFL5T12Node_pos);};
  AnyRefNode MFL5T12NodeLOrg = {sRel = .Scale(.StdPar.Left.MFL5T12Node_pos);};
};

SegmentsThorax.T1Seg = {
  AnyRefNode MFT6T1NodeRIns = {sRel = .Scale(.StdPar.T1.Right.MFT6T1NodeIns_pos );};
  AnyRefNode MFT5T1NodeRIns = {sRel = .Scale(.StdPar.T1.Right.MFT5T1NodeIns_pos );};
  AnyRefNode MFT4T1NodeRIns = {sRel = .Scale(.StdPar.T1.Right.MFT4T1NodeIns_pos );};
  AnyRefNode MFT6T1NodeLIns = {sRel = .Scale(.StdPar.T1.Left.MFT6T1NodeIns_pos );};
  AnyRefNode MFT5T1NodeLIns = {sRel = .Scale(.StdPar.T1.Left.MFT5T1NodeIns_pos );};
  AnyRefNode MFT4T1NodeLIns = {sRel = .Scale(.StdPar.T1.Left.MFT4T1NodeIns_pos );};
  AnyRefNode SET5T1NodeRIns = {sRel = .Scale(.StdPar.T1.Right.SET5T1NodeIns_pos );};
  AnyRefNode SET4T1NodeRIns = {sRel = .Scale(.StdPar.T1.Right.SET4T1NodeIns_pos );};
  AnyRefNode SET3T1NodeRIns = {sRel = .Scale(.StdPar.T1.Right.SET3T1NodeIns_pos );};
  AnyRefNode SET5T1NodeLIns = {sRel = .Scale(.StdPar.T1.Left.SET5T1NodeIns_pos );};
  AnyRefNode SET4T1NodeLIns = {sRel = .Scale(.StdPar.T1.Left.SET4T1NodeIns_pos );};
  AnyRefNode SET3T1NodeLIns = {sRel = .Scale(.StdPar.T1.Left.SET3T1NodeIns_pos );};
  AnyRefNode SPL2T1NodeIns =  {sRel= .Scale(.StdPar.T1.SPL2T1NodeIns_pos );};

};

SegmentsThorax.T2Seg = {
  AnyRefNode MFT7T2NodeRIns = {sRel = .Scale(.StdPar.T2.Right.MFT7T2NodeIns_pos );};
  AnyRefNode MFT6T2NodeRIns = {sRel = .Scale(.StdPar.T2.Right.MFT6T2NodeIns_pos );};
  AnyRefNode MFT5T2NodeRIns = {sRel = .Scale(.StdPar.T2.Right.MFT5T2NodeIns_pos );};
  AnyRefNode MFT7T2NodeLIns = {sRel = .Scale(.StdPar.T2.Left.MFT7T2NodeIns_pos );};
  AnyRefNode MFT6T2NodeLIns = {sRel = .Scale(.StdPar.T2.Left.MFT6T2NodeIns_pos );};
  AnyRefNode MFT5T2NodeLIns = {sRel = .Scale(.StdPar.T2.Left.MFT5T2NodeIns_pos );};
  AnyRefNode SET6T2NodeRIns = {sRel = .Scale(.StdPar.T2.Right.SET6T2NodeIns_pos );};
  AnyRefNode SET5T2NodeRIns = {sRel = .Scale(.StdPar.T2.Right.SET5T2NodeIns_pos );};
  AnyRefNode SET4T2NodeRIns = {sRel = .Scale(.StdPar.T2.Right.SET4T2NodeIns_pos );};
  AnyRefNode SET6T2NodeLIns = {sRel = .Scale(.StdPar.T2.Left.SET6T2NodeIns_pos );};
  AnyRefNode SET5T2NodeLIns = {sRel = .Scale(.StdPar.T2.Left.SET5T2NodeIns_pos );};
  AnyRefNode SET4T2NodeLIns = {sRel = .Scale(.StdPar.T2.Left.SET4T2NodeIns_pos );};
  AnyRefNode SPL1T2NodeIns =  {sRel= .Scale(.StdPar.T2.SPL1T2NodeIns_pos );};
  AnyRefNode SPL2T1Via12Node ={sRel= .Scale(.StdPar.T2.SPL2T1Via12Node_pos );};
};

SegmentsThorax.T3Seg = {
  AnyRefNode SPL1T3NodeIns   = {sRel = .Scale(.StdPar.Thorax.SPL1T3Node_pos);};
  AnyRefNode SPL1T2Via10Node = {sRel= .Scale(.StdPar.T3.SPL1T2Via10Node_pos );};
  AnyRefNode SPL2T1Via11Node = {sRel= .Scale(.StdPar.T3.SPL2T1Via11Node_pos );};
  AnyRefNode MFT8T3NodeRIns = {sRel = .Scale(.StdPar.T3.Right.MFT8T3NodeIns_pos );};
  AnyRefNode MFT7T3NodeRIns = {sRel = .Scale(.StdPar.T3.Right.MFT7T3NodeIns_pos );};
  AnyRefNode MFT6T3NodeRIns = {sRel = .Scale(.StdPar.T3.Right.MFT6T3NodeIns_pos );};
  AnyRefNode MFT8T3NodeLIns = {sRel = .Scale(.StdPar.T3.Left.MFT8T3NodeIns_pos );};
  AnyRefNode MFT7T3NodeLIns = {sRel = .Scale(.StdPar.T3.Left.MFT7T3NodeIns_pos );};
  AnyRefNode MFT6T3NodeLIns = {sRel = .Scale(.StdPar.T3.Left.MFT6T3NodeIns_pos );};
  AnyRefNode SET3T1NodeROrg = {sRel = .Scale(.StdPar.T3.Right.SET3T1NodeOrg_pos );};
  AnyRefNode SET3T1NodeLOrg = {sRel = .Scale(.StdPar.T3.Left.SET3T1NodeOrg_pos );};
  AnyRefNode SET7T3NodeRIns = {sRel = .Scale(.StdPar.T3.Right.SET7T3NodeIns_pos );};
  AnyRefNode SET6T3NodeRIns = {sRel = .Scale(.StdPar.T3.Right.SET6T3NodeIns_pos );};
  AnyRefNode SET5T3NodeRIns = {sRel = .Scale(.StdPar.T3.Right.SET5T3NodeIns_pos );};
  AnyRefNode SET7T3NodeLIns = {sRel = .Scale(.StdPar.T3.Left.SET7T3NodeIns_pos );};
  AnyRefNode SET6T3NodeLIns = {sRel = .Scale(.StdPar.T3.Left.SET6T3NodeIns_pos );};
  AnyRefNode SET5T3NodeLIns = {sRel = .Scale(.StdPar.T3.Left.SET5T3NodeIns_pos );};
};

SegmentsThorax.T4Seg = {
  AnyRefNode SPL1T4NodeIns  = {sRel = .Scale(.StdPar.Thorax.SPL1T4Node_pos);};
  AnyRefNode SPT12T4NodeIns = {sRel= .Scale(.StdPar.T4.SPT12T4NodeIns_pos );};
  AnyRefNode SPL1T3Via9Node = {sRel= .Scale(.StdPar.T4.SPL1T3Via9Node_pos );};
  AnyRefNode SPL1T2Via9Node = {sRel= .Scale(.StdPar.T4.SPL1T2Via9Node_pos );};
  AnyRefNode SPL2T1Via10Node= {sRel= .Scale(.StdPar.T4.SPL2T1Via10Node_pos );};
  AnyRefNode MFT4T1NodeROrg = {sRel = .Scale(.StdPar.T4.Right.MFT4T1NodeOrg_pos );};
  AnyRefNode MFT4T1NodeLOrg = {sRel = .Scale(.StdPar.T4.Left.MFT4T1NodeOrg_pos );};
  AnyRefNode MFT9T4NodeRIns = {sRel = .Scale(.StdPar.T4.Right.MFT9T4NodeIns_pos );};
  AnyRefNode MFT8T4NodeRIns = {sRel = .Scale(.StdPar.T4.Right.MFT8T4NodeIns_pos );};
  AnyRefNode MFT7T4NodeRIns = {sRel = .Scale(.StdPar.T4.Right.MFT7T4NodeIns_pos );};
  AnyRefNode MFT9T4NodeLIns = {sRel = .Scale(.StdPar.T4.Left.MFT9T4NodeIns_pos );};
  AnyRefNode MFT8T4NodeLIns = {sRel = .Scale(.StdPar.T4.Left.MFT8T4NodeIns_pos );};
  AnyRefNode MFT7T4NodeLIns = {sRel = .Scale(.StdPar.T4.Left.MFT7T4NodeIns_pos );};
  AnyRefNode SET4T1NodeROrg = {sRel = .Scale(.StdPar.T4.Right.SET4T1NodeOrg_pos );};
  AnyRefNode SET4T2NodeROrg = {sRel = .Scale(.StdPar.T4.Right.SET4T2NodeOrg_pos );};
  AnyRefNode SET4T1NodeLOrg = {sRel = .Scale(.StdPar.T4.Left.SET4T1NodeOrg_pos );};
  AnyRefNode SET4T2NodeLOrg = {sRel = .Scale(.StdPar.T4.Left.SET4T2NodeOrg_pos );};
  AnyRefNode SET8T4NodeRIns = {sRel = .Scale(.StdPar.T4.Right.SET8T4NodeIns_pos );};
  AnyRefNode SET7T4NodeRIns = {sRel = .Scale(.StdPar.T4.Right.SET7T4NodeIns_pos );};
  AnyRefNode SET6T4NodeRIns = {sRel = .Scale(.StdPar.T4.Right.SET6T4NodeIns_pos );};
  AnyRefNode SET8T4NodeLIns = {sRel = .Scale(.StdPar.T4.Left.SET8T4NodeIns_pos );};
  AnyRefNode SET7T4NodeLIns = {sRel = .Scale(.StdPar.T4.Left.SET7T4NodeIns_pos );};
  AnyRefNode SET6T4NodeLIns = {sRel = .Scale(.StdPar.T4.Left.SET6T4NodeIns_pos );};
};

SegmentsThorax.T5Seg = {
  AnyRefNode MFT5T1NodeROrg = {sRel = .Scale(.StdPar.T5.Right.MFT5T1NodeOrg_pos );};
  AnyRefNode MFT5T2NodeROrg = {sRel = .Scale(.StdPar.T5.Right.MFT5T2NodeOrg_pos );};
  AnyRefNode MFT5T1NodeLOrg = {sRel = .Scale(.StdPar.T5.Left.MFT5T1NodeOrg_pos );};
  AnyRefNode MFT5T2NodeLOrg = {sRel = .Scale(.StdPar.T5.Left.MFT5T2NodeOrg_pos );};
  AnyRefNode MFT10T5NodeRIns = {sRel = .Scale(.StdPar.T5.Right.MFT10T5NodeIns_pos );};
  AnyRefNode MFT9T5NodeRIns  = {sRel = .Scale(.StdPar.T5.Right.MFT9T5NodeIns_pos );};
  AnyRefNode MFT8T5NodeRIns  = {sRel = .Scale(.StdPar.T5.Right.MFT8T5NodeIns_pos );};
  AnyRefNode MFT10T5NodeLIns = {sRel = .Scale(.StdPar.T5.Left.MFT10T5NodeIns_pos );};
  AnyRefNode MFT9T5NodeLIns  = {sRel = .Scale(.StdPar.T5.Left.MFT9T5NodeIns_pos );};
  AnyRefNode MFT8T5NodeLIns  = {sRel = .Scale(.StdPar.T5.Left.MFT8T5NodeIns_pos );};
  AnyRefNode SET5T1NodeR = {sRel = .Scale(.StdPar.T5.Right.SET5T1Node_pos );};
  AnyRefNode SET5T2NodeR = {sRel = .Scale(.StdPar.T5.Right.SET5T2Node_pos );};
  AnyRefNode SET5T3NodeR = {sRel = .Scale(.StdPar.T5.Right.SET5T3Node_pos );};
  AnyRefNode SET5T1NodeL = {sRel = .Scale(.StdPar.T5.Left.SET5T1Node_pos );};
  AnyRefNode SET5T2NodeL = {sRel = .Scale(.StdPar.T5.Left.SET5T2Node_pos );};
  AnyRefNode SET5T3NodeL = {sRel = .Scale(.StdPar.T5.Left.SET5T3Node_pos );};
  AnyRefNode SET9T5NodeRIns = {sRel = .Scale(.StdPar.T5.Right.SET9T5NodeIns_pos );};
  AnyRefNode SET8T5NodeRIns = {sRel = .Scale(.StdPar.T5.Right.SET8T5NodeIns_pos );};
  AnyRefNode SET7T5NodeRIns = {sRel = .Scale(.StdPar.T5.Right.SET7T5NodeIns_pos );};
  AnyRefNode SET9T5NodeLIns = {sRel = .Scale(.StdPar.T5.Left.SET9T5NodeIns_pos );};
  AnyRefNode SET8T5NodeLIns = {sRel = .Scale(.StdPar.T5.Left.SET8T5NodeIns_pos );};
  AnyRefNode SET7T5NodeLIns = {sRel = .Scale(.StdPar.T5.Left.SET7T5NodeIns_pos );};
  AnyRefNode SPL1T5NodeIns   = {sRel = .Scale(.StdPar.Thorax.SPL1T5Node_pos);};
  AnyRefNode SPT12T5NodeIns = {sRel= .Scale(.StdPar.T5.SPT12T5NodeIns_pos );};
  AnyRefNode SPT12T4Via7Node = {sRel= .Scale(.StdPar.T5.SPT12T4Via7Node_pos );};
  AnyRefNode SPL1T3Via8Node = {sRel= .Scale(.StdPar.T5.SPL1T3Via8Node_pos );};
  AnyRefNode SPL1T2Via8Node = {sRel= .Scale(.StdPar.T5.SPL1T2Via8Node_pos );};
  AnyRefNode SPL2T1Via9Node = {sRel= .Scale(.StdPar.T5.SPL2T1Via9Node_pos );};
};

SegmentsThorax.T6Seg = {
  AnyRefNode MFT6T1NodeROrg = {sRel = .Scale(.StdPar.T6.Right.MFT6T1NodeOrg_pos );};
  AnyRefNode MFT6T2NodeROrg = {sRel = .Scale(.StdPar.T6.Right.MFT6T2NodeOrg_pos );};
  AnyRefNode MFT6T3NodeROrg = {sRel = .Scale(.StdPar.T6.Right.MFT6T3NodeOrg_pos );};
  AnyRefNode MFT6T1NodeLOrg = {sRel = .Scale(.StdPar.T6.Left.MFT6T1NodeOrg_pos );};
  AnyRefNode MFT6T2NodeLOrg = {sRel = .Scale(.StdPar.T6.Left.MFT6T2NodeOrg_pos );};
  AnyRefNode MFT6T3NodeLOrg = {sRel = .Scale(.StdPar.T6.Left.MFT6T3NodeOrg_pos );};
  AnyRefNode MFT11T6NodeRIns = {sRel = .Scale(.StdPar.T6.Right.MFT11T6NodeIns_pos );};
  AnyRefNode MFT10T6NodeRIns = {sRel = .Scale(.StdPar.T6.Right.MFT10T6NodeIns_pos );};
  AnyRefNode MFT9T6NodeRIns  = {sRel = .Scale(.StdPar.T6.Right.MFT9T6NodeIns_pos );};
  AnyRefNode MFT11T6NodeLIns = {sRel = .Scale(.StdPar.T6.Left.MFT11T6NodeIns_pos );};
  AnyRefNode MFT10T6NodeLIns = {sRel = .Scale(.StdPar.T6.Left.MFT10T6NodeIns_pos );};
  AnyRefNode MFT9T6NodeLIns  = {sRel = .Scale(.StdPar.T6.Left.MFT9T6NodeIns_pos );};
  AnyRefNode SET6T2NodeROrg = {sRel = .Scale(.StdPar.T6.Right.SET6T2NodeOrg_pos );};
  AnyRefNode SET6T3NodeROrg = {sRel = .Scale(.StdPar.T6.Right.SET6T3NodeOrg_pos );};
  AnyRefNode SET6T4NodeROrg = {sRel = .Scale(.StdPar.T6.Right.SET6T4NodeOrg_pos );};
  AnyRefNode SET6T2NodeLOrg = {sRel = .Scale(.StdPar.T6.Left.SET6T2NodeOrg_pos );};
  AnyRefNode SET6T3NodeLOrg = {sRel = .Scale(.StdPar.T6.Left.SET6T3NodeOrg_pos );};
  AnyRefNode SET6T4NodeLOrg = {sRel = .Scale(.StdPar.T6.Left.SET6T4NodeOrg_pos );};
  AnyRefNode SET10T6NodeRIns = {sRel = .Scale(.StdPar.T6.Right.SET10T6NodeIns_pos );};
  AnyRefNode SET9T6NodeRIns  = {sRel = .Scale(.StdPar.T6.Right.SET9T6NodeIns_pos );};
  AnyRefNode SET8T6NodeRIns  = {sRel = .Scale(.StdPar.T6.Right.SET8T6NodeIns_pos );};
  AnyRefNode SET10T6NodeLIns = {sRel = .Scale(.StdPar.T6.Left.SET10T6NodeIns_pos );};
  AnyRefNode SET9T6NodeLIns  = {sRel = .Scale(.StdPar.T6.Left.SET9T6NodeIns_pos );};
  AnyRefNode SET8T6NodeLIns  = {sRel = .Scale(.StdPar.T6.Left.SET8T6NodeIns_pos );};
  AnyRefNode SPT11T6NodeIns = {sRel= .Scale(.StdPar.T6.SPT11T6NodeIns_pos );};
  AnyRefNode SPT12T5Via6Node = {sRel= .Scale(.StdPar.T6.SPT12T5Via6Node_pos );};
  AnyRefNode SPT12T4Via6Node = {sRel= .Scale(.StdPar.T6.SPT12T4Via6Node_pos );};
  AnyRefNode SPL1T3Via7Node = {sRel= .Scale(.StdPar.T6.SPL1T3Via7Node_pos );};
  AnyRefNode SPL1T2Via7Node = {sRel= .Scale(.StdPar.T6.SPL1T2Via7Node_pos );};
  AnyRefNode SPL2T1Via8Node = {sRel= .Scale(.StdPar.T6.SPL2T1Via8Node_pos );};
};

SegmentsThorax.T7Seg = {
  AnyRefNode MFT7T2NodeROrg = {sRel = .Scale(.StdPar.T7.Right.MFT7T2NodeOrg_pos );};
  AnyRefNode MFT7T3NodeROrg = {sRel = .Scale(.StdPar.T7.Right.MFT7T3NodeOrg_pos );};
  AnyRefNode MFT7T4NodeROrg = {sRel = .Scale(.StdPar.T7.Right.MFT7T4NodeOrg_pos );};
  AnyRefNode MFT7T2NodeLOrg = {sRel = .Scale(.StdPar.T7.Left.MFT7T2NodeOrg_pos );};
  AnyRefNode MFT7T3NodeLOrg = {sRel = .Scale(.StdPar.T7.Left.MFT7T3NodeOrg_pos );};
  AnyRefNode MFT7T4NodeLOrg = {sRel = .Scale(.StdPar.T7.Left.MFT7T4NodeOrg_pos );};
  AnyRefNode MFT12T7NodeRIns = {sRel = .Scale(.StdPar.T7.Right.MFT12T7NodeIns_pos );};
  AnyRefNode MFT11T7NodeRIns = {sRel = .Scale(.StdPar.T7.Right.MFT11T7NodeIns_pos );};
  AnyRefNode MFT10T7NodeRIns = {sRel = .Scale(.StdPar.T7.Right.MFT10T7NodeIns_pos );};
  AnyRefNode MFT12T7NodeLIns = {sRel = .Scale(.StdPar.T7.Left.MFT12T7NodeIns_pos );};
  AnyRefNode MFT11T7NodeLIns = {sRel = .Scale(.StdPar.T7.Left.MFT11T7NodeIns_pos );};
  AnyRefNode MFT10T7NodeLIns = {sRel = .Scale(.StdPar.T7.Left.MFT10T7NodeIns_pos );};
  AnyRefNode SET7T3NodeROrg = {sRel = .Scale(.StdPar.T7.Right.SET7T3NodeOrg_pos );};
  AnyRefNode SET7T4NodeROrg = {sRel = .Scale(.StdPar.T7.Right.SET7T4NodeOrg_pos );};
  AnyRefNode SET7T5NodeROrg = {sRel = .Scale(.StdPar.T7.Right.SET7T5NodeOrg_pos );};
  AnyRefNode SET7T3NodeLOrg = {sRel = .Scale(.StdPar.T7.Left.SET7T3NodeOrg_pos );};
  AnyRefNode SET7T4NodeLOrg = {sRel = .Scale(.StdPar.T7.Left.SET7T4NodeOrg_pos );};
  AnyRefNode SET7T5NodeLOrg = {sRel = .Scale(.StdPar.T7.Left.SET7T5NodeOrg_pos );};
  AnyRefNode SET11T7NodeRIns = {sRel = .Scale(.StdPar.T7.Right.SET11T7NodeIns_pos );};
  AnyRefNode SET10T7NodeRIns = {sRel = .Scale(.StdPar.T7.Right.SET10T7NodeIns_pos );};
  AnyRefNode SET9T7NodeRIns  = {sRel = .Scale(.StdPar.T7.Right.SET9T7NodeIns_pos );};
  AnyRefNode SET11T7NodeLIns = {sRel = .Scale(.StdPar.T7.Left.SET11T7NodeIns_pos );};
  AnyRefNode SET10T7NodeLIns = {sRel = .Scale(.StdPar.T7.Left.SET10T7NodeIns_pos );};
  AnyRefNode SET9T7NodeLIns  = {sRel = .Scale(.StdPar.T7.Left.SET9T7NodeIns_pos );};
  AnyRefNode SPT11T6Via4Node = {sRel= .Scale(.StdPar.T7.SPT11T6Via4Node_pos );};
  AnyRefNode SPT12T5Via5Node = {sRel= .Scale(.StdPar.T7.SPT12T5Via5Node_pos );};
  AnyRefNode SPT12T4Via5Node = {sRel= .Scale(.StdPar.T7.SPT12T4Via5Node_pos );};
  AnyRefNode SPL1T3Via6Node = {sRel= .Scale(.StdPar.T7.SPL1T3Via6Node_pos );};
  AnyRefNode SPL1T2Via6Node = {sRel= .Scale(.StdPar.T7.SPL1T2Via6Node_pos );};
  AnyRefNode SPL2T1Via7Node = {sRel= .Scale(.StdPar.T7.SPL2T1Via7Node_pos );};
};

SegmentsThorax.T8Seg = {
  AnyRefNode MFL1T8NodeRIns  = {sRel = .Scale(.StdPar.Thorax.Right.MFL1T8Node_pos);};
  AnyRefNode MFL1T8NodeLIns  = {sRel = .Scale(.StdPar.Thorax.Left.MFL1T8Node_pos);};
  AnyRefNode SEL1T8NodeRIns  = {sRel = .Scale(.StdPar.Thorax.Right.SEL1T8Node_pos);};
  AnyRefNode SEL1T8NodeLIns  = {sRel = .Scale(.StdPar.Thorax.Left.SEL1T8Node_pos);};
  AnyRefNode MFT8T3NodeROrg = {sRel = .Scale(.StdPar.T8.Right.MFT8T3NodeOrg_pos );};
  AnyRefNode MFT8T4NodeROrg = {sRel = .Scale(.StdPar.T8.Right.MFT8T4NodeOrg_pos );};
  AnyRefNode MFT8T5NodeROrg = {sRel = .Scale(.StdPar.T8.Right.MFT8T5NodeOrg_pos );};
  AnyRefNode MFT8T3NodeLOrg = {sRel = .Scale(.StdPar.T8.Left.MFT8T3NodeOrg_pos );};
  AnyRefNode MFT8T4NodeLOrg = {sRel = .Scale(.StdPar.T8.Left.MFT8T4NodeOrg_pos );};
  AnyRefNode MFT8T5NodeLOrg = {sRel = .Scale(.StdPar.T8.Left.MFT8T5NodeOrg_pos );};
  AnyRefNode MFT12T8NodeRIns = {sRel = .Scale(.StdPar.T8.Right.MFT12T8NodeIns_pos );};
  AnyRefNode MFT11T8NodeRIns = {sRel = .Scale(.StdPar.T8.Right.MFT11T8NodeIns_pos );};
  AnyRefNode MFT12T8NodeLIns = {sRel = .Scale(.StdPar.T8.Left.MFT12T8NodeIns_pos );};
  AnyRefNode MFT11T8NodeLIns = {sRel = .Scale(.StdPar.T8.Left.MFT11T8NodeIns_pos );};
  AnyRefNode SET8T4NodeROrg = {sRel = .Scale(.StdPar.T8.Right.SET8T4NodeOrg_pos );};
  AnyRefNode SET8T5NodeROrg = {sRel = .Scale(.StdPar.T8.Right.SET8T5NodeOrg_pos );};
  AnyRefNode SET8T6NodeROrg = {sRel = .Scale(.StdPar.T8.Right.SET8T6NodeOrg_pos );};
  AnyRefNode SET8T4NodeLOrg = {sRel = .Scale(.StdPar.T8.Left.SET8T4NodeOrg_pos );};
  AnyRefNode SET8T5NodeLOrg = {sRel = .Scale(.StdPar.T8.Left.SET8T5NodeOrg_pos );};
  AnyRefNode SET8T6NodeLOrg = {sRel = .Scale(.StdPar.T8.Left.SET8T6NodeOrg_pos );};
  AnyRefNode SET12T8NodeRIns = {sRel = .Scale(.StdPar.T8.Right.SET12T8NodeIns_pos );};
  AnyRefNode SET11T8NodeRIns = {sRel = .Scale(.StdPar.T8.Right.SET11T8NodeIns_pos );};
  AnyRefNode SET10T8NodeRIns = {sRel = .Scale(.StdPar.T8.Right.SET10T8NodeIns_pos );};
  AnyRefNode SET12T8NodeLIns = {sRel = .Scale(.StdPar.T8.Left.SET12T8NodeIns_pos );};
  AnyRefNode SET11T8NodeLIns = {sRel = .Scale(.StdPar.T8.Left.SET11T8NodeIns_pos );};
  AnyRefNode SET10T8NodeLIns = {sRel = .Scale(.StdPar.T8.Left.SET10T8NodeIns_pos );};
  AnyRefNode SPL1T3ViaNode = {sRel = .Scale(.StdPar.T8.SPL1T3ViaNode_pos );};
  AnyRefNode SPT11T6Via3Node = {sRel= .Scale(.StdPar.T8.SPT11T6Via3Node_pos );};
  AnyRefNode SPT12T5Via4Node = {sRel= .Scale(.StdPar.T8.SPT12T5Via4Node_pos );};
  AnyRefNode SPT12T4Via4Node = {sRel= .Scale(.StdPar.T8.SPT12T4Via4Node_pos );};
  AnyRefNode SPL1T3Via5Node = {sRel= .Scale(.StdPar.T8.SPL1T3Via5Node_pos );};
  AnyRefNode SPL1T2Via5Node = {sRel= .Scale(.StdPar.T8.SPL1T2Via5Node_pos );};
  AnyRefNode SPL2T1Via6Node = {sRel= .Scale(.StdPar.T8.SPL2T1Via6Node_pos );};
};

SegmentsThorax.T9Seg = {
  AnyRefNode MFL1T9NodeRIns  = {sRel = .Scale(.StdPar.Thorax.Right.MFL1T9Node_pos);};
  AnyRefNode MFL1T9NodeLIns  = {sRel = .Scale(.StdPar.Thorax.Left.MFL1T9Node_pos);};
  AnyRefNode MFL2T9NodeRIns  = {sRel = .Scale(.StdPar.Thorax.Right.MFL2T9Node_pos);};
  AnyRefNode MFL2T9NodeLIns  = {sRel = .Scale(.StdPar.Thorax.Left.MFL2T9Node_pos);};
  AnyRefNode SEL2T9NodeRIns  = {sRel = .Scale(.StdPar.Thorax.Right.SEL2T9Node_pos);};
  AnyRefNode SEL2T9NodeLIns  = {sRel = .Scale(.StdPar.Thorax.Left.SEL2T9Node_pos);};
  AnyRefNode MFT9T4NodeROrg = {sRel = .Scale(.StdPar.T9.Right.MFT9T4NodeOrg_pos );};
  AnyRefNode MFT9T5NodeROrg = {sRel = .Scale(.StdPar.T9.Right.MFT9T5NodeOrg_pos );};
  AnyRefNode MFT9T6NodeROrg = {sRel = .Scale(.StdPar.T9.Right.MFT9T6NodeOrg_pos );};
  AnyRefNode MFT9T4NodeLOrg = {sRel = .Scale(.StdPar.T9.Left.MFT9T4NodeOrg_pos );};
  AnyRefNode MFT9T5NodeLOrg = {sRel = .Scale(.StdPar.T9.Left.MFT9T5NodeOrg_pos );};
  AnyRefNode MFT9T6NodeLOrg = {sRel = .Scale(.StdPar.T9.Left.MFT9T6NodeOrg_pos );};
  AnyRefNode MFT12T9NodeRIns = {sRel = .Scale(.StdPar.T9.Right.MFT12T9NodeIns_pos );};
  AnyRefNode MFT12T9NodeLIns = {sRel = .Scale(.StdPar.T9.Left.MFT12T9NodeIns_pos );};
  AnyRefNode SET9T5NodeROrg = {sRel = .Scale(.StdPar.T9.Right.SET9T5NodeOrg_pos );};
  AnyRefNode SET9T6NodeROrg = {sRel = .Scale(.StdPar.T9.Right.SET9T6NodeOrg_pos );};
  AnyRefNode SET9T7NodeROrg = {sRel = .Scale(.StdPar.T9.Right.SET9T7NodeOrg_pos );};
  AnyRefNode SET9T5NodeLOrg = {sRel = .Scale(.StdPar.T9.Left.SET9T5NodeOrg_pos );};
  AnyRefNode SET9T6NodeLOrg = {sRel = .Scale(.StdPar.T9.Left.SET9T6NodeOrg_pos );};
  AnyRefNode SET9T7NodeLOrg = {sRel = .Scale(.StdPar.T9.Left.SET9T7NodeOrg_pos );};
  AnyRefNode SET12T9NodeRIns = {sRel = .Scale(.StdPar.T9.Right.SET12T9NodeIns_pos );};
  AnyRefNode SET11T9NodeRIns = {sRel = .Scale(.StdPar.T9.Right.SET11T9NodeIns_pos );};
  AnyRefNode SET12T9NodeLIns = {sRel = .Scale(.StdPar.T9.Left.SET12T9NodeIns_pos );};
  AnyRefNode SET11T9NodeLIns = {sRel = .Scale(.StdPar.T9.Left.SET11T9NodeIns_pos );};
  AnyRefNode SPT11T6Via2Node = {sRel= .Scale(.StdPar.T9.SPT11T6Via2Node_pos );};
  AnyRefNode SPT12T5Via3Node = {sRel= .Scale(.StdPar.T9.SPT12T5Via3Node_pos );};
  AnyRefNode SPT12T4Via3Node = {sRel= .Scale(.StdPar.T9.SPT12T4Via3Node_pos );};
  AnyRefNode SPL1T3Via4Node = {sRel= .Scale(.StdPar.T9.SPL1T3Via4Node_pos );};
  AnyRefNode SPL1T2Via4Node = {sRel= .Scale(.StdPar.T9.SPL1T2Via4Node_pos );};
  AnyRefNode SPL2T1Via5Node = {sRel= .Scale(.StdPar.T9.SPL2T1Via5Node_pos );};
};

SegmentsThorax.T10Seg = {
  AnyRefNode MFL1T10NodeRIns = {sRel = .Scale(.StdPar.Thorax.Right.MFL1T10Node_pos);};
  AnyRefNode MFL1T10NodeLIns = {sRel = .Scale(.StdPar.Thorax.Left.MFL1T10Node_pos);};
  AnyRefNode MFL2T10NodeRIns = {sRel = .Scale(.StdPar.Thorax.Right.MFL2T10Node_pos);};
  AnyRefNode MFL2T10NodeLIns = {sRel = .Scale(.StdPar.Thorax.Left.MFL2T10Node_pos);};
  AnyRefNode MFL3T10NodeRIns = {sRel = .Scale(.StdPar.Thorax.Right.MFL3T10Node_pos);};
  AnyRefNode MFL3T10NodeLIns = {sRel = .Scale(.StdPar.Thorax.Left.MFL3T10Node_pos);};
  AnyRefNode SEL1T10NodeRIns = {sRel = .Scale(.StdPar.Thorax.Right.SEL1T10Node_pos);};
  AnyRefNode SEL1T10NodeLIns = {sRel = .Scale(.StdPar.Thorax.Left.SEL1T10Node_pos);};
  AnyRefNode SEL2T10NodeRIns = {sRel = .Scale(.StdPar.Thorax.Right.SEL2T10Node_pos);};
  AnyRefNode SEL2T10NodeLIns = {sRel = .Scale(.StdPar.Thorax.Left.SEL2T10Node_pos);};
  AnyRefNode SEL2T9NodeR  = {sRel = .Scale(.StdPar.Thorax.Right.SEL2T9Node_pos);};
  AnyRefNode SEL2T9NodeL  = {sRel = .Scale(.StdPar.Thorax.Left.SEL2T9Node_pos);};
  AnyRefNode MFT10T5NodeROrg = {sRel = .Scale(.StdPar.Thorax.Right.MFT10T5Node_pos);};
  AnyRefNode MFT10T6NodeROrg = {sRel = .Scale(.StdPar.Thorax.Right.MFT10T6Node_pos);};
  AnyRefNode MFT10T7NodeROrg = {sRel = .Scale(.StdPar.Thorax.Right.MFT10T7Node_pos);};
  AnyRefNode MFT10T5NodeLOrg = {sRel = .Scale(.StdPar.Thorax.Left.MFT10T5Node_pos);};
  AnyRefNode MFT10T6NodeLOrg = {sRel = .Scale(.StdPar.Thorax.Left.MFT10T6Node_pos);};
  AnyRefNode MFT10T7NodeLOrg = {sRel = .Scale(.StdPar.Thorax.Left.MFT10T7Node_pos);};
  AnyRefNode SET10T6NodeROrg = {sRel = .Scale(.StdPar.Thorax.Right.SET10T6Node_pos);};
  AnyRefNode SET10T7NodeROrg = {sRel = .Scale(.StdPar.Thorax.Right.SET10T7Node_pos);};
  AnyRefNode SET10T8NodeROrg = {sRel = .Scale(.StdPar.Thorax.Right.SET10T8Node_pos);};
  AnyRefNode SET10T6NodeLOrg = {sRel = .Scale(.StdPar.Thorax.Left.SET10T6Node_pos);};
  AnyRefNode SET10T7NodeLOrg = {sRel = .Scale(.StdPar.Thorax.Left.SET10T7Node_pos);};
  AnyRefNode SET10T8NodeLOrg = {sRel = .Scale(.StdPar.Thorax.Left.SET10T8Node_pos);};
  AnyRefNode SET12T10NodeRIns = {sRel = .Scale(.StdPar.Thorax.Right.SET12T10Node_pos);};
  AnyRefNode SET12T10NodeLIns = {sRel = .Scale(.StdPar.Thorax.Left.SET12T10Node_pos);};
  AnyRefNode SPT11T6Via1Node = {sRel= .Scale(.StdPar.Thorax.SPT11T6Via1Node_pos);};
  AnyRefNode SPT12T5Via2Node = {sRel= .Scale(.StdPar.Thorax.SPT12T5Via2Node_pos);};
  AnyRefNode SPT12T4Via2Node = {sRel= .Scale(.StdPar.Thorax.SPT12T4Via2Node_pos);};
  AnyRefNode SPL1T3Via3Node = {sRel= .Scale(.StdPar.Thorax.SPL1T3Via3Node_pos);};
  AnyRefNode SPL1T2Via3Node = {sRel= .Scale(.StdPar.Thorax.SPL1T2Via3Node_pos);};
  AnyRefNode SPL2T1Via4Node = {sRel= .Scale(.StdPar.Thorax.SPL2T1Via4Node_pos);};
};

SegmentsThorax.T11Seg = {
  AnyRefNode MFL2T11NodeRIns = {sRel = .Scale(.StdPar.Thorax.Right.MFL2T11Node_pos);};
  AnyRefNode MFL2T11NodeLIns = {sRel = .Scale(.StdPar.Thorax.Left.MFL2T11Node_pos);};
  AnyRefNode MFL3T11NodeRIns = {sRel = .Scale(.StdPar.Thorax.Right.MFL3T11Node_pos);};
  AnyRefNode MFL3T11NodeLIns = {sRel = .Scale(.StdPar.Thorax.Left.MFL3T11Node_pos);};
  AnyRefNode MFL4T11NodeRIns = {sRel = .Scale(.StdPar.Thorax.Right.MFL4T11Node_pos);};
  AnyRefNode MFL4T11NodeLIns = {sRel = .Scale(.StdPar.Thorax.Left.MFL4T11Node_pos);};
  AnyRefNode SEL1T11NodeRIns = {sRel = .Scale(.StdPar.Thorax.Right.SEL1T11Node_pos);};
  AnyRefNode SEL1T11NodeLIns = {sRel = .Scale(.StdPar.Thorax.Left.SEL1T11Node_pos);};
  AnyRefNode SEL2T11NodeRIns = {sRel = .Scale(.StdPar.Thorax.Right.SEL2T11Node_pos);};
  AnyRefNode SEL2T11NodeLIns = {sRel = .Scale(.StdPar.Thorax.Left.SEL2T11Node_pos);};
  AnyRefNode SEL3T11NodeRIns = {sRel = .Scale(.StdPar.Thorax.Right.SEL3T11Node_pos);};
  AnyRefNode SEL3T11NodeLIns = {sRel = .Scale(.StdPar.Thorax.Left.SEL3T11Node_pos);};
  AnyRefNode MFT11T6NodeROrg = {sRel = .Scale(.StdPar.T11.Right.MFT11T6NodeOrg_pos );};
  AnyRefNode MFT11T7NodeROrg = {sRel = .Scale(.StdPar.T11.Right.MFT11T7NodeOrg_pos );};
  AnyRefNode MFT11T8NodeROrg = {sRel = .Scale(.StdPar.T11.Right.MFT11T8NodeOrg_pos );};
  AnyRefNode MFT11T6NodeLOrg = {sRel = .Scale(.StdPar.T11.Left.MFT11T6NodeOrg_pos );};
  AnyRefNode MFT11T7NodeLOrg = {sRel = .Scale(.StdPar.T11.Left.MFT11T7NodeOrg_pos );};
  AnyRefNode MFT11T8NodeLOrg = {sRel = .Scale(.StdPar.T11.Left.MFT11T8NodeOrg_pos );};
  AnyRefNode SET11T7NodeROrg = {sRel = .Scale(.StdPar.T11.Right.SET11T7NodeOrg_pos );};
  AnyRefNode SET11T8NodeROrg = {sRel = .Scale(.StdPar.T11.Right.SET11T8NodeOrg_pos );};
  AnyRefNode SET11T9NodeROrg = {sRel = .Scale(.StdPar.T11.Right.SET11T9NodeOrg_pos );};
  AnyRefNode SET11T7NodeLOrg = {sRel = .Scale(.StdPar.T11.Left.SET11T7NodeOrg_pos );};
  AnyRefNode SET11T8NodeLOrg = {sRel = .Scale(.StdPar.T11.Left.SET11T8NodeOrg_pos );};
  AnyRefNode SET11T9NodeLOrg = {sRel = .Scale(.StdPar.T11.Left.SET11T9NodeOrg_pos );};
  AnyRefNode SPT11T6NodeOrg = {sRel= .Scale(.StdPar.T11.SPT11T6NodeOrg_pos );};
  AnyRefNode SPT12T5Via1Node = {sRel= .Scale(.StdPar.T11.SPT12T5Via1Node_pos );};
  AnyRefNode SPT12T4Via1Node = {sRel= .Scale(.StdPar.T11.SPT12T4Via1Node_pos );};
  AnyRefNode SPL1T3Via2Node = {sRel= .Scale(.StdPar.T11.SPL1T3Via2Node_pos );};
  AnyRefNode SPL1T2Via2Node = {sRel= .Scale(.StdPar.T11.SPL1T2Via2Node_pos );};
  AnyRefNode SPL2T1Via3Node = {sRel= .Scale(.StdPar.T11.SPL2T1Via3Node_pos );};
};

SegmentsThorax.T12Seg = {
  AnyRefNode MFL3T12NodeRIns = {sRel = .Scale(.StdPar.Thorax.Right.MFL3T12Node_pos);};
  AnyRefNode MFL3T12NodeLIns = {sRel = .Scale(.StdPar.Thorax.Left.MFL3T12Node_pos);};
  AnyRefNode MFL4T12NodeRIns = {sRel = .Scale(.StdPar.Thorax.Right.MFL4T12Node_pos);};
  AnyRefNode MFL4T12NodeLIns = {sRel = .Scale(.StdPar.Thorax.Left.MFL4T12Node_pos);};
  AnyRefNode MFL5T12NodeRIns = {sRel = .Scale(.StdPar.Thorax.Right.MFL5T12Node_pos);};
  AnyRefNode MFL5T12NodeLIns = {sRel = .Scale(.StdPar.Thorax.Left.MFL5T12Node_pos);};
  AnyRefNode SEL2T12NodeRIns = {sRel = .Scale(.StdPar.Thorax.Right.SEL2T12Node_pos);};
  AnyRefNode SEL2T12NodeLIns = {sRel = .Scale(.StdPar.Thorax.Left.SEL2T12Node_pos);};
  AnyRefNode SEL3T12NodeRIns = {sRel = .Scale(.StdPar.Thorax.Right.SEL3T12Node_pos);};
  AnyRefNode SEL3T12NodeLIns = {sRel = .Scale(.StdPar.Thorax.Left.SEL3T12Node_pos);};
  AnyRefNode MFT12T7NodeROrg = {sRel = .Scale(.StdPar.T12.Right.MFT12T7NodeOrg_pos );};
  AnyRefNode MFT12T8NodeROrg = {sRel = .Scale(.StdPar.T12.Right.MFT12T8NodeOrg_pos );};
  AnyRefNode MFT12T9NodeROrg = {sRel = .Scale(.StdPar.T12.Right.MFT12T9NodeOrg_pos );};
  AnyRefNode MFT12T7NodeLOrg = {sRel = .Scale(.StdPar.T12.Left.MFT12T7NodeOrg_pos );};
  AnyRefNode MFT12T8NodeLOrg = {sRel = .Scale(.StdPar.T12.Left.MFT12T8NodeOrg_pos );};
  AnyRefNode MFT12T9NodeLOrg = {sRel = .Scale(.StdPar.T12.Left.MFT12T9NodeOrg_pos );};
  AnyRefNode SET12T8NodeROrg  = {sRel = .Scale(.StdPar.T12.Right.SET12T8NodeOrg_pos );};
  AnyRefNode SET12T9NodeROrg  = {sRel = .Scale(.StdPar.T12.Right.SET12T9NodeOrg_pos );};
  AnyRefNode SET12T10NodeROrg = {sRel = .Scale(.StdPar.T12.Right.SET12T10NodeOrg_pos );};
  AnyRefNode SET12T8NodeLOrg  = {sRel = .Scale(.StdPar.T12.Left.SET12T8NodeOrg_pos );};
  AnyRefNode SET12T9NodeLOrg  = {sRel = .Scale(.StdPar.T12.Left.SET12T9NodeOrg_pos );};
  AnyRefNode SET12T10NodeLOrg = {sRel = .Scale(.StdPar.T12.Left.SET12T10NodeOrg_pos );};
  AnyRefNode SPT12T5NodeOrg = {sRel= .Scale(.StdPar.T12.SPT12T5NodeOrg_pos );};
  AnyRefNode SPT12T4NodeOrg = {sRel= .Scale(.StdPar.T12.SPT12T4NodeOrg_pos );};
  AnyRefNode SPL1T3Via1Node = {sRel= .Scale(.StdPar.T12.SPL1T3Via1Node_pos );};
  AnyRefNode SPL1T2Via1Node = {sRel= .Scale(.StdPar.T12.SPL1T2Via1Node_pos );};
  AnyRefNode SPL2T1Via2Node = {sRel= .Scale(.StdPar.T12.SPL2T1Via2Node_pos );};
};

SegmentsRibCage.SternalBodySeg = {
  // Rectus Abdominis Nodes
  AnyRefNode RACP_CO7_1_R = {sRel = .Scale(.StdPar.Thorax.Right.RACP_CO7Node_1__pos);};
  AnyRefNode RACP_CO6_2_R = {sRel = .Scale(.StdPar.Thorax.Right.RACP_CO6Node_2__pos);};
  AnyRefNode RACP_CO5_3_R = {sRel = .Scale(.StdPar.Thorax.Right.RACP_CO5Node_3__pos);};
  AnyRefNode RACP_CO5_4_R = {sRel = .Scale(.StdPar.Thorax.Right.RACP_CO5Node_4__pos);};
  AnyRefNode RACP_Via_2_R = {sRel = .Scale(.StdPar.Thorax.Right.RACP_Via_2__pos);};
  AnyRefNode RACP_Via_3_R = {sRel = .Scale(.StdPar.Thorax.Right.RACP_Via_3__pos);};
  AnyRefNode RACP_Via_4_R = {sRel = .Scale(.StdPar.Thorax.Right.RACP_Via_4__pos);};
  AnyRefNode RACP_CO7_1_L = {sRel = .Scale(.StdPar.Thorax.Left.RACP_CO7Node_1__pos);};
  AnyRefNode RACP_CO6_2_L = {sRel = .Scale(.StdPar.Thorax.Left.RACP_CO6Node_2__pos);};
  AnyRefNode RACP_CO5_3_L = {sRel = .Scale(.StdPar.Thorax.Left.RACP_CO5Node_3__pos);};
  AnyRefNode RACP_CO5_4_L = {sRel = .Scale(.StdPar.Thorax.Left.RACP_CO5Node_4__pos);};
  AnyRefNode RACP_Via_2_L = {sRel = .Scale(.StdPar.Thorax.Left.RACP_Via_2__pos);};
  AnyRefNode RACP_Via_3_L = {sRel = .Scale(.StdPar.Thorax.Left.RACP_Via_3__pos);};
  AnyRefNode RACP_Via_4_L = {sRel = .Scale(.StdPar.Thorax.Left.RACP_Via_4__pos);};
  // End of Rectus Abdominis Nodes
};
