/*
Include file with Obliquus Externus definitions.

Mark de Zee (24-06-2003)
*/


AnyFolder ObliquusExternus = {


  AnyMuscleViaPoint OEC6_RS = {
    AnyMuscleModel &MusMdl = ...MuscleParametersSpineRight.ObliquusExternusParameter.OEC6_RSPar;
    AnyRefNode &Org = ...SegmentsRibCage.RibsRight.R6Seg.OEC6_RSNodeR;
    AnyRefNode &Ins = ...Buckle.Segments.BuckleSeg.OEC6_RSNodeR;
    AnyDrawMuscle DrwMus = {      #include "../drawSettings/MusDrawSettings.any"  };

  };
  AnyMuscleViaPoint OEC7_RS = {
    AnyMuscleModel &MusMdl = ...MuscleParametersSpineRight.ObliquusExternusParameter.OEC7_RSPar;
    AnyRefNode &Org = ...SegmentsRibCage.RibsRight.R7Seg.OEC7_RSNodeR;
    AnyRefNode &Ins = ...Buckle.Segments.BuckleSeg.OEC7_RSNodeR;
    AnyDrawMuscle DrwMus = {      #include "../drawSettings/MusDrawSettings.any"  };

  };

  AnyMuscleViaPoint OEC8_RS = {
    AnyMuscleModel &MusMdl = ...MuscleParametersSpineRight.ObliquusExternusParameter.OEC8_RSPar;
    AnyRefNode &Org = ...SegmentsRibCage.RibsRight.R8Seg.OEC8_RSNodeR;
    AnyRefNode &Ins = ...Buckle.Segments.BuckleSeg.OEC8_RSNodeR;
    AnyDrawMuscle DrwMus = {#include "../drawSettings/MusDrawSettings.any"};

  };

  AnyMuscleViaPoint OEC9_RS = {
    AnyMuscleModel &MusMdl = ...MuscleParametersSpineRight.ObliquusExternusParameter.OEC9_RSPar;
    AnyRefNode &Org = ...SegmentsRibCage.RibsRight.R9Seg.OEC9_RSNodeR;
    AnyRefNode &Ins = ...Buckle.Segments.BuckleSeg.OEC9_RSNodeR;
    AnyDrawMuscle DrwMus = {#include "../drawSettings/MusDrawSettings.any"};

  };

  AnyMuscleViaPoint OEC10_RS = {
    AnyMuscleModel &MusMdl = ...MuscleParametersSpineRight.ObliquusExternusParameter.OEC10_RSPar;
    AnyRefNode &Org = ...SegmentsRibCage.RibsRight.R10Seg.OEC10_RSNodeR;
    AnyRefNode &Ins = ...Buckle.Segments.BuckleSeg.OEC10_RSNodeR;
    AnyDrawMuscle DrwMus = {#include "../drawSettings/MusDrawSettings.any"};

  };

  AnyMuscleViaPoint OEC10a_CI = {
    AnyMuscleModel &MusMdl = ...MuscleParametersSpineRight.ObliquusExternusParameter.OEC10a_RSPar;
    AnyRefNode &Org = ...SegmentsRibCage.RibsRight.R10Seg.OEC10a_CINodeR;
    AnyRefNode &Ins = ...SegmentsLumbar.PelvisSeg.OEC10a_CINodeR;
    AnyDrawMuscle DrwMus = {#include "../drawSettings/MusDrawSettings.any"};
  };

  AnyMuscleViaPoint OEC11_CI = {
    AnyMuscleModel &MusMdl = ...MuscleParametersSpineRight.ObliquusExternusParameter.OEC11_CIPar;
    AnyRefNode &Org = ...SegmentsRibCage.RibsRight.R11Seg.OEC11_CINodeR;
    AnyRefNode &Ins = ...SegmentsLumbar.PelvisSeg.OEC11_CINodeR;
    AnyDrawMuscle DrwMus = {#include "../drawSettings/MusDrawSettings.any"};
  };

  AnyMuscleViaPoint OEC12_CI = {
    AnyMuscleModel &MusMdl = ...MuscleParametersSpineRight.ObliquusExternusParameter.OEC12_CIPar;
    AnyRefNode &Org = ...SegmentsRibCage.RibsRight.R12Seg.OEC12_CINodeR;
    AnyRefNode &Ins = ...SegmentsLumbar.PelvisSeg.OEC12_CINodeR;
    AnyDrawMuscle DrwMus = {#include "../drawSettings/MusDrawSettings.any"};
  };

};
