#ifndef BM_PELVIS_DISPLAY
  #define BM_PELVIS_DISPLAY 2
#endif

#ifdef LEG_MODEL_PARAM_DIRECTION
  #undef LEG_MODEL_PARAM_DIRECTION
#endif

#ifndef LEG_MODEL_PARAM_DIRECTION
  #if BM_LEG_RIGHT != OFF
    #define LEG_MODEL_PARAM_DIRECTION Right
  #endif
#endif

#ifndef LEG_MODEL_PARAM_DIRECTION
  #if BM_LEG_LEFT != OFF
    #define LEG_MODEL_PARAM_DIRECTION Left
  #endif
#endif

#if (BM_LEG_LEFT == OFF & BM_LEG_RIGHT == OFF)
  #ifdef BM_LEG_TRUNK_INTERFACE
    #undef BM_LEG_TRUNK_INTERFACE
  #endif
  #define BM_LEG_TRUNK_INTERFACE _MORPH_NONE_
#endif

AnySeg PelvisSeg = {
  #ifdef LEG_MODEL_PARAM_DIRECTION
    #if BM_LEG_MODEL == _LEG_MODEL_LEG_
      AnyFolder& Leg_ModelParameters = ...LEG_MODEL_PARAM_DIRECTION.Leg.StandardParameters;
    #endif
    #if (BM_LEG_MODEL == _LEG_MODEL_TLEM_) | (BM_LEG_MODEL == _LEG_MODEL_TLEM2_)
      AnyFolder& Leg_ModelParameters = ...LEG_MODEL_PARAM_DIRECTION.Leg.ModelParameters;
    #endif
  #endif


  #define MACRO_CONSTRUCT_ANATOMICAL_FRAME_s(p, SIGN) (0.5*(p[0]+p[1]))
  #define MACRO_CONSTRUCT_ANATOMICAL_FRAME_A(p, SIGN) (RotMat(0.5*(p[0]+p[1]), p[0], 0.5*(p[2]+p[3]))*RotMat(pi/2, y)*RotMat(pi,z))

  #include "PelvisInterfaceMorphing.any"

  AnyFunTransform3D &GeomScale = ..Scaling.GeometricalScaling.PelvisSeg.ScaleFunction;

  AnyRefNode& MoCapMarkerFrameAMMR24 = ScalingNode; ///< For backwards compatability with AMMR 2.4 MoCap Marker protocols

  /// This is the anatomical frame that has axes aligned with the global coordinate system
  ///of the trunk dataset. This frame defines the neutral orientation of the pelvis
  ///segment.
  AnyRefNode AnatomicalFrameTrunk = {
     sRel = .AnatomicalFrame.sRel;
  };

  /// This is the anatomical frame that has axes aligned with the global coordinate system
  ///of the trunk dataset. This frame defines the neutral orientation of the pelvis
  ///segment (AMMR<2.5)
  AnyRefNode AnatomicalFrameISB = {
     sRel = 0.5*(.Scale(.StdPar.Right.ASIS)+.Scale(.StdPar.Left.ASIS));
     ARel = RotMat(sRel, .Scale(.StdPar.Right.ASIS), 0.5*(.Scale(.StdPar.Right.PSIS)+.Scale(.StdPar.Left.PSIS))) * RotMat(-pi/2,x) * RotMat(pi/2,y);
  };

  /// This is an anatomical frame aligned with the ASIS and Pubic tubercle bony landmarks
  /// This was previously used as the neutral frame for pelvis.
  AnyRefNode AnatomicalFrame = {
    AnyFloat pUnscaled_Trunk_Pelvis =  {
      .StdPar.Right.ASIS,
      .StdPar.Left.ASIS,
      .StdPar.Right.PT,
      .StdPar.Left.PT
    };
    AnyFloat pScaled = Scale_Trunk_Pelvis(pUnscaled_Trunk_Pelvis);
    sRel = MACRO_CONSTRUCT_ANATOMICAL_FRAME_s(pScaled, .Scale.ScaleAfterInterfaceMorphingDef.Sign );
    ARel = MACRO_CONSTRUCT_ANATOMICAL_FRAME_A(pScaled, .Scale.ScaleAfterInterfaceMorphingDef.Sign );
    AnyVec3 sRelUnscaled = MACRO_CONSTRUCT_ANATOMICAL_FRAME_s(pUnscaled_Trunk_Pelvis, .Scale.ScaleAfterInterfaceMorphingDef.Sign); ///< Generic unscaled position of thigh ScalingNode
    AnyMat33 ARelUnscaled = MACRO_CONSTRUCT_ANATOMICAL_FRAME_A(pUnscaled_Trunk_Pelvis, .Scale.ScaleAfterInterfaceMorphingDef.Sign);///< Generic unscaled rotation of thigh ScalingNode

    #ifdef SKIN
     #if SKIN
     AnyDrawSurf Drw2 = {
       FileName = .....LEG_MODEL_PARAM_DIRECTION.Leg.Seg.STL.FilenamePelvisSkin;
       ScaleXYZ = {1.0, 1.0, 1.0};
       RGB = ....ColorRef.Skin;
       Opacity = Main.DrawSettings.SkinOpacity.Opacity;
       AnyFunTransform3D &Scale =..GeomScale;
       Face=-1;
     };
     #endif
    #endif
    #ifdef MUSCLETISSUE
     #if MUSCLETISSUE
       AnyDrawSurf Drw1 = {
       FileName = .....LEG_MODEL_PARAM_DIRECTION.Leg.Seg.STL.FilenamePelvisMuscleTissue;
       ScaleXYZ = {1.0, 1.0, 1.0};
       RGB = ....ColorRef.MuscleTissue;
       Opacity = Main.DrawSettings.MuscleTissueOpacity.Opacity;
       AnyFunTransform3D &Scale =..GeomScale;
       Face=-1;
     };
     #endif
    #endif

    AnyFunTransform3D Scale_Trunk_Pelvis = {
      AnyFolder ScaleAfterInterfaceMorphingDef = {
    #ifndef SCALE_TYPE
    #define SCALE_TYPE 1
    #endif

        AnyFloat pUnscaledOrg = ...InterfaceMorphingDef.IM_Trunk_To_Leg_Unscaled(..pUnscaled_Trunk_Pelvis );
     AnyVar fixedX = 0.5*(pUnscaledOrg[0][0]+pUnscaledOrg[1][0]);
     // Pelvis scaling shouldn't not happen in the ASIS-PT defined anatomical frame.
        // But in the Trunk Anatomical (i.e. the segmental trunk frame), which also define
        // the neutral position So we project the ASIS-PT points into the same vertical
        // plane.
     AnyFloat pUnscaled = {
         {fixedX, pUnscaledOrg[0][1], pUnscaledOrg[0][2]},
         {fixedX, pUnscaledOrg[1][1], pUnscaledOrg[1][2]},
         {fixedX, pUnscaledOrg[2][1], pUnscaledOrg[2][2]},
         {fixedX, pUnscaledOrg[3][1], pUnscaledOrg[3][2]},
       };

        AnyFunTransform3D& GeomScale = ...GeomScale;

     #include "..\Scaling\SegScaleFunWrtAnatomicalFrame.any"
    };

      PreTransforms = {
        &..InterfaceMorphingDef.IM_Trunk_To_Leg_Unscaled,
      &ScaleAfterInterfaceMorphingDef.Scale
    };
  };

#if (BM_LEG_MODEL == _LEG_MODEL_TLEM_) | (BM_LEG_MODEL == _LEG_MODEL_TLEM2_)
      AnyFloat pUnscaled_Leg_Pelvis =  {
        ....LEG_MODEL_PARAM_DIRECTION.Leg.ModelParameters.Pelvis.RASIS,
        ....LEG_MODEL_PARAM_DIRECTION.Leg.ModelParameters.Pelvis.LASIS,
        ....LEG_MODEL_PARAM_DIRECTION.Leg.ModelParameters.Pelvis.RPT,
        ....LEG_MODEL_PARAM_DIRECTION.Leg.ModelParameters.Pelvis.LPT
 };
      AnyFunTransform3D Scale_Leg_Pelvis = {
        AnyFolder ScaleAfterInterfaceMorphingDef = {
          AnyFloat pUnscaledOrg = ...InterfaceMorphingDef.IM_Leg_To_Trunk_Unscaled(..pUnscaled_Leg_Pelvis );

     // Pelvis scaling shouldn't not happen in the ASIS-PT defined anatomical frame.
          // But in the Trunk Anatomical (i.e. the segmental trunk frame), which also
          // define the neutral position So we we project the ASIS-PT points into the same
          // vertical plane.
      AnyVar fixedX = 0.5*(pUnscaledOrg[0][0]+pUnscaledOrg[1][0]);
      AnyFloat pUnscaled = {
         {fixedX, pUnscaledOrg[0][1], pUnscaledOrg[0][2]},
         {fixedX, pUnscaledOrg[1][1], pUnscaledOrg[1][2]},
         {fixedX, pUnscaledOrg[2][1], pUnscaledOrg[2][2]},
         {fixedX, pUnscaledOrg[3][1], pUnscaledOrg[3][2]},
       };

          AnyFunTransform3D& GeomScale = ...GeomScale;

       #include "..\Scaling\SegScaleFunWrtAnatomicalFrame.any"
     };

        PreTransforms = {
          &..InterfaceMorphingDef.IM_Leg_To_Trunk_Unscaled,
       &ScaleAfterInterfaceMorphingDef.Scale
     };
   };
  #else
    AnyFunTransform3D& Scale_Leg_Pelvis = Scale_Trunk_Pelvis;
  #endif

    /// Folder containing the origins for defining each body region
    /// each region has it's own scalefunction that needs to know where the region starts.
    /// The joint position in segmental reference frame is interface morphed and
    /// transfered into the trunk anatomical frame
    AnyFolder ScalingOrigins = {
      AnyVec3 Pelvis = 0.5 * (
        ..InterfaceMorphingDef.IM_Trunk_To_Leg_Unscaled(....ModelParameters.Pelvis.Right.ASIS)
        + ..InterfaceMorphingDef.IM_Trunk_To_Leg_Unscaled(....ModelParameters.Pelvis.Left.ASIS)
      );

      AnyVec3 Lumbar = (
        ..InterfaceMorphingDef.IM_Trunk_To_Leg_AboveSacrum(....ModelParameters.Sacrum.SacrumL5JntNode_pos)
        - Pelvis
      );

      AnyVec3 Thorax = (
        ..InterfaceMorphingDef.IM_Trunk_To_Leg_AboveSacrum(....ModelParameters.T12.T12L1JntNode_pos)
        - Pelvis
      );

      AnyVec3 Cervical = (
        ..InterfaceMorphingDef.IM_Trunk_To_Leg_AboveSacrum(....ModelParameters.C7.T1C7JntNode_pos)
        - Pelvis
      );
    };
  };

  AnyRefNode& ScalingNode = AnatomicalFrameTrunk;
  AnyFunTransform3D& Scale = AnatomicalFrame.Scale_Trunk_Pelvis;

  #undef MACRO_CONSTRUCT_ANATOMICAL_FRAME_s
  #undef MACRO_CONSTRUCT_ANATOMICAL_FRAME_A

  // for pelvis we do not use the inertia object yet, the abdominal inertia is also
  // located on the pelvis and needs to move before enabling the UseInertiaObjects switch
  UseInertiaObjects = Off;
  Mass = inertiaObject.Mass;
  sCoM = inertiaObject.sCoM;
  Jii = inertiaObject.Jii;
  Jij = inertiaObject.Jij;
  JaboutCoMOnOff = inertiaObject.JaboutCoMOnOff;

  segmental_inertia_matrix inertiaObject() = {
    Mass = ...Scaling.MassScaling.Pelvis.MassScale * MassStandard;
    JaboutCoMOnOff = On;

    // (Trunk to Leg Interface Morphing) -> Use the mass property of pelvis from the Leg
    #if BM_LEG_TRUNK_INTERFACE == _MORPH_TRUNK_TO_LEG_ & ((BM_LEG_MODEL == _LEG_MODEL_TLEM_) | (BM_LEG_MODEL == _LEG_MODEL_TLEM2_))
      AnyVar MassStandard = ....LEG_MODEL_PARAM_DIRECTION.Leg.ModelParameters.Pelvis.MassStandard;
      Jii = ....LEG_MODEL_PARAM_DIRECTION.Leg.ModelParameters.Pelvis.Jii;
      Jij = ....LEG_MODEL_PARAM_DIRECTION.Leg.ModelParameters.Pelvis.Jij;
      sCoM = .AnatomicalFrame.Scale_Leg_Pelvis(....LEG_MODEL_PARAM_DIRECTION.Leg.ModelParameters.Pelvis.sCoM);
    #else //(Leg to Trunk Interface Morphing) or (No Interface Morphing) -> Use the mass property of pelvis from the Trunk
      AnyVar MassStandard = ...StandardParameters.Pelvis.Mass;
      Jii = {0.0221,0.01,0.0221}; //Taken from SimpleSpineModel
      Jij = {0, 0, 0};
      sCoM = .AnatomicalFrame.Scale_Trunk_Pelvis(.StdPar.sCoM_pos);
    #endif
  };

  #if BM_LEG_MODEL == _LEG_MODEL_LEG_
    AnyRefNode HipJointRight = { sRel = .Scale({0.05002253, -0.1149108, 0.0895978});ARel=.AnatomicalFrame.ARel;};
    AnyRefNode HipJointLeft = {sRel = .Scale({0.05002253, -0.1149108, -0.0895978});ARel=.AnatomicalFrame.ARel;};
    AnyRefNode HipJointsCenter = { sRel = .Scale({0.05002253, -0.1149108, 0});ARel=.AnatomicalFrame.ARel;};
  #endif

  #include "../DrawSettings/SegmentAxes.any"
  AnyRefNode GroundPelvisJntNode = {sRel = .Scale(.StdPar.GroundPelvisJntNode_pos);};
  AnyRefNode PelvisSacrumJntNode = {sRel = .Scale(.StdPar.PelvisSacrumJntNode_pos);};
  AnyRefNode Seat2MidContactNode={sRel=0.5*(.Right.Seat2ContactNode.sRel+.Left.Seat2ContactNode.sRel);};

  /// The Right node is used by different body part for adding mirrored nodes
  /// (muscle origins/insertions etc) to the pelvis segment
  AnyRefNode Right= {
    AnyRefNode ScalingNode ={};
    AnyInt Sign = 1;
      AnyFunTransform3D& Scale = .Scale;
      AnyRefNode ASIS = {sRel = .Scale(..StdPar.Right.ASIS);};
      AnyRefNode PSIS = {sRel = .Scale(..StdPar.Right.PSIS);};
      AnyRefNode PT = {sRel = .Scale(..StdPar.Right.PT);};
      AnyRefNode PosteriorContactNode = {sRel = .Scale(..StdPar.Right.PosteriorContactNode_pos);};
      AnyRefNode Seat1ContactNode={sRel = .Scale(..StdPar.Right.Seat1ContactNode_pos);};
      AnyRefNode Seat2ContactNode={sRel = .Scale(..StdPar.Right.Seat2ContactNode_pos);};
      AnyRefNode Seat3ContactNode={sRel = .Scale(..StdPar.Right.Seat3ContactNode_pos);};
      AnyRefNode Seat4ContactNode={sRel = .Scale(..StdPar.Right.Seat4ContactNode_pos);};
      AnyRefNode TrochanterBonyTip ={sRel = .Scale(..StdPar.Right.TrochanterBonyTip_pos);};
      AnyRefNode ICSpringSupNode        = { sRel =  .Scale(..StdPar.Right.ICSpringSupNode_pos); };
  };

  /// The Left node is used by different body part for adding mirrored nodes
  /// (muscle origins/insertions etc) to the pelvis segment
  AnyRefNode Left=  {
    AnyRefNode ScalingNode ={};
    AnyInt Sign = -1;
      AnyFunTransform3D& Scale = .Scale;
      AnyRefNode ASIS = {sRel = .Scale(..StdPar.Left.ASIS);};
      AnyRefNode PSIS = {sRel = .Scale(..StdPar.Left.PSIS);};
      AnyRefNode PT = {sRel = .Scale(..StdPar.Left.PT);};
      AnyRefNode PosteriorContactNode = {sRel = .Scale(..StdPar.Left.PosteriorContactNode_pos);};
      AnyRefNode Seat1ContactNode={sRel = .Scale(..StdPar.Left.Seat1ContactNode_pos);};
      AnyRefNode Seat2ContactNode={sRel = .Scale(..StdPar.Left.Seat2ContactNode_pos);};
      AnyRefNode Seat3ContactNode={sRel = .Scale(..StdPar.Left.Seat3ContactNode_pos);};
      AnyRefNode Seat4ContactNode={sRel = .Scale(..StdPar.Left.Seat4ContactNode_pos);};
      AnyRefNode TrochanterBonyTip ={sRel = .Scale(..StdPar.Left.TrochanterBonyTip_pos);};
      AnyRefNode ICSpringSupNode        = { sRel =  .Scale(..StdPar.Left.ICSpringSupNode_pos); };
  };


  #if (BM_LEG_MODEL != _LEG_MODEL_TLEM_ & BM_LEG_MODEL != _LEG_MODEL_TLEM2_) | (BM_PELVIS_DISPLAY == _PELVIS_DISPLAY_LEGANDTRUNKPELVIS_)
  #if (BM_PELVIS_DISPLAY == _PELVIS_DISPLAY_LEGANDTRUNKPELVIS_)
  AnyDrawSurf Drw_TrunkPelvis =
  #else
  AnyDrawSurf DrwPelvis =
  #endif
  {
    FileName = ...STL.FilenamePelvisWOS;
    #if (BM_LEG_MODEL != _LEG_MODEL_TLEM_ & BM_LEG_MODEL != _LEG_MODEL_TLEM2_)
      Opacity ??= Main.DrawSettings.BonesOpacity.Pelvis;
      RGB = ...ColorRef.Segments;
    #else
      Opacity ??= Main.DrawSettings.BonesOpacity.Pelvis * 0.5;
      RGB = ...ColorRef.Segments;
    #endif
    AnyFunTransform3D &Scale = .Scale;
  };

  #if (BM_PELVIS_DISPLAY == _PELVIS_DISPLAY_LEGANDTRUNKPELVIS_)
  AnyDrawSurf Drw_TrunkSacrum =
  #else
  AnyDrawSurf DrwSacrum =
  #endif
  {
    FileName = ...STL.FilenameSacrumSeg           ;
    #if (BM_LEG_MORPHOLOGY == 1) | ((BM_LEG_LEFT == OFF) & (BM_LEG_RIGHT == OFF))
      Opacity ??= Main.DrawSettings.BonesOpacity.Pelvis;
      RGB = ...ColorRef.Segments;
    #else
      Opacity ??= Main.DrawSettings.BonesOpacity.Pelvis * 0.5;
      RGB = ...ColorRef.Segments;
    #endif
    AnyFunTransform3D &Scale = .Scale;
  };

  #endif

  AnyFolder &StdPar=..ModelParameters.Pelvis;
  #include "PelvisMuscleAttachementNodes.any"
}; // End of PelvisSeg

#ifdef LEG_MODEL_PARAM_DIRECTION
  #undef LEG_MODEL_PARAM_DIRECTION
#endif
