AnyFolder PsoasMajor = {
  AnyIntVar StringMesh=15;
  AnyMuscleShortestPath PMT12I_TM = {
    #if (BM_LEG_MODEL == _LEG_MODEL_TLEM_ | BM_LEG_MODEL == _LEG_MODEL_TLEM2_) & BM_LEG_LEFT & BM_LEG_MUSCLES_LEFT
    AnyMuscleModel &MusMdl = .....Left.Leg.MuscleModels.PsoasMajor1Par;
    #else
    AnyMuscleModel &MusMdl = ....MuscleModels.Left.PsoasMajor.PMT12I_TM;
    #endif

    AnyRefNode &Ins = ....PsoasMajorLeftReference.IliopsoasIns;
    AnyRefNode &Via5 = ....Segments.PelvisSeg.PMT12I_TMVia5NodeL;
    AnyRefNode &Via4 = ....Segments.L5Seg.PMT12I_TMVia4NodeL;
    AnyRefNode &Via3 = ....Segments.L4Seg.PMT12I_TMVia3NodeL;
    AnyRefNode &Via2 = ....Segments.L3Seg.PMT12I_TMVia2NodeL;
    AnyRefNode &Via1 = ....Segments.L2Seg.PMT12I_TMVia1NodeL;
    AnyRefNode &Org = ....Segments.T12Seg.PMT12I_TMNodeL;

    AnySurfCylinder &Surf1 =....Segments.PelvisSeg.Left.PsoasWrapSurf;
    SPLine.StringMesh = .StringMesh;
    SPLine = {
      AnyMatrix InitWrapPos = {
            transf3D({0.78*.Surf1.Radius,0.78*.Surf1.Radius, 0.50*.Surf1.Length }, &.Surf1),
            transf3D({1.1*.Surf1.Radius,-0.0*.Surf1.Radius, 0.50*.Surf1.Length }, &.Surf1),
            transf3D({0.78*.Surf1.Radius,-0.78*.Surf1.Radius, 0.50*.Surf1.Length }, &.Surf1)
      };
      InitWrapPosVecArr = {&InitWrapPos, None,None,None,None,None};
    };
    AnyDrawMuscle DrwMus = {#include "../drawSettings/MusDrawSettings.any"};
  };

  AnyMuscleShortestPath PML1I_TM = {
    #if (BM_LEG_MODEL == _LEG_MODEL_TLEM_ | BM_LEG_MODEL == _LEG_MODEL_TLEM2_) & BM_LEG_LEFT & BM_LEG_MUSCLES_LEFT
    AnyMuscleModel &MusMdl = .....Left.Leg.MuscleModels.PsoasMajor2Par;
    #else
    AnyMuscleModel &MusMdl = ....MuscleModels.Left.PsoasMajor.PML1I_TM;
    #endif

    AnyRefNode &Ins = ....PsoasMajorLeftReference.IliopsoasIns;
    AnyRefNode &Via4 = ....Segments.PelvisSeg.PML1I_TMVia4NodeL;
    AnyRefNode &Via3 = ....Segments.L5Seg.PML1I_TMVia3NodeL;
    AnyRefNode &Via2 = ....Segments.L4Seg.PML1I_TMVia2NodeL;
    AnyRefNode &Via1 = ....Segments.L3Seg.PML1I_TMVia1NodeL;
    AnyRefNode &Org = ....Segments.L1Seg.PML1I_TMNodeL;

    AnySurfCylinder &Surf1 =....Segments.PelvisSeg.Left.PsoasWrapSurf;
    SPLine.StringMesh = .StringMesh;
    SPLine.InitWrapPosVecArr = {&.PMT12I_TM.SPLine.InitWrapPos, None,None,None,None};
    AnyDrawMuscle DrwMus =
    {
      #include "../drawSettings/MusDrawSettings.any"
    };
  };

  AnyMuscleShortestPath PML1T_TM = {
    #if (BM_LEG_MODEL == _LEG_MODEL_TLEM_ | BM_LEG_MODEL == _LEG_MODEL_TLEM2_) & BM_LEG_LEFT & BM_LEG_MUSCLES_LEFT
    AnyMuscleModel &MusMdl = .....Left.Leg.MuscleModels.PsoasMajor3Par;
    #else
    AnyMuscleModel &MusMdl = ....MuscleModels.Left.PsoasMajor.PML1T_TM;
    #endif

    AnyRefNode &Ins = ....PsoasMajorLeftReference.IliopsoasIns;
    //AnyRefNode &Via6 = ....Segments.PelvisSeg.IliopubicEminenceViaNodeL;
    AnyRefNode &Via5 = ....Segments.PelvisSeg.PML1T_TMVia5NodeL;
    AnyRefNode &Via4 = ....Segments.L5Seg.PML1T_TMVia4NodeL;
    AnyRefNode &Via3 = ....Segments.L4Seg.PML1T_TMVia3NodeL;
    AnyRefNode &Via2 = ....Segments.L3Seg.PML1T_TMVia2NodeL;
    AnyRefNode &Via1 = ....Segments.L2Seg.PML1T_TMVia1NodeL;
    AnyRefNode &Org = ....Segments.L1Seg.PML1T_TMNodeL;
    AnySurfCylinder &Surf1 =....Segments.PelvisSeg.Left.PsoasWrapSurf;
    SPLine.StringMesh = .StringMesh;
    SPLine.InitWrapPosVecArr = {&.PMT12I_TM.SPLine.InitWrapPos, None,None,None,None,None};
    AnyDrawMuscle DrwMus =
    {
      #include "../drawSettings/MusDrawSettings.any"
    };
  };

  AnyMuscleShortestPath PML2I_TM = {
    #if (BM_LEG_MODEL == _LEG_MODEL_TLEM_ | BM_LEG_MODEL == _LEG_MODEL_TLEM2_) & BM_LEG_LEFT & BM_LEG_MUSCLES_LEFT
    AnyMuscleModel &MusMdl = .....Left.Leg.MuscleModels.PsoasMajor4Par;
    #else
    AnyMuscleModel &MusMdl = ....MuscleModels.Left.PsoasMajor.PML2I_TM;
    #endif

    AnyRefNode &Ins = ....PsoasMajorLeftReference.IliopsoasIns;
    //AnyRefNode &Via4 = ....Segments.PelvisSeg.IliopubicEminenceViaNodeL;
    AnyRefNode &Via3 = ....Segments.PelvisSeg.PML2I_TMVia3NodeL;
    AnyRefNode &Via2 = ....Segments.L5Seg.PML2I_TMVia2NodeL;
    AnyRefNode &Via1 = ....Segments.L4Seg.PML2I_TMVia1NodeL;
    AnyRefNode &Org = ....Segments.L2Seg.PML2I_TMNodeL;
    AnySurfCylinder &Surf1 =....Segments.PelvisSeg.Left.PsoasWrapSurf;
    SPLine.StringMesh = .StringMesh;
    SPLine.InitWrapPosVecArr = {&.PMT12I_TM.SPLine.InitWrapPos, None,None,None};
    AnyDrawMuscle DrwMus =
    {
      #include "../drawSettings/MusDrawSettings.any"
    };
  };

  AnyMuscleShortestPath PML2T_TM = {
    #if (BM_LEG_MODEL == _LEG_MODEL_TLEM_ | BM_LEG_MODEL == _LEG_MODEL_TLEM2_) & BM_LEG_LEFT & BM_LEG_MUSCLES_LEFT
    AnyMuscleModel &MusMdl = .....Left.Leg.MuscleModels.PsoasMajor5Par;
    #else
    AnyMuscleModel &MusMdl = ....MuscleModels.Left.PsoasMajor.PML2T_TM;
    #endif

    AnyRefNode &Ins = ....PsoasMajorLeftReference.IliopsoasIns;
    //AnyRefNode &Via5 = ....Segments.PelvisSeg.IliopubicEminenceViaNodeL;
    AnyRefNode &Via4 = ....Segments.PelvisSeg.PML2T_TMVia4NodeL;
    AnyRefNode &Via3 = ....Segments.L5Seg.PML2T_TMVia3NodeL;
    AnyRefNode &Via2 = ....Segments.L4Seg.PML2T_TMVia2NodeL;
    AnyRefNode &Via1 = ....Segments.L3Seg.PML2T_TMVia1NodeL;
    AnyRefNode &Org = ....Segments.L2Seg.PML2T_TMNodeL;
    AnySurfCylinder &Surf1 =....Segments.PelvisSeg.Left.PsoasWrapSurf;
    SPLine.StringMesh = .StringMesh;
    SPLine.InitWrapPosVecArr = {&.PMT12I_TM.SPLine.InitWrapPos, None,None,None,None};
    AnyDrawMuscle DrwMus =
    {
      #include "../drawSettings/MusDrawSettings.any"
    };
  };

  AnyMuscleShortestPath PML3I_TM = {
    #if (BM_LEG_MODEL == _LEG_MODEL_TLEM_ | BM_LEG_MODEL == _LEG_MODEL_TLEM2_) & BM_LEG_LEFT & BM_LEG_MUSCLES_LEFT
    AnyMuscleModel &MusMdl = .....Left.Leg.MuscleModels.PsoasMajor6Par;
    #else
    AnyMuscleModel &MusMdl = ....MuscleModels.Left.PsoasMajor.PML3I_TM;
    #endif

    AnyRefNode &Ins = ....PsoasMajorLeftReference.IliopsoasIns;
    //AnyRefNode &Via3 = ....Segments.PelvisSeg.IliopubicEminenceViaNodeL;
    AnyRefNode &Via2 = ....Segments.PelvisSeg.PML3I_TMVia2NodeL;
    AnyRefNode &Via1 = ....Segments.L5Seg.PML3I_TMVia1NodeL;
    AnyRefNode &Org = ....Segments.L3Seg.PML3I_TMNodeL;
    AnySurfCylinder &Surf1 =....Segments.PelvisSeg.Left.PsoasWrapSurf;
    SPLine.StringMesh = .StringMesh;
    SPLine.InitWrapPosVecArr = {&.PMT12I_TM.SPLine.InitWrapPos, None,None};
    AnyDrawMuscle DrwMus =
    {
      #include "../drawSettings/MusDrawSettings.any"
    };
  };

  AnyMuscleShortestPath PML3T_TM = {
    #if (BM_LEG_MODEL == _LEG_MODEL_TLEM_ | BM_LEG_MODEL == _LEG_MODEL_TLEM2_) & BM_LEG_LEFT & BM_LEG_MUSCLES_LEFT
    AnyMuscleModel &MusMdl = .....Left.Leg.MuscleModels.PsoasMajor7Par;
    #else
    AnyMuscleModel &MusMdl = ....MuscleModels.Left.PsoasMajor.PML3T_TM;
    #endif

    AnyRefNode &Ins = ....PsoasMajorLeftReference.IliopsoasIns;
    //AnyRefNode &Via4 = ....Segments.PelvisSeg.IliopubicEminenceViaNodeL;
    AnyRefNode &Via3 = ....Segments.PelvisSeg.PML3T_TMVia3NodeL;
    AnyRefNode &Via2 = ....Segments.L5Seg.PML3T_TMVia2NodeL;
    AnyRefNode &Via1 = ....Segments.L4Seg.PML3T_TMVia1NodeL;
    AnyRefNode &Org = ....Segments.L3Seg.PML3T_TMNodeL;
    AnySurfCylinder &Surf1 =....Segments.PelvisSeg.Left.PsoasWrapSurf;
    SPLine.StringMesh = .StringMesh;
    SPLine.InitWrapPosVecArr = {&.PMT12I_TM.SPLine.InitWrapPos, None,None,None};
    AnyDrawMuscle DrwMus =
    {
      #include "../drawSettings/MusDrawSettings.any"
    };
  };

  AnyMuscleShortestPath PML4I_TM = {
    #if (BM_LEG_MODEL == _LEG_MODEL_TLEM_ | BM_LEG_MODEL == _LEG_MODEL_TLEM2_) & BM_LEG_LEFT & BM_LEG_MUSCLES_LEFT
    AnyMuscleModel &MusMdl = .....Left.Leg.MuscleModels.PsoasMajor8Par;
    #else
    AnyMuscleModel &MusMdl = ....MuscleModels.Left.PsoasMajor.PML4I_TM;
    #endif


    AnyRefNode &Ins = ....PsoasMajorLeftReference.IliopsoasIns;
    //AnyRefNode &Via2 = ....Segments.PelvisSeg.IliopubicEminenceViaNodeL;
    AnyRefNode &Via1 = ....Segments.PelvisSeg.PML4I_TMVia1NodeL;
    AnyRefNode &Org = ....Segments.L4Seg.PML4I_TMNodeL;
    AnySurfCylinder &Surf1 =....Segments.PelvisSeg.Left.PsoasWrapSurf;

    SPLine.StringMesh = .StringMesh;
    SPLine.InitWrapPosVecArr = {&.PMT12I_TM.SPLine.InitWrapPos, None};
    AnyDrawMuscle DrwMus =
    {
      #include "../drawSettings/MusDrawSettings.any"
    };
  };

  AnyMuscleShortestPath PML4T_TM = {
    #if (BM_LEG_MODEL == _LEG_MODEL_TLEM_ | BM_LEG_MODEL == _LEG_MODEL_TLEM2_) & BM_LEG_LEFT & BM_LEG_MUSCLES_LEFT
    AnyMuscleModel &MusMdl = .....Left.Leg.MuscleModels.PsoasMajor9Par;
    #else
    AnyMuscleModel &MusMdl = ....MuscleModels.Left.PsoasMajor.PML4T_TM;
    #endif

    AnyRefNode &Ins = ....PsoasMajorLeftReference.IliopsoasIns;
    //AnyRefNode &Via3 = ....Segments.PelvisSeg.IliopubicEminenceViaNodeL;
    AnyRefNode &Via2 = ....Segments.PelvisSeg.PML4T_TMVia2NodeL;
    AnyRefNode &Via1 = ....Segments.L5Seg.PML4T_TMVia1NodeL;

    AnyRefNode &Org = ....Segments.L4Seg.PML4T_TMNodeL;
    AnySurfCylinder &Surf1 =....Segments.PelvisSeg.Left.PsoasWrapSurf;
    SPLine.StringMesh = .StringMesh;
    SPLine.InitWrapPosVecArr = {&.PMT12I_TM.SPLine.InitWrapPos, None,None};
       AnyDrawMuscle DrwMus = {             #include "../drawSettings/MusDrawSettings.any"   };
  };

  AnyMuscleShortestPath PML5_TM = {
    #if (BM_LEG_MODEL == _LEG_MODEL_TLEM_ | BM_LEG_MODEL == _LEG_MODEL_TLEM2_) & BM_LEG_LEFT & BM_LEG_MUSCLES_LEFT
    AnyMuscleModel &MusMdl = .....Left.Leg.MuscleModels.PsoasMajor10Par;
    #else
    AnyMuscleModel &MusMdl = ....MuscleModels.Left.PsoasMajor.PML5_TM;
    #endif

    AnyRefNode &Ins = ....PsoasMajorLeftReference.IliopsoasIns;
    //AnyRefNode &Via2 = ....Segments.PelvisSeg.IliopubicEminenceViaNodeL;
    AnyRefNode &Via1 = ....Segments.PelvisSeg.PML5_TMVia1NodeL;
    AnyRefNode &Org = ....Segments.L5Seg.PML5_TMNodeL;
    AnySurfCylinder &Surf1 =....Segments.PelvisSeg.Left.PsoasWrapSurf;
    SPLine.StringMesh = .StringMesh;
    SPLine.InitWrapPosVecArr = {&.PMT12I_TM.SPLine.InitWrapPos, None};
    AnyDrawMuscle DrwMus =
    {
      #include "../drawSettings/MusDrawSettings.any"
    };
  };

  AnyMuscleShortestPath PML5T_TM = {
    #if (BM_LEG_MODEL == _LEG_MODEL_TLEM_ | BM_LEG_MODEL == _LEG_MODEL_TLEM2_) & BM_LEG_LEFT & BM_LEG_MUSCLES_LEFT
    AnyMuscleModel &MusMdl = .....Left.Leg.MuscleModels.PsoasMajor11Par;
    #else
    AnyMuscleModel &MusMdl = ....MuscleModels.Left.PsoasMajor.PML5T_TM;
    #endif

    AnyRefNode &Ins = ....PsoasMajorLeftReference.IliopsoasIns;
    //AnyRefNode &Via2 = ....Segments.PelvisSeg.IliopubicEminenceViaNodeL;
    AnyRefNode &Via1 = ....Segments.PelvisSeg.PML5T_TMVia1NodeL;

    AnyRefNode &Org = ....Segments.L5Seg.PML5T_TMNodeL;
    AnySurfCylinder &Surf1 =....Segments.PelvisSeg.Left.PsoasWrapSurf;
    SPLine.StringMesh = .StringMesh;
    SPLine.InitWrapPosVecArr = {&.PMT12I_TM.SPLine.InitWrapPos, None};
    AnyDrawMuscle DrwMus =
    {
      #include "../drawSettings/MusDrawSettings.any"
    };
  };
};
