Segments = {
  SternumSeg = {
    //----------------------------------------------CS Nodes-----------------------------------------------
    AnyRefNode CS1NodeR     ={ sRel =.Scale (.Data.Sternum.Right.CS1Node_pos);};
    AnyRefNode CS1NodeL     ={ sRel =.Scale (.Data.Sternum.Left.CS1Node_pos);};

    //----------------------------------------------IC Nodes-----------------------------------------------
    AnyRefNode IC1NodeR     ={ sRel =.Scale (.Data.Sternum.Right.IC1Node_pos);};
    AnyRefNode IC1NodeL     ={ sRel =.Scale (.Data.Sternum.Left.IC1Node_pos);};

    Right = {
      AnyRefNode CCTangetNodeR1 = { sRel = ..Scale(..Data.R1.Right.CC_AlignmentNode);};
      AnyRefNode CCNodeR1 = {
        sRel = ..Scale(..Data.Sternum.Right.R1Node_pos);
        AnyRefNode RotNode = {
          ARel = RotMat(.sRel, ..CCTangetNodeR1.sRel, sRel + {0.10,0,0}) * RotMat(pi/2,y) * RotMat(pi,z);
        };
      };
    };

    Left = {
      AnyRefNode CCTangetNodeR1 = { sRel =..Scale(..Data.R1.Left.CC_AlignmentNode);};
      AnyRefNode CCNodeR1 = {
        sRel = ..Scale(..Data.Sternum.Left.R1Node_pos);
        AnyRefNode RotNode = {
          ARel = RotMat(.sRel, ..CCTangetNodeR1.sRel, sRel + {0.10,0,0}) * RotMat(-pi/2,y) * RotMat(-pi,z);
        };
      };
    };

    //Lumped Hyoid
    AnyRefNode LumpedHyoidStC0NodeRIns = {sRel = .Scale(.Data.Sternum.Right.LumpedHyoidStC0Ins_pos);};
    AnyRefNode LumpedHyoidStC0NodeLIns = {sRel = .Scale(.Data.Sternum.Left.LumpedHyoidStC0Ins_pos);};

    AnyRefNode Right_IntercostalisInternusR1R2_elem_sternum = {sRel = .Scale(.Data.Sternum.Right.IntercostalisInternusR1R2_elem_sternum_pos); };
    AnyRefNode Left_IntercostalisInternusR1R2_elem_sternum = {sRel = .Scale(.Data.Sternum.Left.IntercostalisInternusR1R2_elem_sternum_pos); };
  };

  SternalBodySeg = {
    AnyRefNode Mid                ={ sRel =.Scale (.Data.Sternum.MidNode_pos);};
    AnyRefNode RACP_CO6_2_mid = {sRel= (.RACP_CO6_2_R.sRel+.RACP_CO6_2_L.sRel)/2;};
    //----------------------------------------------CS Nodes-----------------------------------------------
    AnyRefNode CS2NodeR     ={ sRel =.Scale (.Data.Sternum.Right.CS2Node_pos);};
    AnyRefNode CS3NodeR     ={ sRel =.Scale (.Data.Sternum.Right.CS3Node_pos);};
    AnyRefNode CS4NodeR     ={ sRel =.Scale (.Data.Sternum.Right.CS4Node_pos);};
    AnyRefNode CS5NodeR     ={ sRel =.Scale (.Data.Sternum.Right.CS5Node_pos);};
    AnyRefNode CS6NodeR     ={ sRel =.Scale (.Data.Sternum.Right.CS6Node_pos);};
    AnyRefNode CS7NodeR     ={ sRel =.Scale (.Data.Sternum.Right.CS7Node_pos);};
    AnyRefNode CS8NodeR     ={ sRel =.Scale (.Data.Sternum.Right.CS8Node_pos);};
    AnyRefNode CS9NodeR     ={ sRel =.Scale (.Data.Sternum.Right.CS9Node_pos);};
    AnyRefNode CS10NodeR    ={ sRel =.Scale (.Data.Sternum.Right.CS10Node_pos);};
    AnyRefNode CS2NodeL     ={ sRel =.Scale (.Data.Sternum.Left.CS2Node_pos);};
    AnyRefNode CS3NodeL     ={ sRel =.Scale (.Data.Sternum.Left.CS3Node_pos);};
    AnyRefNode CS4NodeL     ={ sRel =.Scale (.Data.Sternum.Left.CS4Node_pos);};
    AnyRefNode CS5NodeL     ={ sRel =.Scale (.Data.Sternum.Left.CS5Node_pos);};
    AnyRefNode CS6NodeL     ={ sRel =.Scale (.Data.Sternum.Left.CS6Node_pos);};
    AnyRefNode CS7NodeL     ={ sRel =.Scale (.Data.Sternum.Left.CS7Node_pos);};
    AnyRefNode CS8NodeL     ={ sRel =.Scale (.Data.Sternum.Left.CS8Node_pos);};
    AnyRefNode CS9NodeL     ={ sRel =.Scale (.Data.Sternum.Left.CS9Node_pos);};
    AnyRefNode CS10NodeL    ={ sRel =.Scale (.Data.Sternum.Left.CS10Node_pos);};


      //----------------------------------------------IC Nodes-----------------------------------------------
    AnyRefNode IC2NodeR     ={ sRel =.Scale (.Data.Sternum.Right.IC3Node_pos);};
    AnyRefNode IC3NodeR     ={ sRel =.Scale (.Data.Sternum.Right.IC3Node_pos);};
    AnyRefNode IC4NodeR     ={ sRel =.Scale (.Data.Sternum.Right.IC4Node_pos);};
    AnyRefNode IC5NodeR     ={ sRel =.Scale (.Data.Sternum.Right.IC5Node_pos);};
    AnyRefNode IC6NodeR     ={ sRel =.Scale (.Data.Sternum.Right.IC6Node_pos);};
    AnyRefNode IC7NodeR     ={ sRel =.Scale (.Data.Sternum.Right.IC7Node_pos);};
    AnyRefNode IC8NodeR     ={ sRel =.Scale (.Data.Sternum.Right.IC8Node_pos);};
    AnyRefNode IC9NodeR     ={ sRel =.Scale (.Data.Sternum.Right.IC9Node_pos);};
    AnyRefNode IC10NodeR    ={ sRel =.Scale (.Data.Sternum.Right.IC10Node_pos);};
    AnyRefNode IC2NodeL     ={ sRel =.Scale (.Data.Sternum.Left.IC3Node_pos);};
    AnyRefNode IC3NodeL     ={ sRel =.Scale (.Data.Sternum.Left.IC3Node_pos);};
    AnyRefNode IC4NodeL     ={ sRel =.Scale (.Data.Sternum.Left.IC4Node_pos);};
    AnyRefNode IC5NodeL     ={ sRel =.Scale (.Data.Sternum.Left.IC5Node_pos);};
    AnyRefNode IC6NodeL     ={ sRel =.Scale (.Data.Sternum.Left.IC6Node_pos);};
    AnyRefNode IC7NodeL     ={ sRel =.Scale (.Data.Sternum.Left.IC7Node_pos);};
    AnyRefNode IC8NodeL     ={ sRel =.Scale (.Data.Sternum.Left.IC8Node_pos);};
    AnyRefNode IC9NodeL     ={ sRel =.Scale (.Data.Sternum.Left.IC9Node_pos);};
    AnyRefNode IC10NodeL    ={ sRel =.Scale (.Data.Sternum.Left.IC10Node_pos);};

    Right = {
      AnyRefNode CCTangetNodeR2 ={ sRel = ..Scale(..Data.R2.Right.CC_AlignmentNode); };
      AnyRefNode CCTangetNodeR3 ={ sRel = ..Scale(..Data.R3.Right.CC_AlignmentNode); };
      AnyRefNode CCTangetNodeR4 ={ sRel = ..Scale(..Data.R4.Right.CC_AlignmentNode); };
      AnyRefNode CCTangetNodeR5 ={ sRel = ..Scale(..Data.R5.Right.CC_AlignmentNode); };
      AnyRefNode CCTangetNodeR6 ={ sRel = ..Scale(..Data.R6.Right.CC_AlignmentNode); };
      AnyRefNode CCTangetNodeR7 ={ sRel = ..Scale(..Data.R7.Right.CC_AlignmentNode); };
      AnyRefNode CCTangetNodeR8 ={ sRel = ..Scale(..Data.R8.Right.CC_AlignmentNode); };
      AnyRefNode CCTangetNodeR9 ={ sRel = ..Scale(..Data.R9.Right.CC_AlignmentNode); };
      AnyRefNode CCTangetNodeR10 ={ sRel = ..Scale(..Data.R10.Right.CC_AlignmentNode); };
      AnyRefNode CCNodeR2 ={ sRel = ..Scale(..Data.Sternum.Right.R2Node_pos); AnyRefNode RotNode ={ ARel=RotMat(.sRel,..CCTangetNodeR2.sRel,sRel+{0.10,0,0})*RotMat(pi/2,y)*RotMat(pi,z);};};
      AnyRefNode CCNodeR3 ={ sRel = ..Scale(..Data.Sternum.Right.R3Node_pos); AnyRefNode RotNode ={ ARel=RotMat(.sRel,..CCTangetNodeR3.sRel,sRel+{0.10,0,0})*RotMat(pi/2,y)*RotMat(pi,z);};};
      AnyRefNode CCNodeR4 ={ sRel = ..Scale(..Data.Sternum.Right.R4Node_pos); AnyRefNode RotNode ={ ARel=RotMat(.sRel,..CCTangetNodeR4.sRel,sRel+{0.10,0,0})*RotMat(pi/2,y)*RotMat(pi,z);};};
      AnyRefNode CCNodeR5 ={ sRel = ..Scale(..Data.Sternum.Right.R5Node_pos); AnyRefNode RotNode ={ ARel=RotMat(.sRel,..CCTangetNodeR5.sRel,sRel+{0.10,0,0})*RotMat(pi/2,y)*RotMat(pi,z);};};
      AnyRefNode CCNodeR6 ={ sRel = ..Scale(..Data.Sternum.Right.R6Node_pos); AnyRefNode RotNode ={ ARel=RotMat(.sRel,..CCTangetNodeR6.sRel,sRel+{0.10,0,0})*RotMat(pi/2,y)*RotMat(pi,z);};};
      AnyRefNode CCNodeR7 ={ sRel = ..Scale(..Data.Sternum.Right.R7Node_pos); AnyRefNode RotNode ={ ARel=RotMat(.sRel,..CCTangetNodeR7.sRel,sRel+{0.10,0,0})*RotMat(pi/2,y)*RotMat(pi,z);};};
      AnyRefNode CCNodeR8 ={ sRel = ..Scale(..Data.Sternum.Right.R8Node_pos); AnyRefNode RotNode ={ ARel=RotMat(.sRel,..CCTangetNodeR8.sRel,sRel+{0.10,0,0})*RotMat(pi/2,y)*RotMat(pi,z);};};
      AnyRefNode CCNodeR9 ={ sRel = ..Scale(..Data.Sternum.Right.R9Node_pos); AnyRefNode RotNode ={ ARel=RotMat(.sRel,..CCTangetNodeR9.sRel,sRel+{0.10,0,0})*RotMat(pi/2,y)*RotMat(pi,z);};};
      AnyRefNode CCNodeR10 ={ sRel = ..Scale(..Data.Sternum.Right.R10Node_pos);AnyRefNode RotNode ={ ARel=RotMat(.sRel,..CCTangetNodeR10.sRel,sRel+{0.10,0,0})*RotMat(pi/2,y)*RotMat(pi,z);};};
    };
    Left = {
      AnyRefNode CCTangetNodeR2 = { sRel = ..Scale (..Data.R2.Left.CC_AlignmentNode); };
      AnyRefNode CCTangetNodeR3 = { sRel = ..Scale (..Data.R3.Left.CC_AlignmentNode); };
      AnyRefNode CCTangetNodeR4 = { sRel = ..Scale (..Data.R4.Left.CC_AlignmentNode); };
      AnyRefNode CCTangetNodeR5 = { sRel = ..Scale (..Data.R5.Left.CC_AlignmentNode); };
      AnyRefNode CCTangetNodeR6 = { sRel = ..Scale (..Data.R6.Left.CC_AlignmentNode); };
      AnyRefNode CCTangetNodeR7 = { sRel = ..Scale (..Data.R7.Left.CC_AlignmentNode); };
      AnyRefNode CCTangetNodeR8 = { sRel = ..Scale (..Data.R8.Left.CC_AlignmentNode); };
      AnyRefNode CCTangetNodeR9 = { sRel = ..Scale (..Data.R9.Left.CC_AlignmentNode); };
      AnyRefNode CCTangetNodeR10 = { sRel = ..Scale (..Data.R10.Left.CC_AlignmentNode); };
      AnyRefNode CCNodeR2 = { sRel = ..Scale(..Data.Sternum.Left.R2Node_pos); AnyRefNode RotNode = { ARel = RotMat(.sRel, ..CCTangetNodeR2.sRel,sRel+{0.10,0,0})*RotMat(-pi/2,y)*RotMat(-pi,z);};};
      AnyRefNode CCNodeR3 = { sRel = ..Scale(..Data.Sternum.Left.R3Node_pos); AnyRefNode RotNode = { ARel = RotMat(.sRel, ..CCTangetNodeR3.sRel,sRel+{0.10,0,0})*RotMat(-pi/2,y)*RotMat(-pi,z);};};
      AnyRefNode CCNodeR4 = { sRel = ..Scale(..Data.Sternum.Left.R4Node_pos); AnyRefNode RotNode = { ARel = RotMat(.sRel, ..CCTangetNodeR4.sRel,sRel+{0.10,0,0})*RotMat(-pi/2,y)*RotMat(-pi,z);};};
      AnyRefNode CCNodeR5 = { sRel = ..Scale(..Data.Sternum.Left.R5Node_pos); AnyRefNode RotNode = { ARel = RotMat(.sRel, ..CCTangetNodeR5.sRel,sRel+{0.10,0,0})*RotMat(-pi/2,y)*RotMat(-pi,z);};};
      AnyRefNode CCNodeR6 = { sRel = ..Scale(..Data.Sternum.Left.R6Node_pos); AnyRefNode RotNode = { ARel = RotMat(.sRel, ..CCTangetNodeR6.sRel,sRel+{0.10,0,0})*RotMat(-pi/2,y)*RotMat(-pi,z);};};
      AnyRefNode CCNodeR7 = { sRel = ..Scale(..Data.Sternum.Left.R7Node_pos); AnyRefNode RotNode = { ARel = RotMat(.sRel, ..CCTangetNodeR7.sRel,sRel+{0.10,0,0})*RotMat(-pi/2,y)*RotMat(-pi,z);};};
      AnyRefNode CCNodeR8 = { sRel = ..Scale(..Data.Sternum.Left.R8Node_pos); AnyRefNode RotNode = { ARel = RotMat(.sRel, ..CCTangetNodeR8.sRel,sRel+{0.10,0,0})*RotMat(-pi/2,y)*RotMat(-pi,z);};};
      AnyRefNode CCNodeR9 = { sRel = ..Scale(..Data.Sternum.Left.R9Node_pos); AnyRefNode RotNode = { ARel = RotMat(.sRel, ..CCTangetNodeR9.sRel,sRel+{0.10,0,0})*RotMat(-pi/2,y)*RotMat(-pi,z);};};
      AnyRefNode CCNodeR10 = { sRel = ..Scale(..Data.Sternum.Left.R10Node_pos); AnyRefNode RotNode = { ARel = RotMat(.sRel, ..CCTangetNodeR10.sRel,sRel+{0.10,0,0})*RotMat(-pi/2,y)*RotMat(-pi,z);};};
    };

    AnyRefNode RACP_CO6Node= {sRel = .Scale(.Data.Sternum.RACP_CO6Node_pos);};
    AnyRefNode TransversusThoracisR2StNodeRIns         = {sRel = .Scale(.Data.Sternum.Right.TransversusThoracisR2StNode_pos);};
    AnyRefNode TransversusThoracisR3StNodeRIns         = {sRel = .Scale(.Data.Sternum.Right.TransversusThoracisR3StNode_pos);};
    AnyRefNode TransversusThoracisR4StNodeRIns         = {sRel = .Scale(.Data.Sternum.Right.TransversusThoracisR4StNode_pos);};
    AnyRefNode TransversusThoracisR5StNodeRIns         = {sRel = .Scale(.Data.Sternum.Right.TransversusThoracisR5StNode_pos);};
    AnyRefNode TransversusThoracisR6StNodeRIns         = {sRel = .Scale(.Data.Sternum.Right.TransversusThoracisR6StNode_pos);};
    AnyRefNode TransversusThoracisNodeRIns= {sRel = .Scale(.Data.Sternum.Right.TransversusThoracisNode_pos);};

    AnyRefNode TransversusThoracisR2StNodeLIns         = {sRel = .Scale(.Data.Sternum.Left.TransversusThoracisR2StNode_pos);};
    AnyRefNode TransversusThoracisR3StNodeLIns         = {sRel = .Scale(.Data.Sternum.Left.TransversusThoracisR3StNode_pos);};
    AnyRefNode TransversusThoracisR4StNodeLIns         = {sRel = .Scale(.Data.Sternum.Left.TransversusThoracisR4StNode_pos);};
    AnyRefNode TransversusThoracisR5StNodeLIns         = {sRel = .Scale(.Data.Sternum.Left.TransversusThoracisR5StNode_pos);};
    AnyRefNode TransversusThoracisR6StNodeLIns         = {sRel = .Scale(.Data.Sternum.Left.TransversusThoracisR6StNode_pos);};
    AnyRefNode TransversusThoracisNodeLIns= {sRel = .Scale(.Data.Sternum.Left.TransversusThoracisNode_pos);};

    Right = {
      AnyRefNode ObliquusInternusNode_1= {sRel = ..Scale(..Data.Sternum.Right.OICI_C9Node_pos);};
      AnyRefNode ObliquusInternusNode_2= {sRel = ..Scale(..Data.Sternum.Right.OICI_C8Node_pos);};

      #if BM_TRUNK_THORACIC_STERNUM_TOPOLOGY != 4
        Torus3PointOuterFit ObliquusWrapping() = {
          P1=..CS10NodeR.sRel;
          P2=..DiaphragmCC_6R.sRel;
          P3=.ObliquusInternusNode_2.sRel;
        };
      #endif
    };

    Left = {
      AnyRefNode ObliquusInternusNode_1= {sRel = ..Scale(..Data.Sternum.Left.OICI_C9Node_pos);};
      AnyRefNode ObliquusInternusNode_2= {sRel = ..Scale(..Data.Sternum.Left.OICI_C8Node_pos);};

      #if BM_TRUNK_THORACIC_STERNUM_TOPOLOGY != 4
        Torus3PointOuterFit ObliquusWrapping() = {
          P1 = ..CS10NodeL.sRel;
          P2 = ..DiaphragmCC_6L.sRel;
          P3 = .ObliquusInternusNode_2.sRel;
        };
      #endif
    };

    AnyRefNode DiaphragmXiphoidNodeR = {sRel = .Scale(.Data.Sternum.Right.DiaphragmXiphoidNode_pos); };
    AnyRefNode DiaphragmCC_1R = {sRel = .Scale(.Data.Sternum.Right.DiaphragmCC_1_pos); };
    AnyRefNode DiaphragmCC_2R = {sRel = .Scale(.Data.Sternum.Right.DiaphragmCC_2_pos); };
    AnyRefNode DiaphragmCC_3R = {sRel = .Scale(.Data.Sternum.Right.DiaphragmCC_3_pos); };
    AnyRefNode DiaphragmCC_4R = {sRel = .Scale(.Data.Sternum.Right.DiaphragmCC_4_pos); };
    AnyRefNode DiaphragmCC_5R = {sRel = .Scale(.Data.Sternum.Right.DiaphragmCC_5_pos); };
    AnyRefNode DiaphragmCC_6R = {sRel = .Scale(.Data.Sternum.Right.DiaphragmCC_6_pos); };
    AnyRefNode DiaphragmCC_7R = {sRel = .Scale(.Data.Sternum.Right.DiaphragmCC_7_pos); };

    AnyRefNode DiaphragmXiphoidNodeL = {sRel = .Scale(.Data.Sternum.Left.DiaphragmXiphoidNode_pos); };
    AnyRefNode DiaphragmCC_1L = {sRel = .Scale(.Data.Sternum.Left.DiaphragmCC_1_pos); };
    AnyRefNode DiaphragmCC_2L = {sRel = .Scale(.Data.Sternum.Left.DiaphragmCC_2_pos); };
    AnyRefNode DiaphragmCC_3L = {sRel = .Scale(.Data.Sternum.Left.DiaphragmCC_3_pos); };
    AnyRefNode DiaphragmCC_4L = {sRel = .Scale(.Data.Sternum.Left.DiaphragmCC_4_pos); };
    AnyRefNode DiaphragmCC_5L = {sRel = .Scale(.Data.Sternum.Left.DiaphragmCC_5_pos); };
    AnyRefNode DiaphragmCC_6L = {sRel = .Scale(.Data.Sternum.Left.DiaphragmCC_6_pos); };
    AnyRefNode DiaphragmCC_7L = {sRel = .Scale(.Data.Sternum.Left.DiaphragmCC_7_pos); };


    AnyRefNode Right_IntercostalisInternusR2R3_elem_sternum = {sRel = .Scale(.Data.Sternum.Right.IntercostalisInternusR2R3_elem_sternum_pos); };
    AnyRefNode Right_IntercostalisInternusR3R4_elem_sternum = {sRel = .Scale(.Data.Sternum.Right.IntercostalisInternusR3R4_elem_sternum_pos); };
    AnyRefNode Right_IntercostalisInternusR4R5_elem_sternum = {sRel = .Scale(.Data.Sternum.Right.IntercostalisInternusR4R5_elem_sternum_pos); };
    AnyRefNode Right_IntercostalisInternusR5R6_elem_sternum = {sRel = .Scale(.Data.Sternum.Right.IntercostalisInternusR5R6_elem_sternum_pos); };
    AnyRefNode Right_IntercostalisInternusR6R7_elem_sternum = {sRel = .Scale(.Data.Sternum.Right.IntercostalisInternusR6R7_elem_sternum_pos); };
    AnyRefNode Right_IntercostalisInternusR7R8_elem_sternum = {sRel = .Scale(.Data.Sternum.Right.IntercostalisInternusR7R8_elem_sternum_pos); };
    AnyRefNode Right_IntercostalisInternusR8R9_elem_sternum = {sRel = .Scale(.Data.Sternum.Right.IntercostalisInternusR8R9_elem_sternum_pos); };
    AnyRefNode Right_IntercostalisInternusR9R10_elem_sternum = {sRel = .Scale(.Data.Sternum.Right.IntercostalisInternusR9R10_elem_sternum_pos); };

    AnyRefNode Left_IntercostalisInternusR2R3_elem_sternum = {sRel = .Scale(.Data.Sternum.Left.IntercostalisInternusR2R3_elem_sternum_pos); };
    AnyRefNode Left_IntercostalisInternusR3R4_elem_sternum = {sRel = .Scale(.Data.Sternum.Left.IntercostalisInternusR3R4_elem_sternum_pos); };
    AnyRefNode Left_IntercostalisInternusR4R5_elem_sternum = {sRel = .Scale(.Data.Sternum.Left.IntercostalisInternusR4R5_elem_sternum_pos); };
    AnyRefNode Left_IntercostalisInternusR5R6_elem_sternum = {sRel = .Scale(.Data.Sternum.Left.IntercostalisInternusR5R6_elem_sternum_pos); };
    AnyRefNode Left_IntercostalisInternusR6R7_elem_sternum = {sRel = .Scale(.Data.Sternum.Left.IntercostalisInternusR6R7_elem_sternum_pos); };
    AnyRefNode Left_IntercostalisInternusR7R8_elem_sternum = {sRel = .Scale(.Data.Sternum.Left.IntercostalisInternusR7R8_elem_sternum_pos); };
    AnyRefNode Left_IntercostalisInternusR8R9_elem_sternum = {sRel = .Scale(.Data.Sternum.Left.IntercostalisInternusR8R9_elem_sternum_pos); };
    AnyRefNode Left_IntercostalisInternusR9R10_elem_sternum = {sRel = .Scale(.Data.Sternum.Left.IntercostalisInternusR9R10_elem_sternum_pos); };
   };


  Right = {

    R1Seg= {
      AnyRefNode IliocostalisThoracisC7R7Via1NodeR = { sRel =  .Scale(.Data.R1.Right.IliocostalisThoracisC7R7Via1Node_pos); };
      AnyRefNode IliocostalisThoracisR1R7NodeROrg  = { sRel =  .Scale(.Data.R1.Right.IliocostalisThoracisR1R7Node_pos); };
      AnyRefNode IliocostalisCervicisR3C4Via2Node= { sRel =  .Scale(.Data.R1.Right.IliocostalisCervicisR3C4Via2Node_pos);};
      AnyRefNode IliocostalisCervicisR4C5Via2Node= { sRel =  .Scale(.Data.R1.Right.IliocostalisCervicisR4C5Via2Node_pos);};
      AnyRefNode IliocostalisCervicisR5C6Via2Node= { sRel =  .Scale(.Data.R1.Right.IliocostalisCervicisR5C6Via2Node_pos);};
      AnyRefNode IliocostalisCervicisR6C4Via2Node= { sRel =  .Scale(.Data.R1.Right.IliocostalisCervicisR6C4Via2Node_pos);};
      AnyRefNode ScalenusAnteriorR1C6Node = { sRel =  .Scale(.Data.R1.Right.ScalenusAnteriorR1C6NodeIns_pos);};
      AnyRefNode ScalenusAnteriorR1C5Node = { sRel =  .Scale(.Data.R1.Right.ScalenusAnteriorR1C5NodeIns_pos);};
      AnyRefNode ScalenusAnteriorR1C4Node = { sRel =  .Scale(.Data.R1.Right.ScalenusAnteriorR1C4NodeIns_pos);};
      AnyRefNode ScalenusAnteriorR1C3Node = { sRel =  .Scale(.Data.R1.Right.ScalenusAnteriorR1C3NodeIns_pos);};
      AnyRefNode ScalenusMediusR1C7Node   = { sRel =  .Scale(.Data.R1.Right.ScalenusMediusR1C7NodeIns_pos);};
      AnyRefNode ScalenusMediusR1C6Node   = { sRel =  .Scale(.Data.R1.Right.ScalenusMediusR1C6NodeIns_pos);};
      AnyRefNode ScalenusMediusR1C5Node   = { sRel =  .Scale(.Data.R1.Right.ScalenusMediusR1C5NodeIns_pos);};
      AnyRefNode ScalenusMediusR1C4Node   = { sRel =  .Scale(.Data.R1.Right.ScalenusMediusR1C4NodeIns_pos);};
      AnyRefNode ScalenusMediusR1C3Node   = { sRel =  .Scale(.Data.R1.Right.ScalenusMediusR1C3NodeIns_pos);};
      AnyRefNode ScalenusMediusR1C2Node   = { sRel =  .Scale(.Data.R1.Right.ScalenusMediusR1C2NodeIns_pos);};
      AnyRefNode LevatorCostarumC7R1_R_Ins   = { sRel =  .Scale(.Data.R1.Right.LevatorCostarumC7R1Ins_pos);};
      AnyRefNode SubcostalisR1R3_R_Org     = { sRel =  .Scale(.Data.R1.Right.SubcostalisR1R3Org_pos);};
      AnyRefNode SubcostalisR1R4_R_Org     = { sRel =  .Scale(.Data.R1.Right.SubcostalisR1R4Org_pos);};
      AnyRefNode O_serratus_anterior_8R = {sRel = .Scale(.Data.R1.Right.O_serratus_anterior_pos); };
      AnyFolder &DataRib =Data.R1.Right;
      #if BM_TRUNK_THORACIC_MODEL == _THORACIC_MODEL_FLEXIBLE_
      #include "ICPoints.any"  //create points for inter costal muscles
      #endif
    };

    R2Seg= {
      AnyRefNode IliocostalisThoracisC7R7Via2NodeR = { sRel =  .Scale(.Data.R2.Right.IliocostalisThoracisC7R7Via2Node_pos);};
      AnyRefNode IliocostalisThoracisR1R7Via1NodeR = { sRel =  .Scale(.Data.R2.Right.IliocostalisThoracisR1R7Via1Node_pos);};
      AnyRefNode IliocostalisThoracisR2R8NodeROrg  = { sRel =  .Scale(.Data.R2.Right.IliocostalisThoracisR2R8Node_pos);};
      AnyRefNode ScalenusPosteriorR2C7Node = { sRel =  .Scale(.Data.R2.Right.ScalenusPosteriorR2C7NodeIns_pos);};
      AnyRefNode ScalenusPosteriorR2C6Node = { sRel =  .Scale(.Data.R2.Right.ScalenusPosteriorR2C6NodeIns_pos);};
      AnyRefNode ScalenusPosteriorR2C5Node = { sRel =  .Scale(.Data.R2.Right.ScalenusPosteriorR2C5NodeIns_pos);};
      AnyRefNode TransversusThoracisR2StNodeROrg  = { sRel =  .Scale(.Data.R2.Right.TransversusThoracisR2StNodeOrg_pos);};
      AnyRefNode TransversusThoracisR2R4NodeROrg = { sRel =  .Scale(.Data.R2.Right.TransversusThoracisR2R4NodeOrg_pos);};
      AnyRefNode LevatorCostarumT1R2_R_Ins   = { sRel =  .Scale(.Data.R2.Right.LevatorCostarumT1R2Ins_pos);};
      AnyRefNode SubcostalisR2R4_R_Org     = { sRel =  .Scale(.Data.R2.Right.SubcostalisR2R4Org_pos);};
      AnyRefNode SubcostalisR2R5_R_Org     = { sRel =  .Scale(.Data.R2.Right.SubcostalisR2R5Org_pos);};
      AnyRefNode O_serratus_anterior_7R = {sRel = .Scale(.Data.R2.Right.O_serratus_anterior_pos); };
      AnyRefNode O_serratus_posterior_superior_1R = {sRel = .Scale(.Data.R2.Right.O_serratus_posterior_superior_pos); };
      AnyRefNode IntercostalisInternusR1R2_elem_sternum = {sRel = .Scale(.Data.R2.Right.IntercostalisInternusR1R2_elem_sternum_pos); };
      AnyFolder &DataRib =Data.R2.Right;
      #if BM_TRUNK_THORACIC_MODEL == _THORACIC_MODEL_FLEXIBLE_
      #include "ICPoints.any"  //create points for inter costal muscles
      #endif

    };

    R3Seg= {
      AnyRefNode LongissimusThoracisR3L3NodeR  = { sRel =  .Scale(.Data.Thorax.Right.LongissimusThoracisR3L3Node_pos);  };
      AnyRefNode IliocostalisThoracisC7R7Via3NodeR= { sRel =  .Scale(.Data.R3.Right.IliocostalisThoracisC7R7Via3Node_pos);  };
      AnyRefNode IliocostalisThoracisR1R7Via2NodeR= { sRel =  .Scale(.Data.R3.Right.IliocostalisThoracisR1R7Via2Node_pos);  };
      AnyRefNode IliocostalisThoracisR2R8Via1NodeR= { sRel =  .Scale(.Data.R3.Right.IliocostalisThoracisR2R8Via1Node_pos);  };
      AnyRefNode IliocostalisThoracisR3R9NodeROrg = { sRel =  .Scale(.Data.R3.Right.IliocostalisThoracisR3R9Node_pos);  };
      AnyRefNode IliocostalisCervicisR3C4Node   = { sRel =  .Scale(.Data.R3.Right.IliocostalisCervicisR3C4Node_pos);};
      AnyRefNode IliocostalisCervicisR4C5Via3Node= {sRel =  .Scale(.Data.R3.Right.IliocostalisCervicisR4C5Via3Node_pos);};
      AnyRefNode IliocostalisCervicisR5C6Via3Node= {sRel =  .Scale(.Data.R3.Right.IliocostalisCervicisR5C6Via3Node_pos);};
      AnyRefNode IliocostalisCervicisR6C4Via3Node= {sRel =  .Scale(.Data.R3.Right.IliocostalisCervicisR6C4Via3Node_pos);};
      AnyRefNode TransversusThoracisR3StNodeROrg  = { sRel =  .Scale(.Data.R3.Right.TransversusThoracisR3StNodeOrg_pos);};
      AnyRefNode TransversusThoracisR3R5NodeROrg = { sRel =  .Scale(.Data.R3.Right.TransversusThoracisR3R5NodeOrg_pos);};
      AnyRefNode LevatorCostarumT2R3_R_Ins   = { sRel =  .Scale(.Data.R3.Right.LevatorCostarumT2R3Ins_pos);};
      AnyRefNode SubcostalisR1R3_R_Ins     = { sRel =  .Scale(.Data.R3.Right.SubcostalisR1R3Ins_pos);};
      AnyRefNode SubcostalisR3R5_R_Org     = { sRel =  .Scale(.Data.R3.Right.SubcostalisR3R5Org_pos);};
      AnyRefNode SubcostalisR3R6_R_Org     = { sRel =  .Scale(.Data.R3.Right.SubcostalisR3R6Org_pos);};
      AnyRefNode O_serratus_anterior_6R = {sRel = .Scale(.Data.R3.Right.O_serratus_anterior_pos); };
      AnyRefNode O_serratus_posterior_superior_2R = {sRel = .Scale(.Data.R3.Right.O_serratus_posterior_superior_pos); };
      AnyRefNode IntercostalisInternusR2R3_elem_sternum = {sRel = .Scale(.Data.R3.Right.IntercostalisInternusR2R3_elem_sternum_pos); };
      AnyFolder &DataRib =Data.R3.Right;
      #if BM_TRUNK_THORACIC_MODEL == _THORACIC_MODEL_FLEXIBLE_
      #include "ICPoints.any"  //create points for inter costal muscles
      #endif
    };

    R4Seg= {
      AnyRefNode LongissimusThoracisR3L3Via1NodeR= { sRel =  .Scale(.Data.Thorax.Right.LongissimusThoracisR3L3Via1Node_pos);};
      AnyRefNode LongissimusThoracisR4L4NodeR    = { sRel =  .Scale(.Data.Thorax.Right.LongissimusThoracisR4L4Node_pos);};
      AnyRefNode IliocostalisThoracisC7R7Via4NodeR  = { sRel =  .Scale(.Data.R4.Right.IliocostalisThoracisC7R7Via4Node_pos);};
      AnyRefNode IliocostalisThoracisR1R7Via3NodeR  = { sRel =  .Scale(.Data.R4.Right.IliocostalisThoracisR1R7Via3Node_pos);};
      AnyRefNode IliocostalisThoracisR2R8Via2NodeR  = { sRel =  .Scale(.Data.R4.Right.IliocostalisThoracisR2R8Via2Node_pos);};
      AnyRefNode IliocostalisThoracisR3R9Via1NodeR  = { sRel =  .Scale(.Data.R4.Right.IliocostalisThoracisR3R9Via1Node_pos);};
      AnyRefNode IliocostalisThoracisR4R10NodeROrg  = { sRel =  .Scale(.Data.R4.Right.IliocostalisThoracisR4R10Node_pos);};
      AnyRefNode IliocostalisCervicisR4C5Node     = { sRel =  .Scale(.Data.R4.Right.IliocostalisCervicisR4C5Node_pos);};
      AnyRefNode IliocostalisCervicisR5C6Via4Node = { sRel =  .Scale(.Data.R4.Right.IliocostalisCervicisR5C6Via4Node_pos);};
      AnyRefNode IliocostalisCervicisR6C4Via4Node = { sRel =  .Scale(.Data.R4.Right.IliocostalisCervicisR6C4Via4Node_pos);};
      AnyRefNode TransversusThoracisR4StNodeROrg  = { sRel =  .Scale(.Data.R4.Right.TransversusThoracisR4StNodeOrg_pos);};
      AnyRefNode TransversusThoracisR4R6NodeROrg = { sRel =  .Scale(.Data.R4.Right.TransversusThoracisR4R6NodeOrg_pos);};
      AnyRefNode TransversusThoracisR2R4NodeRIns = { sRel =  .Scale(.Data.R4.Right.TransversusThoracisR2R4NodeIns_pos);};
      AnyRefNode LevatorCostarumT3R4_R_Ins   = { sRel =  .Scale(.Data.R4.Right.LevatorCostarumT3R4Ins_pos);};
      AnyRefNode SubcostalisR1R4_R_Ins     = { sRel =  .Scale(.Data.R4.Right.SubcostalisR1R4Ins_pos);};
      AnyRefNode SubcostalisR2R4_R_Ins     = { sRel =  .Scale(.Data.R4.Right.SubcostalisR2R4Ins_pos);};
      AnyRefNode SubcostalisR4R6_R_Org     = { sRel =  .Scale(.Data.R4.Right.SubcostalisR4R6Org_pos);};
      AnyRefNode SubcostalisR4R7_R_Org     = { sRel =  .Scale(.Data.R4.Right.SubcostalisR4R7Org_pos);};
      AnyRefNode O_serratus_anterior_5R = {sRel = .Scale(.Data.R4.Right.O_serratus_anterior_pos); };
      AnyRefNode O_serratus_posterior_superior_3R = {sRel = .Scale(.Data.R4.Right.O_serratus_posterior_superior_pos); };
      AnyRefNode IntercostalisInternusR3R4_elem_sternum = {sRel = .Scale(.Data.R4.Right.IntercostalisInternusR3R4_elem_sternum_pos); };
      AnyFolder &DataRib =Data.R4.Right;
      #if BM_TRUNK_THORACIC_MODEL == _THORACIC_MODEL_FLEXIBLE_
      #include "ICPoints.any"  //create points for inter costal muscles
      #endif
    };

    R5Seg= {
      AnyRefNode IC_R5_Ant_R_Ins = {sRel = .Scale(.Data.R5.Right.IC_AntIns_pos);};
      AnyRefNode LongissimusThoracisR3L3Via2NodeR= { sRel =  .Scale(.Data.Thorax.Right.LongissimusThoracisR3L3Via2Node_pos);};
      AnyRefNode LongissimusThoracisR4L4Via1NodeR= { sRel =  .Scale(.Data.Thorax.Right.LongissimusThoracisR4L4Via1Node_pos);};
      AnyRefNode LongissimusThoracisR5L5NodeR    = { sRel =  .Scale(.Data.Thorax.Right.LongissimusThoracisR5L5Node_pos);};
      AnyRefNode IliocostalisLumborumR5NodeR  = { sRel =  .Scale(.Data.Thorax.Right.IliocostalisLumborumR5Node_pos);};
      AnyRefNode IliocostalisThoracisC7R7Via5NodeR  = { sRel =  .Scale(.Data.R5.Right.IliocostalisThoracisC7R7Via5Node_pos);};
      AnyRefNode IliocostalisThoracisR1R7Via4NodeR  = { sRel =  .Scale(.Data.R5.Right.IliocostalisThoracisR1R7Via4Node_pos);};
      AnyRefNode IliocostalisThoracisR2R8Via3NodeR  = { sRel =  .Scale(.Data.R5.Right.IliocostalisThoracisR2R8Via3Node_pos);};
      AnyRefNode IliocostalisThoracisR3R9Via2NodeR  = { sRel =  .Scale(.Data.R5.Right.IliocostalisThoracisR3R9Via2Node_pos);};
      AnyRefNode IliocostalisThoracisR4R10Via1NodeR = { sRel =  .Scale(.Data.R5.Right.IliocostalisThoracisR4R10Via1Node_pos);};
      AnyRefNode IliocostalisThoracisR5R11NodeROrg  = { sRel =  .Scale(.Data.R5.Right.R5IliocostalisThoracisR5R11Node_pos);};
      AnyRefNode IliocostalisCervicisR5C6Node     = { sRel =  .Scale(.Data.R5.Right.IliocostalisCervicisR5C6Node_pos);};
      AnyRefNode IliocostalisCervicisR6C4Via5Node = { sRel =  .Scale(.Data.R5.Right.IliocostalisCervicisR6C4Via5Node_pos);};
      AnyRefNode TransversusThoracisR5StNodeROrg  = { sRel =  .Scale(.Data.R5.Right.TransversusThoracisR5StNodeOrg_pos);};
      AnyRefNode TransversusThoracisR3R5NodeRIns = { sRel =  .Scale(.Data.R5.Right.TransversusThoracisR3R5NodeIns_pos);};
      AnyRefNode TransversusThoracisR5R7NodeROrg = { sRel =  .Scale(.Data.R5.Right.TransversusThoracisR5R7NodeOrg_pos);};
      AnyRefNode LevatorCostarumT4R5_R_Ins   = { sRel =  .Scale(.Data.R5.Right.LevatorCostarumT4R5Ins_pos);};
      AnyRefNode SubcostalisR2R5_R_Ins     = { sRel =  .Scale(.Data.R5.Right.SubcostalisR2R5Ins_pos);};
      AnyRefNode SubcostalisR3R5_R_Ins     = { sRel =  .Scale(.Data.R5.Right.SubcostalisR3R5Ins_pos);};
      AnyRefNode SubcostalisR5R7_R_Org     = { sRel =  .Scale(.Data.R5.Right.SubcostalisR5R7Org_pos);};
      AnyRefNode SubcostalisR5R8_R_Org     = { sRel =  .Scale(.Data.R5.Right.SubcostalisR5R8Org_pos);};
      AnyRefNode O_serratus_anterior_4R = {sRel = .Scale(.Data.R5.Right.O_serratus_anterior_pos); };
      AnyRefNode O_serratus_posterior_superior_4R = {sRel = .Scale(.Data.R5.Right.O_serratus_posterior_superior_pos); };
      AnyRefNode IntercostalisInternusR4R5_elem_sternum = {sRel = .Scale(.Data.R5.Right.IntercostalisInternusR4R5_elem_sternum_pos); };
      AnyFolder &DataRib =Data.R5.Right;
      #if BM_TRUNK_THORACIC_MODEL == _THORACIC_MODEL_FLEXIBLE_
      #include "ICPoints.any"  //create points for inter costal muscles
      #endif
    };

    R6Seg= {
      AnyRefNode LongissimusThoracisR3L3Via3NodeR   = { sRel =  .Scale(.Data.Thorax.Right.LongissimusThoracisR3L3Via3Node_pos);};
      AnyRefNode LongissimusThoracisR4L4Via2NodeR   = { sRel =  .Scale(.Data.Thorax.Right.LongissimusThoracisR4L4Via2Node_pos);};
      AnyRefNode LongissimusThoracisR5L5Via1NodeR   = { sRel =  .Scale(.Data.Thorax.Right.LongissimusThoracisR5L5Via1Node_pos);};
      AnyRefNode LongissimusThoracisR6S1NodeR       = { sRel =  .Scale(.Data.Thorax.Right.LongissimusThoracisR6S1Node_pos);};
      AnyRefNode IliocostalisLumborumR5Via1NodeR = { sRel =  .Scale(.Data.Thorax.Right.IliocostalisLumborumR5Via1Node_pos);};
      AnyRefNode IliocostalisLumborumR6NodeR     = { sRel =  .Scale(.Data.Thorax.Right.IliocostalisLumborumR6Node_pos);};
      AnyRefNode ObliquusExternusNode        = { sRel =  .Scale(.Data.Thorax.Right.OEC6_RSNode_pos);};
      AnyRefNode IliocostalisThoracisC7R7Via6NodeR     = { sRel =  .Scale(.Data.R6.Right.IliocostalisThoracisC7R7Via6Node_pos);};
      AnyRefNode IliocostalisThoracisR1R7Via5NodeR     = { sRel =  .Scale(.Data.R6.Right.IliocostalisThoracisR1R7Via5Node_pos);};
      AnyRefNode IliocostalisThoracisR2R8Via4NodeR     = { sRel =  .Scale(.Data.R6.Right.IliocostalisThoracisR2R8Via4Node_pos);};
      AnyRefNode IliocostalisThoracisR3R9Via3NodeR     = { sRel =  .Scale(.Data.R6.Right.IliocostalisThoracisR3R9Via3Node_pos);};
      AnyRefNode IliocostalisThoracisR4R10Via2NodeR    = { sRel =  .Scale(.Data.R6.Right.IliocostalisThoracisR4R10Via2Node_pos);};
      AnyRefNode IliocostalisThoracisR5R11Via1NodeR    = { sRel =  .Scale(.Data.R6.Right.IliocostalisThoracisR5R11Via1Node_pos);};
      AnyRefNode IliocostalisThoracisR6R12NodeR        = { sRel =  .Scale(.Data.R6.Right.R6IliocostalisThoracisR6R12Node_pos);};
      AnyRefNode IliocostalisCervicisR6C4Node     = { sRel =  .Scale(.Data.R6.Right.IliocostalisCervicisR6C4Node_pos);};
      AnyRefNode TransversusThoracisR6StNodeROrg  = { sRel =  .Scale(.Data.R6.Right.TransversusThoracisR6StNodeOrg_pos);};
      AnyRefNode TransversusThoracisR4R6NodeRIns = { sRel =  .Scale(.Data.R6.Right.TransversusThoracisR4R6NodeIns_pos);};
      AnyRefNode LevatorCostarumT5R6_R_Ins   = { sRel =  .Scale(.Data.R6.Right.LevatorCostarumT5R6Ins_pos);};
      AnyRefNode SubcostalisR3R6_R_Ins     = { sRel =  .Scale(.Data.R6.Right.SubcostalisR3R6Ins_pos);};
      AnyRefNode SubcostalisR4R6_R_Ins     = { sRel =  .Scale(.Data.R6.Right.SubcostalisR4R6Ins_pos);};
      AnyRefNode SubcostalisR6R8_R_Org     = { sRel =  .Scale(.Data.R6.Right.SubcostalisR6R8Org_pos);};
      AnyRefNode SubcostalisR6R9_R_Org     = { sRel =  .Scale(.Data.R6.Right.SubcostalisR6R9Org_pos);};
      AnyRefNode O_serratus_anterior_3R = {sRel = .Scale(.Data.R6.Right.O_serratus_anterior_pos); };
      AnyRefNode IntercostalisInternusR5R6_elem_sternum = {sRel = .Scale(.Data.R6.Right.IntercostalisInternusR5R6_elem_sternum_pos); };
      AnyFolder &DataRib =Data.R6.Right;
      #if BM_TRUNK_THORACIC_MODEL == _THORACIC_MODEL_FLEXIBLE_
      #include "ICPoints.any"  //create points for inter costal muscles
      #endif
    };

    R7Seg= {
      AnyRefNode IliocostalisLumborumR7NodeR       = { sRel =  .Scale(.Data.Thorax.Right.IliocostalisLumborumR7Node_pos);};
      AnyRefNode LongissimusThoracisR3L3Via4NodeR   = { sRel =  .Scale(.Data.Thorax.Right.LongissimusThoracisR3L3Via4Node_pos);};
      AnyRefNode LongissimusThoracisR4L4Via3NodeR   = { sRel =  .Scale(.Data.Thorax.Right.LongissimusThoracisR4L4Via3Node_pos);};
      AnyRefNode LongissimusThoracisR5L5Via2NodeR   = { sRel =  .Scale(.Data.Thorax.Right.LongissimusThoracisR5L5Via2Node_pos);};
      AnyRefNode LongissimusThoracisR6S1Via1NodeR   = { sRel =  .Scale(.Data.Thorax.Right.LongissimusThoracisR6S1Via1Node_pos);};
      AnyRefNode LongissimusThoracisR7S2NodeR       = { sRel =  .Scale(.Data.Thorax.Right.LongissimusThoracisR7S2Node_pos);};
      AnyRefNode IliocostalisLumborumR5Via2NodeR = { sRel =  .Scale(.Data.Thorax.Right.IliocostalisLumborumR5Via2Node_pos);};
      AnyRefNode IliocostalisLumborumR6Via1NodeR = { sRel =  .Scale(.Data.Thorax.Right.IliocostalisLumborumR6Via1Node_pos);};
      AnyRefNode ObliquusExternusNode        = { sRel =  .Scale(.Data.Thorax.Right.OEC7_RSNode_pos);};
      AnyRefNode IliocostalisThoracisC7R7NodeRIns      = { sRel =  .Scale(.Data.R7.Right.IliocostalisThoracisC7R7Node_posIns);};
      AnyRefNode IliocostalisThoracisR1R7NodeRIns      = { sRel =  .Scale(.Data.R7.Right.IliocostalisThoracisR1R7Node_posIns);};
      AnyRefNode IliocostalisThoracisR2R8Via5NodeR     = { sRel =  .Scale(.Data.R7.Right.IliocostalisThoracisR2R8Via5Node_pos);};
      AnyRefNode IliocostalisThoracisR3R9Via4NodeR     = { sRel =  .Scale(.Data.R7.Right.IliocostalisThoracisR3R9Via4Node_pos);};
      AnyRefNode IliocostalisThoracisR4R10Via3NodeR    = { sRel =  .Scale(.Data.R7.Right.IliocostalisThoracisR4R10Via3Node_pos);};
      AnyRefNode IliocostalisThoracisR5R11Via2NodeR    = { sRel =  .Scale(.Data.R7.Right.IliocostalisThoracisR5R11Via2Node_pos);};
      AnyRefNode IliocostalisThoracisR6R12Via1NodeR    = { sRel =  .Scale(.Data.R7.Right.IliocostalisThoracisR6R12Via1Node_pos);};
      AnyRefNode TransversusThoracisR5R7NodeRIns = { sRel =  .Scale(.Data.R7.Right.TransversusThoracisR5R7NodeIns_pos);};
      AnyRefNode TransversusThoracisR7StNodeROrg  = { sRel =  .Scale(.Data.R7.Right.TransversusThoracisR7StNodeOrg_pos);};
      AnyRefNode LevatorCostarumT6R7_R_Ins   = { sRel =  .Scale(.Data.R7.Right.LevatorCostarumT6R7Ins_pos);};
      AnyRefNode LevatorCostarumT5R7_R_Ins   = { sRel =  .Scale(.Data.R7.Right.LevatorCostarumT5R7Ins_pos);};
      AnyRefNode SubcostalisR4R7_R_Ins     = { sRel =  .Scale(.Data.R7.Right.SubcostalisR4R7Ins_pos);};
      AnyRefNode SubcostalisR5R7_R_Ins     = { sRel =  .Scale(.Data.R7.Right.SubcostalisR5R7Ins_pos);};
      AnyRefNode SubcostalisR7R9_R_Org     = { sRel =  .Scale(.Data.R7.Right.SubcostalisR7R9Org_pos);};
      AnyRefNode SubcostalisR7R10_R_Org    = { sRel =  .Scale(.Data.R7.Right.SubcostalisR7R10Org_pos);};
      AnyRefNode O_serratus_anterior_2R = {sRel = .Scale(.Data.R7.Right.O_serratus_anterior_pos); };
      AnyRefNode IntercostalisInternusR6R7_elem_sternum = {sRel = .Scale(.Data.R7.Right.IntercostalisInternusR6R7_elem_sternum_pos); };
      AnyFolder &DataRib =Data.R7.Right;
      #if BM_TRUNK_THORACIC_MODEL == _THORACIC_MODEL_FLEXIBLE_
      #include "ICPoints.any"  //create points for inter costal muscles
      #endif
    };

    R8Seg= {
      AnyRefNode IliocostalisLumborumR7Via1NodeR   = { sRel =  .Scale(.Data.Thorax.Right.IliocostalisLumborumR7Via1Node_pos);};
      AnyRefNode IliocostalisLumborumR8NodeR       = { sRel =  .Scale(.Data.Thorax.Right.IliocostalisLumborumR8Node_pos);};
      AnyRefNode LongissimusThoracisR3L3Via5NodeR   = { sRel =  .Scale(.Data.Thorax.Right.LongissimusThoracisR3L3Via5Node_pos);};
      AnyRefNode LongissimusThoracisR4L4Via4NodeR   = { sRel =  .Scale(.Data.Thorax.Right.LongissimusThoracisR4L4Via4Node_pos);};
      AnyRefNode LongissimusThoracisR5L5Via3NodeR   = { sRel =  .Scale(.Data.Thorax.Right.LongissimusThoracisR5L5Via3Node_pos);};
      AnyRefNode LongissimusThoracisR6S1Via2NodeR   = { sRel =  .Scale(.Data.Thorax.Right.LongissimusThoracisR6S1Via2Node_pos);};
      AnyRefNode LongissimusThoracisR7S2Via1NodeR   = { sRel =  .Scale(.Data.Thorax.Right.LongissimusThoracisR7S2Via1Node_pos);};
      AnyRefNode LongissimusThoracisR8S3NodeR       = { sRel =  .Scale(.Data.Thorax.Right.LongissimusThoracisR8S3Node_pos);};
      AnyRefNode IliocostalisLumborumR5Via3NodeR = { sRel =  .Scale(.Data.Thorax.Right.IliocostalisLumborumR5Via3Node_pos);};
      AnyRefNode IliocostalisLumborumR6Via2NodeR = { sRel =  .Scale(.Data.Thorax.Right.IliocostalisLumborumR6Via2Node_pos);};
      AnyRefNode ObliquusExternusNode        = { sRel =  .Scale(.Data.Thorax.Right.OEC8_RSNode_pos);};
      AnyRefNode IliocostalisThoracisR2R8NodeRIns      = { sRel =  .Scale(.Data.R8.Right.IliocostalisThoracisR2R8Node_posIns);};
      AnyRefNode IliocostalisThoracisR3R9Via5NodeR     = { sRel =  .Scale(.Data.R8.Right.IliocostalisThoracisR3R9Via5Node_pos);};
      AnyRefNode IliocostalisThoracisR4R10Via4NodeR    = { sRel =  .Scale(.Data.R8.Right.IliocostalisThoracisR4R10Via4Node_pos);};
      AnyRefNode IliocostalisThoracisR5R11Via3NodeR    = { sRel =  .Scale(.Data.R8.Right.IliocostalisThoracisR5R11Via3Node_pos);};
      AnyRefNode IliocostalisThoracisR6R12Via2NodeR    = { sRel =  .Scale(.Data.R8.Right.IliocostalisThoracisR6R12Via2Node_pos);};
      AnyRefNode TransversusThoracisR8StNodeROrg  = { sRel =  .Scale(.Data.R8.Right.TransversusThoracisR8StNodeOrg_pos);};
      AnyRefNode LevatorCostarumT7R8_R_Ins   = { sRel =  .Scale(.Data.R8.Right.LevatorCostarumT7R8Ins_pos);};
      AnyRefNode LevatorCostarumT6R8_R_Ins   = { sRel =  .Scale(.Data.R8.Right.LevatorCostarumT6R8Ins_pos);};
      AnyRefNode SubcostalisR5R8_R_Ins     = { sRel =  .Scale(.Data.R8.Right.SubcostalisR5R8Ins_pos);};
      AnyRefNode SubcostalisR6R8_R_Ins     = { sRel =  .Scale(.Data.R8.Right.SubcostalisR6R8Ins_pos);};
      AnyRefNode SubcostalisR8R10_R_Org    = { sRel =  .Scale(.Data.R8.Right.SubcostalisR8R10Org_pos);};
      AnyRefNode SubcostalisR8R11_R_Ins    = { sRel =  .Scale(.Data.R8.Right.SubcostalisR8R11Ins_pos); };
      AnyRefNode O_serratus_anterior_1R = {sRel = .Scale(.Data.R8.Right.O_serratus_anterior_pos); };
      AnyRefNode IntercostalisInternusR7R8_elem_sternum = {sRel = .Scale(.Data.R8.Right.IntercostalisInternusR7R8_elem_sternum_pos); };
      AnyFolder &DataRib =Data.R8.Right;
      #if BM_TRUNK_THORACIC_MODEL == _THORACIC_MODEL_FLEXIBLE_
      #include "ICPoints.any"  //create points for inter costal muscles
      #endif
    };

    R9Seg= {
      AnyRefNode IliocostalisLumborumR7Via2NodeR   = { sRel =  .Scale(.Data.Thorax.Right.IliocostalisLumborumR7Via2Node_pos);};
      AnyRefNode IliocostalisLumborumR8Via1NodeR   = { sRel =  .Scale(.Data.Thorax.Right.IliocostalisLumborumR8Via1Node_pos);};
      AnyRefNode IliocostalisLumborumR9NodeR       = { sRel =  .Scale(.Data.Thorax.Right.IliocostalisLumborumR9Node_pos);};
      AnyRefNode LongissimusThoracisR3L3Via6NodeR   = { sRel =  .Scale(.Data.Thorax.Right.LongissimusThoracisR3L3Via6Node_pos);};
      AnyRefNode LongissimusThoracisR4L4Via5NodeR   = { sRel =  .Scale(.Data.Thorax.Right.LongissimusThoracisR4L4Via5Node_pos);};
      AnyRefNode LongissimusThoracisR5L5Via4NodeR   = { sRel =  .Scale(.Data.Thorax.Right.LongissimusThoracisR5L5Via4Node_pos);};
      AnyRefNode LongissimusThoracisR6S1Via3NodeR   = { sRel =  .Scale(.Data.Thorax.Right.LongissimusThoracisR6S1Via3Node_pos);};
      AnyRefNode LongissimusThoracisR7S2Via2NodeR   = { sRel =  .Scale(.Data.Thorax.Right.LongissimusThoracisR7S2Via2Node_pos);};
      AnyRefNode LongissimusThoracisR8S3Via1NodeR   = { sRel =  .Scale(.Data.Thorax.Right.LongissimusThoracisR8S3Via1Node_pos);};
      AnyRefNode LongissimusThoracisR9S4NodeR       = { sRel =  .Scale(.Data.Thorax.Right.LongissimusThoracisR9S4Node_pos);};
      AnyRefNode IliocostalisLumborumR5Via4NodeR = { sRel =  .Scale(.Data.Thorax.Right.IliocostalisLumborumR5Via4Node_pos);};
      AnyRefNode IliocostalisLumborumR6Via3NodeR = { sRel =  .Scale(.Data.Thorax.Right.IliocostalisLumborumR6Via3Node_pos);};
      AnyRefNode ObliquusExternusNode        = { sRel =  .Scale(.Data.Thorax.Right.OEC9_RSNode_pos);};
     AnyRefNode ObliquusExternusNode_1        = { sRel =  .Scale(.Data.Thorax.Right.OEC9_RSNode_1_pos);};

      AnyRefNode IliocostalisThoracisR3R9NodeRIns      = { sRel =  .Scale(.Data.R9.Right.IliocostalisThoracisR3R9Node_posIns);};
      AnyRefNode IliocostalisThoracisR4R10Via5NodeR    = { sRel =  .Scale(.Data.R9.Right.IliocostalisThoracisR4R10Via5Node_pos);};
      AnyRefNode IliocostalisThoracisR5R11Via4NodeR    = { sRel =  .Scale(.Data.R9.Right.IliocostalisThoracisR5R11Via4Node_pos);};
      AnyRefNode IliocostalisThoracisR6R12Via3NodeR    = { sRel =  .Scale(.Data.R9.Right.IliocostalisThoracisR6R12Via3Node_pos);};
      AnyRefNode TransversusThoracisR9StNodeROrg  = { sRel =  .Scale(.Data.R9.Right.TransversusThoracisR9StNodeOrg_pos);};
      AnyRefNode LevatorCostarumT8R9_R_Ins   = { sRel =  .Scale(.Data.R9.Right.LevatorCostarumT8R9Ins_pos);};
      AnyRefNode LevatorCostarumT7R9_R_Ins   = { sRel =  .Scale(.Data.R9.Right.LevatorCostarumT7R9Ins_pos);};
      AnyRefNode SubcostalisR6R9_R_Ins     = { sRel =  .Scale(.Data.R9.Right.SubcostalisR6R9Ins_pos);};
      AnyRefNode SubcostalisR7R9_R_Ins     = { sRel =  .Scale(.Data.R9.Right.SubcostalisR7R9Ins_pos);};
      AnyRefNode SubcostalisR9R11_R_Ins   = { sRel =  .Scale(.Data.R9.Right.SubcostalisR9R11Ins_pos); };
      AnyRefNode O_serratus_posterior_inferior_R9R = {sRel = .Scale(.Data.R9.Right.O_serratus_posterior_inferior_pos); };
      AnyRefNode IntercostalisInternusR8R9_elem_sternum = {sRel = .Scale(.Data.R9.Right.IntercostalisInternusR8R9_elem_sternum_pos); };
      AnyFolder &DataRib =Data.R9.Right;
      #if BM_TRUNK_THORACIC_MODEL == _THORACIC_MODEL_FLEXIBLE_
      #include "ICPoints.any"  //create points for inter costal muscles
      #endif
    };

    R10Seg= {
      AnyRefNode IliocostalisLumborumR7Via3NodeR   = { sRel =  .Scale(.Data.Thorax.Right.IliocostalisLumborumR7Via3Node_pos);};
      AnyRefNode IliocostalisLumborumR8Via2NodeR   = { sRel =  .Scale(.Data.Thorax.Right.IliocostalisLumborumR8Via2Node_pos);};
      AnyRefNode IliocostalisLumborumR9Via1NodeR   = { sRel =  .Scale(.Data.Thorax.Right.IliocostalisLumborumR9Via1Node_pos);};
      AnyRefNode IliocostalisLumborumR10NodeR      = { sRel =  .Scale(.Data.Thorax.Right.IliocostalisLumborumR10Node_pos);};
      AnyRefNode LongissimusThoracisR3L3Via7NodeR   = { sRel =  .Scale(.Data.Thorax.Right.LongissimusThoracisR3L3Via7Node_pos);};
      AnyRefNode LongissimusThoracisR4L4Via6NodeR   = { sRel =  .Scale(.Data.Thorax.Right.LongissimusThoracisR4L4Via6Node_pos);};
      AnyRefNode LongissimusThoracisR5L5Via5NodeR   = { sRel =  .Scale(.Data.Thorax.Right.LongissimusThoracisR5L5Via5Node_pos);};
      AnyRefNode LongissimusThoracisR6S1Via4NodeR   = { sRel =  .Scale(.Data.Thorax.Right.LongissimusThoracisR6S1Via4Node_pos);};
      AnyRefNode LongissimusThoracisR7S2Via3NodeR   = { sRel =  .Scale(.Data.Thorax.Right.LongissimusThoracisR7S2Via3Node_pos);};
      AnyRefNode LongissimusThoracisR8S3Via2NodeR   = { sRel =  .Scale(.Data.Thorax.Right.LongissimusThoracisR8S3Via2Node_pos);};
      AnyRefNode LongissimusThoracisR9S4Via1NodeR   = { sRel =  .Scale(.Data.Thorax.Right.LongissimusThoracisR9S4Via1Node_pos);};
      AnyRefNode LongissimusThoracisR10S3NodeR  = { sRel =  .Scale(.Data.Thorax.Right.LongissimusThoracisR10S3Node_pos);};
      AnyRefNode IliocostalisLumborumR5Via5NodeR = { sRel =  .Scale(.Data.Thorax.Right.IliocostalisLumborumR5Via5Node_pos);};
      AnyRefNode IliocostalisLumborumR6Via4NodeR = { sRel =  .Scale(.Data.Thorax.Right.IliocostalisLumborumR6Via4Node_pos);};
      AnyRefNode ObliquusExternusNode_00       = { sRel =  .Scale(.Data.Thorax.Right.OEC6_1_RSNode_pos);};
      AnyRefNode ObliquusExternusNode_0       = { sRel =  .Scale(.Data.Thorax.Right.OEC6_2_RSNode_pos);};
      AnyRefNode ObliquusExternusNode_1       = { sRel =  .Scale(.Data.Thorax.Right.OEC10_RSNode_pos);};
      AnyRefNode ObliquusExternusNode_2       = { sRel =  .Scale(.Data.R10.Right.OEC10a_CINode_pos);};
      AnyRefNode ObliquusInternusNode_1       = { sRel =  .Scale(.Data.Thorax.Right.OICI_C10Node_pos);};
      AnyRefNode ObliquusInternusNode_2       = { sRel =  .Scale(.Data.Thorax.Right.OICI_C10aNode_pos);};
      AnyRefNode IliocostalisThoracisR4R10NodeRIns     = { sRel =  .Scale(.Data.R10.Right.IliocostalisThoracisR4R10Node_posIns);};
      AnyRefNode IliocostalisThoracisR5R11Via5NodeR    = { sRel =  .Scale(.Data.R10.Right.IliocostalisThoracisR5R11Via5Node_pos);};
      AnyRefNode IliocostalisThoracisR6R12Via4NodeR    = { sRel =  .Scale(.Data.R10.Right.IliocostalisThoracisR6R12Via4Node_pos);};
      AnyRefNode TransversusThoracisR10StNodeROrg = { sRel =  .Scale(.Data.R10.Right.TransversusThoracisR10StNodeOrg_pos);};
      AnyRefNode LevatorCostarumT9R10_R_Ins  = { sRel =  .Scale(.Data.R10.Right.LevatorCostarumT9R10Ins_pos);};
      AnyRefNode LevatorCostarumT8R10_R_Ins  = { sRel =  .Scale(.Data.R10.Right.LevatorCostarumT8R10Ins_pos);};
      AnyRefNode SubcostalisR7R10_R_Ins    = { sRel =  .Scale(.Data.R10.Right.SubcostalisR7R10Ins_pos);};
      AnyRefNode SubcostalisR8R10_R_Ins    = { sRel =  .Scale(.Data.R10.Right.SubcostalisR8R10Ins_pos);};
      AnyRefNode O_serratus_posterior_inferior_R10R = {sRel = .Scale(.Data.R10.Right.O_serratus_posterior_inferior_pos); };
      AnyRefNode DiaphragmR10_1NodeR = {sRel = .Scale(.Data.R10.Right.DiaphragmR10_1Node_pos); };
      AnyRefNode DiaphragmR10_2NodeR = {sRel = .Scale(.Data.R10.Right.DiaphragmR10_2Node_pos); };
      AnyRefNode DiaphragmR10_3NodeR = {sRel = .Scale(.Data.R10.Right.DiaphragmR10_3Node_pos); };
      AnyRefNode IntercostalisInternusR9R10_elem_sternum = {sRel = .Scale(.Data.R10.Right.IntercostalisInternusR9R10_elem_sternum_pos); };
      AnyRefNode CCNodeR11 ={ sRel = .Scale(.Data.Thorax.Right.OEC11_CINode_pos);};
      AnyRefNode MidNode        = { sRel =  .Scale(.Data.R10.Right.MidNode_pos); };
      AnyFolder &DataRib =Data.R10.Right;
      #if BM_TRUNK_THORACIC_MODEL == _THORACIC_MODEL_FLEXIBLE_
      #include "ICPoints.any"  //create points for inter costal muscles
      #endif
    };

    R11Seg = {
      AnyRefNode ObliquusExternusNode = { sRel =  .Scale(.Data.Thorax.Right.OEC11_CINode_pos);};
      AnyRefNode ObliquusInternusNode       = { sRel =  .Scale(.Data.Thorax.Right.OICI_C11Node_pos);};


      AnyRefNode ObliquusExternusNode1       = { sRel =  .Scale(.Data.Thorax.Right.OEC11_CINode1_pos);};
      AnyRefNode ObliquusInternusNode1       = { sRel =  .Scale(.Data.R12.Right.OEC12_CINode1_pos);};

      AnyRefNode O_serratus_posterior_inferior_R11R = {sRel = .Scale(.Data.R11.Right.O_serratus_posterior_inferior_pos);};
      AnyRefNode LongissimusThoracisR7S2Via4NodeR    = {sRel = .Scale(.Data.Thorax.Right.LongissimusThoracisR7S2Via4Node_pos); };
      AnyRefNode LongissimusThoracisR8S3Via3NodeR    = {sRel = .Scale(.Data.Thorax.Right.LongissimusThoracisR8S3Via3Node_pos); };
      AnyRefNode LongissimusThoracisR9S4Via2NodeR    = {sRel = .Scale(.Data.Thorax.Right.LongissimusThoracisR9S4Via2Node_pos); };
      AnyRefNode IliocostalisThoracisR5R11NodeRIns     = {sRel =  .Scale(.Data.T11.Right.IliocostalisThoracisR5R11Node_pos); };
      AnyRefNode LongissimusThoracisR10S3Via1NodeR = {sRel = .Scale(.Data.Thorax.Right.LongissimusThoracisR10S3Via1Node_pos); };
      AnyRefNode IliocostalisThoracisR6R12Via5NodeR = {sRel =  .Scale(.Data.T11.Right.IliocostalisThoracisR6R12Via5Node_pos); };
      AnyRefNode LongissimusThoracisR11S3NodeR   = {sRel = .Scale(.Data.Thorax.Right.LongissimusThoracisR11S3Node_pos); };
      AnyRefNode IliocostalisLumborumR11NodeR = {sRel = .Scale(.Data.Thorax.Right.IliocostalisLumborumR11Node_pos); };
      AnyRefNode LevatorCostarumT10R11_R_Ins  = { sRel =  .Scale(.Data.R11.Right.LevatorCostarumT10R11Ins_pos);};
      AnyRefNode LevatorCostarumT9R11_R_Ins  = { sRel =  .Scale(.Data.R11.Right.LevatorCostarumT9R11Ins_pos);};
      AnyRefNode SubcostalisR8R11_R_Org = { sRel =  .Scale(.Data.T11.Right.SubcostalisR8R11_Org_pos);};
      AnyRefNode SubcostalisR9R11_R_Org = { sRel =  .Scale(.Data.T11.Right.SubcostalisR9R11_Org_pos);};
      AnyRefNode DiaphragmR11_1NodeR = {sRel = .Scale(.Data.R11.Right.DiaphragmR11_1Node_pos); };
      AnyRefNode DiaphragmR11_2NodeR = {sRel = .Scale(.Data.R11.Right.DiaphragmR11_2Node_pos); };
      AnyRefNode DiaphragmR11_3NodeR = {sRel = .Scale(.Data.R11.Right.DiaphragmR11_3Node_pos); };
      AnyRefNode CCTangetNodeR11 ={ sRel = .Scale(.Data.R11.Right.CC_AlignmentNode); };
      AnyRefNode CCTangetNodeR11R10 ={ sRel = .Scale(.Data.R11.Right.CCTangetNodeR11R10); };
      AnyRefNode CCNodeR11 ={ sRel = .Scale(.Data.Thorax.Right.OEC11_CINode_pos);AnyRefNode RotNode ={ ARel=RotMat(.sRel,..CCTangetNodeR11.sRel,..CCTangetNodeR11R10.sRel);};};
      AnyRefNode CCNodeR12 ={ sRel = .Scale(.Data.R12.Right.OEC12_CINode_pos);};
      AnyFolder &DataRib =Data.R11.Right;
      #if BM_TRUNK_THORACIC_MODEL == _THORACIC_MODEL_FLEXIBLE_
      #include "ICPoints.any"  //create points for inter costal muscles
      #endif
    };

    R12Seg = {
      AnyRefNode ObliquusExternusNode = { sRel =  .Scale(.Data.R12.Right.OEC12_CINode_pos);};

      AnyRefNode IliocostalisThoracisR6R12NodeRIns = {sRel =  .Scale(.Data.R12.Right.IliocostalisThoracisR6R12Node_pos); };
      AnyRefNode LongissimusThoracisR8S3Via4NodeR    = {sRel = .Scale(.Data.R12.Right.LongissimusThoracisR8S3Via4Node_pos);};
      AnyRefNode LongissimusThoracisR9S4Via3NodeR    = {sRel = .Scale(.Data.R12.Right.LongissimusThoracisR9S4Via3Node_pos);};
      AnyRefNode LongissimusThoracisR10S3Via2NodeR = {sRel = .Scale(.Data.R12.Right.LongissimusThoracisR10S3Via2Node_pos); };
      AnyRefNode LongissimusThoracisR11S3Via1NodeR = {sRel = .Scale(.Data.R12.Right.LongissimusThoracisR11S3Via1Node_pos); };
      AnyRefNode LongissimusThoracisR12S3NodeR   = {sRel = .Scale(.Data.R12.Right.LongissimusThoracisR12S3Node_pos); };
      AnyRefNode QLC12Lat_CINode1R = {sRel = .Scale(.Data.R12.Right.QLC12Lat_CINode1_pos); };
      AnyRefNode QLC12Lat_CINode2R = {sRel = .Scale(.Data.R12.Right.QLC12Lat_CINode2_pos); };
      AnyRefNode QLC12Lat_CINode3R = {sRel = .Scale(.Data.R12.Right.QLC12Lat_CINode3_pos); };
      AnyRefNode QLC12Lat_CINode4R = {sRel = .Scale(.Data.R12.Right.QLC12Lat_CINode4_pos); };
      AnyRefNode QLC12Lat_CINode5R = {sRel = .Scale(.Data.R12.Right.QLC12Lat_CINode5_pos); };
      AnyRefNode QLC12InterMedian_CINode1R = {sRel = .Scale(.Data.R12.Right.QLC12InterMedian_CINode1_pos); };
      AnyRefNode QLC12InterMedian_CINode2R = {sRel = .Scale(.Data.R12.Right.QLC12InterMedian_CINode2_pos); };
      AnyRefNode QLC12InterMedian_CINode3R = {sRel = .Scale(.Data.R12.Right.QLC12InterMedian_CINode3_pos); };
      AnyRefNode QLC12InterMedian_CINode4R = {sRel = .Scale(.Data.R12.Right.QLC12InterMedian_CINode4_pos); };
      AnyRefNode QLC12InterMedian_CINode5R = {sRel = .Scale(.Data.R12.Right.QLC12InterMedian_CINode5_pos); };
      AnyRefNode QLC12Median_CINode1R = {sRel = .Scale(.Data.R12.Right.QLC12Median_CINode1_pos); };
      AnyRefNode QLC12Median_CINode2R = {sRel = .Scale(.Data.R12.Right.QLC12Median_CINode2_pos); };
      AnyRefNode QLC12Median_CINode3R = {sRel = .Scale(.Data.R12.Right.QLC12Median_CINode3_pos); };
      AnyRefNode QLC12Median_CINode4R = {sRel = .Scale(.Data.R12.Right.QLC12Median_CINode4_pos); };
      AnyRefNode IliocostalisLumborumR12NodeR    = {sRel = .Scale(.Data.R12.Right.IliocostalisLumborumR12Node_pos );};
      AnyRefNode IliocostalisLumborumR10Via1NodeR= {sRel = .Scale(.Data.R12.Right.IliocostalisLumborumR10Via1Node_pos );};
      AnyRefNode IliocostalisLumborumR9Via2NodeR = {sRel = .Scale(.Data.R12.Right.IliocostalisLumborumR9Via2Node_pos );};
      AnyRefNode IliocostalisLumborumR8Via3NodeR = {sRel = .Scale(.Data.R12.Right.IliocostalisLumborumR8Via3Node_pos );};
      AnyRefNode IliocostalisLumborumR7Via4NodeR = {sRel = .Scale(.Data.R12.Right.IliocostalisLumborumR7Via4Node_pos );};
      AnyRefNode IliocostalisLumborumR6Via5NodeR = {sRel = .Scale(.Data.R12.Right.IliocostalisLumborumR6Via5Node_pos );};
      AnyRefNode IliocostalisLumborumR5Via6NodeR = {sRel = .Scale(.Data.R12.Right.IliocostalisLumborumR5Via6Node_pos );};
      AnyRefNode LevatorCostarumT11R12_R_Ins  = { sRel =  .Scale(.Data.R12.Right.LevatorCostarumT11R12Ins_pos);};
      AnyRefNode LevatorCostarumT10R12_R_Ins  = { sRel =  .Scale(.Data.R12.Right.LevatorCostarumT10R12Ins_pos);};
      AnyRefNode O_serratus_posterior_inferior_R12R = {sRel = .Scale(.Data.R12.Right.O_serratus_posterior_inferior_pos);};
      AnyRefNode DiaphragmR12_1NodeR = {sRel = .Scale(.Data.R12.Right.DiaphragmR12_1Node_pos); };
      AnyRefNode DiaphragmR12_2NodeR = {sRel = .Scale(.Data.R12.Right.DiaphragmR12_2Node_pos); };
      AnyRefNode CCTangetNodeR12 ={ sRel = .Scale(.Data.R12.Right.CC_AlignmentNode); };
      AnyRefNode CCTangetNodeR12R11 ={ sRel = .Scale(.Data.R12.Right.CCTangetNodeR12R11); };
      AnyRefNode CCNodeR12 ={ sRel = .Scale(.Data.R12.Right.OEC12_CINode_pos);AnyRefNode RotNode ={ ARel=RotMat(.sRel,..CCTangetNodeR12.sRel,..CCTangetNodeR12R11.sRel);};};
      AnyFolder &DataRib =Data.R12.Right;
      #if BM_TRUNK_THORACIC_MODEL == _THORACIC_MODEL_FLEXIBLE_
      #include "ICPoints.any"  //create points for inter costal muscles
      #endif

    };

    #if BM_TRUNK_THORACIC_STERNUM_TOPOLOGY == 4
      CostalCartilageSeg = {

        AnyRefNode Mid                ={ sRel =.Scale (.Data.Sternum.MidNode_pos);};
        //----------------------------------------------CS Nodes-----------------------------------------------
        AnyRefNode CS3NodeR     ={ sRel =.Scale (.Data.Sternum.Right.CS3Node_pos);};
        AnyRefNode CS4NodeR     ={ sRel =.Scale (.Data.Sternum.Right.CS4Node_pos);};
        AnyRefNode CS5NodeR     ={ sRel =.Scale (.Data.Sternum.Right.CS5Node_pos);};
        AnyRefNode CS6NodeR     ={ sRel =.Scale (.Data.Sternum.Right.CS6Node_pos);};
        AnyRefNode CS7NodeR     ={ sRel =.Scale (.Data.Sternum.Right.CS7Node_pos);};
        AnyRefNode CS8NodeR     ={ sRel =.Scale (.Data.Sternum.Right.CS8Node_pos);};
        AnyRefNode CS9NodeR     ={ sRel =.Scale (.Data.Sternum.Right.CS9Node_pos);};
        AnyRefNode CS10NodeR    ={ sRel =.Scale (.Data.Sternum.Right.CS10Node_pos);};


          //----------------------------------------------IC Nodes-----------------------------------------------
        AnyRefNode IC3NodeR     ={ sRel =.Scale (.Data.Sternum.Right.IC3Node_pos);};
        AnyRefNode IC4NodeR     ={ sRel =.Scale (.Data.Sternum.Right.IC4Node_pos);};
        AnyRefNode IC5NodeR     ={ sRel =.Scale (.Data.Sternum.Right.IC5Node_pos);};
        AnyRefNode IC6NodeR     ={ sRel =.Scale (.Data.Sternum.Right.IC6Node_pos);};
        AnyRefNode IC7NodeR     ={ sRel =.Scale (.Data.Sternum.Right.IC7Node_pos);};
        AnyRefNode IC8NodeR     ={ sRel =.Scale (.Data.Sternum.Right.IC8Node_pos);};
        AnyRefNode IC9NodeR     ={ sRel =.Scale (.Data.Sternum.Right.IC9Node_pos);};
        AnyRefNode IC10NodeR    ={ sRel =.Scale (.Data.Sternum.Right.IC10Node_pos);};


        AnyRefNode CCTangetNodeR3R     ={ sRel =.Scale (.Data.R3.Right.CC_AlignmentNode);};
        AnyRefNode CCTangetNodeR4R       ={ sRel =.Scale (.Data.R4.Right.CC_AlignmentNode);};
        AnyRefNode CCTangetNodeR5R       ={ sRel =.Scale (.Data.R5.Right.CC_AlignmentNode);};
        AnyRefNode CCTangetNodeR6R       ={ sRel =.Scale (.Data.R6.Right.CC_AlignmentNode);};
        AnyRefNode CCTangetNodeR7R       ={ sRel =.Scale (.Data.R7.Right.CC_AlignmentNode);};
        AnyRefNode CCTangetNodeR8R       ={ sRel =.Scale (.Data.R8.Right.CC_AlignmentNode);};
        AnyRefNode CCTangetNodeR9R       ={ sRel =.Scale (.Data.R9.Right.CC_AlignmentNode);};
        AnyRefNode CCTangetNodeR10R       ={ sRel =.Scale (.Data.R10.Right.CC_AlignmentNode);};


        //----------------------------------------------CC Nodes------------------------------------------------
        AnyRefNode R3NodeR     ={ sRel =.Scale (.Data.Sternum.Right.R3Node_pos); AnyRefNode RotNode ={ ARel=RotMat(.sRel,..CCTangetNodeR3R.sRel,sRel+{0.10,0,0})*RotMat(pi/2,y)*RotMat(pi,z);};};
        AnyRefNode R4NodeR     ={ sRel =.Scale (.Data.Sternum.Right.R4Node_pos); AnyRefNode RotNode ={ ARel=RotMat(.sRel,..CCTangetNodeR4R.sRel,sRel+{0.10,0,0})*RotMat(pi/2,y)*RotMat(pi,z);};};
        AnyRefNode R5NodeR     ={ sRel =.Scale (.Data.Sternum.Right.R5Node_pos); AnyRefNode RotNode ={ ARel=RotMat(.sRel,..CCTangetNodeR5R.sRel,sRel+{0.10,0,0})*RotMat(pi/2,y)*RotMat(pi,z);};};
        AnyRefNode R6NodeR     ={ sRel =.Scale (.Data.Sternum.Right.R6Node_pos); AnyRefNode RotNode ={ ARel=RotMat(.sRel,..CCTangetNodeR6R.sRel,sRel+{0.10,0,0})*RotMat(pi/2,y)*RotMat(pi,z);};};
        AnyRefNode R7NodeR     ={ sRel =.Scale (.Data.Sternum.Right.R7Node_pos); AnyRefNode RotNode ={ ARel=RotMat(.sRel,..CCTangetNodeR7R.sRel,sRel+{0.10,0,0})*RotMat(pi/2,y)*RotMat(pi,z);};};
        AnyRefNode R8NodeR     ={ sRel =.Scale (.Data.Sternum.Right.R8Node_pos); AnyRefNode RotNode ={ ARel=RotMat(.sRel,..CCTangetNodeR8R.sRel,sRel+{0.10,0,0})*RotMat(pi/2,y)*RotMat(pi,z);};};
        AnyRefNode R9NodeR     ={ sRel =.Scale (.Data.Sternum.Right.R9Node_pos); AnyRefNode RotNode ={ ARel=RotMat(.sRel,..CCTangetNodeR9R.sRel,sRel+{0.10,0,0})*RotMat(pi/2,y)*RotMat(pi,z);};};
        AnyRefNode R10NodeR    ={ sRel =.Scale (.Data.Sternum.Right.R10Node_pos);AnyRefNode RotNode ={ ARel=RotMat(.sRel,..CCTangetNodeR10R.sRel,sRel+{0.10,0,0})*RotMat(pi/2,y)*RotMat(pi,z);};};

        AnyRefNode R3NodeRsup     ={ sRel =.Scale (.Data.Sternum.Right.R3Node_pos + {0, .Data.AllRibs.CCOffset[7],0});  };
        AnyRefNode R3NodeRinf     ={ sRel =.Scale (.Data.Sternum.Right.R3Node_pos + {0,-.Data.AllRibs.CCOffset[7],0});  };
        AnyRefNode R3NodeRpos     ={ sRel =.Scale (.Data.Sternum.Right.R3Node_pos + {-.Data.AllRibs.CCOffset[7],0,0});  };
        AnyRefNode R3NodeRant     ={ sRel =.Scale (.Data.Sternum.Right.R3Node_pos + {.Data.AllRibs.CCOffset[7],0,0});  };
        AnyRefNode R4NodeRsup     ={ sRel =.Scale (.Data.Sternum.Right.R4Node_pos + {0, .Data.AllRibs.CCOffset[6],0});  };
        AnyRefNode R4NodeRinf     ={ sRel =.Scale (.Data.Sternum.Right.R4Node_pos + {0,-.Data.AllRibs.CCOffset[6],0});  };
        AnyRefNode R4NodeRpos     ={ sRel =.Scale (.Data.Sternum.Right.R4Node_pos + {-.Data.AllRibs.CCOffset[6],0,0});  };
        AnyRefNode R4NodeRant     ={ sRel =.Scale (.Data.Sternum.Right.R4Node_pos + {.Data.AllRibs.CCOffset[6],0,0});  };
        AnyRefNode R5NodeRsup     ={ sRel =.Scale (.Data.Sternum.Right.R5Node_pos + {0, .Data.AllRibs.CCOffset[5],0});  };
        AnyRefNode R5NodeRinf     ={ sRel =.Scale (.Data.Sternum.Right.R5Node_pos + {0,-.Data.AllRibs.CCOffset[5],0});  };
        AnyRefNode R5NodeRpos     ={ sRel =.Scale (.Data.Sternum.Right.R5Node_pos + {-.Data.AllRibs.CCOffset[5],0,0});  };
        AnyRefNode R5NodeRant     ={ sRel =.Scale (.Data.Sternum.Right.R5Node_pos + {.Data.AllRibs.CCOffset[5],0,0});  };
        AnyRefNode R6NodeRsup     ={ sRel =.Scale (.Data.Sternum.Right.R6Node_pos + {0, .Data.AllRibs.CCOffset[4],0});  };
        AnyRefNode R6NodeRinf     ={ sRel =.Scale (.Data.Sternum.Right.R6Node_pos + {0,-.Data.AllRibs.CCOffset[4],0});  };
        AnyRefNode R6NodeRpos     ={ sRel =.Scale (.Data.Sternum.Right.R6Node_pos + {-.Data.AllRibs.CCOffset[4],0,0});  };
        AnyRefNode R6NodeRant     ={ sRel =.Scale (.Data.Sternum.Right.R6Node_pos + {.Data.AllRibs.CCOffset[4],0,0});  };
        AnyRefNode R7NodeRsup     ={ sRel =.Scale (.Data.Sternum.Right.R7Node_pos + {0, .Data.AllRibs.CCOffset[3],0});  };
        AnyRefNode R7NodeRinf     ={ sRel =.Scale (.Data.Sternum.Right.R7Node_pos + {0,-.Data.AllRibs.CCOffset[3],0});  };
        AnyRefNode R7NodeRpos     ={ sRel =.Scale (.Data.Sternum.Right.R7Node_pos + {-.Data.AllRibs.CCOffset[3],0,0});  };
        AnyRefNode R7NodeRant     ={ sRel =.Scale (.Data.Sternum.Right.R7Node_pos + {.Data.AllRibs.CCOffset[3],0,0});  };
        AnyRefNode R8NodeRsup     ={ sRel =.Scale (.Data.Sternum.Right.R8Node_pos + {0, .Data.AllRibs.CCOffset[2],0});  };
        AnyRefNode R8NodeRinf     ={ sRel =.Scale (.Data.Sternum.Right.R8Node_pos + {0,-.Data.AllRibs.CCOffset[2],0});  };
        AnyRefNode R8NodeRpos     ={ sRel =.Scale (.Data.Sternum.Right.R8Node_pos + {-.Data.AllRibs.CCOffset[2],0,0});  };
        AnyRefNode R8NodeRant     ={ sRel =.Scale (.Data.Sternum.Right.R8Node_pos + {.Data.AllRibs.CCOffset[2],0,0});  };
        AnyRefNode R9NodeRsup     ={ sRel =.Scale (.Data.Sternum.Right.R9Node_pos + {0, .Data.AllRibs.CCOffset[1],0});  };
        AnyRefNode R9NodeRinf     ={ sRel =.Scale (.Data.Sternum.Right.R9Node_pos + {0,-.Data.AllRibs.CCOffset[1],0});  };
        AnyRefNode R9NodeRpos     ={ sRel =.Scale (.Data.Sternum.Right.R9Node_pos + {-.Data.AllRibs.CCOffset[1],0,0});  };
        AnyRefNode R9NodeRant     ={ sRel =.Scale (.Data.Sternum.Right.R9Node_pos + {.Data.AllRibs.CCOffset[1],0,0});  };
        AnyRefNode R10NodeRsup     ={ sRel =.Scale (.Data.Sternum.Right.R10Node_pos + {0, .Data.AllRibs.CCOffset[0],0});  };
        AnyRefNode R10NodeRinf     ={ sRel =.Scale (.Data.Sternum.Right.R10Node_pos + {0,-.Data.AllRibs.CCOffset[0],0});  };
        AnyRefNode R10NodeRpos     ={ sRel =.Scale (.Data.Sternum.Right.R10Node_pos + {-.Data.AllRibs.CCOffset[0],0,0});  };
        AnyRefNode R10NodeRant     ={ sRel =.Scale (.Data.Sternum.Right.R10Node_pos + {.Data.AllRibs.CCOffset[0],0,0});  };
        AnyRefNode RACP_CO6Node= {sRel = .Scale(.Data.Sternum.RACP_CO6Node_pos);};
        AnyRefNode TransversusThoracisR2StNodeRIns         = {sRel = .Scale(.Data.Sternum.Right.TransversusThoracisR2StNode_pos);};
        AnyRefNode TransversusThoracisR3StNodeRIns         = {sRel = .Scale(.Data.Sternum.Right.TransversusThoracisR3StNode_pos);};
        AnyRefNode TransversusThoracisR4StNodeRIns         = {sRel = .Scale(.Data.Sternum.Right.TransversusThoracisR4StNode_pos);};
        AnyRefNode TransversusThoracisR5StNodeRIns         = {sRel = .Scale(.Data.Sternum.Right.TransversusThoracisR5StNode_pos);};
        AnyRefNode TransversusThoracisR6StNodeRIns         = {sRel = .Scale(.Data.Sternum.Right.TransversusThoracisR6StNode_pos);};
        AnyRefNode TransversusThoracisNodeRIns= {sRel = .Scale(.Data.Sternum.Right.TransversusThoracisNode_pos);};
        AnyRefNode ObliquusInternus_1 = {sRel = .Scale(.Data.Sternum.Right.OICI_C9Node_pos);};
        AnyRefNode ObliquusInternus_2 =  {sRel = .Scale(.Data.Sternum.Right.OICI_C8Node_pos);};

        Right = {
          Torus3PointOuterFit ObliquusWrapping() = {
            P1 = ..CS10NodeR.sRel;
            P2 = ..DiaphragmCC_6R.sRel;
            P3 = .ObliquusInternusNode_2.sRel;
          };
        };
        Left = {
          Torus3PointOuterFit ObliquusWrapping() = {
            P1 = ..CS10NodeL.sRel;
            P2 = ..DiaphragmCC_6L.sRel;
            P3 = .ObliquusInternusNode_2.sRel;
          };
        };
        AnyRefNode DiaphragmXiphoidNodeR = {sRel = .Scale(.Data.Sternum.Right.DiaphragmXiphoidNode_pos); };
        AnyRefNode DiaphragmCC_1R = {sRel = .Scale(.Data.Sternum.Right.DiaphragmCC_1_pos); };
        AnyRefNode DiaphragmCC_2R = {sRel = .Scale(.Data.Sternum.Right.DiaphragmCC_2_pos); };
        AnyRefNode DiaphragmCC_3R = {sRel = .Scale(.Data.Sternum.Right.DiaphragmCC_3_pos); };
        AnyRefNode DiaphragmCC_4R = {sRel = .Scale(.Data.Sternum.Right.DiaphragmCC_4_pos); };
        AnyRefNode DiaphragmCC_5R = {sRel = .Scale(.Data.Sternum.Right.DiaphragmCC_5_pos); };
        AnyRefNode DiaphragmCC_6R = {sRel = .Scale(.Data.Sternum.Right.DiaphragmCC_6_pos); };
        AnyRefNode DiaphragmCC_7R = {sRel = .Scale(.Data.Sternum.Right.DiaphragmCC_7_pos); };
        AnyRefNode Right_IntercostalisInternusR3R4_elem_sternum = {sRel = .Scale(.Data.Sternum.Right.IntercostalisInternusR3R4_elem_sternum_pos); };
        AnyRefNode Right_IntercostalisInternusR4R5_elem_sternum = {sRel = .Scale(.Data.Sternum.Right.IntercostalisInternusR4R5_elem_sternum_pos); };
        AnyRefNode Right_IntercostalisInternusR5R6_elem_sternum = {sRel = .Scale(.Data.Sternum.Right.IntercostalisInternusR5R6_elem_sternum_pos); };
        AnyRefNode Right_IntercostalisInternusR6R7_elem_sternum = {sRel = .Scale(.Data.Sternum.Right.IntercostalisInternusR6R7_elem_sternum_pos); };
        AnyRefNode Right_IntercostalisInternusR7R8_elem_sternum = {sRel = .Scale(.Data.Sternum.Right.IntercostalisInternusR7R8_elem_sternum_pos); };
        AnyRefNode Right_IntercostalisInternusR8R9_elem_sternum = {sRel = .Scale(.Data.Sternum.Right.IntercostalisInternusR8R9_elem_sternum_pos); };
        AnyRefNode Right_IntercostalisInternusR9R10_elem_sternum = {sRel = .Scale(.Data.Sternum.Right.IntercostalisInternusR9R10_elem_sternum_pos); };

      };
    #endif
  };
  Left = {
    R1Seg= {
      AnyRefNode IliocostalisThoracisC7R7Via1NodeL = { sRel =  .Scale(.Data.R1.Left.IliocostalisThoracisC7R7Via1Node_pos); };
      AnyRefNode IliocostalisThoracisR1R7NodeLOrg  = { sRel =  .Scale(.Data.R1.Left.IliocostalisThoracisR1R7Node_pos); };
      AnyRefNode IliocostalisCervicisR3C4Via2Node= { sRel =  .Scale(.Data.R1.Left.IliocostalisCervicisR3C4Via2Node_pos);};
      AnyRefNode IliocostalisCervicisR4C5Via2Node= { sRel =  .Scale(.Data.R1.Left.IliocostalisCervicisR4C5Via2Node_pos);};
      AnyRefNode IliocostalisCervicisR5C6Via2Node= { sRel =  .Scale(.Data.R1.Left.IliocostalisCervicisR5C6Via2Node_pos);};
      AnyRefNode IliocostalisCervicisR6C4Via2Node= { sRel =  .Scale(.Data.R1.Left.IliocostalisCervicisR6C4Via2Node_pos);};
      AnyRefNode ScalenusAnteriorR1C6Node = { sRel =  .Scale(.Data.R1.Left.ScalenusAnteriorR1C6NodeIns_pos);};
      AnyRefNode ScalenusAnteriorR1C5Node = { sRel =  .Scale(.Data.R1.Left.ScalenusAnteriorR1C5NodeIns_pos);};
      AnyRefNode ScalenusAnteriorR1C4Node = { sRel =  .Scale(.Data.R1.Left.ScalenusAnteriorR1C4NodeIns_pos);};
      AnyRefNode ScalenusAnteriorR1C3Node = { sRel =  .Scale(.Data.R1.Left.ScalenusAnteriorR1C3NodeIns_pos);};
      AnyRefNode ScalenusMediusR1C7Node   = { sRel =  .Scale(.Data.R1.Left.ScalenusMediusR1C7NodeIns_pos);};
      AnyRefNode ScalenusMediusR1C6Node   = { sRel =  .Scale(.Data.R1.Left.ScalenusMediusR1C6NodeIns_pos);};
      AnyRefNode ScalenusMediusR1C5Node   = { sRel =  .Scale(.Data.R1.Left.ScalenusMediusR1C5NodeIns_pos);};
      AnyRefNode ScalenusMediusR1C4Node   = { sRel =  .Scale(.Data.R1.Left.ScalenusMediusR1C4NodeIns_pos);};
      AnyRefNode ScalenusMediusR1C3Node   = { sRel =  .Scale(.Data.R1.Left.ScalenusMediusR1C3NodeIns_pos);};
      AnyRefNode ScalenusMediusR1C2Node   = { sRel =  .Scale(.Data.R1.Left.ScalenusMediusR1C2NodeIns_pos);};
      AnyRefNode LevatorCostarumC7R1_L_Ins   = { sRel =  .Scale(.Data.R1.Left.LevatorCostarumC7R1Ins_pos);};
      AnyRefNode SubcostalisR1R3_L_Org     = { sRel =  .Scale(.Data.R1.Left.SubcostalisR1R3Org_pos);};
      AnyRefNode SubcostalisR1R4_L_Org     = { sRel =  .Scale(.Data.R1.Left.SubcostalisR1R4Org_pos);};
      AnyRefNode O_serratus_anterior_8L = {sRel = .Scale(.Data.R1.Left.O_serratus_anterior_pos); };
      AnyFolder &DataRib =Data.R1.Left;
      #if BM_TRUNK_THORACIC_MODEL == _THORACIC_MODEL_FLEXIBLE_
      #include "ICPoints.any"  //create points for inter costal muscles
      #endif

    };

    R2Seg= {
      AnyRefNode IliocostalisThoracisC7R7Via2NodeL = { sRel =  .Scale(.Data.R2.Left.IliocostalisThoracisC7R7Via2Node_pos);};
      AnyRefNode IliocostalisThoracisR1R7Via1NodeL = { sRel =  .Scale(.Data.R2.Left.IliocostalisThoracisR1R7Via1Node_pos);};
      AnyRefNode IliocostalisThoracisR2R8NodeLOrg  = { sRel =  .Scale(.Data.R2.Left.IliocostalisThoracisR2R8Node_pos);};
      AnyRefNode ScalenusPosteriorR2C7Node= { sRel =  .Scale(.Data.R2.Left.ScalenusPosteriorR2C7NodeIns_pos);};
      AnyRefNode ScalenusPosteriorR2C6Node= { sRel =  .Scale(.Data.R2.Left.ScalenusPosteriorR2C6NodeIns_pos);};
      AnyRefNode ScalenusPosteriorR2C5Node= { sRel =  .Scale(.Data.R2.Left.ScalenusPosteriorR2C5NodeIns_pos);};
      AnyRefNode TransversusThoracisR2StNodeLOrg  = { sRel =  .Scale(.Data.R2.Left.TransversusThoracisR2StNodeOrg_pos);};
      AnyRefNode TransversusThoracisR2R4NodeLOrg = { sRel =  .Scale(.Data.R2.Left.TransversusThoracisR2R4NodeOrg_pos);};
      AnyRefNode LevatorCostarumT1R2_L_Ins   = { sRel =  .Scale(.Data.R2.Left.LevatorCostarumT1R2Ins_pos);};
      AnyRefNode SubcostalisR2R4_L_Org     = { sRel =  .Scale(.Data.R2.Left.SubcostalisR2R4Org_pos);};
      AnyRefNode SubcostalisR2R5_L_Org     = { sRel =  .Scale(.Data.R2.Left.SubcostalisR2R5Org_pos);};
      AnyRefNode O_serratus_anterior_7L = {sRel = .Scale(.Data.R2.Left.O_serratus_anterior_pos); };
      AnyRefNode O_serratus_posterior_superior_1L = {sRel = .Scale(.Data.R2.Left.O_serratus_posterior_superior_pos); };
      AnyRefNode IntercostalisInternusR1R2_elem_sternum = {sRel = .Scale(.Data.R2.Left.IntercostalisInternusR1R2_elem_sternum_pos); };
      AnyFolder &DataRib =Data.R2.Left;
      #if BM_TRUNK_THORACIC_MODEL == _THORACIC_MODEL_FLEXIBLE_
      #include "ICPoints.any"  //create points for inter costal muscles
      #endif
    };

    R3Seg= {
      AnyRefNode LongissimusThoracisR3L3NodeL  = { sRel =  .Scale(.Data.Thorax.Left.LongissimusThoracisR3L3Node_pos);  };
      AnyRefNode IliocostalisThoracisC7R7Via3NodeL= { sRel =  .Scale(.Data.R3.Left.IliocostalisThoracisC7R7Via3Node_pos);  };
      AnyRefNode IliocostalisThoracisR1R7Via2NodeL= { sRel =  .Scale(.Data.R3.Left.IliocostalisThoracisR1R7Via2Node_pos);  };
      AnyRefNode IliocostalisThoracisR2R8Via1NodeL= { sRel =  .Scale(.Data.R3.Left.IliocostalisThoracisR2R8Via1Node_pos);  };
      AnyRefNode IliocostalisThoracisR3R9NodeLOrg = { sRel =  .Scale(.Data.R3.Left.IliocostalisThoracisR3R9Node_pos);  };
      AnyRefNode IliocostalisCervicisR3C4Node   = { sRel =  .Scale(.Data.R3.Left.IliocostalisCervicisR3C4Node_pos);};
      AnyRefNode IliocostalisCervicisR4C5Via3Node= {sRel =  .Scale(.Data.R3.Left.IliocostalisCervicisR4C5Via3Node_pos);};
      AnyRefNode IliocostalisCervicisR5C6Via3Node= {sRel =  .Scale(.Data.R3.Left.IliocostalisCervicisR5C6Via3Node_pos);};
      AnyRefNode IliocostalisCervicisR6C4Via3Node= {sRel =  .Scale(.Data.R3.Left.IliocostalisCervicisR6C4Via3Node_pos);};
      AnyRefNode TransversusThoracisR3StNodeLOrg  = { sRel =  .Scale(.Data.R3.Left.TransversusThoracisR3StNodeOrg_pos);};
      AnyRefNode TransversusThoracisR3R5NodeLOrg = { sRel =  .Scale(.Data.R3.Left.TransversusThoracisR3R5NodeOrg_pos);};
      AnyRefNode LevatorCostarumT2R3_L_Ins   = { sRel =  .Scale(.Data.R3.Left.LevatorCostarumT2R3Ins_pos);};
      AnyRefNode SubcostalisR1R3_L_Ins     = { sRel =  .Scale(.Data.R3.Left.SubcostalisR1R3Ins_pos);};
      AnyRefNode SubcostalisR3R5_L_Org     = { sRel =  .Scale(.Data.R3.Left.SubcostalisR3R5Org_pos);};
      AnyRefNode SubcostalisR3R6_L_Org     = { sRel =  .Scale(.Data.R3.Left.SubcostalisR3R6Org_pos);};
      AnyRefNode O_serratus_anterior_6L = {sRel = .Scale(.Data.R3.Left.O_serratus_anterior_pos); };
      AnyRefNode O_serratus_posterior_superior_2L = {sRel = .Scale(.Data.R3.Left.O_serratus_posterior_superior_pos); };
      AnyRefNode IntercostalisInternusR2R3_elem_sternum = {sRel = .Scale(.Data.R3.Left.IntercostalisInternusR2R3_elem_sternum_pos); };
      AnyFolder &DataRib =Data.R3.Left;
      #if BM_TRUNK_THORACIC_MODEL == _THORACIC_MODEL_FLEXIBLE_
      #include "ICPoints.any"  //create points for inter costal muscles
      #endif
 };

    R4Seg= {
      AnyRefNode LongissimusThoracisR3L3Via1NodeL= { sRel =  .Scale(.Data.Thorax.Left.LongissimusThoracisR3L3Via1Node_pos);};
      AnyRefNode LongissimusThoracisR4L4NodeL    = { sRel =  .Scale(.Data.Thorax.Left.LongissimusThoracisR4L4Node_pos);};
      AnyRefNode IliocostalisThoracisC7R7Via4NodeL  = { sRel =  .Scale(.Data.R4.Left.IliocostalisThoracisC7R7Via4Node_pos);};
      AnyRefNode IliocostalisThoracisR1R7Via3NodeL  = { sRel =  .Scale(.Data.R4.Left.IliocostalisThoracisR1R7Via3Node_pos);};
      AnyRefNode IliocostalisThoracisR2R8Via2NodeL  = { sRel =  .Scale(.Data.R4.Left.IliocostalisThoracisR2R8Via2Node_pos);};
      AnyRefNode IliocostalisThoracisR3R9Via1NodeL  = { sRel =  .Scale(.Data.R4.Left.IliocostalisThoracisR3R9Via1Node_pos);};
      AnyRefNode IliocostalisThoracisR4R10NodeLOrg  = { sRel =  .Scale(.Data.R4.Left.IliocostalisThoracisR4R10Node_pos);};
      AnyRefNode IliocostalisCervicisR4C5Node     = { sRel =  .Scale(.Data.R4.Left.IliocostalisCervicisR4C5Node_pos);};
      AnyRefNode IliocostalisCervicisR5C6Via4Node = { sRel =  .Scale(.Data.R4.Left.IliocostalisCervicisR5C6Via4Node_pos);};
      AnyRefNode IliocostalisCervicisR6C4Via4Node = { sRel =  .Scale(.Data.R4.Left.IliocostalisCervicisR6C4Via4Node_pos);};
      AnyRefNode TransversusThoracisR4StNodeLOrg  = { sRel =  .Scale(.Data.R4.Left.TransversusThoracisR4StNodeOrg_pos);};
      AnyRefNode TransversusThoracisR4R6NodeLOrg = { sRel =  .Scale(.Data.R4.Left.TransversusThoracisR4R6NodeOrg_pos);};
      AnyRefNode TransversusThoracisR2R4NodeLIns = { sRel =  .Scale(.Data.R4.Left.TransversusThoracisR2R4NodeIns_pos);};
      AnyRefNode LevatorCostarumT3R4_L_Ins   = { sRel =  .Scale(.Data.R4.Left.LevatorCostarumT3R4Ins_pos);};
      AnyRefNode SubcostalisR1R4_L_Ins     = { sRel =  .Scale(.Data.R4.Left.SubcostalisR1R4Ins_pos);};
      AnyRefNode SubcostalisR2R4_L_Ins     = { sRel =  .Scale(.Data.R4.Left.SubcostalisR2R4Ins_pos);};
      AnyRefNode SubcostalisR4R6_L_Org     = { sRel =  .Scale(.Data.R4.Left.SubcostalisR4R6Org_pos);};
      AnyRefNode SubcostalisR4R7_L_Org     = { sRel =  .Scale(.Data.R4.Left.SubcostalisR4R7Org_pos);};
      AnyRefNode O_serratus_anterior_5L = {sRel = .Scale(.Data.R4.Left.O_serratus_anterior_pos);};
      AnyRefNode O_serratus_posterior_superior_3L = {sRel = .Scale(.Data.R4.Left.O_serratus_posterior_superior_pos);};
      AnyRefNode IntercostalisInternusR3R4_elem_sternum = {sRel = .Scale(.Data.R4.Left.IntercostalisInternusR3R4_elem_sternum_pos); };
      AnyFolder &DataRib =Data.R4.Left;
      #if BM_TRUNK_THORACIC_MODEL == _THORACIC_MODEL_FLEXIBLE_
      #include "ICPoints.any"  //create points for inter costal muscles
      #endif
    };

    R5Seg= {
      AnyRefNode IC_R5_Ant_L_Ins = {sRel = .Scale(.Data.R5.Left.IC_AntIns_pos);};
      AnyRefNode LongissimusThoracisR3L3Via2NodeL= { sRel =  .Scale(.Data.Thorax.Left.LongissimusThoracisR3L3Via2Node_pos);};
      AnyRefNode LongissimusThoracisR4L4Via1NodeL= { sRel =  .Scale(.Data.Thorax.Left.LongissimusThoracisR4L4Via1Node_pos);};
      AnyRefNode LongissimusThoracisR5L5NodeL    = { sRel =  .Scale(.Data.Thorax.Left.LongissimusThoracisR5L5Node_pos);};
      AnyRefNode IliocostalisLumborumR5NodeL  = { sRel =  .Scale(.Data.Thorax.Left.IliocostalisLumborumR5Node_pos);};
      AnyRefNode IliocostalisThoracisC7R7Via5NodeL  = { sRel =  .Scale(.Data.R5.Left.IliocostalisThoracisC7R7Via5Node_pos);};
      AnyRefNode IliocostalisThoracisR1R7Via4NodeL  = { sRel =  .Scale(.Data.R5.Left.IliocostalisThoracisR1R7Via4Node_pos);};
      AnyRefNode IliocostalisThoracisR2R8Via3NodeL  = { sRel =  .Scale(.Data.R5.Left.IliocostalisThoracisR2R8Via3Node_pos);};
      AnyRefNode IliocostalisThoracisR3R9Via2NodeL  = { sRel =  .Scale(.Data.R5.Left.IliocostalisThoracisR3R9Via2Node_pos);};
      AnyRefNode IliocostalisThoracisR4R10Via1NodeL = { sRel =  .Scale(.Data.R5.Left.IliocostalisThoracisR4R10Via1Node_pos);};
      AnyRefNode IliocostalisThoracisR5R11NodeLOrg  = { sRel =  .Scale(.Data.R5.Left.R5IliocostalisThoracisR5R11Node_pos);};
      AnyRefNode IliocostalisCervicisR5C6Node     = { sRel =  .Scale(.Data.R5.Left.IliocostalisCervicisR5C6Node_pos);};
      AnyRefNode IliocostalisCervicisR6C4Via5Node = { sRel =  .Scale(.Data.R5.Left.IliocostalisCervicisR6C4Via5Node_pos);};
      AnyRefNode TransversusThoracisR5StNodeLOrg  = { sRel =  .Scale(.Data.R5.Left.TransversusThoracisR5StNodeOrg_pos);};
      AnyRefNode TransversusThoracisR3R5NodeLIns = { sRel =  .Scale(.Data.R5.Left.TransversusThoracisR3R5NodeIns_pos);};
      AnyRefNode TransversusThoracisR5R7NodeLOrg = { sRel =  .Scale(.Data.R5.Left.TransversusThoracisR5R7NodeOrg_pos);};
      AnyRefNode LevatorCostarumT4R5_L_Ins   = { sRel =  .Scale(.Data.R5.Left.LevatorCostarumT4R5Ins_pos);};
      AnyRefNode SubcostalisR2R5_L_Ins     = { sRel =  .Scale(.Data.R5.Left.SubcostalisR2R5Ins_pos);};
      AnyRefNode SubcostalisR3R5_L_Ins     = { sRel =  .Scale(.Data.R5.Left.SubcostalisR3R5Ins_pos);};
      AnyRefNode SubcostalisR5R7_L_Org     = { sRel =  .Scale(.Data.R5.Left.SubcostalisR5R7Org_pos);};
      AnyRefNode SubcostalisR5R8_L_Org     = { sRel =  .Scale(.Data.R5.Left.SubcostalisR5R8Org_pos);};
      AnyRefNode O_serratus_anterior_4L = {sRel = .Scale(.Data.R5.Left.O_serratus_anterior_pos);};
      AnyRefNode O_serratus_posterior_superior_4L = {sRel = .Scale(.Data.R5.Left.O_serratus_posterior_superior_pos);};
      AnyRefNode IntercostalisInternusR4R5_elem_sternum = {sRel = .Scale(.Data.R5.Left.IntercostalisInternusR4R5_elem_sternum_pos); };
      AnyFolder &DataRib =Data.R5.Left;
      #if BM_TRUNK_THORACIC_MODEL == _THORACIC_MODEL_FLEXIBLE_
      #include "ICPoints.any"  //create points for inter costal muscles
      #endif
 };

    R6Seg= {
      AnyRefNode LongissimusThoracisR3L3Via3NodeL   = { sRel =  .Scale(.Data.Thorax.Left.LongissimusThoracisR3L3Via3Node_pos);};
      AnyRefNode LongissimusThoracisR4L4Via2NodeL   = { sRel =  .Scale(.Data.Thorax.Left.LongissimusThoracisR4L4Via2Node_pos);};
      AnyRefNode LongissimusThoracisR5L5Via1NodeL   = { sRel =  .Scale(.Data.Thorax.Left.LongissimusThoracisR5L5Via1Node_pos);};
      AnyRefNode LongissimusThoracisR6S1NodeL       = { sRel =  .Scale(.Data.Thorax.Left.LongissimusThoracisR6S1Node_pos);};
      AnyRefNode IliocostalisLumborumR5Via1NodeL = { sRel =  .Scale(.Data.Thorax.Left.IliocostalisLumborumR5Via1Node_pos);};
      AnyRefNode IliocostalisLumborumR6NodeL     = { sRel =  .Scale(.Data.Thorax.Left.IliocostalisLumborumR6Node_pos);};
      AnyRefNode ObliquusExternusNode        = { sRel =  .Scale(.Data.Thorax.Left.OEC6_RSNode_pos);};
      AnyRefNode IliocostalisThoracisC7R7Via6NodeL     = { sRel =  .Scale(.Data.R6.Left.IliocostalisThoracisC7R7Via6Node_pos);};
      AnyRefNode IliocostalisThoracisR1R7Via5NodeL     = { sRel =  .Scale(.Data.R6.Left.IliocostalisThoracisR1R7Via5Node_pos);};
      AnyRefNode IliocostalisThoracisR2R8Via4NodeL     = { sRel =  .Scale(.Data.R6.Left.IliocostalisThoracisR2R8Via4Node_pos);};
      AnyRefNode IliocostalisThoracisR3R9Via3NodeL     = { sRel =  .Scale(.Data.R6.Left.IliocostalisThoracisR3R9Via3Node_pos);};
      AnyRefNode IliocostalisThoracisR4R10Via2NodeL    = { sRel =  .Scale(.Data.R6.Left.IliocostalisThoracisR4R10Via2Node_pos);};
      AnyRefNode IliocostalisThoracisR5R11Via1NodeL    = { sRel =  .Scale(.Data.R6.Left.IliocostalisThoracisR5R11Via1Node_pos);};
      AnyRefNode IliocostalisThoracisR6R12NodeL        = { sRel =  .Scale(.Data.R6.Left.R6IliocostalisThoracisR6R12Node_pos);};
      AnyRefNode IliocostalisCervicisR6C4Node     = { sRel =  .Scale(.Data.R6.Left.IliocostalisCervicisR6C4Node_pos);};
      AnyRefNode TransversusThoracisR6StNodeLOrg  = { sRel =  .Scale(.Data.R6.Left.TransversusThoracisR6StNodeOrg_pos);};
      AnyRefNode TransversusThoracisR4R6NodeLIns = { sRel =  .Scale(.Data.R6.Left.TransversusThoracisR4R6NodeIns_pos);};
      AnyRefNode LevatorCostarumT5R6_L_Ins   = { sRel =  .Scale(.Data.R6.Left.LevatorCostarumT5R6Ins_pos);};
      AnyRefNode SubcostalisR3R6_L_Ins     = { sRel =  .Scale(.Data.R6.Left.SubcostalisR3R6Ins_pos);};
      AnyRefNode SubcostalisR4R6_L_Ins     = { sRel =  .Scale(.Data.R6.Left.SubcostalisR4R6Ins_pos);};
      AnyRefNode SubcostalisR6R8_L_Org     = { sRel =  .Scale(.Data.R6.Left.SubcostalisR6R8Org_pos);};
      AnyRefNode SubcostalisR6R9_L_Org     = { sRel =  .Scale(.Data.R6.Left.SubcostalisR6R9Org_pos);};
      AnyRefNode O_serratus_anterior_3L = {sRel = .Scale(.Data.R6.Left.O_serratus_anterior_pos); };
      AnyRefNode IntercostalisInternusR5R6_elem_sternum = {sRel = .Scale(.Data.R6.Left.IntercostalisInternusR5R6_elem_sternum_pos); };
      AnyFolder &DataRib =Data.R6.Left;
      #if BM_TRUNK_THORACIC_MODEL == _THORACIC_MODEL_FLEXIBLE_
      #include "ICPoints.any"  //create points for inter costal muscles
      #endif
  };

    R7Seg= {
      AnyRefNode IliocostalisLumborumR7NodeL       = { sRel =  .Scale(.Data.Thorax.Left.IliocostalisLumborumR7Node_pos);};
      AnyRefNode LongissimusThoracisR3L3Via4NodeL   = { sRel =  .Scale(.Data.Thorax.Left.LongissimusThoracisR3L3Via4Node_pos);};
      AnyRefNode LongissimusThoracisR4L4Via3NodeL   = { sRel =  .Scale(.Data.Thorax.Left.LongissimusThoracisR4L4Via3Node_pos);};
      AnyRefNode LongissimusThoracisR5L5Via2NodeL   = { sRel =  .Scale(.Data.Thorax.Left.LongissimusThoracisR5L5Via2Node_pos);};
      AnyRefNode LongissimusThoracisR6S1Via1NodeL   = { sRel =  .Scale(.Data.Thorax.Left.LongissimusThoracisR6S1Via1Node_pos);};
      AnyRefNode LongissimusThoracisR7S2NodeL       = { sRel =  .Scale(.Data.Thorax.Left.LongissimusThoracisR7S2Node_pos);};
      AnyRefNode IliocostalisLumborumR5Via2NodeL = { sRel =  .Scale(.Data.Thorax.Left.IliocostalisLumborumR5Via2Node_pos);};
      AnyRefNode IliocostalisLumborumR6Via1NodeL = { sRel =  .Scale(.Data.Thorax.Left.IliocostalisLumborumR6Via1Node_pos);};
      AnyRefNode ObliquusExternusNode        = { sRel =  .Scale(.Data.Thorax.Left.OEC7_RSNode_pos);};
      AnyRefNode IliocostalisThoracisC7R7NodeLIns      = { sRel =  .Scale(.Data.R7.Left.IliocostalisThoracisC7R7Node_posIns);};
      AnyRefNode IliocostalisThoracisR1R7NodeLIns      = { sRel =  .Scale(.Data.R7.Left.IliocostalisThoracisR1R7Node_posIns);};
      AnyRefNode IliocostalisThoracisR2R8Via5NodeL     = { sRel =  .Scale(.Data.R7.Left.IliocostalisThoracisR2R8Via5Node_pos);};
      AnyRefNode IliocostalisThoracisR3R9Via4NodeL     = { sRel =  .Scale(.Data.R7.Left.IliocostalisThoracisR3R9Via4Node_pos);};
      AnyRefNode IliocostalisThoracisR4R10Via3NodeL    = { sRel =  .Scale(.Data.R7.Left.IliocostalisThoracisR4R10Via3Node_pos);};
      AnyRefNode IliocostalisThoracisR5R11Via2NodeL    = { sRel =  .Scale(.Data.R7.Left.IliocostalisThoracisR5R11Via2Node_pos);};
      AnyRefNode IliocostalisThoracisR6R12Via1NodeL    = { sRel =  .Scale(.Data.R7.Left.IliocostalisThoracisR6R12Via1Node_pos);};
      AnyRefNode TransversusThoracisR5R7NodeLIns = { sRel =  .Scale(.Data.R7.Left.TransversusThoracisR5R7NodeIns_pos);};
      AnyRefNode TransversusThoracisR7StNodeLOrg  = { sRel =  .Scale(.Data.R7.Left.TransversusThoracisR7StNodeOrg_pos);};
      AnyRefNode LevatorCostarumT6R7_L_Ins   = { sRel =  .Scale(.Data.R7.Left.LevatorCostarumT6R7Ins_pos);};
      AnyRefNode LevatorCostarumT5R7_L_Ins   = { sRel =  .Scale(.Data.R7.Left.LevatorCostarumT5R7Ins_pos);};
      AnyRefNode SubcostalisR4R7_L_Ins     = { sRel =  .Scale(.Data.R7.Left.SubcostalisR4R7Ins_pos);};
      AnyRefNode SubcostalisR5R7_L_Ins     = { sRel =  .Scale(.Data.R7.Left.SubcostalisR5R7Ins_pos);};
      AnyRefNode SubcostalisR7R9_L_Org     = { sRel =  .Scale(.Data.R7.Left.SubcostalisR7R9Org_pos);};
      AnyRefNode SubcostalisR7R10_L_Org    = { sRel =  .Scale(.Data.R7.Left.SubcostalisR7R10Org_pos);};
      AnyRefNode O_serratus_anterior_2L = {sRel = .Scale(.Data.R7.Left.O_serratus_anterior_pos);};
      AnyRefNode IntercostalisInternusR6R7_elem_sternum = {sRel = .Scale(.Data.R7.Left.IntercostalisInternusR6R7_elem_sternum_pos); };
      AnyFolder &DataRib =Data.R7.Left;
      #if BM_TRUNK_THORACIC_MODEL == _THORACIC_MODEL_FLEXIBLE_
      #include "ICPoints.any"  //create points for inter costal muscles
      #endif
  };

    R8Seg= {
      AnyRefNode IliocostalisLumborumR7Via1NodeL   = { sRel =  .Scale(.Data.Thorax.Left.IliocostalisLumborumR7Via1Node_pos);};
      AnyRefNode IliocostalisLumborumR8NodeL       = { sRel =  .Scale(.Data.Thorax.Left.IliocostalisLumborumR8Node_pos);};
      AnyRefNode LongissimusThoracisR3L3Via5NodeL   = { sRel =  .Scale(.Data.Thorax.Left.LongissimusThoracisR3L3Via5Node_pos);};
      AnyRefNode LongissimusThoracisR4L4Via4NodeL   = { sRel =  .Scale(.Data.Thorax.Left.LongissimusThoracisR4L4Via4Node_pos);};
      AnyRefNode LongissimusThoracisR5L5Via3NodeL   = { sRel =  .Scale(.Data.Thorax.Left.LongissimusThoracisR5L5Via3Node_pos);};
      AnyRefNode LongissimusThoracisR6S1Via2NodeL   = { sRel =  .Scale(.Data.Thorax.Left.LongissimusThoracisR6S1Via2Node_pos);};
      AnyRefNode LongissimusThoracisR7S2Via1NodeL   = { sRel =  .Scale(.Data.Thorax.Left.LongissimusThoracisR7S2Via1Node_pos);};
      AnyRefNode LongissimusThoracisR8S3NodeL       = { sRel =  .Scale(.Data.Thorax.Left.LongissimusThoracisR8S3Node_pos);};
      AnyRefNode IliocostalisLumborumR5Via3NodeL = { sRel =  .Scale(.Data.Thorax.Left.IliocostalisLumborumR5Via3Node_pos);};
      AnyRefNode IliocostalisLumborumR6Via2NodeL = { sRel =  .Scale(.Data.Thorax.Left.IliocostalisLumborumR6Via2Node_pos);};
      AnyRefNode ObliquusExternusNode        = { sRel =  .Scale(.Data.Thorax.Left.OEC8_RSNode_pos);};
      AnyRefNode IliocostalisThoracisR2R8NodeLIns      = { sRel =  .Scale(.Data.R8.Left.IliocostalisThoracisR2R8Node_posIns);};
      AnyRefNode IliocostalisThoracisR3R9Via5NodeL     = { sRel =  .Scale(.Data.R8.Left.IliocostalisThoracisR3R9Via5Node_pos);};
      AnyRefNode IliocostalisThoracisR4R10Via4NodeL    = { sRel =  .Scale(.Data.R8.Left.IliocostalisThoracisR4R10Via4Node_pos);};
      AnyRefNode IliocostalisThoracisR5R11Via3NodeL    = { sRel =  .Scale(.Data.R8.Left.IliocostalisThoracisR5R11Via3Node_pos);};
      AnyRefNode IliocostalisThoracisR6R12Via2NodeL    = { sRel =  .Scale(.Data.R8.Left.IliocostalisThoracisR6R12Via2Node_pos);};
      AnyRefNode TransversusThoracisR8StNodeLOrg  = { sRel =  .Scale(.Data.R8.Left.TransversusThoracisR8StNodeOrg_pos);};
      AnyRefNode LevatorCostarumT7R8_L_Ins   = { sRel =  .Scale(.Data.R8.Left.LevatorCostarumT7R8Ins_pos);};
      AnyRefNode LevatorCostarumT6R8_L_Ins   = { sRel =  .Scale(.Data.R8.Left.LevatorCostarumT6R8Ins_pos);};
      AnyRefNode SubcostalisR5R8_L_Ins     = { sRel =  .Scale(.Data.R8.Left.SubcostalisR5R8Ins_pos);};
      AnyRefNode SubcostalisR6R8_L_Ins     = { sRel =  .Scale(.Data.R8.Left.SubcostalisR6R8Ins_pos);};
      AnyRefNode SubcostalisR8R10_L_Org    = { sRel =  .Scale(.Data.R8.Left.SubcostalisR8R10Org_pos);};
      AnyRefNode SubcostalisR8R11_L_Ins    = { sRel =  .Scale(.Data.R8.Left.SubcostalisR8R11Ins_pos); };
      AnyRefNode O_serratus_anterior_1L = {sRel = .Scale(.Data.R8.Left.O_serratus_anterior_pos); };
      AnyRefNode IntercostalisInternusR7R8_elem_sternum = {sRel = .Scale(.Data.R8.Left.IntercostalisInternusR7R8_elem_sternum_pos); };
      AnyFolder &DataRib =Data.R8.Left;
      #if BM_TRUNK_THORACIC_MODEL == _THORACIC_MODEL_FLEXIBLE_
      #include "ICPoints.any"  //create points for inter costal muscles
      #endif
 };

    R9Seg= {
      AnyRefNode IliocostalisLumborumR7Via2NodeL   = { sRel =  .Scale(.Data.Thorax.Left.IliocostalisLumborumR7Via2Node_pos);};
      AnyRefNode IliocostalisLumborumR8Via1NodeL   = { sRel =  .Scale(.Data.Thorax.Left.IliocostalisLumborumR8Via1Node_pos);};
      AnyRefNode IliocostalisLumborumR9NodeL       = { sRel =  .Scale(.Data.Thorax.Left.IliocostalisLumborumR9Node_pos);};
      AnyRefNode LongissimusThoracisR3L3Via6NodeL   = { sRel =  .Scale(.Data.Thorax.Left.LongissimusThoracisR3L3Via6Node_pos);};
      AnyRefNode LongissimusThoracisR4L4Via5NodeL   = { sRel =  .Scale(.Data.Thorax.Left.LongissimusThoracisR4L4Via5Node_pos);};
      AnyRefNode LongissimusThoracisR5L5Via4NodeL   = { sRel =  .Scale(.Data.Thorax.Left.LongissimusThoracisR5L5Via4Node_pos);};
      AnyRefNode LongissimusThoracisR6S1Via3NodeL   = { sRel =  .Scale(.Data.Thorax.Left.LongissimusThoracisR6S1Via3Node_pos);};
      AnyRefNode LongissimusThoracisR7S2Via2NodeL   = { sRel =  .Scale(.Data.Thorax.Left.LongissimusThoracisR7S2Via2Node_pos);};
      AnyRefNode LongissimusThoracisR8S3Via1NodeL   = { sRel =  .Scale(.Data.Thorax.Left.LongissimusThoracisR8S3Via1Node_pos);};
      AnyRefNode LongissimusThoracisR9S4NodeL       = { sRel =  .Scale(.Data.Thorax.Left.LongissimusThoracisR9S4Node_pos);};
      AnyRefNode IliocostalisLumborumR5Via4NodeL = { sRel =  .Scale(.Data.Thorax.Left.IliocostalisLumborumR5Via4Node_pos);};
      AnyRefNode IliocostalisLumborumR6Via3NodeL = { sRel =  .Scale(.Data.Thorax.Left.IliocostalisLumborumR6Via3Node_pos);};
      AnyRefNode ObliquusExternusNode        = { sRel =  .Scale(.Data.Thorax.Left.OEC9_RSNode_pos);};
      AnyRefNode ObliquusExternusNode_1        = { sRel =  .Scale(.Data.Thorax.Left.OEC9_RSNode_1_pos);};
      AnyRefNode IliocostalisThoracisR3R9NodeLIns      = { sRel =  .Scale(.Data.R9.Left.IliocostalisThoracisR3R9Node_posIns);};
      AnyRefNode IliocostalisThoracisR4R10Via5NodeL    = { sRel =  .Scale(.Data.R9.Left.IliocostalisThoracisR4R10Via5Node_pos);};
      AnyRefNode IliocostalisThoracisR5R11Via4NodeL    = { sRel =  .Scale(.Data.R9.Left.IliocostalisThoracisR5R11Via4Node_pos);};
      AnyRefNode IliocostalisThoracisR6R12Via3NodeL    = { sRel =  .Scale(.Data.R9.Left.IliocostalisThoracisR6R12Via3Node_pos);};
      AnyRefNode TransversusThoracisR9StNodeLOrg  = { sRel =  .Scale(.Data.R9.Left.TransversusThoracisR9StNodeOrg_pos);};
      AnyRefNode LevatorCostarumT8R9_L_Ins   = { sRel =  .Scale(.Data.R9.Left.LevatorCostarumT8R9Ins_pos);};
      AnyRefNode LevatorCostarumT7R9_L_Ins   = { sRel =  .Scale(.Data.R9.Left.LevatorCostarumT7R9Ins_pos);};
      AnyRefNode SubcostalisR6R9_L_Ins     = { sRel =  .Scale(.Data.R9.Left.SubcostalisR6R9Ins_pos);};
      AnyRefNode SubcostalisR7R9_L_Ins     = { sRel =  .Scale(.Data.R9.Left.SubcostalisR7R9Ins_pos);};
      AnyRefNode SubcostalisR9R11_L_Ins   = { sRel =  .Scale(.Data.R9.Left.SubcostalisR9R11Ins_pos); };
      AnyRefNode O_serratus_posterior_inferior_R9L = {sRel = .Scale(.Data.R9.Left.O_serratus_posterior_inferior_pos); };
      AnyRefNode IntercostalisInternusR8R9_elem_sternum = {sRel = .Scale(.Data.R9.Left.IntercostalisInternusR8R9_elem_sternum_pos); };
      AnyFolder &DataRib =Data.R9.Left;
      #if BM_TRUNK_THORACIC_MODEL == _THORACIC_MODEL_FLEXIBLE_
      #include "ICPoints.any"  //create points for inter costal muscles
      #endif
  };

    R10Seg= {
      AnyRefNode IliocostalisLumborumR7Via3NodeL   = { sRel =  .Scale(.Data.Thorax.Left.IliocostalisLumborumR7Via3Node_pos);};
      AnyRefNode IliocostalisLumborumR8Via2NodeL   = { sRel =  .Scale(.Data.Thorax.Left.IliocostalisLumborumR8Via2Node_pos);};
      AnyRefNode IliocostalisLumborumR9Via1NodeL   = { sRel =  .Scale(.Data.Thorax.Left.IliocostalisLumborumR9Via1Node_pos);};
      AnyRefNode IliocostalisLumborumR10NodeL      = { sRel =  .Scale(.Data.Thorax.Left.IliocostalisLumborumR10Node_pos);};
      AnyRefNode LongissimusThoracisR3L3Via7NodeL   = { sRel =  .Scale(.Data.Thorax.Left.LongissimusThoracisR3L3Via7Node_pos);};
      AnyRefNode LongissimusThoracisR4L4Via6NodeL   = { sRel =  .Scale(.Data.Thorax.Left.LongissimusThoracisR4L4Via6Node_pos);};
      AnyRefNode LongissimusThoracisR5L5Via5NodeL   = { sRel =  .Scale(.Data.Thorax.Left.LongissimusThoracisR5L5Via5Node_pos);};
      AnyRefNode LongissimusThoracisR6S1Via4NodeL   = { sRel =  .Scale(.Data.Thorax.Left.LongissimusThoracisR6S1Via4Node_pos);};
      AnyRefNode LongissimusThoracisR7S2Via3NodeL   = { sRel =  .Scale(.Data.Thorax.Left.LongissimusThoracisR7S2Via3Node_pos);};
      AnyRefNode LongissimusThoracisR8S3Via2NodeL   = { sRel =  .Scale(.Data.Thorax.Left.LongissimusThoracisR8S3Via2Node_pos);};
      AnyRefNode LongissimusThoracisR9S4Via1NodeL   = { sRel =  .Scale(.Data.Thorax.Left.LongissimusThoracisR9S4Via1Node_pos);};
      AnyRefNode LongissimusThoracisR10S3NodeL  = { sRel =  .Scale(.Data.Thorax.Left.LongissimusThoracisR10S3Node_pos);};
      AnyRefNode IliocostalisLumborumR5Via5NodeL = { sRel =  .Scale(.Data.Thorax.Left.IliocostalisLumborumR5Via5Node_pos);};
      AnyRefNode IliocostalisLumborumR6Via4NodeL = { sRel =  .Scale(.Data.Thorax.Left.IliocostalisLumborumR6Via4Node_pos);};

      AnyRefNode ObliquusExternusNode_00       = { sRel =  .Scale(.Data.Thorax.Left.OEC6_1_RSNode_pos);};
      AnyRefNode ObliquusExternusNode_0       = { sRel =  .Scale(.Data.Thorax.Left.OEC6_2_RSNode_pos);};
      AnyRefNode ObliquusExternusNode_1       = { sRel =  .Scale(.Data.Thorax.Left.OEC10_RSNode_pos);};
      AnyRefNode ObliquusExternusNode_2       = { sRel =  .Scale(.Data.R10.Left.OEC10a_CINode_pos);};
      AnyRefNode ObliquusInternusNode_1       = { sRel =  .Scale(.Data.Thorax.Left.OICI_C10Node_pos);};
      AnyRefNode ObliquusInternusNode_2       = { sRel =  .Scale(.Data.Thorax.Left.OICI_C10aNode_pos);};


      AnyRefNode IliocostalisThoracisR4R10NodeLIns     = { sRel =  .Scale(.Data.R10.Left.IliocostalisThoracisR4R10Node_posIns);};
      AnyRefNode IliocostalisThoracisR5R11Via5NodeL    = { sRel =  .Scale(.Data.R10.Left.IliocostalisThoracisR5R11Via5Node_pos);};
      AnyRefNode IliocostalisThoracisR6R12Via4NodeL    = { sRel =  .Scale(.Data.R10.Left.IliocostalisThoracisR6R12Via4Node_pos);};
      AnyRefNode TransversusThoracisR10StNodeLOrg = { sRel =  .Scale(.Data.R10.Left.TransversusThoracisR10StNodeOrg_pos);};
      AnyRefNode LevatorCostarumT9R10_L_Ins  = { sRel =  .Scale(.Data.R10.Left.LevatorCostarumT9R10Ins_pos);};
      AnyRefNode LevatorCostarumT8R10_L_Ins  = { sRel =  .Scale(.Data.R10.Left.LevatorCostarumT8R10Ins_pos);};
      AnyRefNode SubcostalisR7R10_L_Ins    = { sRel =  .Scale(.Data.R10.Left.SubcostalisR7R10Ins_pos);};
      AnyRefNode SubcostalisR8R10_L_Ins    = { sRel =  .Scale(.Data.R10.Left.SubcostalisR8R10Ins_pos);};
      AnyRefNode O_serratus_posterior_inferior_R10L = {sRel = .Scale(.Data.R10.Left.O_serratus_posterior_inferior_pos); };
      AnyRefNode DiaphragmR10_1NodeL = {sRel = .Scale(.Data.R10.Left.DiaphragmR10_1Node_pos); };
      AnyRefNode DiaphragmR10_2NodeL = {sRel = .Scale(.Data.R10.Left.DiaphragmR10_2Node_pos); };
      AnyRefNode DiaphragmR10_3NodeL = {sRel = .Scale(.Data.R10.Left.DiaphragmR10_3Node_pos); };
      AnyRefNode IntercostalisInternusR9R10_elem_sternum = {sRel = .Scale(.Data.R10.Left.IntercostalisInternusR9R10_elem_sternum_pos); };
      AnyRefNode CCNodeR11 ={ sRel = .Scale(.Data.Thorax.Left.OEC11_CINode_pos);};
      AnyRefNode MidNode        = { sRel =  .Scale(.Data.R10.Left.MidNode_pos); };
      AnyFolder &DataRib =Data.R10.Left;
      #if BM_TRUNK_THORACIC_MODEL == _THORACIC_MODEL_FLEXIBLE_
      #include "ICPoints.any"  //create points for inter costal muscles
      #endif
 };

    R11Seg = {
      AnyRefNode ObliquusExternusNode       = { sRel =  .Scale(.Data.Thorax.Left.OEC11_CINode_pos);};
      AnyRefNode ObliquusInternusNode       = { sRel =  .Scale(.Data.Thorax.Left.OICI_C11Node_pos);};
      AnyRefNode ObliquusExternusNode1       = { sRel =  .Scale(.Data.Thorax.Left.OEC11_CINode1_pos);};
      AnyRefNode ObliquusInternusNode1       = { sRel =  .Scale(.Data.R12.Left.OEC12_CINode1_pos);};

      AnyRefNode O_serratus_posterior_inferior_R11L = {sRel = .Scale(.Data.R11.Left.O_serratus_posterior_inferior_pos);};
      AnyRefNode LongissimusThoracisR7S2Via4NodeL      = {sRel = .Scale(.Data.Thorax.Left.LongissimusThoracisR7S2Via4Node_pos); };
      AnyRefNode LongissimusThoracisR8S3Via3NodeL      = {sRel = .Scale(.Data.Thorax.Left.LongissimusThoracisR8S3Via3Node_pos); };
      AnyRefNode LongissimusThoracisR9S4Via2NodeL      = {sRel = .Scale(.Data.Thorax.Left.LongissimusThoracisR9S4Via2Node_pos); };
      AnyRefNode IliocostalisThoracisR5R11NodeLIns     = {sRel =  .Scale(.Data.T11.Left.IliocostalisThoracisR5R11Node_pos); };
      AnyRefNode LongissimusThoracisR10S3Via1NodeL = {sRel = .Scale(.Data.Thorax.Left.LongissimusThoracisR10S3Via1Node_pos); };
      AnyRefNode IliocostalisThoracisR6R12Via5NodeL = {sRel =  .Scale(.Data.T11.Left.IliocostalisThoracisR6R12Via5Node_pos); };
      AnyRefNode LongissimusThoracisR11S3NodeL     = {sRel = .Scale(.Data.Thorax.Left.LongissimusThoracisR11S3Node_pos); };
      AnyRefNode IliocostalisLumborumR11NodeL = {sRel = .Scale(.Data.Thorax.Left.IliocostalisLumborumR11Node_pos); };
      AnyRefNode LevatorCostarumT10R11_L_Ins  = { sRel =  .Scale(.Data.R11.Left.LevatorCostarumT10R11Ins_pos);};
      AnyRefNode LevatorCostarumT9R11_L_Ins  = { sRel =  .Scale(.Data.R11.Left.LevatorCostarumT9R11Ins_pos);};
      AnyRefNode SubcostalisR8R11_L_Org = { sRel =  .Scale(.Data.T11.Left.SubcostalisR8R11_Org_pos);};
      AnyRefNode SubcostalisR9R11_L_Org = { sRel =  .Scale(.Data.T11.Left.SubcostalisR9R11_Org_pos);};
      AnyRefNode DiaphragmR11_1NodeL = {sRel = .Scale(.Data.R11.Left.DiaphragmR11_1Node_pos); };
      AnyRefNode DiaphragmR11_2NodeL = {sRel = .Scale(.Data.R11.Left.DiaphragmR11_2Node_pos); };
      AnyRefNode DiaphragmR11_3NodeL = {sRel = .Scale(.Data.R11.Left.DiaphragmR11_3Node_pos); };
      AnyRefNode CCTangetNodeR11 ={ sRel = .Scale(.Data.R11.Left.CC_AlignmentNode); };
      AnyRefNode CCTangetNodeR11R10 ={ sRel = .Scale(.Data.R11.Left.CCTangetNodeR11R10); };
      AnyRefNode CCNodeR11 ={ sRel = .Scale(.Data.Thorax.Left.OEC11_CINode_pos);AnyRefNode RotNode ={ ARel=RotMat(.sRel,..CCTangetNodeR11.sRel,..CCTangetNodeR11R10.sRel);};};
      AnyRefNode CCNodeR12 ={ sRel = .Scale(.Data.R12.Left.OEC12_CINode_pos);};
      AnyFolder &DataRib =Data.R11.Left;
      #if BM_TRUNK_THORACIC_MODEL == _THORACIC_MODEL_FLEXIBLE_
      #include "ICPoints.any"  //create points for inter costal muscles
      #endif
 };

    R12Seg = {
     AnyRefNode ObliquusExternusNode       = { sRel =  .Scale(.Data.R12.Left.OEC12_CINode_pos);};

      AnyRefNode IliocostalisThoracisR6R12NodeLIns = {sRel =  .Scale(.Data.R12.Left.IliocostalisThoracisR6R12Node_pos); };
      AnyRefNode LongissimusThoracisR8S3Via4NodeL      = {sRel = .Scale(.Data.R12.Left.LongissimusThoracisR8S3Via4Node_pos);};
      AnyRefNode LongissimusThoracisR9S4Via3NodeL      = {sRel = .Scale(.Data.R12.Left.LongissimusThoracisR9S4Via3Node_pos);};
      AnyRefNode LongissimusThoracisR10S3Via2NodeL = {sRel = .Scale(.Data.R12.Left.LongissimusThoracisR10S3Via2Node_pos); };
      AnyRefNode LongissimusThoracisR11S3Via1NodeL = {sRel = .Scale(.Data.R12.Left.LongissimusThoracisR11S3Via1Node_pos); };
      AnyRefNode LongissimusThoracisR12S3NodeL     = {sRel = .Scale(.Data.R12.Left.LongissimusThoracisR12S3Node_pos); };
      AnyRefNode QLC12Lat_CINode1L =    {sRel = .Scale(.Data.R12.Left.QLC12Lat_CINode1_pos); };
      AnyRefNode QLC12Lat_CINode2L =    {sRel = .Scale(.Data.R12.Left.QLC12Lat_CINode2_pos); };
      AnyRefNode QLC12Lat_CINode3L =    {sRel = .Scale(.Data.R12.Left.QLC12Lat_CINode3_pos); };
      AnyRefNode QLC12Lat_CINode4L =    {sRel = .Scale(.Data.R12.Left.QLC12Lat_CINode4_pos); };
      AnyRefNode QLC12Lat_CINode5L =    {sRel = .Scale(.Data.R12.Left.QLC12Lat_CINode5_pos); };
      AnyRefNode QLC12InterMedian_CINode1L = {sRel = .Scale(.Data.R12.Left.QLC12InterMedian_CINode1_pos); };
      AnyRefNode QLC12InterMedian_CINode2L = {sRel = .Scale(.Data.R12.Left.QLC12InterMedian_CINode2_pos); };
      AnyRefNode QLC12InterMedian_CINode3L = {sRel = .Scale(.Data.R12.Left.QLC12InterMedian_CINode3_pos); };
      AnyRefNode QLC12InterMedian_CINode4L = {sRel = .Scale(.Data.R12.Left.QLC12InterMedian_CINode4_pos); };
      AnyRefNode QLC12InterMedian_CINode5L = {sRel = .Scale(.Data.R12.Left.QLC12InterMedian_CINode5_pos); };
      AnyRefNode QLC12Median_CINode1L =    {sRel = .Scale(.Data.R12.Left.QLC12Median_CINode1_pos); };
      AnyRefNode QLC12Median_CINode2L =    {sRel = .Scale(.Data.R12.Left.QLC12Median_CINode2_pos); };
      AnyRefNode QLC12Median_CINode3L =    {sRel = .Scale(.Data.R12.Left.QLC12Median_CINode3_pos); };
      AnyRefNode QLC12Median_CINode4L =    {sRel = .Scale(.Data.R12.Left.QLC12Median_CINode4_pos); };
      AnyRefNode IliocostalisLumborumR12NodeL      = {sRel = .Scale(.Data.R12.Left.IliocostalisLumborumR12Node_pos );};
      AnyRefNode IliocostalisLumborumR10Via1NodeL  = {sRel = .Scale(.Data.R12.Left.IliocostalisLumborumR10Via1Node_pos );};
      AnyRefNode IliocostalisLumborumR9Via2NodeL   = {sRel = .Scale(.Data.R12.Left.IliocostalisLumborumR9Via2Node_pos );};
      AnyRefNode IliocostalisLumborumR8Via3NodeL   = {sRel = .Scale(.Data.R12.Left.IliocostalisLumborumR8Via3Node_pos );};
      AnyRefNode IliocostalisLumborumR7Via4NodeL   = {sRel = .Scale(.Data.R12.Left.IliocostalisLumborumR7Via4Node_pos );};
      AnyRefNode IliocostalisLumborumR6Via5NodeL = {sRel = .Scale(.Data.R12.Left.IliocostalisLumborumR6Via5Node_pos );};
      AnyRefNode IliocostalisLumborumR5Via6NodeL = {sRel = .Scale(.Data.R12.Left.IliocostalisLumborumR5Via6Node_pos );};
      AnyRefNode LevatorCostarumT11R12_L_Ins  = { sRel =  .Scale(.Data.R12.Left.LevatorCostarumT11R12Ins_pos);};
      AnyRefNode LevatorCostarumT10R12_L_Ins  = { sRel =  .Scale(.Data.R12.Left.LevatorCostarumT10R12Ins_pos);};
      AnyRefNode O_serratus_posterior_inferior_R12L = {sRel = .Scale(.Data.R12.Left.O_serratus_posterior_inferior_pos);};
      AnyRefNode DiaphragmR12_1NodeL = {sRel = .Scale(.Data.R12.Left.DiaphragmR12_1Node_pos); };
      AnyRefNode DiaphragmR12_2NodeL = {sRel = .Scale(.Data.R12.Left.DiaphragmR12_2Node_pos); };
      AnyRefNode CCTangetNodeR12 ={ sRel = .Scale(.Data.R12.Left.CC_AlignmentNode); };
      AnyRefNode CCTangetNodeR12R11 ={ sRel = .Scale(.Data.R12.Left.CCTangetNodeR12R11); };
      AnyRefNode CCNodeR12 ={ sRel = .Scale(.Data.R12.Left.OEC12_CINode_pos);
      AnyRefNode RotNode ={ ARel=RotMat(.sRel,..CCTangetNodeR12.sRel,..CCTangetNodeR12R11.sRel);};};
      AnyFolder &DataRib =Data.R12.Left;
      #if BM_TRUNK_THORACIC_MODEL == _THORACIC_MODEL_FLEXIBLE_
      #include "ICPoints.any"  //create points for inter costal muscles
      #endif
  };

    #if BM_TRUNK_THORACIC_STERNUM_TOPOLOGY == 4
      CostalCartilageSeg = {

        AnyRefNode Mid                ={ sRel =.Scale (.Data.Sternum.MidNode_pos);};
        //----------------------------------------------CS Nodes-----------------------------------------------
        AnyRefNode CS7NodeL     ={ sRel =.Scale (.Data.Sternum.Left.CS7Node_pos);};
        AnyRefNode CS8NodeL     ={ sRel =.Scale (.Data.Sternum.Left.CS8Node_pos);};
        AnyRefNode CS9NodeL     ={ sRel =.Scale (.Data.Sternum.Left.CS9Node_pos);};
        AnyRefNode CS10NodeL    ={ sRel =.Scale (.Data.Sternum.Left.CS10Node_pos);};


        //----------------------------------------------IC Nodes-----------------------------------------------
        AnyRefNode IC3NodeL     ={ sRel =.Scale (.Data.Sternum.Left.IC3Node_pos);};
        AnyRefNode IC7NodeL     ={ sRel =.Scale (.Data.Sternum.Left.IC7Node_pos);};
        AnyRefNode IC8NodeL     ={ sRel =.Scale (.Data.Sternum.Left.IC8Node_pos);};
        AnyRefNode IC9NodeL     ={ sRel =.Scale (.Data.Sternum.Left.IC9Node_pos);};
        AnyRefNode IC10NodeL    ={ sRel =.Scale (.Data.Sternum.Left.IC10Node_pos);};

        AnyRefNode CCTangetNodeR7L       ={ sRel =.Scale (.Data.R7.Left.CC_AlignmentNode);};
        AnyRefNode CCTangetNodeR8L       ={ sRel =.Scale (.Data.R8.Left.CC_AlignmentNode);};
        AnyRefNode CCTangetNodeR9L       ={ sRel =.Scale (.Data.R9.Left.CC_AlignmentNode);};
        AnyRefNode CCTangetNodeR10L       ={ sRel =.Scale (.Data.R10.Left.CC_AlignmentNode);};


        //----------------------------------------------CC Nodes------------------------------------------------
        AnyRefNode R7NodeL     ={ sRel =.Scale (.Data.Sternum.Left.R7Node_pos);AnyRefNode RotNode ={ ARel=RotMat(.sRel,..CCTangetNodeR7L.sRel,sRel+{0.10,0,0})*RotMat(-pi/2,y)*RotMat(-pi,z);};};
        AnyRefNode R8NodeL     ={ sRel =.Scale (.Data.Sternum.Left.R8Node_pos);AnyRefNode RotNode ={ ARel=RotMat(.sRel,..CCTangetNodeR8L.sRel,sRel+{0.10,0,0})*RotMat(-pi/2,y)*RotMat(-pi,z);};};
        AnyRefNode R9NodeL     ={ sRel =.Scale (.Data.Sternum.Left.R9Node_pos);AnyRefNode RotNode ={ ARel=RotMat(.sRel,..CCTangetNodeR9L.sRel,sRel+{0.10,0,0})*RotMat(-pi/2,y)*RotMat(-pi,z);};};
        AnyRefNode R10NodeL   ={ sRel =.Scale (.Data.Sternum.Left.R10Node_pos);AnyRefNode RotNode ={ ARel=RotMat(.sRel,..CCTangetNodeR10L.sRel,sRel+{0.10,0,0})*RotMat(-pi/2,y)*RotMat(-pi,z);};};


        AnyRefNode R7NodeLsup     ={ sRel =.Scale (.Data.Sternum.Left.R7Node_pos + {0, .Data.AllRibs.CCOffset[3],0});  };
        AnyRefNode R7NodeLinf     ={ sRel =.Scale (.Data.Sternum.Left.R7Node_pos + {0,-.Data.AllRibs.CCOffset[3],0});  };
        AnyRefNode R7NodeLpos     ={ sRel =.Scale (.Data.Sternum.Left.R7Node_pos + {-.Data.AllRibs.CCOffset[3],0,0});  };
        AnyRefNode R7NodeLant     ={ sRel =.Scale (.Data.Sternum.Left.R7Node_pos + {.Data.AllRibs.CCOffset[3],0,0});  };
        AnyRefNode R8NodeLsup     ={ sRel =.Scale (.Data.Sternum.Left.R8Node_pos + {0, .Data.AllRibs.CCOffset[2],0});  };
        AnyRefNode R8NodeLinf     ={ sRel =.Scale (.Data.Sternum.Left.R8Node_pos + {0,-.Data.AllRibs.CCOffset[2],0});  };
        AnyRefNode R8NodeLpos     ={ sRel =.Scale (.Data.Sternum.Left.R8Node_pos + {-.Data.AllRibs.CCOffset[2],0,0});  };
        AnyRefNode R8NodeLant     ={ sRel =.Scale (.Data.Sternum.Left.R8Node_pos + {.Data.AllRibs.CCOffset[2],0,0});  };
        AnyRefNode R9NodeLsup     ={ sRel =.Scale (.Data.Sternum.Left.R9Node_pos + {0, .Data.AllRibs.CCOffset[1],0});  };
        AnyRefNode R9NodeLinf     ={ sRel =.Scale (.Data.Sternum.Left.R9Node_pos + {0,-.Data.AllRibs.CCOffset[1],0});  };
        AnyRefNode R9NodeLpos     ={ sRel =.Scale (.Data.Sternum.Left.R9Node_pos + {-.Data.AllRibs.CCOffset[1],0,0});  };
        AnyRefNode R9NodeLant     ={ sRel =.Scale (.Data.Sternum.Left.R9Node_pos + {.Data.AllRibs.CCOffset[1],0,0});  };
        AnyRefNode R10NodeLsup     ={ sRel =.Scale (.Data.Sternum.Left.R10Node_pos + {0, .Data.AllRibs.CCOffset[0],0});  };
        AnyRefNode R10NodeLinf     ={ sRel =.Scale (.Data.Sternum.Left.R10Node_pos + {0,-.Data.AllRibs.CCOffset[0],0});  };
        AnyRefNode R10NodeLpos     ={ sRel =.Scale (.Data.Sternum.Left.R10Node_pos + {-.Data.AllRibs.CCOffset[0],0,0});  };
        AnyRefNode R10NodeLant     ={ sRel =.Scale (.Data.Sternum.Left.R10Node_pos + {.Data.AllRibs.CCOffset[0],0,0});  };


        AnyRefNode RACP_CO6Node= {sRel = .Scale(.Data.Sternum.RACP_CO6Node_pos);};


        AnyRefNode TransversusThoracisR2StNodeLIns         = {sRel = .Scale(.Data.Sternum.Left.TransversusThoracisR2StNode_pos);};
        AnyRefNode TransversusThoracisR3StNodeLIns         = {sRel = .Scale(.Data.Sternum.Left.TransversusThoracisR3StNode_pos);};
        AnyRefNode TransversusThoracisR4StNodeLIns         = {sRel = .Scale(.Data.Sternum.Left.TransversusThoracisR4StNode_pos);};
        AnyRefNode TransversusThoracisR5StNodeLIns         = {sRel = .Scale(.Data.Sternum.Left.TransversusThoracisR5StNode_pos);};
        AnyRefNode TransversusThoracisR6StNodeLIns         = {sRel = .Scale(.Data.Sternum.Left.TransversusThoracisR6StNode_pos);};
        AnyRefNode TransversusThoracisNodeLIns= {sRel = .Scale(.Data.Sternum.Left.TransversusThoracisNode_pos);};

        AnyRefNode ObliquusInternus_1 = {sRel = .Scale(.Data.Sternum.Left.OICI_C9Node_pos);};
        AnyRefNode ObliquusInternus_2 = {sRel = .Scale(.Data.Sternum.Left.OICI_C8Node_pos);};


        AnyRefNode DiaphragmXiphoidNodeL = {sRel = .Scale(.Data.Sternum.Left.DiaphragmXiphoidNode_pos); };
        AnyRefNode DiaphragmCC_1L = {sRel = .Scale(.Data.Sternum.Left.DiaphragmCC_1_pos); };
        AnyRefNode DiaphragmCC_2L = {sRel = .Scale(.Data.Sternum.Left.DiaphragmCC_2_pos); };
        AnyRefNode DiaphragmCC_3L = {sRel = .Scale(.Data.Sternum.Left.DiaphragmCC_3_pos); };
        AnyRefNode DiaphragmCC_4L = {sRel = .Scale(.Data.Sternum.Left.DiaphragmCC_4_pos); };
        AnyRefNode DiaphragmCC_5L = {sRel = .Scale(.Data.Sternum.Left.DiaphragmCC_5_pos); };
        AnyRefNode DiaphragmCC_6L = {sRel = .Scale(.Data.Sternum.Left.DiaphragmCC_6_pos); };
        AnyRefNode DiaphragmCC_7L = {sRel = .Scale(.Data.Sternum.Left.DiaphragmCC_7_pos); };


        AnyRefNode Left_IntercostalisInternusR6R7_elem_sternum = {sRel = .Scale(.Data.Sternum.Left.IntercostalisInternusR6R7_elem_sternum_pos); };
        AnyRefNode Left_IntercostalisInternusR7R8_elem_sternum = {sRel = .Scale(.Data.Sternum.Left.IntercostalisInternusR7R8_elem_sternum_pos); };
        AnyRefNode Left_IntercostalisInternusR8R9_elem_sternum = {sRel = .Scale(.Data.Sternum.Left.IntercostalisInternusR8R9_elem_sternum_pos); };
        AnyRefNode Left_IntercostalisInternusR9R10_elem_sternum = {sRel = .Scale(.Data.Sternum.Left.IntercostalisInternusR9R10_elem_sternum_pos); };
      };
    #endif
  };
};
