  Right = {
    R1Seg= {
      AnyRefNode MidNode        = { sRel =  .Scale(.StdPar.R1.Right.MidNode_pos); };
      AnyRefNode ICSpringSupNode        = { sRel =  .Scale(.StdPar.R1.Right.ICSpringSupNode_pos); };
      AnyRefNode ICSpringInfNode        = { sRel =  .Scale(.StdPar.R1.Right.ICSpringInfNode_pos); };

    };

    R2Seg= {
      AnyRefNode MidNode        = { sRel =  .Scale(.StdPar.R2.Right.MidNode_pos); };
      AnyRefNode ICSpringSupNode        = { sRel =  .Scale(.StdPar.R2.Right.ICSpringSupNode_pos); };
      AnyRefNode ICSpringInfNode        = { sRel =  .Scale(.StdPar.R2.Right.ICSpringInfNode_pos); };
    };

    R3Seg= {
      AnyRefNode MidNode        = { sRel =  .Scale(.StdPar.R3.Right.MidNode_pos); };
      AnyRefNode ICSpringSupNode        = { sRel =  .Scale(.StdPar.R3.Right.ICSpringSupNode_pos); };
      AnyRefNode ICSpringInfNode        = { sRel =  .Scale(.StdPar.R3.Right.ICSpringInfNode_pos); };
    };

    R4Seg= {
      AnyRefNode MidNode        = { sRel =  .Scale(.StdPar.R4.Right.MidNode_pos); };
      AnyRefNode ICSpringSupNode        = { sRel =  .Scale(.StdPar.R4.Right.ICSpringSupNode_pos); };
      AnyRefNode ICSpringInfNode        = { sRel =  .Scale(.StdPar.R4.Right.ICSpringInfNode_pos); };
    };

    R5Seg= {
      AnyRefNode MidNode        = { sRel =  .Scale(.StdPar.R5.Right.MidNode_pos); };
      AnyRefNode ICSpringSupNode        = { sRel =  .Scale(.StdPar.R5.Right.ICSpringSupNode_pos); };
      AnyRefNode ICSpringInfNode        = { sRel =  .Scale(.StdPar.R5.Right.ICSpringInfNode_pos); };
    };

    R6Seg= {
      AnyRefNode MidNode        = { sRel =  .Scale(.StdPar.R6.Right.MidNode_pos); };
      AnyRefNode ICSpringSupNode        = { sRel =  .Scale(.StdPar.R6.Right.ICSpringSupNode_pos); };
      AnyRefNode ICSpringInfNode        = { sRel =  .Scale(.StdPar.R6.Right.ICSpringInfNode_pos); };
    };

    R7Seg= {
      AnyRefNode MidNode        = { sRel =  .Scale(.StdPar.R7.Right.MidNode_pos); };
      AnyRefNode ICSpringSupNode        = { sRel =  .Scale(.StdPar.R7.Right.ICSpringSupNode_pos); };
      AnyRefNode ICSpringInfNode        = { sRel =  .Scale(.StdPar.R7.Right.ICSpringInfNode_pos); };
    };

    R8Seg= {
      AnyRefNode MidNode        = { sRel =  .Scale(.StdPar.R8.Right.MidNode_pos); };
      AnyRefNode ICSpringSupNode        = { sRel =  .Scale(.StdPar.R8.Right.ICSpringSupNode_pos); };
      AnyRefNode ICSpringInfNode        = { sRel =  .Scale(.StdPar.R8.Right.ICSpringInfNode_pos); };
    };

    R9Seg= {
      AnyRefNode MidNode        = { sRel =  .Scale(.StdPar.R9.Right.MidNode_pos); };
      AnyRefNode MP        = { sRel =  .Scale(.StdPar.R9.Right.MidPosNode_pos); };
      AnyRefNode ICSpringSupNode        = { sRel =  .Scale(.StdPar.R9.Right.ICSpringSupNode_pos); };
      AnyRefNode ICSpringInfNode        = { sRel =  .Scale(.StdPar.R9.Right.ICSpringInfNode_pos); };
    };

    R10Seg= {

      AnyRefNode MidNode        = { sRel =  .Scale(.StdPar.R10.Right.MidNode_pos); };
      AnyRefNode MA        = { sRel =  .Scale(.StdPar.R10.Right.MidAntNode_pos); };
      AnyRefNode MP        = { sRel =  .Scale(.StdPar.R10.Right.MidPosNode_pos); };
      AnyRefNode ICSpringSupNode        = { sRel =  .Scale(.StdPar.R10.Right.ICSpringSupNode_pos); };
      AnyRefNode ICSpringInfNode        = { sRel =  .Scale(.StdPar.R10.Right.ICSpringInfNode_pos); };
      AnyRefNode ICSpringInfPosteriorNode        = { sRel =  .Scale(.StdPar.R10.Right.ICSpringInfPosteriorNode_pos); };
    };

    R11Seg = {
      AnyRefNode MA        = { sRel = .Scale(.StdPar.R11.Right.MidAntNode_pos); };
      AnyRefNode ICSpringSupNode        = { sRel =  .Scale(.StdPar.R11.Right.ICSpringSupNode_pos); };
      AnyRefNode ICSpringSupPosteriorNode        = { sRel =  .Scale(.StdPar.R11.Right.ICSpringSupPosteriorNode_pos); };
      AnyRefNode ICSpringInfNode        = { sRel =  .Scale(.StdPar.R11.Right.ICSpringInfNode_pos); };
      AnyRefNode ICSpringInfPosteriorNode        = { sRel =  .Scale(.StdPar.R11.Right.ICSpringInfPosteriorNode_pos); };
      AnyRefNode CCSpringAntNode        = { sRel =  .Scale(.StdPar.R11.Right.CCSpringAntNode_pos); };
    };

    R12Seg = {
      AnyRefNode ICSpringSupNode        = { sRel =  .Scale(.StdPar.R12.Right.ICSpringSupNode_pos); };
      AnyRefNode ICSpringSupPosteriorNode        = { sRel =  .Scale(.StdPar.R12.Right.ICSpringSupPosteriorNode_pos); };
      AnyRefNode ICSpringInfNodePelvis        = { sRel =  .Scale(.StdPar.R12.Right.ICSpringInfNodePelvis_pos); };
      AnyRefNode ICSpringInfNodeL3        = { sRel =  .Scale(.StdPar.R12.Right.ICSpringInfNodeL3_pos); };
      AnyRefNode ICSpringInfNodeL2        = { sRel =  .Scale(.StdPar.R12.Right.ICSpringInfNodeL2_pos); };
      AnyRefNode ICSpringInfNodeL1        = { sRel =  .Scale(.StdPar.R12.Right.ICSpringInfNodeL1_pos); };
      AnyRefNode CCSpringAntNode        = { sRel =  .Scale(.StdPar.R12.Right.CCSpringAntNode_pos); };
    };
  };

  Left = {
    R1Seg= {
      AnyRefNode MidNode        = { sRel =  .Scale(.StdPar.R1.Left.MidNode_pos); };
      AnyRefNode ICSpringSupNode        = { sRel =  .Scale(.StdPar.R1.Left.ICSpringSupNode_pos); };
      AnyRefNode ICSpringInfNode        = { sRel =  .Scale(.StdPar.R1.Left.ICSpringInfNode_pos); };
    };

    R2Seg= {
      AnyRefNode MidNode        = { sRel =  .Scale(.StdPar.R2.Left.MidNode_pos); };
      AnyRefNode ICSpringSupNode        = { sRel =  .Scale(.StdPar.R2.Left.ICSpringSupNode_pos); };
      AnyRefNode ICSpringInfNode        = { sRel =  .Scale(.StdPar.R2.Left.ICSpringInfNode_pos); };
    };

    R3Seg= {
      AnyRefNode MidNode        = { sRel =  .Scale(.StdPar.R3.Left.MidNode_pos); };
      AnyRefNode ICSpringSupNode        = { sRel =  .Scale(.StdPar.R3.Left.ICSpringSupNode_pos); };
      AnyRefNode ICSpringInfNode        = { sRel =  .Scale(.StdPar.R3.Left.ICSpringInfNode_pos); };
    };

    R4Seg= {
      AnyRefNode MidNode        = { sRel =  .Scale(.StdPar.R4.Left.MidNode_pos); };
      AnyRefNode ICSpringSupNode        = { sRel =  .Scale(.StdPar.R4.Left.ICSpringSupNode_pos); };
      AnyRefNode ICSpringInfNode        = { sRel =  .Scale(.StdPar.R4.Left.ICSpringInfNode_pos); };
    };

    R5Seg= {
      AnyRefNode MidNode        = { sRel =  .Scale(.StdPar.R5.Left.MidNode_pos); };
      AnyRefNode ICSpringSupNode        = { sRel =  .Scale(.StdPar.R5.Left.ICSpringSupNode_pos); };
      AnyRefNode ICSpringInfNode        = { sRel =  .Scale(.StdPar.R5.Left.ICSpringInfNode_pos); };
    };

    R6Seg= {
      AnyRefNode MidNode        = { sRel =  .Scale(.StdPar.R6.Left.MidNode_pos); };
      AnyRefNode ICSpringSupNode        = { sRel =  .Scale(.StdPar.R6.Left.ICSpringSupNode_pos); };
      AnyRefNode ICSpringInfNode        = { sRel =  .Scale(.StdPar.R6.Left.ICSpringInfNode_pos); };
    };

    R7Seg= {
      AnyRefNode MidNode        = { sRel =  .Scale(.StdPar.R7.Left.MidNode_pos); };
      AnyRefNode ICSpringSupNode        = { sRel =  .Scale(.StdPar.R7.Left.ICSpringSupNode_pos); };
      AnyRefNode ICSpringInfNode        = { sRel =  .Scale(.StdPar.R7.Left.ICSpringInfNode_pos); };
    };

    R8Seg= {
      AnyRefNode MidNode        = { sRel =  .Scale(.StdPar.R8.Left.MidNode_pos); };
      AnyRefNode ICSpringSupNode        = { sRel =  .Scale(.StdPar.R8.Left.ICSpringSupNode_pos); };
      AnyRefNode ICSpringInfNode        = { sRel =  .Scale(.StdPar.R8.Left.ICSpringInfNode_pos); };
    };

    R9Seg= {
      AnyRefNode MidNode        = { sRel =  .Scale(.StdPar.R9.Left.MidNode_pos); };
      AnyRefNode MP        = { sRel =  .Scale(.StdPar.R9.Left.MidPosNode_pos); };
      AnyRefNode ICSpringSupNode        = { sRel =  .Scale(.StdPar.R9.Left.ICSpringSupNode_pos); };
      AnyRefNode ICSpringInfNode        = { sRel =  .Scale(.StdPar.R9.Left.ICSpringInfNode_pos); };
    };

    R10Seg= {

      AnyRefNode MidNode        = { sRel =  .Scale(.StdPar.R10.Left.MidNode_pos); };
      AnyRefNode MA        = { sRel =  .Scale(.StdPar.R10.Left.MidAntNode_pos); };
      AnyRefNode MP        = { sRel =  .Scale(.StdPar.R10.Left.MidPosNode_pos); };
      AnyRefNode ICSpringSupNode        = { sRel =  .Scale(.StdPar.R10.Left.ICSpringSupNode_pos); };
      AnyRefNode ICSpringInfNode        = { sRel =  .Scale(.StdPar.R10.Left.ICSpringInfNode_pos); };
      AnyRefNode ICSpringInfPosteriorNode        = { sRel =  .Scale(.StdPar.R10.Left.ICSpringInfPosteriorNode_pos); };
    };

    R11Seg = {
      AnyRefNode MA        = { sRel =  .Scale(.StdPar.R11.Left.MidAntNode_pos); };
      AnyRefNode ICSpringSupNode        = { sRel =  .Scale(.StdPar.R11.Left.ICSpringSupNode_pos); };
      AnyRefNode ICSpringSupPosteriorNode        = { sRel =  .Scale(.StdPar.R11.Left.ICSpringSupPosteriorNode_pos); };
      AnyRefNode ICSpringInfNode        = { sRel =  .Scale(.StdPar.R11.Left.ICSpringInfNode_pos); };
      AnyRefNode ICSpringInfPosteriorNode        = { sRel =  .Scale(.StdPar.R11.Left.ICSpringInfPosteriorNode_pos); };
      AnyRefNode CCSpringAntNode        = { sRel =  .Scale(.StdPar.R11.Left.CCSpringAntNode_pos); };
    };

    R12Seg = {
      AnyRefNode ICSpringSupNode        = { sRel =  .Scale(.StdPar.R12.Left.ICSpringSupNode_pos); };
      AnyRefNode ICSpringSupPosteriorNode        = { sRel =  .Scale(.StdPar.R12.Left.ICSpringSupPosteriorNode_pos); };
      AnyRefNode ICSpringInfNodePelvis        = { sRel =  .Scale(.StdPar.R12.Left.ICSpringInfNodePelvis_pos); };
      AnyRefNode ICSpringInfNodeL3        = { sRel =  .Scale(.StdPar.R12.Left.ICSpringInfNodeL3_pos); };
      AnyRefNode ICSpringInfNodeL2        = { sRel =  .Scale(.StdPar.R12.Left.ICSpringInfNodeL2_pos); };
      AnyRefNode ICSpringInfNodeL1        = { sRel =  .Scale(.StdPar.R12.Left.ICSpringInfNodeL1_pos); };
      AnyRefNode CCSpringAntNode        = { sRel =  .Scale(.StdPar.R12.Left.CCSpringAntNode_pos); };
    };
  };
