//AnyFolder &JointsFolder = .Joints;
//JointsFolder = {

// Lumabr and cervical regions have joint muscles, but thoracic does not have it yet. So we add the reactions on the intervertebral joints.
//  Cervical.Flexion.rhythmC2C7 = { Reaction.Type = repmat(nDim, On); };
//  Cervical.Flexion.rhythmC1C0SkullThoraxFlexion = { Reaction.Type = repmat(nDim, On); };
//  Cervical.LateralBending.rhythmC2C7 = { Reaction.Type = repmat(nDim, On); };
//  Cervical.Rotation.rhythmC2C7 = { Reaction.Type = repmat(nDim, On); };
//  Cervical.Rotation.rhythmC2C1SkullThoraxRotation = { Reaction.Type = repmat(nDim, On); };
//  Lumbar.SpineRhythmDrvFlexion = { Reaction.Type = {Off, On, On, On, On, On}; };// SacrumPelvisReaction is always On, since we dont have the necessary musculature
//  Lumbar.SpineRhythmDrvRotation = { Reaction.Type = {Off, On, On, On, On, On}; };// SacrumPelvisReaction is always On, since we dont have the necessary musculature
//  Lumbar.SpineRhythmDrvLatBending = { Reaction.Type = {Off, On, On, On, On, On}; };// SacrumPelvisReaction is always On, since we dont have the necessary musculature

#if BM_TRUNK_THORACIC_RHYTHM != OFF
Thorax.LateralBendingRhythmDriver = { Reaction.Type = repmat(nDim, On); };
Thorax.AxialRotationRhythmDriver = { Reaction.Type = repmat(nDim, On); };
Thorax.ExtensionRhythmDriver = { Reaction.Type = repmat(nDim, On); };
Thorax.LumbarThroacicExtensionLinkDriver = { Reaction.Type = repmat(nDim, On); };
Thorax.LumbarThroacicLatBendingLinkDriver = { Reaction.Type = repmat(nDim, On); };
Thorax.LumbarThroacicRotationLinkDriver = { Reaction.Type = repmat(nDim, On); };
#endif


RibCage.Right.R1.RotationConstraint = { Reaction.Type = repmat(nDim, On); };
RibCage.Right.R2.RotationConstraint = { Reaction.Type = repmat(nDim, On); };
RibCage.Right.R3.RotationConstraint = { Reaction.Type = repmat(nDim, On); };
RibCage.Right.R4.RotationConstraint = { Reaction.Type = repmat(nDim, On); };
RibCage.Right.R5.RotationConstraint = { Reaction.Type = repmat(nDim, On); };
RibCage.Right.R6.RotationConstraint = { Reaction.Type = repmat(nDim, On); };
RibCage.Right.R7.RotationConstraint = { Reaction.Type = repmat(nDim, On); };
RibCage.Right.R8.RotationConstraint = { Reaction.Type = repmat(nDim, On); };
RibCage.Right.R9.RotationConstraint = { Reaction.Type = repmat(nDim, On); };
RibCage.Right.R10.RotationConstraint = { Reaction.Type = repmat(nDim, On); };
RibCage.Right.R11.RotationConstraint = { Reaction.Type = repmat(nDim, On); };
RibCage.Right.R12.RotationConstraint = { Reaction.Type = repmat(nDim, On); };
RibCage.Left.R1.RotationConstraint = { Reaction.Type = repmat(nDim, On); };
RibCage.Left.R2.RotationConstraint = { Reaction.Type = repmat(nDim, On); };
RibCage.Left.R3.RotationConstraint = { Reaction.Type = repmat(nDim, On); };
RibCage.Left.R4.RotationConstraint = { Reaction.Type = repmat(nDim, On); };
RibCage.Left.R5.RotationConstraint = { Reaction.Type = repmat(nDim, On); };
RibCage.Left.R6.RotationConstraint = { Reaction.Type = repmat(nDim, On); };
RibCage.Left.R7.RotationConstraint = { Reaction.Type = repmat(nDim, On); };
RibCage.Left.R8.RotationConstraint = { Reaction.Type = repmat(nDim, On); };
RibCage.Left.R9.RotationConstraint = { Reaction.Type = repmat(nDim, On); };
RibCage.Left.R10.RotationConstraint = { Reaction.Type = repmat(nDim, On); };
RibCage.Left.R11.RotationConstraint = { Reaction.Type = repmat(nDim, On); };
RibCage.Left.R12.RotationConstraint = { Reaction.Type = repmat(nDim, On); };

RibCage.Manubriosternal.driver = { Reaction.Type = repmat(nDim, On); };


#ifdef Draw_RibcageForces

RibCage = {
  AnyFolder DrawRibcageForces = {
    AnyForceMomentMeasure ForceMomentSternum1 = {AnyRefNode &ref=....Segments.SternumSeg.Right.CCNodeR1; IncludeForces = {&....Joints.RibCage.SternumRibConnection.Reaction  }; AnyDrawVector drw1 = {Vec = .F*0.0005; AnyRefFrame &ref = .ref; Line.RGB={1,0,0};};};
    AnyForceMomentMeasure ForceMomentSternum2 = {AnyRefNode &ref=....Segments.SternalBodySeg.Right.CCNodeR2; IncludeForces = {&....Joints.RibCage.SternumRibConnection.Reaction  }; AnyDrawVector drw1 = {Vec = .F*0.0005; AnyRefFrame &ref = .ref; Line.RGB={1,0,0};};};
    AnyForceMomentMeasure ForceMomentSternum3 = {AnyRefNode &ref=....Segments.SternalBodySeg.Right.CCNodeR3; IncludeForces = {&....Joints.RibCage.SternumRibConnection.Reaction  }; AnyDrawVector drw1 = {Vec = .F*0.0005; AnyRefFrame &ref = .ref; Line.RGB={1,0,0};};};
    AnyForceMomentMeasure ForceMomentSternum4 = {AnyRefNode &ref=....Segments.SternalBodySeg.Right.CCNodeR4; IncludeForces = {&....Joints.RibCage.SternumRibConnection.Reaction  }; AnyDrawVector drw1 = {Vec = .F*0.0005; AnyRefFrame &ref = .ref; Line.RGB={1,0,0};};};
    AnyForceMomentMeasure ForceMomentSternum5 = {AnyRefNode &ref=....Segments.SternalBodySeg.Right.CCNodeR5; IncludeForces = {&....Joints.RibCage.SternumRibConnection.Reaction  }; AnyDrawVector drw1 = {Vec = .F*0.0005; AnyRefFrame &ref = .ref; Line.RGB={1,0,0};};};
    AnyForceMomentMeasure ForceMomentSternum6 = {AnyRefNode &ref=....Segments.SternalBodySeg.Right.CCNodeR6; IncludeForces = {&....Joints.RibCage.SternumRibConnection.Reaction  }; AnyDrawVector drw1 = {Vec = .F*0.0005; AnyRefFrame &ref = .ref; Line.RGB={1,0,0};};};
    AnyForceMomentMeasure ForceMomentSternum7 = {AnyRefNode &ref=....Segments.SternalBodySeg.Right.CCNodeR7; IncludeForces = {&....Joints.RibCage.SternumRibConnection.Reaction  }; AnyDrawVector drw1 = {Vec = .F*0.0005; AnyRefFrame &ref = .ref; Line.RGB={1,0,0};};};
    AnyForceMomentMeasure ForceMomentSternum8 = {AnyRefNode &ref=....Segments.SternalBodySeg.Right.CCNodeR8; IncludeForces = {&....Joints.RibCage.SternumRibConnection.Reaction  }; AnyDrawVector drw1 = {Vec = .F*0.0005; AnyRefFrame &ref = .ref; Line.RGB={1,0,0};};};
    AnyForceMomentMeasure ForceMomentSternum9 = {AnyRefNode &ref=....Segments.SternalBodySeg.Right.CCNodeR9; IncludeForces = {&....Joints.RibCage.SternumRibConnection.Reaction  }; AnyDrawVector drw1 = {Vec = .F*0.0005; AnyRefFrame &ref = .ref; Line.RGB={1,0,0};};};
    AnyForceMomentMeasure ForceMomentSternum10 = {AnyRefNode &ref=....Segments.SternalBodySeg.Right.CCNodeR10; IncludeForces = {&....Joints.RibCage.SternumRibConnection.Reaction  }; AnyDrawVector drw1 = {Vec = .F*0.0005; AnyRefFrame &ref = .ref; Line.RGB={1,0,0};};};

    AnyForceMomentMeasure ForceMomentT1T2 = {AnyRefNode &ref=....Joints.Thorax.T1T2.T2Node; AnyFloat rgb = {0,1,0}; #include "IncludeForce_ForceMomentMeasure.any"};
    AnyForceMomentMeasure ForceMomentT2T3 = {AnyRefNode &ref=....Joints.Thorax.T2T3.T3Node; AnyFloat rgb = {0,1,0}; #include "IncludeForce_ForceMomentMeasure.any"};
    AnyForceMomentMeasure ForceMomentT3T4 = {AnyRefNode &ref=....Joints.Thorax.T3T4.T4Node; AnyFloat rgb = {0,1,0}; #include "IncludeForce_ForceMomentMeasure.any"};
    AnyForceMomentMeasure ForceMomentT4T5 = {AnyRefNode &ref=....Joints.Thorax.T4T5.T5Node; AnyFloat rgb = {0,1,0}; #include "IncludeForce_ForceMomentMeasure.any"};
    AnyForceMomentMeasure ForceMomentT5T6 = {AnyRefNode &ref=....Joints.Thorax.T5T6.T6Node; AnyFloat rgb = {0,1,0}; #include "IncludeForce_ForceMomentMeasure.any"};
    AnyForceMomentMeasure ForceMomentT6T7 = {AnyRefNode &ref=....Joints.Thorax.T6T7.T7Node; AnyFloat rgb = {0,1,0}; #include "IncludeForce_ForceMomentMeasure.any"};
    AnyForceMomentMeasure ForceMomentT7T8 = {AnyRefNode &ref=....Joints.Thorax.T7T8.T8Node; AnyFloat rgb = {0,1,0}; #include "IncludeForce_ForceMomentMeasure.any"};
    AnyForceMomentMeasure ForceMomentT8T9 = {AnyRefNode &ref=....Joints.Thorax.T8T9.T9Node; AnyFloat rgb = {0,1,0}; #include "IncludeForce_ForceMomentMeasure.any"};
    AnyForceMomentMeasure ForceMomentT9T10 = {AnyRefNode &ref=....Joints.Thorax.T9T10.T10Node; AnyFloat rgb = {0,1,0}; #include "IncludeForce_ForceMomentMeasure.any"};
    AnyForceMomentMeasure ForceMomentT10T11 = {AnyRefNode &ref=....Joints.Thorax.T10T11.T11ode; AnyFloat rgb = {0,1,0}; #include "IncludeForce_ForceMomentMeasure.any"};
    AnyForceMomentMeasure ForceMomentT11T12 = {AnyRefNode &ref=....Joints.Thorax.T11T12.T12Node; AnyFloat rgb = {0,1,0}; #include "IncludeForce_ForceMomentMeasure.any"};

    AnyForceMomentMeasure ForceMomentCC1 = {AnyRefNode &ref=....Segments.Right.R1Seg.CC; AnyFloat rgb = {0,0,1}; #include "IncludeForce_ForceMomentMeasure.any"};
    AnyForceMomentMeasure ForceMomentCC2 = {AnyRefNode &ref=....Segments.Right.R2Seg.CC; AnyFloat rgb = {0,0,1}; #include "IncludeForce_ForceMomentMeasure.any"};
    AnyForceMomentMeasure ForceMomentCC3 = {AnyRefNode &ref=....Segments.Right.R3Seg.CC; AnyFloat rgb = {0,0,1}; #include "IncludeForce_ForceMomentMeasure.any"};
    AnyForceMomentMeasure ForceMomentCC4 = {AnyRefNode &ref=....Segments.Right.R4Seg.CC; AnyFloat rgb = {0,0,1}; #include "IncludeForce_ForceMomentMeasure.any"};
    AnyForceMomentMeasure ForceMomentCC5 = {AnyRefNode &ref=....Segments.Right.R5Seg.CC; AnyFloat rgb = {0,0,1}; #include "IncludeForce_ForceMomentMeasure.any"};
    AnyForceMomentMeasure ForceMomentCC6 = {AnyRefNode &ref=....Segments.Right.R6Seg.CC; AnyFloat rgb = {0,0,1}; #include "IncludeForce_ForceMomentMeasure.any"};
    AnyForceMomentMeasure ForceMomentCC7 = {AnyRefNode &ref=....Segments.Right.R7Seg.CC; AnyFloat rgb = {0,0,1}; #include "IncludeForce_ForceMomentMeasure.any"};
    AnyForceMomentMeasure ForceMomentCC8 = {AnyRefNode &ref=....Segments.Right.R8Seg.CC; AnyFloat rgb = {0,0,1}; #include "IncludeForce_ForceMomentMeasure.any"};
    AnyForceMomentMeasure ForceMomentCC9 = {AnyRefNode &ref=....Segments.Right.R9Seg.CC; AnyFloat rgb = {0,0,1}; #include "IncludeForce_ForceMomentMeasure.any"};
    AnyForceMomentMeasure ForceMomentCC10 = {AnyRefNode &ref=....Segments.Right.R10Seg.CC; AnyFloat rgb = {0,0,1}; #include "IncludeForce_ForceMomentMeasure.any"};

    AnyForceMomentMeasure ForceMomentCV1 = {AnyRefNode &ref=....Segments.Right.R1Seg.CV; AnyFloat rgb = {1,0,1}; #include "IncludeForce_ForceMomentMeasure.any"};
    AnyForceMomentMeasure ForceMomentCV2 = {AnyRefNode &ref=....Segments.Right.R2Seg.CV; AnyFloat rgb = {1,0,1}; #include "IncludeForce_ForceMomentMeasure.any"};
    AnyForceMomentMeasure ForceMomentCV3 = {AnyRefNode &ref=....Segments.Right.R3Seg.CV; AnyFloat rgb = {1,0,1}; #include "IncludeForce_ForceMomentMeasure.any"};
    AnyForceMomentMeasure ForceMomentCV4 = {AnyRefNode &ref=....Segments.Right.R4Seg.CV; AnyFloat rgb = {1,0,1}; #include "IncludeForce_ForceMomentMeasure.any"};
    AnyForceMomentMeasure ForceMomentCV5 = {AnyRefNode &ref=....Segments.Right.R5Seg.CV; AnyFloat rgb = {1,0,1}; #include "IncludeForce_ForceMomentMeasure.any"};
    AnyForceMomentMeasure ForceMomentCV6 = {AnyRefNode &ref=....Segments.Right.R6Seg.CV; AnyFloat rgb = {1,0,1}; #include "IncludeForce_ForceMomentMeasure.any"};
    AnyForceMomentMeasure ForceMomentCV7 = {AnyRefNode &ref=....Segments.Right.R7Seg.CV; AnyFloat rgb = {1,0,1}; #include "IncludeForce_ForceMomentMeasure.any"};
    AnyForceMomentMeasure ForceMomentCV8 = {AnyRefNode &ref=....Segments.Right.R8Seg.CV; AnyFloat rgb = {1,0,1}; #include "IncludeForce_ForceMomentMeasure.any"};
    AnyForceMomentMeasure ForceMomentCV9 = {AnyRefNode &ref=....Segments.Right.R9Seg.CV; AnyFloat rgb = {1,0,1}; #include "IncludeForce_ForceMomentMeasure.any"};
    AnyForceMomentMeasure ForceMomentCV10 = {AnyRefNode &ref=....Segments.Right.R10Seg.CV; AnyFloat rgb = {1,0,1}; #include "IncludeForce_ForceMomentMeasure.any"};

      AnyForceMomentMeasure ExternalForce = {AnyRefNode &ref=....Segments.SternalBodySeg.ManubriosternalJointNode; AnyFloat rgb = {0,0,0}; #include "IncludeForce_ForceMomentMeasure.any"};
    //  AnyForceMomentMeasure ExternalForceCC10 = {AnyRefNode &ref=....Segments.SternalBodySeg.Right.CCTangetNodeR10; AnyFloat rgb = {0,0,0}; #include "IncludeForce_ForceMomentMeasure.any"};

#if BM_TRUNK_CAVITY_MODEL == _CAVITY_MODEL_VOLUME_
    AnyForceMomentMeasure2 DiaphragmForce =
    {
      IncludeForces = {&Main.HumanModel.BodyModel.Trunk.Abdominal.Diaphragm.Joints.CavitySegConstraint.Reaction};
      //RefPoint = Global.Null;
      //IncludeSegments = ;
      //IncludeGravity = Off;
      //IncludeInertiaForces = Off;
      //CutSystem = Off;
      //CutSystemNormal = z;
      AnyRefFrame &ref = Main.HumanModel.BodyModel.Trunk.Segments.SternalBodySeg.Xiphoid_DiaphragmNodeR;
      AnySeg &seg1 = Main.HumanModel.BodyModel.Trunk.Segments.SternalBodySeg;
      AnySeg &seg2 = Main.HumanModel.BodyModel.Trunk.Segments.Right.R10Seg;
      AnySeg &seg3 = Main.HumanModel.BodyModel.Trunk.Segments.Right.R9Seg;
      AnySeg &seg4 = Main.HumanModel.BodyModel.Trunk.Segments.Right.R8Seg;
      AnySeg &seg5 = Main.HumanModel.BodyModel.Trunk.Segments.Left.R10Seg;
      AnySeg &seg6 = Main.HumanModel.BodyModel.Trunk.Segments.Left.R9Seg;
      AnySeg &seg7 = Main.HumanModel.BodyModel.Trunk.Segments.Left.R8Seg;
      AnySeg &seg8 = Main.HumanModel.BodyModel.Trunk.Segments.T8Seg;
      AnySeg &seg9 = Main.HumanModel.BodyModel.Trunk.Segments.T9Seg;
      AnySeg &seg10 = Main.HumanModel.BodyModel.Trunk.Segments.T10Seg;
      //AnyForceBase &<Insert name0> = <Insert object reference (or full object definition)>; You can make any number of these objects!

      AnyFloat rgb = {0.2,0.2,0.2};
      AnyDrawVector drw1 = {Vec = .F*0.0005; AnyRefFrame &ref = .ref; Line.RGB=.rgb;};
    };
    AnyForceMomentMeasure2 LayerForce =
    {
      IncludeForces = {
        &Main.HumanModel.BodyModel.Trunk.Abdominal.Layer_L1.LayerConstraints.RotationConstraint.Reaction,
        &Main.HumanModel.BodyModel.Trunk.Abdominal.Layer_L2.LayerConstraints.RotationConstraint.Reaction,
        &Main.HumanModel.BodyModel.Trunk.Abdominal.Layer_L3.LayerConstraints.RotationConstraint.Reaction,
        &Main.HumanModel.BodyModel.Trunk.Abdominal.Layer_L4.LayerConstraints.RotationConstraint.Reaction,
        &Main.HumanModel.BodyModel.Trunk.Abdominal.Layer_L5.LayerConstraints.RotationConstraint.Reaction
      };
      //RefPoint = Global.Null;
      //IncludeSegments = ;
      //IncludeGravity = Off;
      //IncludeInertiaForces = Off;
      //CutSystem = Off;
      //CutSystemNormal = z;
      //AnyRefFrame &<Insert name0> = <Insert object reference (or full object definition)>; You can make any number of these objects!
      AnyRefFrame &ref = Main.HumanModel.BodyModel.Trunk.Segments.SternalBodySeg.Xiphoid_DiaphragmNodeR;
      AnySeg &seg1 = Main.HumanModel.BodyModel.Trunk.Segments.SternalBodySeg;
//      AnySeg &seg2 = Main.HumanModel.BodyModel.Trunk.Segments.Right.R10Seg;
//      AnySeg &seg3 = Main.HumanModel.BodyModel.Trunk.Segments.Right.R9Seg;
//      AnySeg &seg4 = Main.HumanModel.BodyModel.Trunk.Segments.Right.R8Seg;
//      AnySeg &seg5 = Main.HumanModel.BodyModel.Trunk.Segments.Left.R10Seg;
//      AnySeg &seg6 = Main.HumanModel.BodyModel.Trunk.Segments.Left.R9Seg;
//      AnySeg &seg7 = Main.HumanModel.BodyModel.Trunk.Segments.Left.R8Seg;
//      AnySeg &seg8 = Main.HumanModel.BodyModel.Trunk.Segments.T8Seg;
//      AnySeg &seg9 = Main.HumanModel.BodyModel.Trunk.Segments.T9Seg;
//      AnySeg &seg10 = Main.HumanModel.BodyModel.Trunk.Segments.T10Seg;
      //AnyForceBase &<Insert name0> = <Insert object reference (or full object definition)>; You can make any number of these objects!

      AnyFloat rgb = {0,0,0};
      AnyDrawVector drw1 = {Vec = .F*0.0005; AnyRefFrame &ref = .ref; Line.RGB=.rgb;};
    };
#endif
  };
};
#endif
//};
