AnyFolder RibsWrappingSurfaces =
{
      AnyFunEx& readpp = Main.HumanModel.Utils.PickPointsReaderByName;

      AnyFunTransform3DLin Scale = {
        PreTransforms = { & ..ThoraxSeg.GeomScale};
        ScaleMat = ..ThoraxSeg.ij.ARel';
        Offset = -..ThoraxSeg.ij.sRel;
      };

      Torus3PointOuterFit T2Wrapping(REFFRAME = ..ThoraxSeg.ij, NAME=T2WrappingTorus) = {
         P1 = .Scale(.readpp("torax_t2.pp", "0")) ;
         P2 =  .Scale(.readpp("torax_t2.pp", "1"));
         P3 =  .Scale(.readpp("torax_t2.pp", "2"));
      };
      Torus3PointOuterFit T3Wrapping(REFFRAME = ..ThoraxSeg.ij, NAME=T3WrappingTorus) = {
         P1 = .Scale(.readpp("torax_t3.pp", "0")) ;
         P2 =  .Scale(.readpp("torax_t3.pp", "1"));
         P3 =  .Scale(.readpp("torax_t3.pp", "2"));
      };
      Torus3PointOuterFit T4Wrapping(REFFRAME = ..ThoraxSeg.ij, NAME=T4WrappingTorus) = {
         P1 = .Scale(.readpp("torax_t4.pp", "0")) ;
         P2 =  .Scale(.readpp("torax_t4.pp", "1"));
         P3 =  .Scale(.readpp("torax_t4.pp", "2"));
      };
      Torus3PointOuterFit T5Wrapping(REFFRAME = ..ThoraxSeg.ij, NAME=T5WrappingTorus) = {
         P1 = .Scale(.readpp("torax_t5.pp", "0")) ;
         P2 =  .Scale(.readpp("torax_t5.pp", "1"));
         P3 =  .Scale(.readpp("torax_t5.pp", "2"));
      };
      Torus3PointOuterFit T6Wrapping(REFFRAME = ..ThoraxSeg.ij, NAME=T6hWrappingTorus) = {
         P1 = .Scale(.readpp("torax_t6.pp", "0")) ;
         P2 =  .Scale(.readpp("torax_t6.pp", "1"));
         P3 =  .Scale(.readpp("torax_t6.pp", "2"));
      };
      Torus3PointOuterFit T7Wrapping(REFFRAME = ..ThoraxSeg.ij, NAME=T7hWrappingTorus) = {
         P1 = .Scale(.readpp("torax_t7.pp", "0")) ;
         P2 =  .Scale(.readpp("torax_t7.pp", "1"));
         P3 =  .Scale(.readpp("torax_t7.pp", "2"));
      };
      Torus3PointOuterFit T8Wrapping(REFFRAME = ..ThoraxSeg.ij, NAME=T8hWrappingTorus) = {
         P1 = .Scale(.readpp("torax_t8.pp", "0")) ;
         P2 =  .Scale(.readpp("torax_t8.pp", "1"));
         P3 =  .Scale(.readpp("torax_t8.pp", "2"));
      };
      Torus3PointOuterFit T9Wrapping(REFFRAME = ..ThoraxSeg.ij, NAME=T9hWrappingTorus) = {
         P1 = .Scale(.readpp("torax_t9.pp", "0")) ;
         P2 =  .Scale(.readpp("torax_t9.pp", "1"));
         P3 =  .Scale(.readpp("torax_t9.pp", "2"));
      };
      Torus3PointOuterFit T10Wrapping(REFFRAME = ..ThoraxSeg.ij, NAME=T10WrappingTorus) = {
         P1 = .Scale(.readpp("torax_t10.pp", "0")) ;
         P2 =  .Scale(.readpp("torax_t10.pp", "1"));
         P3 =  .Scale(.readpp("torax_t10.pp", "2"));
      };
      Torus3PointOuterFit T11Wrapping(REFFRAME = ..ThoraxSeg.ij, NAME=T11WrappingTorus) = {
         P1 = .Scale(.readpp("torax_t11.pp", "0")) ;
         P2 =  .Scale(.readpp("torax_t11.pp", "1"));
         P3 =  .Scale(.readpp("torax_t11.pp", "2"));
      };
      Torus3PointOuterFit T12Wrapping(REFFRAME = ..ThoraxSeg.ij, NAME=T21WrappingTorus) = {
         P1 = .Scale(.readpp("torax_t12.pp", "0")) ;
         P2 =  .Scale(.readpp("torax_t12.pp", "1"));
         P3 =  .Scale(.readpp("torax_t12.pp", "2"));
      };
};
