#if BM_TRUNK_CAVITY_MODEL == _CAVITY_MODEL_VOLUME_
  AnyRefNode  Disc7CenterNode ={sRel = .Scale(.StdPar.Disc7Center_pos);};
  AnyRefNode  Puporectalis1NodeR ={sRel = .Scale(.StdPar.Right.Puporectalis1_pos);};
  AnyRefNode  Puporectalis2NodeR ={sRel = .Scale(.StdPar.Right.Puporectalis2_pos);};
  AnyRefNode  Puporectalis1NodeL ={sRel = .Scale(.StdPar.Left.Puporectalis1_pos);};
  AnyRefNode  Puporectalis2NodeL ={sRel = .Scale(.StdPar.Left.Puporectalis2_pos);};
  AnyRefNode  Pupococcygeus1NodeR = {sRel = .Scale(.StdPar.Right.Pupococcygeus1_pos);};
  AnyRefNode  Pupococcygeus2NodeR = {sRel = .Scale( .StdPar.Right.Pupococcygeus2_pos);};
  AnyRefNode  Pupococcygeus1NodeL ={sRel = .Scale( .StdPar.Left.Pupococcygeus1_pos);};
  AnyRefNode  Pupococcygeus2NodeL ={sRel = .Scale( .StdPar.Left.Pupococcygeus2_pos);};
#endif
