SelectedOutput.Trunk.JointMomentMeasure = {
    AnyVar L5SacrumExtensionMoment = ...Trunk.JointMuscles.L5SacrumJnt.Extension.dof0.Muscle.PosMuscle.Fm
                                   - ...Trunk.JointMuscles.L5SacrumJnt.Extension.dof0.Muscle.NegMuscle.Fm;

    AnyVar L5SacrumAxialMoment = ...Trunk.JointMuscles.L5SacrumJnt.AxialRotation.dof1.Muscle.PosMuscle.Fm
                               - ...Trunk.JointMuscles.L5SacrumJnt.AxialRotation.dof1.Muscle.NegMuscle.Fm;

    AnyVar L5SacrumLateralMoment = ...Trunk.JointMuscles.L5SacrumJnt.LateralBend.dof0.Muscle.PosMuscle.Fm
                                 - ...Trunk.JointMuscles.L5SacrumJnt.LateralBend.dof0.Muscle.NegMuscle.Fm;
    // SacrumSeg.SacrumL5JntNode ref


    AnyVar L4L5ExtensionMoment = ...Trunk.JointMuscles.L4L5Jnt.Extension.dof0.Muscle.PosMuscle.Fm
                               - ...Trunk.JointMuscles.L4L5Jnt.Extension.dof0.Muscle.NegMuscle.Fm;

    AnyVar L4L5AxialMoment = ...Trunk.JointMuscles.L4L5Jnt.AxialRotation.dof1.Muscle.PosMuscle.Fm
                           - ...Trunk.JointMuscles.L4L5Jnt.AxialRotation.dof1.Muscle.NegMuscle.Fm;

    AnyVar L4L5LateralMoment = ...Trunk.JointMuscles.L4L5Jnt.LateralBend.dof0.Muscle.PosMuscle.Fm
                             - ...Trunk.JointMuscles.L4L5Jnt.LateralBend.dof0.Muscle.NegMuscle.Fm;
    // L5Seg.L4L5JntNode ref


    AnyVar L3L4ExtensionMoment = ...Trunk.JointMuscles.L3L4Jnt.Extension.dof0.Muscle.PosMuscle.Fm
                               - ...Trunk.JointMuscles.L3L4Jnt.Extension.dof0.Muscle.NegMuscle.Fm;

    AnyVar L3L4AxialMoment = ...Trunk.JointMuscles.L3L4Jnt.AxialRotation.dof1.Muscle.PosMuscle.Fm
                           - ...Trunk.JointMuscles.L3L4Jnt.AxialRotation.dof1.Muscle.NegMuscle.Fm;

    AnyVar L3L4LateralMoment = ...Trunk.JointMuscles.L3L4Jnt.LateralBend.dof0.Muscle.PosMuscle.Fm
                             - ...Trunk.JointMuscles.L3L4Jnt.LateralBend.dof0.Muscle.NegMuscle.Fm;
    // L4Seg.L3L4JntNode ref


    AnyVar L2L3ExtensionMoment = ...Trunk.JointMuscles.L2L3Jnt.Extension.dof0.Muscle.PosMuscle.Fm
                               - ...Trunk.JointMuscles.L2L3Jnt.Extension.dof0.Muscle.NegMuscle.Fm;

    AnyVar L2L3AxialMoment = ...Trunk.JointMuscles.L2L3Jnt.AxialRotation.dof1.Muscle.PosMuscle.Fm
                           - ...Trunk.JointMuscles.L2L3Jnt.AxialRotation.dof1.Muscle.NegMuscle.Fm;

    AnyVar L2L3LateralMoment = ...Trunk.JointMuscles.L2L3Jnt.LateralBend.dof0.Muscle.PosMuscle.Fm
                             - ...Trunk.JointMuscles.L2L3Jnt.LateralBend.dof0.Muscle.NegMuscle.Fm;
    // L3Seg.L2L3JntNode ref


    AnyVar L1L2ExtensionMoment = ...Trunk.JointMuscles.L1L2Jnt.Extension.dof0.Muscle.PosMuscle.Fm
                               - ...Trunk.JointMuscles.L1L2Jnt.Extension.dof0.Muscle.NegMuscle.Fm;

    AnyVar L1L2AxialMoment = ...Trunk.JointMuscles.L1L2Jnt.AxialRotation.dof1.Muscle.PosMuscle.Fm
                           - ...Trunk.JointMuscles.L1L2Jnt.AxialRotation.dof1.Muscle.NegMuscle.Fm;

    AnyVar L1L2LateralMoment = ...Trunk.JointMuscles.L1L2Jnt.LateralBend.dof0.Muscle.PosMuscle.Fm
                             - ...Trunk.JointMuscles.L1L2Jnt.LateralBend.dof0.Muscle.NegMuscle.Fm;
    // L2Seg.L1L2JntNode ref


    AnyVar T12L1ExtensionMoment = ...Trunk.JointMuscles.T12L1Jnt.Extension.dof0.Muscle.PosMuscle.Fm
                                - ...Trunk.JointMuscles.T12L1Jnt.Extension.dof0.Muscle.NegMuscle.Fm;

    AnyVar T12L1AxialMoment = ...Trunk.JointMuscles.T12L1Jnt.AxialRotation.dof1.Muscle.PosMuscle.Fm
                            - ...Trunk.JointMuscles.T12L1Jnt.AxialRotation.dof1.Muscle.NegMuscle.Fm;

    AnyVar T12L1LateralMoment = ...Trunk.JointMuscles.T12L1Jnt.LateralBend.dof0.Muscle.PosMuscle.Fm
                              - ...Trunk.JointMuscles.T12L1Jnt.LateralBend.dof0.Muscle.NegMuscle.Fm;
    // L1Seg.T12L1JntNode ref
};
