AnyFolder SemispinalisCervicis = {
  AnyMuscleViaPoint SemispinalisCervicisT1C2 = {
    AnyMuscleModel &MusMdl = ...MuscleParametersCervicalSpineLeft.SemispinalisCervicisT1C2Par;
    AnyRefNode &Org = ...SegmentsThorax.T1Seg.SemispinalisCervicisT1C2NodeL;
    AnyRefNode &Ins = ...SegmentsCervicalSpine.C2Seg.SemispinalisCervicisT1C2NodeL;
    AnyDrawMuscle DrwMus = {#include "../drawSettings/MusDrawSettings.any"};
  };

  AnyMuscleViaPoint SemispinalisCervicisT2C3 = {
    AnyMuscleModel &MusMdl = ...MuscleParametersCervicalSpineLeft.SemispinalisCervicisT2C3Par;
    AnyRefNode &Org = ...SegmentsThorax.T2Seg.SemispinalisCervicisT2C3NodeL;
    AnyRefNode &Ins = ...SegmentsCervicalSpine.C3Seg.SemispinalisCervicisT2C3NodeL;
    AnyDrawMuscle DrwMus = {#include "../drawSettings/MusDrawSettings.any"};
  };

  AnyMuscleViaPoint SemispinalisCervicisT3C4 = {
    AnyMuscleModel &MusMdl = ...MuscleParametersCervicalSpineLeft.SemispinalisCervicisT3C4Par;
    AnyRefNode &Org = ...SegmentsThorax.T3Seg.SemispinalisCervicisT3C4NodeL;
    AnyRefNode &Ins = ...SegmentsCervicalSpine.C4Seg.SemispinalisCervicisT3C4NodeL;
    AnyDrawMuscle DrwMus = {#include "../drawSettings/MusDrawSettings.any"};
  };

  AnyMuscleViaPoint SemispinalisCervicisT4C5 = {
    AnyMuscleModel &MusMdl = ...MuscleParametersCervicalSpineLeft.SemispinalisCervicisT4C5Par;
    AnyRefNode &Org = ...SegmentsThorax.T4Seg.SemispinalisCervicisT4C5NodeL;
    AnyRefNode &Ins = ...SegmentsCervicalSpine.C5Seg.SemispinalisCervicisT4C5NodeL;
    AnyDrawMuscle DrwMus = {#include "../drawSettings/MusDrawSettings.any"};
  };

  AnyMuscleViaPoint SemispinalisCervicisT5C6 = {
    AnyMuscleModel &MusMdl = ...MuscleParametersCervicalSpineLeft.SemispinalisCervicisT5C6Par;
    AnyRefNode &Org = ...SegmentsThorax.T5Seg.SemispinalisCervicisT5C6NodeL;
    AnyRefNode &Ins = ...SegmentsCervicalSpine.C6Seg.SemispinalisCervicisT5C6NodeL;
    AnyDrawMuscle DrwMus = {#include "../drawSettings/MusDrawSettings.any"};
  };

  AnyMuscleViaPoint SemispinalisCervicisT6C7 = {
    AnyMuscleModel &MusMdl = ...MuscleParametersCervicalSpineLeft.SemispinalisCervicisT6C7Par;
    AnyRefNode &Org = ...SegmentsThorax.T6Seg.SemispinalisCervicisT6C7NodeL;
    AnyRefNode &Ins = ...SegmentsCervicalSpine.C7Seg.SemispinalisCervicisT6C7NodeL;
    AnyDrawMuscle DrwMus = {#include "../drawSettings/MusDrawSettings.any"};
  };
};
