AnyFolder SemispinalisCervicis = {
  AnyMuscleViaPoint SemispinalisCervicisT1C2 = {
    AnyMuscleModel &MusMdl = ...MuscleParametersCervicalSpineRight.SemispinalisCervicisT1C2Par;
    AnyRefNode &Org = ...SegmentsThorax.T1Seg.SemispinalisCervicisT1C2NodeR;
    AnyRefNode &Ins = ...SegmentsCervicalSpine.C2Seg.SemispinalisCervicisT1C2NodeR;
    AnyDrawMuscle DrwMus = {#include "../drawSettings/MusDrawSettings.any"};
  };

  AnyMuscleViaPoint SemispinalisCervicisT2C3 = {
    AnyMuscleModel &MusMdl = ...MuscleParametersCervicalSpineRight.SemispinalisCervicisT2C3Par;
    AnyRefNode &Org = ...SegmentsThorax.T2Seg.SemispinalisCervicisT2C3NodeR;
    AnyRefNode &Ins = ...SegmentsCervicalSpine.C3Seg.SemispinalisCervicisT2C3NodeR;
    AnyDrawMuscle DrwMus = {#include "../drawSettings/MusDrawSettings.any"};
  };

  AnyMuscleViaPoint SemispinalisCervicisT3C4 = {
    AnyMuscleModel &MusMdl = ...MuscleParametersCervicalSpineRight.SemispinalisCervicisT3C4Par;
    AnyRefNode &Org = ...SegmentsThorax.T3Seg.SemispinalisCervicisT3C4NodeR;
    AnyRefNode &Ins = ...SegmentsCervicalSpine.C4Seg.SemispinalisCervicisT3C4NodeR;
    AnyDrawMuscle DrwMus = {#include "../drawSettings/MusDrawSettings.any"};
  };

  AnyMuscleViaPoint SemispinalisCervicisT4C5 = {
    AnyMuscleModel &MusMdl = ...MuscleParametersCervicalSpineRight.SemispinalisCervicisT4C5Par;
    AnyRefNode &Org = ...SegmentsThorax.T4Seg.SemispinalisCervicisT4C5NodeR;
    AnyRefNode &Ins = ...SegmentsCervicalSpine.C5Seg.SemispinalisCervicisT4C5NodeR;
    AnyDrawMuscle DrwMus = {#include "../drawSettings/MusDrawSettings.any"};
  };

  AnyMuscleViaPoint SemispinalisCervicisT5C6 = {
    AnyMuscleModel &MusMdl = ...MuscleParametersCervicalSpineRight.SemispinalisCervicisT5C6Par;
    AnyRefNode &Org = ...SegmentsThorax.T5Seg.SemispinalisCervicisT5C6NodeR;
    AnyRefNode &Ins = ...SegmentsCervicalSpine.C6Seg.SemispinalisCervicisT5C6NodeR;
    AnyDrawMuscle DrwMus = {#include "../drawSettings/MusDrawSettings.any"};
  };

  AnyMuscleViaPoint SemispinalisCervicisT6C7 = {
    AnyMuscleModel &MusMdl = ...MuscleParametersCervicalSpineRight.SemispinalisCervicisT6C7Par;
    AnyRefNode &Org = ...SegmentsThorax.T6Seg.SemispinalisCervicisT6C7NodeR;
    AnyRefNode &Ins = ...SegmentsCervicalSpine.C7Seg.SemispinalisCervicisT6C7NodeR;
    AnyDrawMuscle DrwMus = {#include "../drawSettings/MusDrawSettings.any"};
  };
};
