AnyFolder Semispinalis = {


  AnyMuscleViaPoint SEL1T8 =
  {
    AnyMuscleModel &MusMdl = ...MuscleParametersSpineLeft.SemispinalisParameter.SEL1T8Par;
    AnyRefFrame &Org = ...SegmentsLumbar.L1Seg.SEL1T8NodeLOrg;
    AnyRefFrame &Ins = ...SegmentsThorax.T8Seg.SEL1T8NodeLIns;
    AnyDrawMuscle DrwMus = {#include "../drawSettings/MusDrawSettings.any"};

  };


  AnyMuscleViaPoint SEL1T10 =
  {
    AnyMuscleModel &MusMdl = ...MuscleParametersSpineLeft.SemispinalisParameter.SEL1T10Par;
    AnyRefFrame &Org = ...SegmentsLumbar.L1Seg.SEL1T10NodeLOrg;
    AnyRefFrame &Ins = ...SegmentsThorax.T10Seg.SEL1T10NodeLIns;
    AnyDrawMuscle DrwMus = {#include "../drawSettings/MusDrawSettings.any"};

  };


  AnyMuscleViaPoint SEL1T11 =
  {
    AnyMuscleModel &MusMdl = ...MuscleParametersSpineLeft.SemispinalisParameter.SEL1T11Par;
    AnyRefFrame &Org = ...SegmentsLumbar.L1Seg.SEL1T11NodeLOrg;
    AnyRefFrame &Ins = ...SegmentsThorax.T11Seg.SEL1T11NodeLIns;
    AnyDrawMuscle DrwMus = {#include "../drawSettings/MusDrawSettings.any"};

  };


  AnyMuscleViaPoint SEL2T9 =
  {
    AnyMuscleModel &MusMdl = ...MuscleParametersSpineLeft.SemispinalisParameter.SEL2T9Par;
    AnyRefFrame &Org = ...SegmentsLumbar.L2Seg.SEL2T9NodeLOrg;
    AnyRefFrame &Ins = ...SegmentsThorax.T9Seg.SEL2T9NodeLIns;
    AnyDrawMuscle DrwMus = {#include "../drawSettings/MusDrawSettings.any"};

  };


  AnyMuscleViaPoint SEL2T10 =
  {
    AnyMuscleModel &MusMdl = ...MuscleParametersSpineLeft.SemispinalisParameter.SEL2T10Par;
    AnyRefFrame &Org = ...SegmentsLumbar.L2Seg.SEL2T10NodeLOrg;
    AnyRefFrame &Ins = ...SegmentsThorax.T10Seg.SEL2T10NodeLIns;
    AnyDrawMuscle DrwMus = {#include "../drawSettings/MusDrawSettings.any"};

  };


  AnyMuscleViaPoint SEL2T11 =
  {
    AnyMuscleModel &MusMdl = ...MuscleParametersSpineLeft.SemispinalisParameter.SEL2T11Par;
    AnyRefFrame &Org = ...SegmentsLumbar.L2Seg.SEL2T11NodeLOrg;
    AnyRefFrame &Ins = ...SegmentsThorax.T11Seg.SEL2T11NodeLIns;
    AnyDrawMuscle DrwMus = {#include "../drawSettings/MusDrawSettings.any"};

  };


  AnyMuscleViaPoint SEL2T12 =
  {
    AnyMuscleModel &MusMdl = ...MuscleParametersSpineLeft.SemispinalisParameter.SEL2T12Par;
    AnyRefFrame &Org = ...SegmentsLumbar.L2Seg.SEL2T12NodeLOrg;
    AnyRefFrame &Ins = ...SegmentsThorax.T12Seg.SEL2T12NodeLIns;
    AnyDrawMuscle DrwMus = {#include "../drawSettings/MusDrawSettings.any"};

  };


  AnyMuscleViaPoint SEL3T11 =
  {
    AnyMuscleModel &MusMdl = ...MuscleParametersSpineLeft.SemispinalisParameter.SEL3T11Par;
    AnyRefFrame &Org = ...SegmentsLumbar.L3Seg.SEL3T11NodeLOrg;
    AnyRefFrame &Ins = ...SegmentsThorax.T11Seg.SEL3T11NodeLIns;
    AnyDrawMuscle DrwMus = {#include "../drawSettings/MusDrawSettings.any"};

  };


  AnyMuscleViaPoint SEL3T12 =
  {
    AnyMuscleModel &MusMdl = ...MuscleParametersSpineLeft.SemispinalisParameter.SEL3T12Par;
    AnyRefFrame &Org = ...SegmentsLumbar.L3Seg.SEL3T12NodeLOrg;
    AnyRefFrame &Ins = ...SegmentsThorax.T12Seg.SEL3T12NodeLIns;
    AnyDrawMuscle DrwMus = {#include "../drawSettings/MusDrawSettings.any"};

  };
};
