AnyFolder MusclesSpine={

  AnyFolder Spinalis = {

  #if BM_TRUNK_THORACIC_FUTURE
    AnyMuscleViaPoint SPT11T6 =
    {
      AnyMuscleModel &MusMdl = ...MuscleParametersSpineRight.SpinalisParameter.SPT11T6Par;
      AnyRefFrame &Org = ...SegmentsThorax.T11Seg.SPT11T6NodeOrg;
      AnyRefFrame &Via1 = ...SegmentsThorax.T10Seg.SPT11T6Via1Node;
      AnyRefFrame &Via2 = ...SegmentsThorax.T9Seg.SPT11T6Via2Node;
      AnyRefFrame &Via3 = ...SegmentsThorax.T8Seg.SPT11T6Via3Node;
      AnyRefFrame &Via4 = ...SegmentsThorax.T7Seg.SPT11T6Via4Node;
      AnyRefFrame &Ins = ...SegmentsThorax.T6Seg.SPT11T6NodeIns;
      AnyDrawMuscle DrwMus = {#include "../drawSettings/MusDrawSettings.any"};

    };

    AnyMuscleViaPoint SPT12T5 =
    {
      AnyMuscleModel &MusMdl = ...MuscleParametersSpineRight.SpinalisParameter.SPT12T5Par;
      AnyRefFrame &Org = ...SegmentsThorax.T12Seg.SPT12T5NodeOrg;
      AnyRefFrame &Via1 = ...SegmentsThorax.T11Seg.SPT12T5Via1Node;
      AnyRefFrame &Via2 = ...SegmentsThorax.T10Seg.SPT12T5Via2Node;
      AnyRefFrame &Via3 = ...SegmentsThorax.T9Seg.SPT12T5Via3Node;
      AnyRefFrame &Via4 = ...SegmentsThorax.T8Seg.SPT12T5Via4Node;
      AnyRefFrame &Via5 = ...SegmentsThorax.T7Seg.SPT12T5Via5Node;
      AnyRefFrame &Via6 = ...SegmentsThorax.T6Seg.SPT12T5Via6Node;
      AnyRefFrame &Ins = ...SegmentsThorax.T5Seg.SPT12T5NodeIns;
      AnyDrawMuscle DrwMus = {#include "../drawSettings/MusDrawSettings.any"};

    };


    AnyMuscleViaPoint SPT12T4 =
    {
      AnyMuscleModel &MusMdl = ...MuscleParametersSpineRight.SpinalisParameter.SPT12T4Par;
      AnyRefFrame &Org = ...SegmentsThorax.T12Seg.SPT12T4NodeOrg;
      AnyRefFrame &Via1 = ...SegmentsThorax.T11Seg.SPT12T4Via1Node;
      AnyRefFrame &Via2 = ...SegmentsThorax.T10Seg.SPT12T4Via2Node;
      AnyRefFrame &Via3 = ...SegmentsThorax.T9Seg.SPT12T4Via3Node;
      AnyRefFrame &Via4 = ...SegmentsThorax.T8Seg.SPT12T4Via4Node;
      AnyRefFrame &Via5 = ...SegmentsThorax.T7Seg.SPT12T4Via5Node;
      AnyRefFrame &Via6 = ...SegmentsThorax.T6Seg.SPT12T4Via6Node;
      AnyRefFrame &Via7 = ...SegmentsThorax.T5Seg.SPT12T4Via7Node;
      AnyRefFrame &Ins = ...SegmentsThorax.T4Seg.SPT12T4NodeIns;
      AnyDrawMuscle DrwMus = {#include "../drawSettings/MusDrawSettings.any"};

    };


    AnyMuscleViaPoint SPL1T3 =
    {
      AnyMuscleModel &MusMdl = ...MuscleParametersSpineRight.SpinalisParameter.SPL1T3Par;
      AnyRefFrame &Org = ...SegmentsLumbar.L1Seg.SPL1T3NodeOrg;
      AnyRefFrame &Via1 = ...SegmentsThorax.T12Seg.SPL1T3Via1Node;
      AnyRefFrame &Via2 = ...SegmentsThorax.T11Seg.SPL1T3Via2Node;
      AnyRefFrame &Via3 = ...SegmentsThorax.T10Seg.SPL1T3Via3Node;
      AnyRefFrame &Via4 = ...SegmentsThorax.T9Seg.SPL1T3Via4Node;
      AnyRefFrame &Via5 = ...SegmentsThorax.T8Seg.SPL1T3Via5Node;
      AnyRefFrame &Via6 = ...SegmentsThorax.T7Seg.SPL1T3Via6Node;
      AnyRefFrame &Via7 = ...SegmentsThorax.T6Seg.SPL1T3Via7Node;
      AnyRefFrame &Via8 = ...SegmentsThorax.T5Seg.SPL1T3Via8Node;
      AnyRefFrame &Via9 = ...SegmentsThorax.T4Seg.SPL1T3Via9Node;
      AnyRefFrame &Ins = ...SegmentsThorax.T3Seg.SPL1T3NodeIns;
      AnyDrawMuscle DrwMus = {#include "../drawSettings/MusDrawSettings.any"};

    };

    AnyMuscleViaPoint SPL1T2 =
    {
      AnyMuscleModel &MusMdl = ...MuscleParametersSpineRight.SpinalisParameter.SPL1T2Par;
      AnyRefFrame &Org = ...SegmentsLumbar.L1Seg.SPL1T2NodeOrg;
      AnyRefFrame &Via1 = ...SegmentsThorax.T12Seg.SPL1T2Via1Node;
      AnyRefFrame &Via2 = ...SegmentsThorax.T11Seg.SPL1T2Via2Node;
      AnyRefFrame &Via3 = ...SegmentsThorax.T10Seg.SPL1T2Via3Node;
      AnyRefFrame &Via4 = ...SegmentsThorax.T9Seg.SPL1T2Via4Node;
      AnyRefFrame &Via5 = ...SegmentsThorax.T8Seg.SPL1T2Via5Node;
      AnyRefFrame &Via6 = ...SegmentsThorax.T7Seg.SPL1T2Via6Node;
      AnyRefFrame &Via7 = ...SegmentsThorax.T6Seg.SPL1T2Via7Node;
      AnyRefFrame &Via8 = ...SegmentsThorax.T5Seg.SPL1T2Via8Node;
      AnyRefFrame &Via9 = ...SegmentsThorax.T4Seg.SPL1T2Via9Node;
      AnyRefFrame &Via10 = ...SegmentsThorax.T3Seg.SPL1T2Via10Node;
      AnyRefFrame &Ins = ...SegmentsThorax.T2Seg.SPL1T2NodeIns;
      AnyDrawMuscle DrwMus = {#include "../drawSettings/MusDrawSettings.any"};

    };

    AnyMuscleViaPoint SPL2T1 =
    {
      AnyMuscleModel &MusMdl = ...MuscleParametersSpineRight.SpinalisParameter.SPL2T1Par;
      AnyRefFrame &Org = ...SegmentsLumbar.L2Seg.SPL2T1NodeOrg;
      AnyRefFrame &Via1 = ...SegmentsLumbar.L1Seg.SPL2T1Via1Node;
      AnyRefFrame &Via2 = ...SegmentsThorax.T12Seg.SPL2T1Via2Node;
      AnyRefFrame &Via3 = ...SegmentsThorax.T11Seg.SPL2T1Via3Node;
      AnyRefFrame &Via4 = ...SegmentsThorax.T10Seg.SPL2T1Via4Node;
      AnyRefFrame &Via5 = ...SegmentsThorax.T9Seg.SPL2T1Via5Node;
      AnyRefFrame &Via6 = ...SegmentsThorax.T8Seg.SPL2T1Via6Node;
      AnyRefFrame &Via7 = ...SegmentsThorax.T7Seg.SPL2T1Via7Node;
      AnyRefFrame &Via8 = ...SegmentsThorax.T6Seg.SPL2T1Via8Node;
      AnyRefFrame &Via9 = ...SegmentsThorax.T5Seg.SPL2T1Via9Node;
      AnyRefFrame &Via10 = ...SegmentsThorax.T4Seg.SPL2T1Via10Node;
      AnyRefFrame &Via11 = ...SegmentsThorax.T3Seg.SPL2T1Via11Node;
      AnyRefFrame &Via12 = ...SegmentsThorax.T2Seg.SPL2T1Via12Node;
      AnyRefFrame &Ins = ...SegmentsThorax.T1Seg.SPL2T1NodeIns;
      AnyDrawMuscle DrwMus = {#include "../drawSettings/MusDrawSettings.any"};

    };

#else

    AnyMuscleViaPoint SPL1T3 =
    {
      AnyMuscleModel &MusMdl = ...MuscleParametersSpineRight.SpinalisParameter.SPL1T3Par;
      AnyRefFrame &Org = ...SegmentsLumbar.L1Seg.SPL1T3NodeOrg;
      AnyRefFrame &Ins = ...SegmentsThorax.T3Seg.SPL1T3NodeIns;
      AnyDrawMuscle DrwMus = {#include "../drawSettings/MusDrawSettings.any"};

    };


    AnyMuscleViaPoint SPL1T4 =
    {
      AnyMuscleModel &MusMdl = ...MuscleParametersSpineRight.SpinalisParameter.SPL1T4Par;
      AnyRefFrame &Org = ...SegmentsLumbar.L1Seg.SPL1T4NodeOrg;
      AnyRefFrame &Ins = ...SegmentsThorax.T4Seg.SPL1T4NodeIns;
      AnyDrawMuscle DrwMus = {#include "../drawSettings/MusDrawSettings.any"};

    };


    AnyMuscleViaPoint SPL1T5 =
    {
      AnyMuscleModel &MusMdl = ...MuscleParametersSpineRight.SpinalisParameter.SPL1T5Par;
      AnyRefFrame &Org = ...SegmentsLumbar.L1Seg.SPL1T5NodeOrg;
      AnyRefFrame &Ins = ...SegmentsThorax.T5Seg.SPL1T5NodeIns;
      AnyDrawMuscle DrwMus = {#include "../drawSettings/MusDrawSettings.any"};

    };
#endif


  };
};
