AnyFolder SpleniusCapitis = {
  AnyMuscleViaPoint SpleniusCapitisC7C0 = {
    AnyMuscleModel &MusMdl = ...MuscleParametersCervicalSpineRight.SpleniusCapitisC7C0Par;
    AnyRefNode &Org = ...SegmentsCervicalSpine.SkullSeg.SpleniusCapitisNodeR;
    AnyRefNode &Ins = ...SegmentsCervicalSpine.C7Seg.SpleniusCapitisC7C0NodeR;
    AnyDrawMuscle DrwMus = {#include "../drawSettings/MusDrawSettings.any"};
  };

  AnyMuscleViaPoint SpleniusCapitisT2C0 = {
    AnyMuscleModel &MusMdl = ...MuscleParametersCervicalSpineRight.SpleniusCapitisT2C0Par;
    AnyRefNode &Org = ...SegmentsCervicalSpine.SkullSeg.SpleniusCapitisNodeR;
    AnyRefNode &Ins = ...SegmentsThorax.T2Seg.SpleniusCapitisT2C0NodeR;
    AnyDrawMuscle DrwMus = {#include "../drawSettings/MusDrawSettings.any"};
  };
};
