AnyFolder TransversusThoracis = {
  AnyMuscleViaPoint TrThR2S = {
    AnyMuscleModel &Model = ...MuscleParametersRibCageLeft.TransvThModel;
    AnyRefNode &R2 = ...SegmentsRibCage.RibsLeft.R2Seg.TrThR2SNodeLOrg;
    AnyRefNode &S = ...SegmentsRibCage.SternumSeg.TrThR2SNodeLIns;
    AnyDrawMuscle DrwMus = {#include "../DrawSettings/MusDrawSettings.any"};
  };

    AnyMuscleViaPoint TrThR2R4S = {
    AnyMuscleModel &Model = ...MuscleParametersRibCageLeft.TransvThModel;
    AnyRefNode &R4 = ...SegmentsRibCage.RibsLeft.R2Seg.TrThR2R4NodeLOrg;
    AnyRefNode &S = ...SegmentsRibCage.RibsLeft.R4Seg.TrThR2R4NodeLIns;
    AnyDrawMuscle DrwMus = {#include "../DrawSettings/MusDrawSettings.any"};
  };


  AnyMuscleViaPoint TrThR3S = {
    AnyMuscleModel &Model = ...MuscleParametersRibCageLeft.TransvThModel;
    AnyRefNode &R3 = ...SegmentsRibCage.RibsLeft.R3Seg.TrThR3SNodeLOrg;
    AnyRefNode &S = ...SegmentsRibCage.SternumSeg.TrThR3SNodeLIns;
    AnyDrawMuscle DrwMus = {#include "../DrawSettings/MusDrawSettings.any"};
  };

   AnyMuscleViaPoint TrThR3R5S = {
    AnyMuscleModel &Model = ...MuscleParametersRibCageLeft.TransvThModel;
    AnyRefNode &R3 = ...SegmentsRibCage.RibsLeft.R3Seg.TrThR3R5NodeLOrg;
    AnyRefNode &S = ...SegmentsRibCage.RibsLeft.R5Seg.TrThR3R5NodeLIns;
    AnyDrawMuscle DrwMus = {#include "../DrawSettings/MusDrawSettings.any"};
  };

  AnyMuscleViaPoint TrThR4S = {
    AnyMuscleModel &Model = ...MuscleParametersRibCageLeft.TransvThModel;
    AnyRefNode &R4 = ...SegmentsRibCage.RibsLeft.R4Seg.TrThR4SNodeLOrg;
    AnyRefNode &S = ...SegmentsRibCage.SternumSeg.TrThR4SNodeLIns;
    AnyDrawMuscle DrwMus = {#include "../DrawSettings/MusDrawSettings.any"};
  };

  AnyMuscleViaPoint TrThR4R6S = {
    AnyMuscleModel &Model = ...MuscleParametersRibCageLeft.TransvThModel;
    AnyRefNode &R4 = ...SegmentsRibCage.RibsLeft.R4Seg.TrThR4R6NodeLOrg;
    AnyRefNode &S = ...SegmentsRibCage.RibsLeft.R6Seg.TrThR4R6NodeLIns;
    AnyDrawMuscle DrwMus = {#include "../DrawSettings/MusDrawSettings.any"};
  };

  AnyMuscleViaPoint TrThR5S = {
    AnyMuscleModel &Model = ...MuscleParametersRibCageLeft.TransvThModel;
    AnyRefNode &R5 = ...SegmentsRibCage.RibsLeft.R5Seg.TrThR5SNodeLOrg;
    AnyRefNode &S = ...SegmentsRibCage.SternumSeg.TrThR5SNodeLIns;
    AnyDrawMuscle DrwMus = {#include "../DrawSettings/MusDrawSettings.any"};
  };

   AnyMuscleViaPoint TrThR5R7S = {
    AnyMuscleModel &Model = ...MuscleParametersRibCageLeft.TransvThModel;
    AnyRefNode &R4 = ...SegmentsRibCage.RibsLeft.R5Seg.TrThR5R7NodeLOrg;
    AnyRefNode &S56 = ...SegmentsRibCage.RibsLeft.R7Seg.TrThR5R7NodeLIns;
    AnyDrawMuscle DrwMus = {#include "../DrawSettings/MusDrawSettings.any"};
  };

  AnyMuscleViaPoint TrThR6S = {
    AnyMuscleModel &Model = ...MuscleParametersRibCageLeft.TransvThModel;
    AnyRefNode &R4 = ...SegmentsRibCage.RibsLeft.R6Seg.TrThR6SNodeLOrg;
    AnyRefNode &S56 = ...SegmentsRibCage.SternumSeg.TrThR6SNodeLIns;
    AnyDrawMuscle DrwMus = {#include "../DrawSettings/MusDrawSettings.any"};
  };

  AnyMuscleViaPoint TrThR7S = {
    AnyMuscleModel &Model = ...MuscleParametersRibCageLeft.TransvThModel;
    AnyRefNode &R7 = ...SegmentsRibCage.RibsLeft.R7Seg.TrThR7SNodeLOrg;
    AnyRefNode &S8 = ...SegmentsRibCage.SternumSeg.TrThNodeLIns;
    AnyDrawMuscle DrwMus = {#include "../DrawSettings/MusDrawSettings.any"};
  };

  AnyMuscleViaPoint TrThR8S = {
    AnyMuscleModel &Model = ...MuscleParametersRibCageLeft.TransvThModel;
    AnyRefNode &R8 = ...SegmentsRibCage.RibsLeft.R8Seg.TrThR8SNodeLOrg;
    AnyRefNode &S8 = ...SegmentsRibCage.SternumSeg.TrThNodeLIns;
    AnyDrawMuscle DrwMus = {#include "../DrawSettings/MusDrawSettings.any"};
  };

  AnyMuscleViaPoint TrThR9S = {
    AnyMuscleModel &Model = ...MuscleParametersRibCageLeft.TransvThModel;
    AnyRefNode &R9 = ...SegmentsRibCage.RibsLeft.R9Seg.TrThR9SNodeLOrg;
    AnyRefNode &S8 = ...SegmentsRibCage.SternumSeg.TrThNodeLIns;
    AnyDrawMuscle DrwMus = {#include "../DrawSettings/MusDrawSettings.any"};
  };

  AnyMuscleViaPoint TrThR10S = {
    AnyMuscleModel &Model = ...MuscleParametersRibCageLeft.TransvThModel;
    AnyRefNode &R10 = ...SegmentsRibCage.RibsLeft.R10Seg.TrThR10SNodeLOrg;
    AnyRefNode &S8 = ...SegmentsRibCage.SternumSeg.TrThNodeLIns;
    AnyDrawMuscle DrwMus = {#include "../DrawSettings/MusDrawSettings.any"};
  };
};
