AnyFolder TransversusThoracis = {
  AnyViaPointMuscle TrThR2S = {
    AnyMuscleModel &Model = ...MuscleParametersRibCageRight.TransvThModel;
    AnyRefNode &R2 = ...SegmentsRibCage.RibsRight.R2Seg.TrThR2SNodeROrg;
    AnyRefNode &S = ...SegmentsRibCage.SternumSeg.TrThR2SNodeRIns;
    AnyDrawMuscle DrwMus = {#include "../DrawSettings/MusDrawSettings.any"};
  };

    AnyViaPointMuscle TrThR2R4S = {
    AnyMuscleModel &Model = ...MuscleParametersRibCageRight.TransvThModel;
    AnyRefNode &R4 = ...SegmentsRibCage.RibsRight.R2Seg.TrThR2R4NodeROrg;
    AnyRefNode &S = ...SegmentsRibCage.RibsRight.R4Seg.TrThR2R4NodeRIns;
    AnyDrawMuscle DrwMus = {#include "../DrawSettings/MusDrawSettings.any"};
  };


  AnyViaPointMuscle TrThR3S = {
    AnyMuscleModel &Model = ...MuscleParametersRibCageRight.TransvThModel;
    AnyRefNode &R3 = ...SegmentsRibCage.RibsRight.R3Seg.TrThR3SNodeROrg;
    AnyRefNode &S = ...SegmentsRibCage.SternumSeg.TrThR3SNodeRIns;
    AnyDrawMuscle DrwMus = {#include "../DrawSettings/MusDrawSettings.any"};
  };

   AnyViaPointMuscle TrThR3R5S = {
    AnyMuscleModel &Model = ...MuscleParametersRibCageRight.TransvThModel;
    AnyRefNode &R3 = ...SegmentsRibCage.RibsRight.R3Seg.TrThR3R5NodeROrg;
    AnyRefNode &S = ...SegmentsRibCage.RibsRight.R5Seg.TrThR3R5NodeRIns;
    AnyDrawMuscle DrwMus = {#include "../DrawSettings/MusDrawSettings.any"};
  };

  AnyViaPointMuscle TrThR4S = {
    AnyMuscleModel &Model = ...MuscleParametersRibCageRight.TransvThModel;
    AnyRefNode &R4 = ...SegmentsRibCage.RibsRight.R4Seg.TrThR4SNodeROrg;
    AnyRefNode &S = ...SegmentsRibCage.SternumSeg.TrThR4SNodeRIns;
    AnyDrawMuscle DrwMus = {#include "../DrawSettings/MusDrawSettings.any"};
  };

  AnyViaPointMuscle TrThR4R6S = {
    AnyMuscleModel &Model = ...MuscleParametersRibCageRight.TransvThModel;
    AnyRefNode &R4 = ...SegmentsRibCage.RibsRight.R4Seg.TrThR4R6NodeROrg;
    AnyRefNode &S = ...SegmentsRibCage.RibsRight.R6Seg.TrThR4R6NodeRIns;
    AnyDrawMuscle DrwMus = {#include "../DrawSettings/MusDrawSettings.any"};
  };

  AnyViaPointMuscle TrThR5S = {
    AnyMuscleModel &Model = ...MuscleParametersRibCageRight.TransvThModel;
    AnyRefNode &R5 = ...SegmentsRibCage.RibsRight.R5Seg.TrThR5SNodeROrg;
    AnyRefNode &S = ...SegmentsRibCage.SternumSeg.TrThR5SNodeRIns;
    AnyDrawMuscle DrwMus = {#include "../DrawSettings/MusDrawSettings.any"};
  };

   AnyViaPointMuscle TrThR5R7S = {
    AnyMuscleModel &Model = ...MuscleParametersRibCageRight.TransvThModel;
    AnyRefNode &R4 = ...SegmentsRibCage.RibsRight.R5Seg.TrThR5R7NodeROrg;
    AnyRefNode &S56 = ...SegmentsRibCage.RibsRight.R7Seg.TrThR5R7NodeRIns;
    AnyDrawMuscle DrwMus = {#include "../DrawSettings/MusDrawSettings.any"};
  };

  AnyViaPointMuscle TrThR6S = {
    AnyMuscleModel &Model = ...MuscleParametersRibCageRight.TransvThModel;
    AnyRefNode &R4 = ...SegmentsRibCage.RibsRight.R6Seg.TrThR6SNodeROrg;
    AnyRefNode &S56 = ...SegmentsRibCage.SternumSeg.TrThR6SNodeRIns;
    AnyDrawMuscle DrwMus = {#include "../DrawSettings/MusDrawSettings.any"};
  };

  AnyViaPointMuscle TrThR7S = {
    AnyMuscleModel &Model = ...MuscleParametersRibCageRight.TransvThModel;
    AnyRefNode &R7 = ...SegmentsRibCage.RibsRight.R7Seg.TrThR7SNodeROrg;
    AnyRefNode &S8 = ...SegmentsRibCage.SternumSeg.TrThNodeRIns;
    AnyDrawMuscle DrwMus = {#include "../DrawSettings/MusDrawSettings.any"};
  };

  AnyViaPointMuscle TrThR8S = {
    AnyMuscleModel &Model = ...MuscleParametersRibCageRight.TransvThModel;
    AnyRefNode &R8 = ...SegmentsRibCage.RibsRight.R8Seg.TrThR8SNodeROrg;
    AnyRefNode &S8 = ...SegmentsRibCage.SternumSeg.TrThNodeRIns;
    AnyDrawMuscle DrwMus = {#include "../DrawSettings/MusDrawSettings.any"};
  };

  AnyViaPointMuscle TrThR9S = {
    AnyMuscleModel &Model = ...MuscleParametersRibCageRight.TransvThModel;
    AnyRefNode &R9 = ...SegmentsRibCage.RibsRight.R9Seg.TrThR9SNodeROrg;
    AnyRefNode &S8 = ...SegmentsRibCage.SternumSeg.TrThNodeRIns;
    AnyDrawMuscle DrwMus = {#include "../DrawSettings/MusDrawSettings.any"};
  };

  AnyViaPointMuscle TrThR10S = {
    AnyMuscleModel &Model = ...MuscleParametersRibCageRight.TransvThModel;
    AnyRefNode &R10 = ...SegmentsRibCage.RibsRight.R10Seg.TrThR10SNodeROrg;
    AnyRefNode &S8 = ...SegmentsRibCage.SternumSeg.TrThNodeRIns;
    AnyDrawMuscle DrwMus = {#include "../DrawSettings/MusDrawSettings.any"};
  };
};
