/// The ScalingNode shows explicitly what reference frame this segment should scale in
/// for trunk segments scaling should happen in the trunk models anatomical frame
AnyRefNode  &ScalingNode = AnatomicalFrameTrunk;

/// The whole trunk model share their reference system
/// This allows us to make a anatomical frame on each trunk segments
/// That represents this reference system
AnyRefNode AnatomicalFrameTrunk = {
  sRel = ..TrunkFrame.sRel;
  ARel = ..TrunkFrame.ARel;
};
