AnyFolder SkullSeg = {
AnyFloat AnatomicalFrame_pos                             =  Main.HumanModel.BodyModel.Trunk.SegmentsThorax.SkullSeg.AnatomicalFrame.sRel;
AnyFloat C1C0JntNode_pos                                 =  Main.HumanModel.BodyModel.Trunk.SegmentsThorax.SkullSeg.C1C0JntNode.sRel;
AnyFloat NeckNode_pos                                    =  Main.HumanModel.BodyModel.Trunk.SegmentsThorax.SkullSeg.NeckNode.sRel;
AnyFloat LumpedHyoidT1C0NodeR_pos                        =  Main.HumanModel.BodyModel.Trunk.SegmentsThorax.SkullSeg.LumpedHyoidT1C0NodeR.sRel;
AnyFloat LumpedHyoidT1C0NodeL_pos                        =  Main.HumanModel.BodyModel.Trunk.SegmentsThorax.SkullSeg.LumpedHyoidT1C0NodeL.sRel;
AnyFloat LongusColliT1C0NodeR_pos                        =  Main.HumanModel.BodyModel.Trunk.SegmentsThorax.SkullSeg.LongusColliT1C0NodeR.sRel;
AnyFloat LongusColliT1C0NodeL_pos                        =  Main.HumanModel.BodyModel.Trunk.SegmentsThorax.SkullSeg.LongusColliT1C0NodeL.sRel;
AnyFloat LongusCapitisC0NodeR_pos                        =  Main.HumanModel.BodyModel.Trunk.SegmentsThorax.SkullSeg.LongusCapitisC0NodeR.sRel;
AnyFloat LongusCapitisC0NodeL_pos                        =  Main.HumanModel.BodyModel.Trunk.SegmentsThorax.SkullSeg.LongusCapitisC0NodeL.sRel;
AnyFloat SpleniusCapitisNodeR_pos                        =  Main.HumanModel.BodyModel.Trunk.SegmentsThorax.SkullSeg.SpleniusCapitisNodeR.sRel;
AnyFloat SpleniusCapitisNodeL_pos                        =  Main.HumanModel.BodyModel.Trunk.SegmentsThorax.SkullSeg.SpleniusCapitisNodeL.sRel;
AnyFloat SemispinalisCapitisNodeR_pos                    =  Main.HumanModel.BodyModel.Trunk.SegmentsThorax.SkullSeg.SemispinalisCapitisNodeR.sRel;
AnyFloat SemispinalisCapitisNodeL_pos                    =  Main.HumanModel.BodyModel.Trunk.SegmentsThorax.SkullSeg.SemispinalisCapitisNodeL.sRel;
AnyFloat LongissimusCapitisNodeR_pos                     =  Main.HumanModel.BodyModel.Trunk.SegmentsThorax.SkullSeg.LongissimusCapitisNodeR.sRel;
AnyFloat LongissimusCapitisNodeL_pos                     =  Main.HumanModel.BodyModel.Trunk.SegmentsThorax.SkullSeg.LongissimusCapitisNodeL.sRel;
AnyFloat drworientation_pos                              =  Main.HumanModel.BodyModel.Trunk.SegmentsThorax.SkullSeg.drworientation.sRel;
AnyFloat TopOfHead_pos                                   =  Main.HumanModel.BodyModel.Trunk.SegmentsThorax.SkullSeg.TopOfHead.sRel;
AnyFloat Right_pos                                       =  Main.HumanModel.BodyModel.Trunk.SegmentsThorax.SkullSeg.Right.sRel;
AnyFloat Left_pos                                        =  Main.HumanModel.BodyModel.Trunk.SegmentsThorax.SkullSeg.Left.sRel;
AnyFloat SkullContactNode_pos                            =  Main.HumanModel.BodyModel.Trunk.SegmentsThorax.SkullSeg.SkullContactNode.sRel;
AnyFloat Right_O_trapezius_clavicular_part_6_pos         =  Main.HumanModel.BodyModel.Trunk.SegmentsThorax.SkullSeg.Right.O_trapezius_clavicular_part_6.sRel;
AnyFloat Right_SternocleidomastoidNode_pos               =  Main.HumanModel.BodyModel.Trunk.SegmentsThorax.SkullSeg.Right.SternocleidomastoidNode.sRel;
AnyFloat Left_O_trapezius_clavicular_part_6_pos          =  Main.HumanModel.BodyModel.Trunk.SegmentsThorax.SkullSeg.Left.O_trapezius_clavicular_part_6.sRel;
AnyFloat Left_SternocleidomastoidNode_pos                =  Main.HumanModel.BodyModel.Trunk.SegmentsThorax.SkullSeg.Left.SternocleidomastoidNode.sRel;
};
AnyFolder ThoraxSeg = {
AnyFloat AnatomicalFrame_pos                             = Main.HumanModel.BodyModel.Trunk.SegmentsThorax.ThoraxSeg.AnatomicalFrame.sRel;
AnyFloat ij_pos                                          = Main.HumanModel.BodyModel.Trunk.SegmentsThorax.ThoraxSeg.ij.sRel;
AnyFloat iji_pos                                         = Main.HumanModel.BodyModel.Trunk.SegmentsThorax.ThoraxSeg.iji.sRel;
AnyFloat C1HatNode_pos                                   = Main.HumanModel.BodyModel.Trunk.SegmentsThorax.ThoraxSeg.C1HatNode.sRel;
AnyFloat T12L1JntNode_pos                                = Main.HumanModel.BodyModel.Trunk.SegmentsThorax.ThoraxSeg.T12L1JntNode.sRel;
AnyFloat T1C7JntNode_pos                                 = Main.HumanModel.BodyModel.Trunk.SegmentsThorax.ThoraxSeg.T1C7JntNode.sRel;
AnyFloat ForceVectorNode_pos                             = Main.HumanModel.BodyModel.Trunk.SegmentsThorax.ThoraxSeg.ForceVectorNode.sRel;
AnyFloat ALLNodeInferior_pos                             = Main.HumanModel.BodyModel.Trunk.SegmentsThorax.ThoraxSeg.ALLNodeInferior.sRel;
AnyFloat PLLNodeInferior_pos                             = Main.HumanModel.BodyModel.Trunk.SegmentsThorax.ThoraxSeg.PLLNodeInferior.sRel;
AnyFloat PLLViaNode_pos                                  = Main.HumanModel.BodyModel.Trunk.SegmentsThorax.ThoraxSeg.PLLViaNode.sRel;
AnyFloat PLLNodeInferiorT11_pos                          = Main.HumanModel.BodyModel.Trunk.SegmentsThorax.ThoraxSeg.PLLNodeInferiorT11.sRel;
AnyFloat LSNodeT12_pos                                   = Main.HumanModel.BodyModel.Trunk.SegmentsThorax.ThoraxSeg.LSNodeT12.sRel;
AnyFloat LSNodeT11_pos                                   = Main.HumanModel.BodyModel.Trunk.SegmentsThorax.ThoraxSeg.LSNodeT11.sRel;
AnyFloat LINodeInferior_pos                              = Main.HumanModel.BodyModel.Trunk.SegmentsThorax.ThoraxSeg.LINodeInferior.sRel;
AnyFloat LumpedHyoidT1C0NodeR_pos                        = Main.HumanModel.BodyModel.Trunk.SegmentsThorax.ThoraxSeg.LumpedHyoidT1C0NodeR.sRel;
AnyFloat LumpedHyoidT1C0NodeL_pos                        = Main.HumanModel.BodyModel.Trunk.SegmentsThorax.ThoraxSeg.LumpedHyoidT1C0NodeL.sRel;
AnyFloat LongusColliT1NodeR_pos                          = Main.HumanModel.BodyModel.Trunk.SegmentsThorax.ThoraxSeg.LongusColliT1NodeR.sRel;
AnyFloat LongusColliT1NodeL_pos                          = Main.HumanModel.BodyModel.Trunk.SegmentsThorax.ThoraxSeg.LongusColliT1NodeL.sRel;
AnyFloat ScalenusAnteriorT1C4NodeR_pos                   = Main.HumanModel.BodyModel.Trunk.SegmentsThorax.ThoraxSeg.ScalenusAnteriorT1C4NodeR.sRel;
AnyFloat ScalenusAnteriorT1C4NodeL_pos                   = Main.HumanModel.BodyModel.Trunk.SegmentsThorax.ThoraxSeg.ScalenusAnteriorT1C4NodeL.sRel;
AnyFloat ScalenusMediusT1C3NodeR_pos                     = Main.HumanModel.BodyModel.Trunk.SegmentsThorax.ThoraxSeg.ScalenusMediusT1C3NodeR.sRel;
AnyFloat ScalenusMediusT1C3NodeL_pos                     = Main.HumanModel.BodyModel.Trunk.SegmentsThorax.ThoraxSeg.ScalenusMediusT1C3NodeL.sRel;
AnyFloat ScalenusPosteriorT1C5NodeR_pos                  = Main.HumanModel.BodyModel.Trunk.SegmentsThorax.ThoraxSeg.ScalenusPosteriorT1C5NodeR.sRel;
AnyFloat ScalenusPosteriorT1C5NodeL_pos                  = Main.HumanModel.BodyModel.Trunk.SegmentsThorax.ThoraxSeg.ScalenusPosteriorT1C5NodeL.sRel;
AnyFloat SpleniusCapitisT2C0NodeR_pos                    = Main.HumanModel.BodyModel.Trunk.SegmentsThorax.ThoraxSeg.SpleniusCapitisT2C0NodeR.sRel;
AnyFloat SpleniusCapitisT2C0NodeL_pos                    = Main.HumanModel.BodyModel.Trunk.SegmentsThorax.ThoraxSeg.SpleniusCapitisT2C0NodeL.sRel;
AnyFloat SpleniusCervicisNodeR_pos                       = Main.HumanModel.BodyModel.Trunk.SegmentsThorax.ThoraxSeg.SpleniusCervicisNodeR.sRel;
AnyFloat SpleniusCervicisNodeL_pos                       = Main.HumanModel.BodyModel.Trunk.SegmentsThorax.ThoraxSeg.SpleniusCervicisNodeL.sRel;
AnyFloat SemispinalisCapitisT3C0NodeR_pos                = Main.HumanModel.BodyModel.Trunk.SegmentsThorax.ThoraxSeg.SemispinalisCapitisT3C0NodeR.sRel;
AnyFloat SemispinalisCapitisT3C0NodeL_pos                = Main.HumanModel.BodyModel.Trunk.SegmentsThorax.ThoraxSeg.SemispinalisCapitisT3C0NodeL.sRel;
AnyFloat SemispinalisCervicisT1C2NodeR_pos               = Main.HumanModel.BodyModel.Trunk.SegmentsThorax.ThoraxSeg.SemispinalisCervicisT1C2NodeR.sRel;
AnyFloat SemispinalisCervicisT1C2NodeL_pos               = Main.HumanModel.BodyModel.Trunk.SegmentsThorax.ThoraxSeg.SemispinalisCervicisT1C2NodeL.sRel;
AnyFloat SemispinalisCervicisT2C3NodeR_pos               = Main.HumanModel.BodyModel.Trunk.SegmentsThorax.ThoraxSeg.SemispinalisCervicisT2C3NodeR.sRel;
AnyFloat SemispinalisCervicisT2C3NodeL_pos               = Main.HumanModel.BodyModel.Trunk.SegmentsThorax.ThoraxSeg.SemispinalisCervicisT2C3NodeL.sRel;
AnyFloat SemispinalisCervicisT3C4NodeR_pos               = Main.HumanModel.BodyModel.Trunk.SegmentsThorax.ThoraxSeg.SemispinalisCervicisT3C4NodeR.sRel;
AnyFloat SemispinalisCervicisT3C4NodeL_pos               = Main.HumanModel.BodyModel.Trunk.SegmentsThorax.ThoraxSeg.SemispinalisCervicisT3C4NodeL.sRel;
AnyFloat SemispinalisCervicisT4C5NodeR_pos               = Main.HumanModel.BodyModel.Trunk.SegmentsThorax.ThoraxSeg.SemispinalisCervicisT4C5NodeR.sRel;
AnyFloat SemispinalisCervicisT4C5NodeL_pos               = Main.HumanModel.BodyModel.Trunk.SegmentsThorax.ThoraxSeg.SemispinalisCervicisT4C5NodeL.sRel;
AnyFloat SemispinalisCervicisT5C6NodeR_pos               = Main.HumanModel.BodyModel.Trunk.SegmentsThorax.ThoraxSeg.SemispinalisCervicisT5C6NodeR.sRel;
AnyFloat SemispinalisCervicisT5C6NodeL_pos               = Main.HumanModel.BodyModel.Trunk.SegmentsThorax.ThoraxSeg.SemispinalisCervicisT5C6NodeL.sRel;
AnyFloat SemispinalisCervicisT6C7NodeR_pos               = Main.HumanModel.BodyModel.Trunk.SegmentsThorax.ThoraxSeg.SemispinalisCervicisT6C7NodeR.sRel;
AnyFloat SemispinalisCervicisT6C7NodeL_pos               = Main.HumanModel.BodyModel.Trunk.SegmentsThorax.ThoraxSeg.SemispinalisCervicisT6C7NodeL.sRel;
AnyFloat LongissimusCapitisT2C0NodeR_pos                 = Main.HumanModel.BodyModel.Trunk.SegmentsThorax.ThoraxSeg.LongissimusCapitisT2C0NodeR.sRel;
AnyFloat LongissimusCapitisT2C0NodeL_pos                 = Main.HumanModel.BodyModel.Trunk.SegmentsThorax.ThoraxSeg.LongissimusCapitisT2C0NodeL.sRel;
AnyFloat LongissimusCervicisT2NodeR_pos                  = Main.HumanModel.BodyModel.Trunk.SegmentsThorax.ThoraxSeg.LongissimusCervicisT2NodeR.sRel;
AnyFloat LongissimusCervicisT2NodeL_pos                  = Main.HumanModel.BodyModel.Trunk.SegmentsThorax.ThoraxSeg.LongissimusCervicisT2NodeL.sRel;
AnyFloat MultifidusCervicisT1C4NodeR_pos                 = Main.HumanModel.BodyModel.Trunk.SegmentsThorax.ThoraxSeg.MultifidusCervicisT1C4NodeR.sRel;
AnyFloat MultifidusCervicisT1C4NodeL_pos                 = Main.HumanModel.BodyModel.Trunk.SegmentsThorax.ThoraxSeg.MultifidusCervicisT1C4NodeL.sRel;
AnyFloat MultifidusCervicisT1C5NodeR_pos                 = Main.HumanModel.BodyModel.Trunk.SegmentsThorax.ThoraxSeg.MultifidusCervicisT1C5NodeR.sRel;
AnyFloat MultifidusCervicisT1C5NodeL_pos                 = Main.HumanModel.BodyModel.Trunk.SegmentsThorax.ThoraxSeg.MultifidusCervicisT1C5NodeL.sRel;
AnyFloat MultifidusCervicisT2C5NodeR_pos                 = Main.HumanModel.BodyModel.Trunk.SegmentsThorax.ThoraxSeg.MultifidusCervicisT2C5NodeR.sRel;
AnyFloat MultifidusCervicisT2C5NodeL_pos                 = Main.HumanModel.BodyModel.Trunk.SegmentsThorax.ThoraxSeg.MultifidusCervicisT2C5NodeL.sRel;
AnyFloat MultifidusCervicisT2C6NodeR_pos                 = Main.HumanModel.BodyModel.Trunk.SegmentsThorax.ThoraxSeg.MultifidusCervicisT2C6NodeR.sRel;
AnyFloat MultifidusCervicisT2C6NodeL_pos                 = Main.HumanModel.BodyModel.Trunk.SegmentsThorax.ThoraxSeg.MultifidusCervicisT2C6NodeL.sRel;
AnyFloat MultifidusCervicisT3C6NodeR_pos                 = Main.HumanModel.BodyModel.Trunk.SegmentsThorax.ThoraxSeg.MultifidusCervicisT3C6NodeR.sRel;
AnyFloat MultifidusCervicisT3C6NodeL_pos                 = Main.HumanModel.BodyModel.Trunk.SegmentsThorax.ThoraxSeg.MultifidusCervicisT3C6NodeL.sRel;
AnyFloat MultifidusCervicisT3C7NodeR_pos                 = Main.HumanModel.BodyModel.Trunk.SegmentsThorax.ThoraxSeg.MultifidusCervicisT3C7NodeR.sRel;
AnyFloat MultifidusCervicisT3C7NodeL_pos                 = Main.HumanModel.BodyModel.Trunk.SegmentsThorax.ThoraxSeg.MultifidusCervicisT3C7NodeL.sRel;
AnyFloat MultifidusCervicisT4C7NodeR_pos                 = Main.HumanModel.BodyModel.Trunk.SegmentsThorax.ThoraxSeg.MultifidusCervicisT4C7NodeR.sRel;
AnyFloat MultifidusCervicisT4C7NodeL_pos                 = Main.HumanModel.BodyModel.Trunk.SegmentsThorax.ThoraxSeg.MultifidusCervicisT4C7NodeL.sRel;
AnyFloat ILptC5SIPSNodeR_pos                             = Main.HumanModel.BodyModel.Trunk.SegmentsThorax.ThoraxSeg.ILptC5SIPSNodeR.sRel;
AnyFloat ILptC5SIPSNodeL_pos                             = Main.HumanModel.BodyModel.Trunk.SegmentsThorax.ThoraxSeg.ILptC5SIPSNodeL.sRel;
AnyFloat ILptC5SIPSVia1NodeR_pos                         = Main.HumanModel.BodyModel.Trunk.SegmentsThorax.ThoraxSeg.ILptC5SIPSVia1NodeR.sRel;
AnyFloat ILptC5SIPSVia1NodeL_pos                         = Main.HumanModel.BodyModel.Trunk.SegmentsThorax.ThoraxSeg.ILptC5SIPSVia1NodeL.sRel;
AnyFloat ILptC5SIPSVia2NodeR_pos                         = Main.HumanModel.BodyModel.Trunk.SegmentsThorax.ThoraxSeg.ILptC5SIPSVia2NodeR.sRel;
AnyFloat ILptC5SIPSVia2NodeL_pos                         = Main.HumanModel.BodyModel.Trunk.SegmentsThorax.ThoraxSeg.ILptC5SIPSVia2NodeL.sRel;
AnyFloat ILptC5SIPSVia3NodeR_pos                         = Main.HumanModel.BodyModel.Trunk.SegmentsThorax.ThoraxSeg.ILptC5SIPSVia3NodeR.sRel;
AnyFloat ILptC5SIPSVia3NodeL_pos                         = Main.HumanModel.BodyModel.Trunk.SegmentsThorax.ThoraxSeg.ILptC5SIPSVia3NodeL.sRel;
AnyFloat ILptC5SIPSVia4NodeR_pos                         = Main.HumanModel.BodyModel.Trunk.SegmentsThorax.ThoraxSeg.ILptC5SIPSVia4NodeR.sRel;
AnyFloat ILptC5SIPSVia4NodeL_pos                         = Main.HumanModel.BodyModel.Trunk.SegmentsThorax.ThoraxSeg.ILptC5SIPSVia4NodeL.sRel;
AnyFloat ILptC5SIPSVia5NodeR_pos                         = Main.HumanModel.BodyModel.Trunk.SegmentsThorax.ThoraxSeg.ILptC5SIPSVia5NodeR.sRel;
AnyFloat ILptC5SIPSVia5NodeL_pos                         = Main.HumanModel.BodyModel.Trunk.SegmentsThorax.ThoraxSeg.ILptC5SIPSVia5NodeL.sRel;
AnyFloat ILptC5SIPSVia6NodeR_pos                         = Main.HumanModel.BodyModel.Trunk.SegmentsThorax.ThoraxSeg.ILptC5SIPSVia6NodeR.sRel;
AnyFloat ILptC5SIPSVia6NodeL_pos                         = Main.HumanModel.BodyModel.Trunk.SegmentsThorax.ThoraxSeg.ILptC5SIPSVia6NodeL.sRel;
AnyFloat ILptC6SIPSNodeR_pos                             = Main.HumanModel.BodyModel.Trunk.SegmentsThorax.ThoraxSeg.ILptC6SIPSNodeR.sRel;
AnyFloat ILptC6SIPSNodeL_pos                             = Main.HumanModel.BodyModel.Trunk.SegmentsThorax.ThoraxSeg.ILptC6SIPSNodeL.sRel;
AnyFloat ILptC6SIPSVia1NodeR_pos                         = Main.HumanModel.BodyModel.Trunk.SegmentsThorax.ThoraxSeg.ILptC6SIPSVia1NodeR.sRel;
AnyFloat ILptC6SIPSVia1NodeL_pos                         = Main.HumanModel.BodyModel.Trunk.SegmentsThorax.ThoraxSeg.ILptC6SIPSVia1NodeL.sRel;
AnyFloat ILptC6SIPSVia2NodeR_pos                         = Main.HumanModel.BodyModel.Trunk.SegmentsThorax.ThoraxSeg.ILptC6SIPSVia2NodeR.sRel;
AnyFloat ILptC6SIPSVia2NodeL_pos                         = Main.HumanModel.BodyModel.Trunk.SegmentsThorax.ThoraxSeg.ILptC6SIPSVia2NodeL.sRel;
AnyFloat ILptC6SIPSVia3NodeR_pos                         = Main.HumanModel.BodyModel.Trunk.SegmentsThorax.ThoraxSeg.ILptC6SIPSVia3NodeR.sRel;
AnyFloat ILptC6SIPSVia3NodeL_pos                         = Main.HumanModel.BodyModel.Trunk.SegmentsThorax.ThoraxSeg.ILptC6SIPSVia3NodeL.sRel;
AnyFloat ILptC6SIPSVia4NodeR_pos                         = Main.HumanModel.BodyModel.Trunk.SegmentsThorax.ThoraxSeg.ILptC6SIPSVia4NodeR.sRel;
AnyFloat ILptC6SIPSVia4NodeL_pos                         = Main.HumanModel.BodyModel.Trunk.SegmentsThorax.ThoraxSeg.ILptC6SIPSVia4NodeL.sRel;
AnyFloat ILptC6SIPSVia5NodeR_pos                         = Main.HumanModel.BodyModel.Trunk.SegmentsThorax.ThoraxSeg.ILptC6SIPSVia5NodeR.sRel;
AnyFloat ILptC6SIPSVia5NodeL_pos                         = Main.HumanModel.BodyModel.Trunk.SegmentsThorax.ThoraxSeg.ILptC6SIPSVia5NodeL.sRel;
AnyFloat ILptC7CINodeR_pos                               = Main.HumanModel.BodyModel.Trunk.SegmentsThorax.ThoraxSeg.ILptC7CINodeR.sRel;
AnyFloat ILptC7CINodeL_pos                               = Main.HumanModel.BodyModel.Trunk.SegmentsThorax.ThoraxSeg.ILptC7CINodeL.sRel;
AnyFloat ILptC7CIVia1NodeR_pos                           = Main.HumanModel.BodyModel.Trunk.SegmentsThorax.ThoraxSeg.ILptC7CIVia1NodeR.sRel;
AnyFloat ILptC7CIVia1NodeL_pos                           = Main.HumanModel.BodyModel.Trunk.SegmentsThorax.ThoraxSeg.ILptC7CIVia1NodeL.sRel;
AnyFloat ILptC7CIVia2NodeR_pos                           = Main.HumanModel.BodyModel.Trunk.SegmentsThorax.ThoraxSeg.ILptC7CIVia2NodeR.sRel;
AnyFloat ILptC7CIVia2NodeL_pos                           = Main.HumanModel.BodyModel.Trunk.SegmentsThorax.ThoraxSeg.ILptC7CIVia2NodeL.sRel;
AnyFloat ILptC7CIVia3NodeR_pos                           = Main.HumanModel.BodyModel.Trunk.SegmentsThorax.ThoraxSeg.ILptC7CIVia3NodeR.sRel;
AnyFloat ILptC7CIVia3NodeL_pos                           = Main.HumanModel.BodyModel.Trunk.SegmentsThorax.ThoraxSeg.ILptC7CIVia3NodeL.sRel;
AnyFloat ILptC7CIVia4NodeR_pos                           = Main.HumanModel.BodyModel.Trunk.SegmentsThorax.ThoraxSeg.ILptC7CIVia4NodeR.sRel;
AnyFloat ILptC7CIVia4NodeL_pos                           = Main.HumanModel.BodyModel.Trunk.SegmentsThorax.ThoraxSeg.ILptC7CIVia4NodeL.sRel;
AnyFloat ILptC8CINodeR_pos                               = Main.HumanModel.BodyModel.Trunk.SegmentsThorax.ThoraxSeg.ILptC8CINodeR.sRel;
AnyFloat ILptC8CINodeL_pos                               = Main.HumanModel.BodyModel.Trunk.SegmentsThorax.ThoraxSeg.ILptC8CINodeL.sRel;
AnyFloat ILptC8CIVia1NodeR_pos                           = Main.HumanModel.BodyModel.Trunk.SegmentsThorax.ThoraxSeg.ILptC8CIVia1NodeR.sRel;
AnyFloat ILptC8CIVia1NodeL_pos                           = Main.HumanModel.BodyModel.Trunk.SegmentsThorax.ThoraxSeg.ILptC8CIVia1NodeL.sRel;
AnyFloat ILptC8CIVia2NodeR_pos                           = Main.HumanModel.BodyModel.Trunk.SegmentsThorax.ThoraxSeg.ILptC8CIVia2NodeR.sRel;
AnyFloat ILptC8CIVia2NodeL_pos                           = Main.HumanModel.BodyModel.Trunk.SegmentsThorax.ThoraxSeg.ILptC8CIVia2NodeL.sRel;
AnyFloat ILptC8CIVia3NodeR_pos                           = Main.HumanModel.BodyModel.Trunk.SegmentsThorax.ThoraxSeg.ILptC8CIVia3NodeR.sRel;
AnyFloat ILptC8CIVia3NodeL_pos                           = Main.HumanModel.BodyModel.Trunk.SegmentsThorax.ThoraxSeg.ILptC8CIVia3NodeL.sRel;
AnyFloat ILptC9CINodeR_pos                               = Main.HumanModel.BodyModel.Trunk.SegmentsThorax.ThoraxSeg.ILptC9CINodeR.sRel;
AnyFloat ILptC9CINodeL_pos                               = Main.HumanModel.BodyModel.Trunk.SegmentsThorax.ThoraxSeg.ILptC9CINodeL.sRel;
AnyFloat ILptC9CIVia1NodeR_pos                           = Main.HumanModel.BodyModel.Trunk.SegmentsThorax.ThoraxSeg.ILptC9CIVia1NodeR.sRel;
AnyFloat ILptC9CIVia1NodeL_pos                           = Main.HumanModel.BodyModel.Trunk.SegmentsThorax.ThoraxSeg.ILptC9CIVia1NodeL.sRel;
AnyFloat ILptC9CIVia2NodeR_pos                           = Main.HumanModel.BodyModel.Trunk.SegmentsThorax.ThoraxSeg.ILptC9CIVia2NodeR.sRel;
AnyFloat ILptC9CIVia2NodeL_pos                           = Main.HumanModel.BodyModel.Trunk.SegmentsThorax.ThoraxSeg.ILptC9CIVia2NodeL.sRel;
AnyFloat ILptC10CINodeR_pos                              = Main.HumanModel.BodyModel.Trunk.SegmentsThorax.ThoraxSeg.ILptC10CINodeR.sRel;
AnyFloat ILptC10CINodeL_pos                              = Main.HumanModel.BodyModel.Trunk.SegmentsThorax.ThoraxSeg.ILptC10CINodeL.sRel;
AnyFloat ILptC10CIVia1NodeR_pos                          = Main.HumanModel.BodyModel.Trunk.SegmentsThorax.ThoraxSeg.ILptC10CIVia1NodeR.sRel;
AnyFloat ILptC10CIVia1NodeL_pos                          = Main.HumanModel.BodyModel.Trunk.SegmentsThorax.ThoraxSeg.ILptC10CIVia1NodeL.sRel;
AnyFloat ILptC11CINodeR_pos                              = Main.HumanModel.BodyModel.Trunk.SegmentsThorax.ThoraxSeg.ILptC11CINodeR.sRel;
AnyFloat ILptC11CINodeL_pos                              = Main.HumanModel.BodyModel.Trunk.SegmentsThorax.ThoraxSeg.ILptC11CINodeL.sRel;
AnyFloat ILptC12CINodeR_pos                              = Main.HumanModel.BodyModel.Trunk.SegmentsThorax.ThoraxSeg.ILptC12CINodeR.sRel;
AnyFloat ILptC12CINodeL_pos                              = Main.HumanModel.BodyModel.Trunk.SegmentsThorax.ThoraxSeg.ILptC12CINodeL.sRel;
AnyFloat LTptT1L1NodeR_pos                               = Main.HumanModel.BodyModel.Trunk.SegmentsThorax.ThoraxSeg.LTptT1L1NodeR.sRel;
AnyFloat LTptT1L1NodeL_pos                               = Main.HumanModel.BodyModel.Trunk.SegmentsThorax.ThoraxSeg.LTptT1L1NodeL.sRel;
AnyFloat LTptT1L1Via1NodeR_pos                           = Main.HumanModel.BodyModel.Trunk.SegmentsThorax.ThoraxSeg.LTptT1L1Via1NodeR.sRel;
AnyFloat LTptT1L1Via1NodeL_pos                           = Main.HumanModel.BodyModel.Trunk.SegmentsThorax.ThoraxSeg.LTptT1L1Via1NodeL.sRel;
AnyFloat LTptT1L1Via2NodeR_pos                           = Main.HumanModel.BodyModel.Trunk.SegmentsThorax.ThoraxSeg.LTptT1L1Via2NodeR.sRel;
AnyFloat LTptT1L1Via2NodeL_pos                           = Main.HumanModel.BodyModel.Trunk.SegmentsThorax.ThoraxSeg.LTptT1L1Via2NodeL.sRel;
AnyFloat LTptT1L1Via3NodeR_pos                           = Main.HumanModel.BodyModel.Trunk.SegmentsThorax.ThoraxSeg.LTptT1L1Via3NodeR.sRel;
AnyFloat LTptT1L1Via3NodeL_pos                           = Main.HumanModel.BodyModel.Trunk.SegmentsThorax.ThoraxSeg.LTptT1L1Via3NodeL.sRel;
AnyFloat LTptT1L1Via4NodeR_pos                           = Main.HumanModel.BodyModel.Trunk.SegmentsThorax.ThoraxSeg.LTptT1L1Via4NodeR.sRel;
AnyFloat LTptT1L1Via4NodeL_pos                           = Main.HumanModel.BodyModel.Trunk.SegmentsThorax.ThoraxSeg.LTptT1L1Via4NodeL.sRel;
AnyFloat LTptT1L1Via5NodeR_pos                           = Main.HumanModel.BodyModel.Trunk.SegmentsThorax.ThoraxSeg.LTptT1L1Via5NodeR.sRel;
AnyFloat LTptT1L1Via5NodeL_pos                           = Main.HumanModel.BodyModel.Trunk.SegmentsThorax.ThoraxSeg.LTptT1L1Via5NodeL.sRel;
AnyFloat LTptT1L1Via6NodeR_pos                           = Main.HumanModel.BodyModel.Trunk.SegmentsThorax.ThoraxSeg.LTptT1L1Via6NodeR.sRel;
AnyFloat LTptT1L1Via6NodeL_pos                           = Main.HumanModel.BodyModel.Trunk.SegmentsThorax.ThoraxSeg.LTptT1L1Via6NodeL.sRel;
AnyFloat LTptT1L1Via7NodeR_pos                           = Main.HumanModel.BodyModel.Trunk.SegmentsThorax.ThoraxSeg.LTptT1L1Via7NodeR.sRel;
AnyFloat LTptT1L1Via7NodeL_pos                           = Main.HumanModel.BodyModel.Trunk.SegmentsThorax.ThoraxSeg.LTptT1L1Via7NodeL.sRel;
AnyFloat LTptT1L1Via8NodeR_pos                           = Main.HumanModel.BodyModel.Trunk.SegmentsThorax.ThoraxSeg.LTptT1L1Via8NodeR.sRel;
AnyFloat LTptT1L1Via8NodeL_pos                           = Main.HumanModel.BodyModel.Trunk.SegmentsThorax.ThoraxSeg.LTptT1L1Via8NodeL.sRel;
AnyFloat LTptT1L1Via9NodeR_pos                           = Main.HumanModel.BodyModel.Trunk.SegmentsThorax.ThoraxSeg.LTptT1L1Via9NodeR.sRel;
AnyFloat LTptT1L1Via9NodeL_pos                           = Main.HumanModel.BodyModel.Trunk.SegmentsThorax.ThoraxSeg.LTptT1L1Via9NodeL.sRel;
AnyFloat LTptT1L1Via10NodeR_pos                          = Main.HumanModel.BodyModel.Trunk.SegmentsThorax.ThoraxSeg.LTptT1L1Via10NodeR.sRel;
AnyFloat LTptT1L1Via10NodeL_pos                          = Main.HumanModel.BodyModel.Trunk.SegmentsThorax.ThoraxSeg.LTptT1L1Via10NodeL.sRel;
AnyFloat LTptT1L1Via11NodeR_pos                          = Main.HumanModel.BodyModel.Trunk.SegmentsThorax.ThoraxSeg.LTptT1L1Via11NodeR.sRel;
AnyFloat LTptT1L1Via11NodeL_pos                          = Main.HumanModel.BodyModel.Trunk.SegmentsThorax.ThoraxSeg.LTptT1L1Via11NodeL.sRel;
AnyFloat LTptT2L2NodeR_pos                               = Main.HumanModel.BodyModel.Trunk.SegmentsThorax.ThoraxSeg.LTptT2L2NodeR.sRel;
AnyFloat LTptT2L2NodeL_pos                               = Main.HumanModel.BodyModel.Trunk.SegmentsThorax.ThoraxSeg.LTptT2L2NodeL.sRel;
AnyFloat LTptT2L2Via1NodeR_pos                           = Main.HumanModel.BodyModel.Trunk.SegmentsThorax.ThoraxSeg.LTptT2L2Via1NodeR.sRel;
AnyFloat LTptT2L2Via1NodeL_pos                           = Main.HumanModel.BodyModel.Trunk.SegmentsThorax.ThoraxSeg.LTptT2L2Via1NodeL.sRel;
AnyFloat LTptT2L2Via2NodeR_pos                           = Main.HumanModel.BodyModel.Trunk.SegmentsThorax.ThoraxSeg.LTptT2L2Via2NodeR.sRel;
AnyFloat LTptT2L2Via2NodeL_pos                           = Main.HumanModel.BodyModel.Trunk.SegmentsThorax.ThoraxSeg.LTptT2L2Via2NodeL.sRel;
AnyFloat LTptT2L2Via3NodeR_pos                           = Main.HumanModel.BodyModel.Trunk.SegmentsThorax.ThoraxSeg.LTptT2L2Via3NodeR.sRel;
AnyFloat LTptT2L2Via3NodeL_pos                           = Main.HumanModel.BodyModel.Trunk.SegmentsThorax.ThoraxSeg.LTptT2L2Via3NodeL.sRel;
AnyFloat LTptT2L2Via4NodeR_pos                           = Main.HumanModel.BodyModel.Trunk.SegmentsThorax.ThoraxSeg.LTptT2L2Via4NodeR.sRel;
AnyFloat LTptT2L2Via4NodeL_pos                           = Main.HumanModel.BodyModel.Trunk.SegmentsThorax.ThoraxSeg.LTptT2L2Via4NodeL.sRel;
AnyFloat LTptT2L2Via5NodeR_pos                           = Main.HumanModel.BodyModel.Trunk.SegmentsThorax.ThoraxSeg.LTptT2L2Via5NodeR.sRel;
AnyFloat LTptT2L2Via5NodeL_pos                           = Main.HumanModel.BodyModel.Trunk.SegmentsThorax.ThoraxSeg.LTptT2L2Via5NodeL.sRel;
AnyFloat LTptT2L2Via6NodeR_pos                           = Main.HumanModel.BodyModel.Trunk.SegmentsThorax.ThoraxSeg.LTptT2L2Via6NodeR.sRel;
AnyFloat LTptT2L2Via6NodeL_pos                           = Main.HumanModel.BodyModel.Trunk.SegmentsThorax.ThoraxSeg.LTptT2L2Via6NodeL.sRel;
AnyFloat LTptT2L2Via7NodeR_pos                           = Main.HumanModel.BodyModel.Trunk.SegmentsThorax.ThoraxSeg.LTptT2L2Via7NodeR.sRel;
AnyFloat LTptT2L2Via7NodeL_pos                           = Main.HumanModel.BodyModel.Trunk.SegmentsThorax.ThoraxSeg.LTptT2L2Via7NodeL.sRel;
AnyFloat LTptT2L2Via8NodeR_pos                           = Main.HumanModel.BodyModel.Trunk.SegmentsThorax.ThoraxSeg.LTptT2L2Via8NodeR.sRel;
AnyFloat LTptT2L2Via8NodeL_pos                           = Main.HumanModel.BodyModel.Trunk.SegmentsThorax.ThoraxSeg.LTptT2L2Via8NodeL.sRel;
AnyFloat LTptT2L2Via9NodeR_pos                           = Main.HumanModel.BodyModel.Trunk.SegmentsThorax.ThoraxSeg.LTptT2L2Via9NodeR.sRel;
AnyFloat LTptT2L2Via9NodeL_pos                           = Main.HumanModel.BodyModel.Trunk.SegmentsThorax.ThoraxSeg.LTptT2L2Via9NodeL.sRel;
AnyFloat LTptT2L2Via10NodeR_pos                          = Main.HumanModel.BodyModel.Trunk.SegmentsThorax.ThoraxSeg.LTptT2L2Via10NodeR.sRel;
AnyFloat LTptT2L2Via10NodeL_pos                          = Main.HumanModel.BodyModel.Trunk.SegmentsThorax.ThoraxSeg.LTptT2L2Via10NodeL.sRel;
AnyFloat LTptT3L3NodeR_pos                               = Main.HumanModel.BodyModel.Trunk.SegmentsThorax.ThoraxSeg.LTptT3L3NodeR.sRel;
AnyFloat LTptT3L3NodeL_pos                               = Main.HumanModel.BodyModel.Trunk.SegmentsThorax.ThoraxSeg.LTptT3L3NodeL.sRel;
AnyFloat LTptT3L3Via1NodeR_pos                           = Main.HumanModel.BodyModel.Trunk.SegmentsThorax.ThoraxSeg.LTptT3L3Via1NodeR.sRel;
AnyFloat LTptT3L3Via1NodeL_pos                           = Main.HumanModel.BodyModel.Trunk.SegmentsThorax.ThoraxSeg.LTptT3L3Via1NodeL.sRel;
AnyFloat LTptT3L3Via2NodeR_pos                           = Main.HumanModel.BodyModel.Trunk.SegmentsThorax.ThoraxSeg.LTptT3L3Via2NodeR.sRel;
AnyFloat LTptT3L3Via2NodeL_pos                           = Main.HumanModel.BodyModel.Trunk.SegmentsThorax.ThoraxSeg.LTptT3L3Via2NodeL.sRel;
AnyFloat LTptT3L3Via3NodeR_pos                           = Main.HumanModel.BodyModel.Trunk.SegmentsThorax.ThoraxSeg.LTptT3L3Via3NodeR.sRel;
AnyFloat LTptT3L3Via3NodeL_pos                           = Main.HumanModel.BodyModel.Trunk.SegmentsThorax.ThoraxSeg.LTptT3L3Via3NodeL.sRel;
AnyFloat LTptT3L3Via4NodeR_pos                           = Main.HumanModel.BodyModel.Trunk.SegmentsThorax.ThoraxSeg.LTptT3L3Via4NodeR.sRel;
AnyFloat LTptT3L3Via4NodeL_pos                           = Main.HumanModel.BodyModel.Trunk.SegmentsThorax.ThoraxSeg.LTptT3L3Via4NodeL.sRel;
AnyFloat LTptT3L3Via5NodeR_pos                           = Main.HumanModel.BodyModel.Trunk.SegmentsThorax.ThoraxSeg.LTptT3L3Via5NodeR.sRel;
AnyFloat LTptT3L3Via5NodeL_pos                           = Main.HumanModel.BodyModel.Trunk.SegmentsThorax.ThoraxSeg.LTptT3L3Via5NodeL.sRel;
AnyFloat LTptT3L3Via6NodeR_pos                           = Main.HumanModel.BodyModel.Trunk.SegmentsThorax.ThoraxSeg.LTptT3L3Via6NodeR.sRel;
AnyFloat LTptT3L3Via6NodeL_pos                           = Main.HumanModel.BodyModel.Trunk.SegmentsThorax.ThoraxSeg.LTptT3L3Via6NodeL.sRel;
AnyFloat LTptT3L3Via7NodeR_pos                           = Main.HumanModel.BodyModel.Trunk.SegmentsThorax.ThoraxSeg.LTptT3L3Via7NodeR.sRel;
AnyFloat LTptT3L3Via7NodeL_pos                           = Main.HumanModel.BodyModel.Trunk.SegmentsThorax.ThoraxSeg.LTptT3L3Via7NodeL.sRel;
AnyFloat LTptT3L3Via8NodeR_pos                           = Main.HumanModel.BodyModel.Trunk.SegmentsThorax.ThoraxSeg.LTptT3L3Via8NodeR.sRel;
AnyFloat LTptT3L3Via8NodeL_pos                           = Main.HumanModel.BodyModel.Trunk.SegmentsThorax.ThoraxSeg.LTptT3L3Via8NodeL.sRel;
AnyFloat LTptT3L3Via9NodeR_pos                           = Main.HumanModel.BodyModel.Trunk.SegmentsThorax.ThoraxSeg.LTptT3L3Via9NodeR.sRel;
AnyFloat LTptT3L3Via9NodeL_pos                           = Main.HumanModel.BodyModel.Trunk.SegmentsThorax.ThoraxSeg.LTptT3L3Via9NodeL.sRel;
AnyFloat LTptT4L4NodeR_pos                               = Main.HumanModel.BodyModel.Trunk.SegmentsThorax.ThoraxSeg.LTptT4L4NodeR.sRel;
AnyFloat LTptT4L4NodeL_pos                               = Main.HumanModel.BodyModel.Trunk.SegmentsThorax.ThoraxSeg.LTptT4L4NodeL.sRel;
AnyFloat LTptT4L4Via1NodeR_pos                           = Main.HumanModel.BodyModel.Trunk.SegmentsThorax.ThoraxSeg.LTptT4L4Via1NodeR.sRel;
AnyFloat LTptT4L4Via1NodeL_pos                           = Main.HumanModel.BodyModel.Trunk.SegmentsThorax.ThoraxSeg.LTptT4L4Via1NodeL.sRel;
AnyFloat LTptT4L4Via2NodeR_pos                           = Main.HumanModel.BodyModel.Trunk.SegmentsThorax.ThoraxSeg.LTptT4L4Via2NodeR.sRel;
AnyFloat LTptT4L4Via2NodeL_pos                           = Main.HumanModel.BodyModel.Trunk.SegmentsThorax.ThoraxSeg.LTptT4L4Via2NodeL.sRel;
AnyFloat LTptT4L4Via3NodeR_pos                           = Main.HumanModel.BodyModel.Trunk.SegmentsThorax.ThoraxSeg.LTptT4L4Via3NodeR.sRel;
AnyFloat LTptT4L4Via3NodeL_pos                           = Main.HumanModel.BodyModel.Trunk.SegmentsThorax.ThoraxSeg.LTptT4L4Via3NodeL.sRel;
AnyFloat LTptT4L4Via4NodeR_pos                           = Main.HumanModel.BodyModel.Trunk.SegmentsThorax.ThoraxSeg.LTptT4L4Via4NodeR.sRel;
AnyFloat LTptT4L4Via4NodeL_pos                           = Main.HumanModel.BodyModel.Trunk.SegmentsThorax.ThoraxSeg.LTptT4L4Via4NodeL.sRel;
AnyFloat LTptT4L4Via5NodeR_pos                           = Main.HumanModel.BodyModel.Trunk.SegmentsThorax.ThoraxSeg.LTptT4L4Via5NodeR.sRel;
AnyFloat LTptT4L4Via5NodeL_pos                           = Main.HumanModel.BodyModel.Trunk.SegmentsThorax.ThoraxSeg.LTptT4L4Via5NodeL.sRel;
AnyFloat LTptT4L4Via6NodeR_pos                           = Main.HumanModel.BodyModel.Trunk.SegmentsThorax.ThoraxSeg.LTptT4L4Via6NodeR.sRel;
AnyFloat LTptT4L4Via6NodeL_pos                           = Main.HumanModel.BodyModel.Trunk.SegmentsThorax.ThoraxSeg.LTptT4L4Via6NodeL.sRel;
AnyFloat LTptT4L4Via7NodeR_pos                           = Main.HumanModel.BodyModel.Trunk.SegmentsThorax.ThoraxSeg.LTptT4L4Via7NodeR.sRel;
AnyFloat LTptT4L4Via7NodeL_pos                           = Main.HumanModel.BodyModel.Trunk.SegmentsThorax.ThoraxSeg.LTptT4L4Via7NodeL.sRel;
AnyFloat LTptT4L4Via8NodeR_pos                           = Main.HumanModel.BodyModel.Trunk.SegmentsThorax.ThoraxSeg.LTptT4L4Via8NodeR.sRel;
AnyFloat LTptT4L4Via8NodeL_pos                           = Main.HumanModel.BodyModel.Trunk.SegmentsThorax.ThoraxSeg.LTptT4L4Via8NodeL.sRel;
AnyFloat LTptT5L5NodeR_pos                               = Main.HumanModel.BodyModel.Trunk.SegmentsThorax.ThoraxSeg.LTptT5L5NodeR.sRel;
AnyFloat LTptT5L5NodeL_pos                               = Main.HumanModel.BodyModel.Trunk.SegmentsThorax.ThoraxSeg.LTptT5L5NodeL.sRel;
AnyFloat LTptT5L5Via1NodeR_pos                           = Main.HumanModel.BodyModel.Trunk.SegmentsThorax.ThoraxSeg.LTptT5L5Via1NodeR.sRel;
AnyFloat LTptT5L5Via1NodeL_pos                           = Main.HumanModel.BodyModel.Trunk.SegmentsThorax.ThoraxSeg.LTptT5L5Via1NodeL.sRel;
AnyFloat LTptT5L5Via2NodeR_pos                           = Main.HumanModel.BodyModel.Trunk.SegmentsThorax.ThoraxSeg.LTptT5L5Via2NodeR.sRel;
AnyFloat LTptT5L5Via2NodeL_pos                           = Main.HumanModel.BodyModel.Trunk.SegmentsThorax.ThoraxSeg.LTptT5L5Via2NodeL.sRel;
AnyFloat LTptT5L5Via3NodeR_pos                           = Main.HumanModel.BodyModel.Trunk.SegmentsThorax.ThoraxSeg.LTptT5L5Via3NodeR.sRel;
AnyFloat LTptT5L5Via3NodeL_pos                           = Main.HumanModel.BodyModel.Trunk.SegmentsThorax.ThoraxSeg.LTptT5L5Via3NodeL.sRel;
AnyFloat LTptT5L5Via4NodeR_pos                           = Main.HumanModel.BodyModel.Trunk.SegmentsThorax.ThoraxSeg.LTptT5L5Via4NodeR.sRel;
AnyFloat LTptT5L5Via4NodeL_pos                           = Main.HumanModel.BodyModel.Trunk.SegmentsThorax.ThoraxSeg.LTptT5L5Via4NodeL.sRel;
AnyFloat LTptT5L5Via5NodeR_pos                           = Main.HumanModel.BodyModel.Trunk.SegmentsThorax.ThoraxSeg.LTptT5L5Via5NodeR.sRel;
AnyFloat LTptT5L5Via5NodeL_pos                           = Main.HumanModel.BodyModel.Trunk.SegmentsThorax.ThoraxSeg.LTptT5L5Via5NodeL.sRel;
AnyFloat LTptT5L5Via6NodeR_pos                           = Main.HumanModel.BodyModel.Trunk.SegmentsThorax.ThoraxSeg.LTptT5L5Via6NodeR.sRel;
AnyFloat LTptT5L5Via6NodeL_pos                           = Main.HumanModel.BodyModel.Trunk.SegmentsThorax.ThoraxSeg.LTptT5L5Via6NodeL.sRel;
AnyFloat LTptT5L5Via7NodeR_pos                           = Main.HumanModel.BodyModel.Trunk.SegmentsThorax.ThoraxSeg.LTptT5L5Via7NodeR.sRel;
AnyFloat LTptT5L5Via7NodeL_pos                           = Main.HumanModel.BodyModel.Trunk.SegmentsThorax.ThoraxSeg.LTptT5L5Via7NodeL.sRel;
AnyFloat LTptT6S1NodeR_pos                               = Main.HumanModel.BodyModel.Trunk.SegmentsThorax.ThoraxSeg.LTptT6S1NodeR.sRel;
AnyFloat LTptT6S1NodeL_pos                               = Main.HumanModel.BodyModel.Trunk.SegmentsThorax.ThoraxSeg.LTptT6S1NodeL.sRel;
AnyFloat LTptT6S1Via1NodeR_pos                           = Main.HumanModel.BodyModel.Trunk.SegmentsThorax.ThoraxSeg.LTptT6S1Via1NodeR.sRel;
AnyFloat LTptT6S1Via1NodeL_pos                           = Main.HumanModel.BodyModel.Trunk.SegmentsThorax.ThoraxSeg.LTptT6S1Via1NodeL.sRel;
AnyFloat LTptT6S1Via2NodeR_pos                           = Main.HumanModel.BodyModel.Trunk.SegmentsThorax.ThoraxSeg.LTptT6S1Via2NodeR.sRel;
AnyFloat LTptT6S1Via2NodeL_pos                           = Main.HumanModel.BodyModel.Trunk.SegmentsThorax.ThoraxSeg.LTptT6S1Via2NodeL.sRel;
AnyFloat LTptT6S1Via3NodeR_pos                           = Main.HumanModel.BodyModel.Trunk.SegmentsThorax.ThoraxSeg.LTptT6S1Via3NodeR.sRel;
AnyFloat LTptT6S1Via3NodeL_pos                           = Main.HumanModel.BodyModel.Trunk.SegmentsThorax.ThoraxSeg.LTptT6S1Via3NodeL.sRel;
AnyFloat LTptT6S1Via4NodeR_pos                           = Main.HumanModel.BodyModel.Trunk.SegmentsThorax.ThoraxSeg.LTptT6S1Via4NodeR.sRel;
AnyFloat LTptT6S1Via4NodeL_pos                           = Main.HumanModel.BodyModel.Trunk.SegmentsThorax.ThoraxSeg.LTptT6S1Via4NodeL.sRel;
AnyFloat LTptT6S1Via5NodeR_pos                           = Main.HumanModel.BodyModel.Trunk.SegmentsThorax.ThoraxSeg.LTptT6S1Via5NodeR.sRel;
AnyFloat LTptT6S1Via5NodeL_pos                           = Main.HumanModel.BodyModel.Trunk.SegmentsThorax.ThoraxSeg.LTptT6S1Via5NodeL.sRel;
AnyFloat LTptT6S1Via6NodeR_pos                           = Main.HumanModel.BodyModel.Trunk.SegmentsThorax.ThoraxSeg.LTptT6S1Via6NodeR.sRel;
AnyFloat LTptT6S1Via6NodeL_pos                           = Main.HumanModel.BodyModel.Trunk.SegmentsThorax.ThoraxSeg.LTptT6S1Via6NodeL.sRel;
AnyFloat LTptT7S2NodeR_pos                               = Main.HumanModel.BodyModel.Trunk.SegmentsThorax.ThoraxSeg.LTptT7S2NodeR.sRel;
AnyFloat LTptT7S2NodeL_pos                               = Main.HumanModel.BodyModel.Trunk.SegmentsThorax.ThoraxSeg.LTptT7S2NodeL.sRel;
AnyFloat LTptT7S2Via1NodeR_pos                           = Main.HumanModel.BodyModel.Trunk.SegmentsThorax.ThoraxSeg.LTptT7S2Via1NodeR.sRel;
AnyFloat LTptT7S2Via1NodeL_pos                           = Main.HumanModel.BodyModel.Trunk.SegmentsThorax.ThoraxSeg.LTptT7S2Via1NodeL.sRel;
AnyFloat LTptT7S2Via2NodeR_pos                           = Main.HumanModel.BodyModel.Trunk.SegmentsThorax.ThoraxSeg.LTptT7S2Via2NodeR.sRel;
AnyFloat LTptT7S2Via2NodeL_pos                           = Main.HumanModel.BodyModel.Trunk.SegmentsThorax.ThoraxSeg.LTptT7S2Via2NodeL.sRel;
AnyFloat LTptT7S2Via3NodeR_pos                           = Main.HumanModel.BodyModel.Trunk.SegmentsThorax.ThoraxSeg.LTptT7S2Via3NodeR.sRel;
AnyFloat LTptT7S2Via3NodeL_pos                           = Main.HumanModel.BodyModel.Trunk.SegmentsThorax.ThoraxSeg.LTptT7S2Via3NodeL.sRel;
AnyFloat LTptT7S2Via4NodeR_pos                           = Main.HumanModel.BodyModel.Trunk.SegmentsThorax.ThoraxSeg.LTptT7S2Via4NodeR.sRel;
AnyFloat LTptT7S2Via4NodeL_pos                           = Main.HumanModel.BodyModel.Trunk.SegmentsThorax.ThoraxSeg.LTptT7S2Via4NodeL.sRel;
AnyFloat LTptT7S2Via5NodeR_pos                           = Main.HumanModel.BodyModel.Trunk.SegmentsThorax.ThoraxSeg.LTptT7S2Via5NodeR.sRel;
AnyFloat LTptT7S2Via5NodeL_pos                           = Main.HumanModel.BodyModel.Trunk.SegmentsThorax.ThoraxSeg.LTptT7S2Via5NodeL.sRel;
AnyFloat LTptT8S3NodeR_pos                               = Main.HumanModel.BodyModel.Trunk.SegmentsThorax.ThoraxSeg.LTptT8S3NodeR.sRel;
AnyFloat LTptT8S3NodeL_pos                               = Main.HumanModel.BodyModel.Trunk.SegmentsThorax.ThoraxSeg.LTptT8S3NodeL.sRel;
AnyFloat LTptT8S3Via1NodeR_pos                           = Main.HumanModel.BodyModel.Trunk.SegmentsThorax.ThoraxSeg.LTptT8S3Via1NodeR.sRel;
AnyFloat LTptT8S3Via1NodeL_pos                           = Main.HumanModel.BodyModel.Trunk.SegmentsThorax.ThoraxSeg.LTptT8S3Via1NodeL.sRel;
AnyFloat LTptT8S3Via2NodeR_pos                           = Main.HumanModel.BodyModel.Trunk.SegmentsThorax.ThoraxSeg.LTptT8S3Via2NodeR.sRel;
AnyFloat LTptT8S3Via2NodeL_pos                           = Main.HumanModel.BodyModel.Trunk.SegmentsThorax.ThoraxSeg.LTptT8S3Via2NodeL.sRel;
AnyFloat LTptT8S3Via3NodeR_pos                           = Main.HumanModel.BodyModel.Trunk.SegmentsThorax.ThoraxSeg.LTptT8S3Via3NodeR.sRel;
AnyFloat LTptT8S3Via3NodeL_pos                           = Main.HumanModel.BodyModel.Trunk.SegmentsThorax.ThoraxSeg.LTptT8S3Via3NodeL.sRel;
AnyFloat LTptT8S3Via4NodeR_pos                           = Main.HumanModel.BodyModel.Trunk.SegmentsThorax.ThoraxSeg.LTptT8S3Via4NodeR.sRel;
AnyFloat LTptT8S3Via4NodeL_pos                           = Main.HumanModel.BodyModel.Trunk.SegmentsThorax.ThoraxSeg.LTptT8S3Via4NodeL.sRel;
AnyFloat LTptT9S4NodeR_pos                               = Main.HumanModel.BodyModel.Trunk.SegmentsThorax.ThoraxSeg.LTptT9S4NodeR.sRel;
AnyFloat LTptT9S4NodeL_pos                               = Main.HumanModel.BodyModel.Trunk.SegmentsThorax.ThoraxSeg.LTptT9S4NodeL.sRel;
AnyFloat LTptT9S4Via1NodeR_pos                           = Main.HumanModel.BodyModel.Trunk.SegmentsThorax.ThoraxSeg.LTptT9S4Via1NodeR.sRel;
AnyFloat LTptT9S4Via1NodeL_pos                           = Main.HumanModel.BodyModel.Trunk.SegmentsThorax.ThoraxSeg.LTptT9S4Via1NodeL.sRel;
AnyFloat LTptT9S4Via2NodeR_pos                           = Main.HumanModel.BodyModel.Trunk.SegmentsThorax.ThoraxSeg.LTptT9S4Via2NodeR.sRel;
AnyFloat LTptT9S4Via2NodeL_pos                           = Main.HumanModel.BodyModel.Trunk.SegmentsThorax.ThoraxSeg.LTptT9S4Via2NodeL.sRel;
AnyFloat LTptT9S4Via3NodeR_pos                           = Main.HumanModel.BodyModel.Trunk.SegmentsThorax.ThoraxSeg.LTptT9S4Via3NodeR.sRel;
AnyFloat LTptT9S4Via3NodeL_pos                           = Main.HumanModel.BodyModel.Trunk.SegmentsThorax.ThoraxSeg.LTptT9S4Via3NodeL.sRel;
AnyFloat LTptT10SacrumNodeR_pos                          = Main.HumanModel.BodyModel.Trunk.SegmentsThorax.ThoraxSeg.LTptT10SacrumNodeR.sRel;
AnyFloat LTptT10SacrumNodeL_pos                          = Main.HumanModel.BodyModel.Trunk.SegmentsThorax.ThoraxSeg.LTptT10SacrumNodeL.sRel;
AnyFloat LTptT10SacrumVia1NodeR_pos                      = Main.HumanModel.BodyModel.Trunk.SegmentsThorax.ThoraxSeg.LTptT10SacrumVia1NodeR.sRel;
AnyFloat LTptT10SacrumVia1NodeL_pos                      = Main.HumanModel.BodyModel.Trunk.SegmentsThorax.ThoraxSeg.LTptT10SacrumVia1NodeL.sRel;
AnyFloat LTptT10SacrumVia2NodeR_pos                      = Main.HumanModel.BodyModel.Trunk.SegmentsThorax.ThoraxSeg.LTptT10SacrumVia2NodeR.sRel;
AnyFloat LTptT10SacrumVia2NodeL_pos                      = Main.HumanModel.BodyModel.Trunk.SegmentsThorax.ThoraxSeg.LTptT10SacrumVia2NodeL.sRel;
AnyFloat LTptT11SacrumNodeR_pos                          = Main.HumanModel.BodyModel.Trunk.SegmentsThorax.ThoraxSeg.LTptT11SacrumNodeR.sRel;
AnyFloat LTptT11SacrumNodeL_pos                          = Main.HumanModel.BodyModel.Trunk.SegmentsThorax.ThoraxSeg.LTptT11SacrumNodeL.sRel;
AnyFloat LTptT11SacrumVia1NodeR_pos                      = Main.HumanModel.BodyModel.Trunk.SegmentsThorax.ThoraxSeg.LTptT11SacrumVia1NodeR.sRel;
AnyFloat LTptT11SacrumVia1NodeL_pos                      = Main.HumanModel.BodyModel.Trunk.SegmentsThorax.ThoraxSeg.LTptT11SacrumVia1NodeL.sRel;
AnyFloat LTptT12SacrumNodeR_pos                          = Main.HumanModel.BodyModel.Trunk.SegmentsThorax.ThoraxSeg.LTptT12SacrumNodeR.sRel;
AnyFloat LTptT12SacrumNodeL_pos                          = Main.HumanModel.BodyModel.Trunk.SegmentsThorax.ThoraxSeg.LTptT12SacrumNodeL.sRel;
AnyFloat PMT12I_TMNodeR_pos                              = Main.HumanModel.BodyModel.Trunk.SegmentsThorax.ThoraxSeg.PMT12I_TMNodeR.sRel;
AnyFloat PMT12I_TMNodeL_pos                              = Main.HumanModel.BodyModel.Trunk.SegmentsThorax.ThoraxSeg.PMT12I_TMNodeL.sRel;
AnyFloat QLC12_CINodeR_pos                               = Main.HumanModel.BodyModel.Trunk.SegmentsThorax.ThoraxSeg.QLC12_CINodeR.sRel;
AnyFloat QLC12_CINodeL_pos                               = Main.HumanModel.BodyModel.Trunk.SegmentsThorax.ThoraxSeg.QLC12_CINodeL.sRel;
AnyFloat RACP_CO5NodeR_pos                               = Main.HumanModel.BodyModel.Trunk.SegmentsThorax.ThoraxSeg.RACP_CO5NodeR.sRel;
AnyFloat RACP_CO5NodeL_pos                               = Main.HumanModel.BodyModel.Trunk.SegmentsThorax.ThoraxSeg.RACP_CO5NodeL.sRel;
AnyFloat RACP_CO6NodeR_pos                               = Main.HumanModel.BodyModel.Trunk.SegmentsThorax.ThoraxSeg.RACP_CO6NodeR.sRel;
AnyFloat RACP_CO6NodeL_pos                               = Main.HumanModel.BodyModel.Trunk.SegmentsThorax.ThoraxSeg.RACP_CO6NodeL.sRel;
AnyFloat RACP_CO6Node_pos                                = Main.HumanModel.BodyModel.Trunk.SegmentsThorax.ThoraxSeg.RACP_CO6Node.sRel;
AnyFloat RACP_CO7NodeR_pos                               = Main.HumanModel.BodyModel.Trunk.SegmentsThorax.ThoraxSeg.RACP_CO7NodeR.sRel;
AnyFloat RACP_CO7NodeL_pos                               = Main.HumanModel.BodyModel.Trunk.SegmentsThorax.ThoraxSeg.RACP_CO7NodeL.sRel;
AnyFloat RACP_CO5ViaNodeR_pos                            = Main.HumanModel.BodyModel.Trunk.SegmentsThorax.ThoraxSeg.RACP_CO5ViaNodeR.sRel;
AnyFloat RACP_CO5ViaNodeL_pos                            = Main.HumanModel.BodyModel.Trunk.SegmentsThorax.ThoraxSeg.RACP_CO5ViaNodeL.sRel;
AnyFloat RACP_CO6ViaNodeR_pos                            = Main.HumanModel.BodyModel.Trunk.SegmentsThorax.ThoraxSeg.RACP_CO6ViaNodeR.sRel;
AnyFloat RACP_CO6ViaNodeL_pos                            = Main.HumanModel.BodyModel.Trunk.SegmentsThorax.ThoraxSeg.RACP_CO6ViaNodeL.sRel;
AnyFloat OEC7_RSNodeR_pos                                = Main.HumanModel.BodyModel.Trunk.SegmentsThorax.ThoraxSeg.OEC7_RSNodeR.sRel;
AnyFloat OEC7_RSNodeL_pos                                = Main.HumanModel.BodyModel.Trunk.SegmentsThorax.ThoraxSeg.OEC7_RSNodeL.sRel;
AnyFloat OEC8_RSNodeR_pos                                = Main.HumanModel.BodyModel.Trunk.SegmentsThorax.ThoraxSeg.OEC8_RSNodeR.sRel;
AnyFloat OEC8_RSNodeL_pos                                = Main.HumanModel.BodyModel.Trunk.SegmentsThorax.ThoraxSeg.OEC8_RSNodeL.sRel;
AnyFloat OEC9_RSNodeR_pos                                = Main.HumanModel.BodyModel.Trunk.SegmentsThorax.ThoraxSeg.OEC9_RSNodeR.sRel;
AnyFloat OEC9_RSNodeL_pos                                = Main.HumanModel.BodyModel.Trunk.SegmentsThorax.ThoraxSeg.OEC9_RSNodeL.sRel;
AnyFloat OEC10_RSNodeR_pos                               = Main.HumanModel.BodyModel.Trunk.SegmentsThorax.ThoraxSeg.OEC10_RSNodeR.sRel;
AnyFloat OEC10_RSNodeL_pos                               = Main.HumanModel.BodyModel.Trunk.SegmentsThorax.ThoraxSeg.OEC10_RSNodeL.sRel;
AnyFloat OEC11_CINodeR_pos                               = Main.HumanModel.BodyModel.Trunk.SegmentsThorax.ThoraxSeg.OEC11_CINodeR.sRel;
AnyFloat OEC11_CINodeL_pos                               = Main.HumanModel.BodyModel.Trunk.SegmentsThorax.ThoraxSeg.OEC11_CINodeL.sRel;
AnyFloat OEC12_CINodeR_pos                               = Main.HumanModel.BodyModel.Trunk.SegmentsThorax.ThoraxSeg.OEC12_CINodeR.sRel;
AnyFloat OEC12_CINodeL_pos                               = Main.HumanModel.BodyModel.Trunk.SegmentsThorax.ThoraxSeg.OEC12_CINodeL.sRel;
AnyFloat OICI_C12NodeR_pos                               = Main.HumanModel.BodyModel.Trunk.SegmentsThorax.ThoraxSeg.OICI_C12NodeR.sRel;
AnyFloat OICI_C12NodeL_pos                               = Main.HumanModel.BodyModel.Trunk.SegmentsThorax.ThoraxSeg.OICI_C12NodeL.sRel;
AnyFloat OICI_C11NodeR_pos                               = Main.HumanModel.BodyModel.Trunk.SegmentsThorax.ThoraxSeg.OICI_C11NodeR.sRel;
AnyFloat OICI_C11NodeL_pos                               = Main.HumanModel.BodyModel.Trunk.SegmentsThorax.ThoraxSeg.OICI_C11NodeL.sRel;
AnyFloat OICI_C10NodeR_pos                               = Main.HumanModel.BodyModel.Trunk.SegmentsThorax.ThoraxSeg.OICI_C10NodeR.sRel;
AnyFloat OICI_C10NodeL_pos                               = Main.HumanModel.BodyModel.Trunk.SegmentsThorax.ThoraxSeg.OICI_C10NodeL.sRel;
AnyFloat T1C5Jnt_pos                                     = Main.HumanModel.BodyModel.Trunk.SegmentsThorax.ThoraxSeg.T1C5Jnt.sRel;
AnyFloat Right_pos                                       = Main.HumanModel.BodyModel.Trunk.SegmentsThorax.ThoraxSeg.Right.sRel;
AnyFloat Left_pos                                        = Main.HumanModel.BodyModel.Trunk.SegmentsThorax.ThoraxSeg.Left.sRel;
AnyFloat MFL1T8NodeR_pos                                 = Main.HumanModel.BodyModel.Trunk.SegmentsThorax.ThoraxSeg.MFL1T8NodeR.sRel;
AnyFloat MFL1T8NodeL_pos                                 = Main.HumanModel.BodyModel.Trunk.SegmentsThorax.ThoraxSeg.MFL1T8NodeL.sRel;
AnyFloat MFL1T9NodeR_pos                                 = Main.HumanModel.BodyModel.Trunk.SegmentsThorax.ThoraxSeg.MFL1T9NodeR.sRel;
AnyFloat MFL1T9NodeL_pos                                 = Main.HumanModel.BodyModel.Trunk.SegmentsThorax.ThoraxSeg.MFL1T9NodeL.sRel;
AnyFloat MFL1T10NodeR_pos                                = Main.HumanModel.BodyModel.Trunk.SegmentsThorax.ThoraxSeg.MFL1T10NodeR.sRel;
AnyFloat MFL1T10NodeL_pos                                = Main.HumanModel.BodyModel.Trunk.SegmentsThorax.ThoraxSeg.MFL1T10NodeL.sRel;
AnyFloat MFL2T9NodeR_pos                                 = Main.HumanModel.BodyModel.Trunk.SegmentsThorax.ThoraxSeg.MFL2T9NodeR.sRel;
AnyFloat MFL2T9NodeL_pos                                 = Main.HumanModel.BodyModel.Trunk.SegmentsThorax.ThoraxSeg.MFL2T9NodeL.sRel;
AnyFloat MFL2T10NodeR_pos                                = Main.HumanModel.BodyModel.Trunk.SegmentsThorax.ThoraxSeg.MFL2T10NodeR.sRel;
AnyFloat MFL2T10NodeL_pos                                = Main.HumanModel.BodyModel.Trunk.SegmentsThorax.ThoraxSeg.MFL2T10NodeL.sRel;
AnyFloat MFL2T11NodeR_pos                                = Main.HumanModel.BodyModel.Trunk.SegmentsThorax.ThoraxSeg.MFL2T11NodeR.sRel;
AnyFloat MFL2T11NodeL_pos                                = Main.HumanModel.BodyModel.Trunk.SegmentsThorax.ThoraxSeg.MFL2T11NodeL.sRel;
AnyFloat MFL3T10NodeR_pos                                = Main.HumanModel.BodyModel.Trunk.SegmentsThorax.ThoraxSeg.MFL3T10NodeR.sRel;
AnyFloat MFL3T10NodeL_pos                                = Main.HumanModel.BodyModel.Trunk.SegmentsThorax.ThoraxSeg.MFL3T10NodeL.sRel;
AnyFloat MFL3T11NodeR_pos                                = Main.HumanModel.BodyModel.Trunk.SegmentsThorax.ThoraxSeg.MFL3T11NodeR.sRel;
AnyFloat MFL3T11NodeL_pos                                = Main.HumanModel.BodyModel.Trunk.SegmentsThorax.ThoraxSeg.MFL3T11NodeL.sRel;
AnyFloat MFL3T12NodeR_pos                                = Main.HumanModel.BodyModel.Trunk.SegmentsThorax.ThoraxSeg.MFL3T12NodeR.sRel;
AnyFloat MFL3T12NodeL_pos                                = Main.HumanModel.BodyModel.Trunk.SegmentsThorax.ThoraxSeg.MFL3T12NodeL.sRel;
AnyFloat MFL4T11NodeR_pos                                = Main.HumanModel.BodyModel.Trunk.SegmentsThorax.ThoraxSeg.MFL4T11NodeR.sRel;
AnyFloat MFL4T11NodeL_pos                                = Main.HumanModel.BodyModel.Trunk.SegmentsThorax.ThoraxSeg.MFL4T11NodeL.sRel;
AnyFloat MFL4T12NodeR_pos                                = Main.HumanModel.BodyModel.Trunk.SegmentsThorax.ThoraxSeg.MFL4T12NodeR.sRel;
AnyFloat MFL4T12NodeL_pos                                = Main.HumanModel.BodyModel.Trunk.SegmentsThorax.ThoraxSeg.MFL4T12NodeL.sRel;
AnyFloat MFL5T12NodeR_pos                                = Main.HumanModel.BodyModel.Trunk.SegmentsThorax.ThoraxSeg.MFL5T12NodeR.sRel;
AnyFloat MFL5T12NodeL_pos                                = Main.HumanModel.BodyModel.Trunk.SegmentsThorax.ThoraxSeg.MFL5T12NodeL.sRel;
AnyFloat SPL1T5Node_pos                                  = Main.HumanModel.BodyModel.Trunk.SegmentsThorax.ThoraxSeg.SPL1T5Node.sRel;
AnyFloat SPL1T4Node_pos                                  = Main.HumanModel.BodyModel.Trunk.SegmentsThorax.ThoraxSeg.SPL1T4Node.sRel;
AnyFloat SPL1T3Node_pos                                  = Main.HumanModel.BodyModel.Trunk.SegmentsThorax.ThoraxSeg.SPL1T3Node.sRel;
AnyFloat SEL1T8NodeR_pos                                 = Main.HumanModel.BodyModel.Trunk.SegmentsThorax.ThoraxSeg.SEL1T8NodeR.sRel;
AnyFloat SEL1T8NodeL_pos                                 = Main.HumanModel.BodyModel.Trunk.SegmentsThorax.ThoraxSeg.SEL1T8NodeL.sRel;
AnyFloat SEL1T10NodeR_pos                                = Main.HumanModel.BodyModel.Trunk.SegmentsThorax.ThoraxSeg.SEL1T10NodeR.sRel;
AnyFloat SEL1T10NodeL_pos                                = Main.HumanModel.BodyModel.Trunk.SegmentsThorax.ThoraxSeg.SEL1T10NodeL.sRel;
AnyFloat SEL1T11NodeR_pos                                = Main.HumanModel.BodyModel.Trunk.SegmentsThorax.ThoraxSeg.SEL1T11NodeR.sRel;
AnyFloat SEL1T11NodeL_pos                                = Main.HumanModel.BodyModel.Trunk.SegmentsThorax.ThoraxSeg.SEL1T11NodeL.sRel;
AnyFloat SEL2T9NodeR_pos                                 = Main.HumanModel.BodyModel.Trunk.SegmentsThorax.ThoraxSeg.SEL2T9NodeR.sRel;
AnyFloat SEL2T9NodeL_pos                                 = Main.HumanModel.BodyModel.Trunk.SegmentsThorax.ThoraxSeg.SEL2T9NodeL.sRel;
AnyFloat SEL2T10NodeR_pos                                = Main.HumanModel.BodyModel.Trunk.SegmentsThorax.ThoraxSeg.SEL2T10NodeR.sRel;
AnyFloat SEL2T10NodeL_pos                                = Main.HumanModel.BodyModel.Trunk.SegmentsThorax.ThoraxSeg.SEL2T10NodeL.sRel;
AnyFloat SEL2T11NodeR_pos                                = Main.HumanModel.BodyModel.Trunk.SegmentsThorax.ThoraxSeg.SEL2T11NodeR.sRel;
AnyFloat SEL2T11NodeL_pos                                = Main.HumanModel.BodyModel.Trunk.SegmentsThorax.ThoraxSeg.SEL2T11NodeL.sRel;
AnyFloat SEL2T12NodeR_pos                                = Main.HumanModel.BodyModel.Trunk.SegmentsThorax.ThoraxSeg.SEL2T12NodeR.sRel;
AnyFloat SEL2T12NodeL_pos                                = Main.HumanModel.BodyModel.Trunk.SegmentsThorax.ThoraxSeg.SEL2T12NodeL.sRel;
AnyFloat SEL3T11NodeR_pos                                = Main.HumanModel.BodyModel.Trunk.SegmentsThorax.ThoraxSeg.SEL3T11NodeR.sRel;
AnyFloat SEL3T11NodeL_pos                                = Main.HumanModel.BodyModel.Trunk.SegmentsThorax.ThoraxSeg.SEL3T11NodeL.sRel;
AnyFloat SEL3T12NodeR_pos                                = Main.HumanModel.BodyModel.Trunk.SegmentsThorax.ThoraxSeg.SEL3T12NodeR.sRel;
AnyFloat SEL3T12NodeL_pos                                = Main.HumanModel.BodyModel.Trunk.SegmentsThorax.ThoraxSeg.SEL3T12NodeL.sRel;
AnyFloat PressureNode_pos                                = Main.HumanModel.BodyModel.Trunk.SegmentsThorax.ThoraxSeg.PressureNode.sRel;
AnyFloat BuckleNodeTopCenter_pos                         = Main.HumanModel.BodyModel.Trunk.SegmentsThorax.ThoraxSeg.BuckleNodeTopCenter.sRel;
AnyFloat BuckleNodeRight_pos                             = Main.HumanModel.BodyModel.Trunk.SegmentsThorax.ThoraxSeg.BuckleNodeRight.sRel;
AnyFloat BuckleNodeLeft_pos                              = Main.HumanModel.BodyModel.Trunk.SegmentsThorax.ThoraxSeg.BuckleNodeLeft.sRel;
AnyFloat ij_scj_pos                                      = Main.HumanModel.BodyModel.Trunk.SegmentsThorax.ThoraxSeg.ij.scj.sRel;
AnyFloat ij_costoclavicular_pos                          = Main.HumanModel.BodyModel.Trunk.SegmentsThorax.ThoraxSeg.ij.costoclavicular.sRel;
AnyFloat ij_P1_pos                                       = Main.HumanModel.BodyModel.Trunk.SegmentsThorax.ThoraxSeg.ij.P1.sRel;
AnyFloat ij_P2_pos                                       = Main.HumanModel.BodyModel.Trunk.SegmentsThorax.ThoraxSeg.ij.P2.sRel;
AnyFloat ij_NormalControlPoint_pos                       = Main.HumanModel.BodyModel.Trunk.SegmentsThorax.ThoraxSeg.ij.NormalControlPoint.sRel;
AnyFloat ij_P3_pos                                       = Main.HumanModel.BodyModel.Trunk.SegmentsThorax.ThoraxSeg.ij.P3.sRel;
AnyFloat ij_P4_pos                                       = Main.HumanModel.BodyModel.Trunk.SegmentsThorax.ThoraxSeg.ij.P4.sRel;
AnyFloat ij_ScapulaEllipsoidOrigin_pos                   = Main.HumanModel.BodyModel.Trunk.SegmentsThorax.ThoraxSeg.ij.ScapulaEllipsoidOrigin.sRel;
AnyFloat ij_O_latissimus_dorsi_1_pos                     = Main.HumanModel.BodyModel.Trunk.SegmentsThorax.ThoraxSeg.ij.O_latissimus_dorsi_1.sRel;
AnyFloat ij_O_latissimus_dorsi_2_pos                     = Main.HumanModel.BodyModel.Trunk.SegmentsThorax.ThoraxSeg.ij.O_latissimus_dorsi_2.sRel;
AnyFloat ij_O_latissimus_dorsi_3_pos                     = Main.HumanModel.BodyModel.Trunk.SegmentsThorax.ThoraxSeg.ij.O_latissimus_dorsi_3.sRel;
AnyFloat ij_O_latissimus_dorsi_4_pos                     = Main.HumanModel.BodyModel.Trunk.SegmentsThorax.ThoraxSeg.ij.O_latissimus_dorsi_4.sRel;
AnyFloat ij_O_latissimus_dorsi_5_pos                     = Main.HumanModel.BodyModel.Trunk.SegmentsThorax.ThoraxSeg.ij.O_latissimus_dorsi_5.sRel;
AnyFloat ij_O_trapezius_clavicular_part_1_pos            = Main.HumanModel.BodyModel.Trunk.SegmentsThorax.ThoraxSeg.ij.O_trapezius_clavicular_part_1.sRel;
AnyFloat ij_O_trapezius_clavicular_part_2_pos            = Main.HumanModel.BodyModel.Trunk.SegmentsThorax.ThoraxSeg.ij.O_trapezius_clavicular_part_2.sRel;
AnyFloat ij_O_trapezius_clavicular_part_3_pos            = Main.HumanModel.BodyModel.Trunk.SegmentsThorax.ThoraxSeg.ij.O_trapezius_clavicular_part_3.sRel;
AnyFloat ij_O_trapezius_clavicular_part_4_pos            = Main.HumanModel.BodyModel.Trunk.SegmentsThorax.ThoraxSeg.ij.O_trapezius_clavicular_part_4.sRel;
AnyFloat ij_O_trapezius_clavicular_part_5_pos            = Main.HumanModel.BodyModel.Trunk.SegmentsThorax.ThoraxSeg.ij.O_trapezius_clavicular_part_5.sRel;
AnyFloat ij_O_trapezius_clavicular_part_6_pos            = Main.HumanModel.BodyModel.Trunk.SegmentsThorax.ThoraxSeg.ij.O_trapezius_clavicular_part_6.sRel;
AnyFloat ij_O_trapezius_scapular_part_1_pos              = Main.HumanModel.BodyModel.Trunk.SegmentsThorax.ThoraxSeg.ij.O_trapezius_scapular_part_1.sRel;
AnyFloat ij_O_trapezius_scapular_part_2_pos              = Main.HumanModel.BodyModel.Trunk.SegmentsThorax.ThoraxSeg.ij.O_trapezius_scapular_part_2.sRel;
AnyFloat ij_O_trapezius_scapular_part_3_pos              = Main.HumanModel.BodyModel.Trunk.SegmentsThorax.ThoraxSeg.ij.O_trapezius_scapular_part_3.sRel;
AnyFloat ij_O_trapezius_scapular_part_4_pos              = Main.HumanModel.BodyModel.Trunk.SegmentsThorax.ThoraxSeg.ij.O_trapezius_scapular_part_4.sRel;
AnyFloat ij_O_trapezius_scapular_part_5_pos              = Main.HumanModel.BodyModel.Trunk.SegmentsThorax.ThoraxSeg.ij.O_trapezius_scapular_part_5.sRel;
AnyFloat ij_O_trapezius_scapular_part_6_pos              = Main.HumanModel.BodyModel.Trunk.SegmentsThorax.ThoraxSeg.ij.O_trapezius_scapular_part_6.sRel;
AnyFloat ij_O_rhomboideus_1_pos                          = Main.HumanModel.BodyModel.Trunk.SegmentsThorax.ThoraxSeg.ij.O_rhomboideus_1.sRel;
AnyFloat ij_O_rhomboideus_2_pos                          = Main.HumanModel.BodyModel.Trunk.SegmentsThorax.ThoraxSeg.ij.O_rhomboideus_2.sRel;
AnyFloat ij_O_rhomboideus_3_pos                          = Main.HumanModel.BodyModel.Trunk.SegmentsThorax.ThoraxSeg.ij.O_rhomboideus_3.sRel;
AnyFloat ij_O_levator_scapulae_1_pos                     = Main.HumanModel.BodyModel.Trunk.SegmentsThorax.ThoraxSeg.ij.O_levator_scapulae_1.sRel;
AnyFloat ij_O_levator_scapulae_2_pos                     = Main.HumanModel.BodyModel.Trunk.SegmentsThorax.ThoraxSeg.ij.O_levator_scapulae_2.sRel;
AnyFloat ij_O_levator_scapulae_3_pos                     = Main.HumanModel.BodyModel.Trunk.SegmentsThorax.ThoraxSeg.ij.O_levator_scapulae_3.sRel;
AnyFloat ij_O_pectoralis_major_thoracic_part_1_pos       = Main.HumanModel.BodyModel.Trunk.SegmentsThorax.ThoraxSeg.ij.O_pectoralis_major_thoracic_part_1.sRel;
AnyFloat ij_O_pectoralis_major_thoracic_part_2_pos       = Main.HumanModel.BodyModel.Trunk.SegmentsThorax.ThoraxSeg.ij.O_pectoralis_major_thoracic_part_2.sRel;
AnyFloat ij_O_pectoralis_major_thoracic_part_3_pos       = Main.HumanModel.BodyModel.Trunk.SegmentsThorax.ThoraxSeg.ij.O_pectoralis_major_thoracic_part_3.sRel;
AnyFloat ij_O_pectoralis_major_thoracic_part_4_pos       = Main.HumanModel.BodyModel.Trunk.SegmentsThorax.ThoraxSeg.ij.O_pectoralis_major_thoracic_part_4.sRel;
AnyFloat ij_O_pectoralis_major_thoracic_part_5_pos       = Main.HumanModel.BodyModel.Trunk.SegmentsThorax.ThoraxSeg.ij.O_pectoralis_major_thoracic_part_5.sRel;
AnyFloat ij_O_pectoralis_minor_1_pos                     = Main.HumanModel.BodyModel.Trunk.SegmentsThorax.ThoraxSeg.ij.O_pectoralis_minor_1.sRel;
AnyFloat ij_O_pectoralis_minor_2_pos                     = Main.HumanModel.BodyModel.Trunk.SegmentsThorax.ThoraxSeg.ij.O_pectoralis_minor_2.sRel;
AnyFloat ij_O_pectoralis_minor_3_pos                     = Main.HumanModel.BodyModel.Trunk.SegmentsThorax.ThoraxSeg.ij.O_pectoralis_minor_3.sRel;
AnyFloat ij_O_pectoralis_minor_4_pos                     = Main.HumanModel.BodyModel.Trunk.SegmentsThorax.ThoraxSeg.ij.O_pectoralis_minor_4.sRel;
AnyFloat ij_O_serratus_anterior_1_pos                    = Main.HumanModel.BodyModel.Trunk.SegmentsThorax.ThoraxSeg.ij.O_serratus_anterior_1.sRel;
AnyFloat ij_O_serratus_anterior_2_pos                    = Main.HumanModel.BodyModel.Trunk.SegmentsThorax.ThoraxSeg.ij.O_serratus_anterior_2.sRel;
AnyFloat ij_O_serratus_anterior_3_pos                    = Main.HumanModel.BodyModel.Trunk.SegmentsThorax.ThoraxSeg.ij.O_serratus_anterior_3.sRel;
AnyFloat ij_O_serratus_anterior_4_pos                    = Main.HumanModel.BodyModel.Trunk.SegmentsThorax.ThoraxSeg.ij.O_serratus_anterior_4.sRel;
AnyFloat ij_O_serratus_anterior_5_pos                    = Main.HumanModel.BodyModel.Trunk.SegmentsThorax.ThoraxSeg.ij.O_serratus_anterior_5.sRel;
AnyFloat ij_O_serratus_anterior_6_pos                    = Main.HumanModel.BodyModel.Trunk.SegmentsThorax.ThoraxSeg.ij.O_serratus_anterior_6.sRel;
AnyFloat ij_SternocleidomastoidNode_pos                  = Main.HumanModel.BodyModel.Trunk.SegmentsThorax.ThoraxSeg.ij.SternocleidomastoidNode.sRel;
AnyFloat ij_EllipsoidOrigin_pos                          = Main.HumanModel.BodyModel.Trunk.SegmentsThorax.ThoraxSeg.ij.EllipsoidOrigin.sRel;
AnyFloat ij_EllipsoidPectoralisOrigin_pos                = Main.HumanModel.BodyModel.Trunk.SegmentsThorax.ThoraxSeg.ij.EllipsoidPectoralisOrigin.sRel;
AnyFloat ij_EllipsoidSerratusAnteriorOrigin_pos          = Main.HumanModel.BodyModel.Trunk.SegmentsThorax.ThoraxSeg.ij.EllipsoidSerratusAnteriorOrigin.sRel;
AnyFloat ij_EllipsoidLatissimusOrigin_pos                = Main.HumanModel.BodyModel.Trunk.SegmentsThorax.ThoraxSeg.ij.EllipsoidLatissimusOrigin.sRel;
AnyFloat ij_RotNode_pos                                  = Main.HumanModel.BodyModel.Trunk.SegmentsThorax.ThoraxSeg.ij.RotNode.sRel;
AnyFloat ij_scj_RotNode_pos                              = Main.HumanModel.BodyModel.Trunk.SegmentsThorax.ThoraxSeg.ij.scj.RotNode.sRel;
AnyFloat ij_ScapulaEllipsoidOrigin_RotNode_pos           = Main.HumanModel.BodyModel.Trunk.SegmentsThorax.ThoraxSeg.ij.ScapulaEllipsoidOrigin.RotNode.sRel;
AnyFloat iji_scj_pos                                     = Main.HumanModel.BodyModel.Trunk.SegmentsThorax.ThoraxSeg.iji.scj.sRel;
AnyFloat iji_costoclavicular_pos                         = Main.HumanModel.BodyModel.Trunk.SegmentsThorax.ThoraxSeg.iji.costoclavicular.sRel;
AnyFloat iji_P1_pos                                      = Main.HumanModel.BodyModel.Trunk.SegmentsThorax.ThoraxSeg.iji.P1.sRel;
AnyFloat iji_P2_pos                                      = Main.HumanModel.BodyModel.Trunk.SegmentsThorax.ThoraxSeg.iji.P2.sRel;
AnyFloat iji_NormalControlPoint_pos                      = Main.HumanModel.BodyModel.Trunk.SegmentsThorax.ThoraxSeg.iji.NormalControlPoint.sRel;
AnyFloat iji_P3_pos                                      = Main.HumanModel.BodyModel.Trunk.SegmentsThorax.ThoraxSeg.iji.P3.sRel;
AnyFloat iji_P4_pos                                      = Main.HumanModel.BodyModel.Trunk.SegmentsThorax.ThoraxSeg.iji.P4.sRel;
AnyFloat iji_ScapulaEllipsoidOrigin_pos                  = Main.HumanModel.BodyModel.Trunk.SegmentsThorax.ThoraxSeg.iji.ScapulaEllipsoidOrigin.sRel;
AnyFloat iji_O_latissimus_dorsi_1_pos                    = Main.HumanModel.BodyModel.Trunk.SegmentsThorax.ThoraxSeg.iji.O_latissimus_dorsi_1.sRel;
AnyFloat iji_O_latissimus_dorsi_2_pos                    = Main.HumanModel.BodyModel.Trunk.SegmentsThorax.ThoraxSeg.iji.O_latissimus_dorsi_2.sRel;
AnyFloat iji_O_latissimus_dorsi_3_pos                    = Main.HumanModel.BodyModel.Trunk.SegmentsThorax.ThoraxSeg.iji.O_latissimus_dorsi_3.sRel;
AnyFloat iji_O_latissimus_dorsi_4_pos                    = Main.HumanModel.BodyModel.Trunk.SegmentsThorax.ThoraxSeg.iji.O_latissimus_dorsi_4.sRel;
AnyFloat iji_O_latissimus_dorsi_5_pos                    = Main.HumanModel.BodyModel.Trunk.SegmentsThorax.ThoraxSeg.iji.O_latissimus_dorsi_5.sRel;
AnyFloat iji_O_trapezius_clavicular_part_1_pos           = Main.HumanModel.BodyModel.Trunk.SegmentsThorax.ThoraxSeg.iji.O_trapezius_clavicular_part_1.sRel;
AnyFloat iji_O_trapezius_clavicular_part_2_pos           = Main.HumanModel.BodyModel.Trunk.SegmentsThorax.ThoraxSeg.iji.O_trapezius_clavicular_part_2.sRel;
AnyFloat iji_O_trapezius_clavicular_part_3_pos           = Main.HumanModel.BodyModel.Trunk.SegmentsThorax.ThoraxSeg.iji.O_trapezius_clavicular_part_3.sRel;
AnyFloat iji_O_trapezius_clavicular_part_4_pos           = Main.HumanModel.BodyModel.Trunk.SegmentsThorax.ThoraxSeg.iji.O_trapezius_clavicular_part_4.sRel;
AnyFloat iji_O_trapezius_clavicular_part_5_pos           = Main.HumanModel.BodyModel.Trunk.SegmentsThorax.ThoraxSeg.iji.O_trapezius_clavicular_part_5.sRel;
AnyFloat iji_O_trapezius_clavicular_part_6_pos           = Main.HumanModel.BodyModel.Trunk.SegmentsThorax.ThoraxSeg.iji.O_trapezius_clavicular_part_6.sRel;
AnyFloat iji_O_trapezius_scapular_part_1_pos             = Main.HumanModel.BodyModel.Trunk.SegmentsThorax.ThoraxSeg.iji.O_trapezius_scapular_part_1.sRel;
AnyFloat iji_O_trapezius_scapular_part_2_pos             = Main.HumanModel.BodyModel.Trunk.SegmentsThorax.ThoraxSeg.iji.O_trapezius_scapular_part_2.sRel;
AnyFloat iji_O_trapezius_scapular_part_3_pos             = Main.HumanModel.BodyModel.Trunk.SegmentsThorax.ThoraxSeg.iji.O_trapezius_scapular_part_3.sRel;
AnyFloat iji_O_trapezius_scapular_part_4_pos             = Main.HumanModel.BodyModel.Trunk.SegmentsThorax.ThoraxSeg.iji.O_trapezius_scapular_part_4.sRel;
AnyFloat iji_O_trapezius_scapular_part_5_pos             = Main.HumanModel.BodyModel.Trunk.SegmentsThorax.ThoraxSeg.iji.O_trapezius_scapular_part_5.sRel;
AnyFloat iji_O_trapezius_scapular_part_6_pos             = Main.HumanModel.BodyModel.Trunk.SegmentsThorax.ThoraxSeg.iji.O_trapezius_scapular_part_6.sRel;
AnyFloat iji_O_rhomboideus_1_pos                         = Main.HumanModel.BodyModel.Trunk.SegmentsThorax.ThoraxSeg.iji.O_rhomboideus_1.sRel;
AnyFloat iji_O_rhomboideus_2_pos                         = Main.HumanModel.BodyModel.Trunk.SegmentsThorax.ThoraxSeg.iji.O_rhomboideus_2.sRel;
AnyFloat iji_O_rhomboideus_3_pos                         = Main.HumanModel.BodyModel.Trunk.SegmentsThorax.ThoraxSeg.iji.O_rhomboideus_3.sRel;
AnyFloat iji_O_levator_scapulae_1_pos                    = Main.HumanModel.BodyModel.Trunk.SegmentsThorax.ThoraxSeg.iji.O_levator_scapulae_1.sRel;
AnyFloat iji_O_levator_scapulae_2_pos                    = Main.HumanModel.BodyModel.Trunk.SegmentsThorax.ThoraxSeg.iji.O_levator_scapulae_2.sRel;
AnyFloat iji_O_levator_scapulae_3_pos                    = Main.HumanModel.BodyModel.Trunk.SegmentsThorax.ThoraxSeg.iji.O_levator_scapulae_3.sRel;
AnyFloat iji_O_pectoralis_major_thoracic_part_1_pos      = Main.HumanModel.BodyModel.Trunk.SegmentsThorax.ThoraxSeg.iji.O_pectoralis_major_thoracic_part_1.sRel;
AnyFloat iji_O_pectoralis_major_thoracic_part_2_pos      = Main.HumanModel.BodyModel.Trunk.SegmentsThorax.ThoraxSeg.iji.O_pectoralis_major_thoracic_part_2.sRel;
AnyFloat iji_O_pectoralis_major_thoracic_part_3_pos      = Main.HumanModel.BodyModel.Trunk.SegmentsThorax.ThoraxSeg.iji.O_pectoralis_major_thoracic_part_3.sRel;
AnyFloat iji_O_pectoralis_major_thoracic_part_4_pos      = Main.HumanModel.BodyModel.Trunk.SegmentsThorax.ThoraxSeg.iji.O_pectoralis_major_thoracic_part_4.sRel;
AnyFloat iji_O_pectoralis_major_thoracic_part_5_pos      = Main.HumanModel.BodyModel.Trunk.SegmentsThorax.ThoraxSeg.iji.O_pectoralis_major_thoracic_part_5.sRel;
AnyFloat iji_O_pectoralis_minor_1_pos                    = Main.HumanModel.BodyModel.Trunk.SegmentsThorax.ThoraxSeg.iji.O_pectoralis_minor_1.sRel;
AnyFloat iji_O_pectoralis_minor_2_pos                    = Main.HumanModel.BodyModel.Trunk.SegmentsThorax.ThoraxSeg.iji.O_pectoralis_minor_2.sRel;
AnyFloat iji_O_pectoralis_minor_3_pos                    = Main.HumanModel.BodyModel.Trunk.SegmentsThorax.ThoraxSeg.iji.O_pectoralis_minor_3.sRel;
AnyFloat iji_O_pectoralis_minor_4_pos                    = Main.HumanModel.BodyModel.Trunk.SegmentsThorax.ThoraxSeg.iji.O_pectoralis_minor_4.sRel;
AnyFloat iji_O_serratus_anterior_1_pos                   = Main.HumanModel.BodyModel.Trunk.SegmentsThorax.ThoraxSeg.iji.O_serratus_anterior_1.sRel;
AnyFloat iji_O_serratus_anterior_2_pos                   = Main.HumanModel.BodyModel.Trunk.SegmentsThorax.ThoraxSeg.iji.O_serratus_anterior_2.sRel;
AnyFloat iji_O_serratus_anterior_3_pos                   = Main.HumanModel.BodyModel.Trunk.SegmentsThorax.ThoraxSeg.iji.O_serratus_anterior_3.sRel;
AnyFloat iji_O_serratus_anterior_4_pos                   = Main.HumanModel.BodyModel.Trunk.SegmentsThorax.ThoraxSeg.iji.O_serratus_anterior_4.sRel;
AnyFloat iji_O_serratus_anterior_5_pos                   = Main.HumanModel.BodyModel.Trunk.SegmentsThorax.ThoraxSeg.iji.O_serratus_anterior_5.sRel;
AnyFloat iji_O_serratus_anterior_6_pos                   = Main.HumanModel.BodyModel.Trunk.SegmentsThorax.ThoraxSeg.iji.O_serratus_anterior_6.sRel;
AnyFloat iji_SternocleidomastoidNode_pos                 = Main.HumanModel.BodyModel.Trunk.SegmentsThorax.ThoraxSeg.iji.SternocleidomastoidNode.sRel;
AnyFloat iji_EllipsoidOrigin_pos                         = Main.HumanModel.BodyModel.Trunk.SegmentsThorax.ThoraxSeg.iji.EllipsoidOrigin.sRel;
AnyFloat iji_EllipsoidPectoralisOrigin_pos               = Main.HumanModel.BodyModel.Trunk.SegmentsThorax.ThoraxSeg.iji.EllipsoidPectoralisOrigin.sRel;
AnyFloat iji_EllipsoidSerratusAnteriorOrigin_pos         = Main.HumanModel.BodyModel.Trunk.SegmentsThorax.ThoraxSeg.iji.EllipsoidSerratusAnteriorOrigin.sRel;
AnyFloat iji_EllipsoidLatissimusOrigin_pos               = Main.HumanModel.BodyModel.Trunk.SegmentsThorax.ThoraxSeg.iji.EllipsoidLatissimusOrigin.sRel;
AnyFloat iji_RotNode_pos                                 = Main.HumanModel.BodyModel.Trunk.SegmentsThorax.ThoraxSeg.iji.RotNode.sRel;
AnyFloat iji_scj_RotNode_pos                             = Main.HumanModel.BodyModel.Trunk.SegmentsThorax.ThoraxSeg.iji.scj.RotNode.sRel;
AnyFloat iji_ScapulaEllipsoidOrigin_RotNode_pos          = Main.HumanModel.BodyModel.Trunk.SegmentsThorax.ThoraxSeg.iji.ScapulaEllipsoidOrigin.RotNode.sRel;
};
