AnyFolder Parametric={
  AnyFloat d ={ vnorm(Fun.Data'[0]-Fun.Data'[1]),vnorm(Fun.Data'[1]-Fun.Data'[2]),  vnorm(Fun.Data'[2]-Fun.Data'[3]),  vnorm(Fun.Data'[3]-Fun.Data'[4]),  vnorm(Fun.Data'[4]-Fun.Data'[5]),  vnorm(Fun.Data'[5]-Fun.Data'[6]),  vnorm(Fun.Data'[6]-Fun.Data'[7]),  vnorm(Fun.Data'[7]-Fun.Data'[8]),  vnorm(Fun.Data'[8]-Fun.Data'[9]),  vnorm(Fun.Data'[9]-Fun.Data'[10]), vnorm(Fun.Data'[10]-Fun.Data'[11]),vnorm(Fun.Data'[11]-Fun.Data'[12]),vnorm(Fun.Data'[12]-Fun.Data'[13]),vnorm(Fun.Data'[13]-Fun.Data'[14]) };

  AnyFloat S ={
    0,
    d[0],
    d[0]+d[1],
    d[0]+d[1]+d[2],
    d[0]+d[1]+d[2]+d[3],
    d[0]+d[1]+d[2]+d[3]+d[4],
    d[0]+d[1]+d[2]+d[3]+d[4]+d[5],
    d[0]+d[1]+d[2]+d[3]+d[4]+d[5]+d[6],
    d[0]+d[1]+d[2]+d[3]+d[4]+d[5]+d[6]+d[7],
    d[0]+d[1]+d[2]+d[3]+d[4]+d[5]+d[6]+d[7]+d[8],
    d[0]+d[1]+d[2]+d[3]+d[4]+d[5]+d[6]+d[7]+d[8]+d[9],
    d[0]+d[1]+d[2]+d[3]+d[4]+d[5]+d[6]+d[7]+d[8]+d[9]+d[10],
    d[0]+d[1]+d[2]+d[3]+d[4]+d[5]+d[6]+d[7]+d[8]+d[9]+d[10]+d[11],
    d[0]+d[1]+d[2]+d[3]+d[4]+d[5]+d[6]+d[7]+d[8]+d[9]+d[10]+d[11]+d[12],
    d[0]+d[1]+d[2]+d[3]+d[4]+d[5]+d[6]+d[7]+d[8]+d[9]+d[10]+d[11]+d[12]+d[13]
  };

  AnyFunInterpol Fun = {
    AnyFloat L= max(.S);
    T= iffun(eqfun(L,0),farr(0.0,1.0,15),.S/iffun(eqfun(L,0),L+0.000001,L)); //special treatment when L=0
   // Type=Bspline;
    Type=PiecewiseLinear;
    //BsplineOrder=4;
  };

  AnyFixedRefFrame GlobalRef ={
    AnyDrawPointCloud drw = {
      Visible = Off;
      Points=..Fun.Data';
      Points3D=On;
      RGB={1,0,0};
      PointStyle.Size=0.005;
    };
  };
};
