/*
  This dataset is based on the AMMR 2.2 trunk muscle parameters. The parameters
  were collected from hardcoded values in the old model and added here to
  create a single file containing all trunk model muscle parameters. All hard
  coded values for PCSA in the old model was converted to corresponding muscle
  volumes. Hence the dataset produces the same strength.

  The trunk muscle parameter from AMMR 2.2  was based on a number of sources:

*/

// This logic ensures that TotalTendonLength and OpatinalFiberLength are not
// created as DesignVars when they are also calibrated.
#if BM_CALIBRATION_TYPE == _CALIBRATION_TYPE_1PAR_
 #define _TENDON_LENGTH_DESIGNVAR(x) (x)
 #define _FIBER_LENGTH_DESIGNVAR(x) DesignVar(x)
#endif
#if (BM_CALIBRATION_TYPE == _CALIBRATION_TYPE_2PAR_) | (BM_CALIBRATION_TYPE == _EXPERIMENTAL_CALIBRATION_TYPE_2PAR_)
 #define _TENDON_LENGTH_DESIGNVAR(x) (x)
 #define _FIBER_LENGTH_DESIGNVAR(x) (x)
#endif
#if BM_CALIBRATION_TYPE == _CALIBRATION_TYPE_CUSTOM_
 #define _TENDON_LENGTH_DESIGNVAR(x) DesignVar(x)
 #define _FIBER_LENGTH_DESIGNVAR(x) DesignVar(x)
#endif


AnyFolder Muscles =
{
  AnyVar VolumeUnitFactor ??= 1e-6; ///< Unit conversion factor for volume (1e-6 > volume in cm^3)
  AnyFolder TransversusSingle =
  {
    #if BM_TRUNK_MUSCLES & BM_TRUNK_CAVITY_MODEL == _CAVITY_MODEL_BUCKLE_
    AnyVar Volume ??= DesignVar(49.40); ///< Total volume of the muscle group (ml)
    AnyFolder Transversus_1 =
    {
      AnyString Muscle = "Transversus"; ///< Descriptive name for the muscle, e.g. for plotting
      AnyIntVar MuscleElemAmount = 1; ///< The total amount of elements for this muscle
      AnyFloat Pennationangle ??= DesignVar(0); ///< Pennation angle of the muscle fibers (degres)
      AnyFloat VolumeScaleFactor ??= DesignVar(1.0); ///< Factor for scaling the muscle volume
      AnyFloat MuscleVolume ??= .Volume*0.2; ///< Volume of the muscle (ml) (the fraction of the group volume is based on the strength of the previous model)
      AnyFloat MuscleVolumeSIScaled ??= ..VolumeUnitFactor*VolumeScaleFactor*MuscleVolume; ///< Scaled Volume of the muscle in SI base unit (m^3)
      AnyFloat OptimalFiberlength ??= _FIBER_LENGTH_DESIGNVAR(0.095); ///< Optimal working length of the muscle fiber (m)
      AnyFloat TotalTendonLength ??= _TENDON_LENGTH_DESIGNVAR(0.01);///< The total tendon length (m)
      AnyFloat K1 ??= DesignVar(10); ///< K1 constant in the muscle model.  Factor for determining shortening speed at optimum length
      AnyFloat K2 ??= DesignVar(1); ///< K2 constant in the muscle model.  Factor for determining shortening speed at optimum length
      AnyFloat Epsilon0 ??= DesignVar(0.053); ///< Epsilon bar in the muscle model. Represents tendon strain at F0
      AnyFloat Fcfast ??= DesignVar(0.4); ///< Factor for determining shortening speed at optimum length
    };
    #endif

    #if BM_TRUNK_MUSCLES & BM_TRUNK_CAVITY_MODEL == _CAVITY_MODEL_BUCKLE_
    AnyFolder Transversus_2 =
    {
      AnyString Muscle = "Transversus"; ///< Descriptive name for the muscle, e.g. for plotting
      AnyIntVar MuscleElemAmount = 1; ///< The total amount of elements for this muscle
      AnyFloat Pennationangle ??= DesignVar(0); ///< Pennation angle of the muscle fibers (degres)
      AnyFloat VolumeScaleFactor ??= DesignVar(1.0); ///< Factor for scaling the muscle volume
      AnyFloat MuscleVolume ??= .Volume*0.2; ///< Volume of the muscle (ml) (the fraction of the group volume is based on the strength of the previous model)
      AnyFloat MuscleVolumeSIScaled ??= ..VolumeUnitFactor*VolumeScaleFactor*MuscleVolume; ///< Scaled Volume of the muscle in SI base unit (m^3)
      AnyFloat OptimalFiberlength ??= _FIBER_LENGTH_DESIGNVAR(0.095); ///< Optimal working length of the muscle fiber (m)
      AnyFloat TotalTendonLength ??= _TENDON_LENGTH_DESIGNVAR(0.01);///< The total tendon length (m)
      AnyFloat K1 ??= DesignVar(10); ///< K1 constant in the muscle model.  Factor for determining shortening speed at optimum length
      AnyFloat K2 ??= DesignVar(1); ///< K2 constant in the muscle model.  Factor for determining shortening speed at optimum length
      AnyFloat Epsilon0 ??= DesignVar(0.053); ///< Epsilon bar in the muscle model. Represents tendon strain at F0
      AnyFloat Fcfast ??= DesignVar(0.4); ///< Factor for determining shortening speed at optimum length
    };
    #endif

    #if BM_TRUNK_MUSCLES & BM_TRUNK_CAVITY_MODEL == _CAVITY_MODEL_BUCKLE_
    AnyFolder Transversus_3 =
    {
      AnyString Muscle = "Transversus"; ///< Descriptive name for the muscle, e.g. for plotting
      AnyIntVar MuscleElemAmount = 1; ///< The total amount of elements for this muscle
      AnyFloat Pennationangle ??= DesignVar(0); ///< Pennation angle of the muscle fibers (degres)
      AnyFloat VolumeScaleFactor ??= DesignVar(1.0); ///< Factor for scaling the muscle volume
      AnyFloat MuscleVolume ??= .Volume*0.2; ///< Volume of the muscle (ml) (the fraction of the group volume is based on the strength of the previous model)
      AnyFloat MuscleVolumeSIScaled ??= ..VolumeUnitFactor*VolumeScaleFactor*MuscleVolume; ///< Scaled Volume of the muscle in SI base unit (m^3)
      AnyFloat OptimalFiberlength ??= _FIBER_LENGTH_DESIGNVAR(0.095); ///< Optimal working length of the muscle fiber (m)
      AnyFloat TotalTendonLength ??= _TENDON_LENGTH_DESIGNVAR(0.01);///< The total tendon length (m)
      AnyFloat K1 ??= DesignVar(10); ///< K1 constant in the muscle model.  Factor for determining shortening speed at optimum length
      AnyFloat K2 ??= DesignVar(1); ///< K2 constant in the muscle model.  Factor for determining shortening speed at optimum length
      AnyFloat Epsilon0 ??= DesignVar(0.053); ///< Epsilon bar in the muscle model. Represents tendon strain at F0
      AnyFloat Fcfast ??= DesignVar(0.4); ///< Factor for determining shortening speed at optimum length
    };
    #endif

    #if BM_TRUNK_MUSCLES & BM_TRUNK_CAVITY_MODEL == _CAVITY_MODEL_BUCKLE_
    AnyFolder Transversus_4 =
    {
      AnyString Muscle = "Transversus"; ///< Descriptive name for the muscle, e.g. for plotting
      AnyIntVar MuscleElemAmount = 1; ///< The total amount of elements for this muscle
      AnyFloat Pennationangle ??= DesignVar(0); ///< Pennation angle of the muscle fibers (degres)
      AnyFloat VolumeScaleFactor ??= DesignVar(1.0); ///< Factor for scaling the muscle volume
      AnyFloat MuscleVolume ??= .Volume*0.2; ///< Volume of the muscle (ml) (the fraction of the group volume is based on the strength of the previous model)
      AnyFloat MuscleVolumeSIScaled ??= ..VolumeUnitFactor*VolumeScaleFactor*MuscleVolume; ///< Scaled Volume of the muscle in SI base unit (m^3)
      AnyFloat OptimalFiberlength ??= _FIBER_LENGTH_DESIGNVAR(0.095); ///< Optimal working length of the muscle fiber (m)
      AnyFloat TotalTendonLength ??= _TENDON_LENGTH_DESIGNVAR(0.01);///< The total tendon length (m)
      AnyFloat K1 ??= DesignVar(10); ///< K1 constant in the muscle model.  Factor for determining shortening speed at optimum length
      AnyFloat K2 ??= DesignVar(1); ///< K2 constant in the muscle model.  Factor for determining shortening speed at optimum length
      AnyFloat Epsilon0 ??= DesignVar(0.053); ///< Epsilon bar in the muscle model. Represents tendon strain at F0
      AnyFloat Fcfast ??= DesignVar(0.4); ///< Factor for determining shortening speed at optimum length
    };
    #endif

    #if BM_TRUNK_MUSCLES & BM_TRUNK_CAVITY_MODEL == _CAVITY_MODEL_BUCKLE_
    AnyFolder Transversus_5 =
    {
      AnyString Muscle = "Transversus"; ///< Descriptive name for the muscle, e.g. for plotting
      AnyIntVar MuscleElemAmount = 1; ///< The total amount of elements for this muscle
      AnyFloat Pennationangle ??= DesignVar(0); ///< Pennation angle of the muscle fibers (degres)
      AnyFloat VolumeScaleFactor ??= DesignVar(1.0); ///< Factor for scaling the muscle volume
      AnyFloat MuscleVolume ??= .Volume*0.2; ///< Volume of the muscle (ml) (the fraction of the group volume is based on the strength of the previous model)
      AnyFloat MuscleVolumeSIScaled ??= ..VolumeUnitFactor*VolumeScaleFactor*MuscleVolume; ///< Scaled Volume of the muscle in SI base unit (m^3)
      AnyFloat OptimalFiberlength ??= _FIBER_LENGTH_DESIGNVAR(0.095); ///< Optimal working length of the muscle fiber (m)
      AnyFloat TotalTendonLength ??= _TENDON_LENGTH_DESIGNVAR(0.01);///< The total tendon length (m)
      AnyFloat K1 ??= DesignVar(10); ///< K1 constant in the muscle model.  Factor for determining shortening speed at optimum length
      AnyFloat K2 ??= DesignVar(1); ///< K2 constant in the muscle model.  Factor for determining shortening speed at optimum length
      AnyFloat Epsilon0 ??= DesignVar(0.053); ///< Epsilon bar in the muscle model. Represents tendon strain at F0
      AnyFloat Fcfast ??= DesignVar(0.4); ///< Factor for determining shortening speed at optimum length
    };
    #endif
  }; // TransversusSingle group
  AnyFolder Spinalis =
  {
    #if BM_TRUNK_MUSCLES
    AnyVar Volume ??= DesignVar(40.62); ///< Total volume of the muscle group (ml)
    AnyFolder SPL1T2 =
    {
      AnyString Muscle = "SPL1T2"; ///< Descriptive name for the muscle, e.g. for plotting
      AnyIntVar MuscleElemAmount = 1; ///< The total amount of elements for this muscle
      AnyFloat Pennationangle ??= DesignVar(0); ///< Pennation angle of the muscle fibers (degres)
      AnyFloat VolumeScaleFactor ??= DesignVar(1.0); ///< Factor for scaling the muscle volume
      AnyFloat MuscleVolume ??= .Volume*0.20214; ///< Volume of the muscle (ml) (the fraction of the group volume is based on the strength of the previous model)
      AnyFloat MuscleVolumeSIScaled ??= ..VolumeUnitFactor*VolumeScaleFactor*MuscleVolume; ///< Scaled Volume of the muscle in SI base unit (m^3)
      AnyFloat OptimalFiberlength ??= _FIBER_LENGTH_DESIGNVAR(0.32846); ///< Optimal working length of the muscle fiber (m)
      AnyFloat TotalTendonLength ??= _TENDON_LENGTH_DESIGNVAR(0.01);///< The total tendon length (m)
      AnyFloat K1 ??= DesignVar(10); ///< K1 constant in the muscle model.  Factor for determining shortening speed at optimum length
      AnyFloat K2 ??= DesignVar(1); ///< K2 constant in the muscle model.  Factor for determining shortening speed at optimum length
      AnyFloat Epsilon0 ??= DesignVar(0.053); ///< Epsilon bar in the muscle model. Represents tendon strain at F0
      AnyFloat Fcfast ??= DesignVar(0.4); ///< Factor for determining shortening speed at optimum length
    };
    #endif

    #if BM_TRUNK_MUSCLES
    AnyFolder SPL1T3 =
    {
      AnyString Muscle = "SPL1T3"; ///< Descriptive name for the muscle, e.g. for plotting
      AnyIntVar MuscleElemAmount = 1; ///< The total amount of elements for this muscle
      AnyFloat Pennationangle ??= DesignVar(0); ///< Pennation angle of the muscle fibers (degres)
      AnyFloat VolumeScaleFactor ??= DesignVar(1.0); ///< Factor for scaling the muscle volume
      AnyFloat MuscleVolume ??= .Volume*0.17916; ///< Volume of the muscle (ml) (the fraction of the group volume is based on the strength of the previous model)
      AnyFloat MuscleVolumeSIScaled ??= ..VolumeUnitFactor*VolumeScaleFactor*MuscleVolume; ///< Scaled Volume of the muscle in SI base unit (m^3)
      AnyFloat OptimalFiberlength ??= _FIBER_LENGTH_DESIGNVAR(0.29113); ///< Optimal working length of the muscle fiber (m)
      AnyFloat TotalTendonLength ??= _TENDON_LENGTH_DESIGNVAR(0.01);///< The total tendon length (m)
      AnyFloat K1 ??= DesignVar(10); ///< K1 constant in the muscle model.  Factor for determining shortening speed at optimum length
      AnyFloat K2 ??= DesignVar(1); ///< K2 constant in the muscle model.  Factor for determining shortening speed at optimum length
      AnyFloat Epsilon0 ??= DesignVar(0.053); ///< Epsilon bar in the muscle model. Represents tendon strain at F0
      AnyFloat Fcfast ??= DesignVar(0.4); ///< Factor for determining shortening speed at optimum length
    };
    #endif

    #if BM_TRUNK_MUSCLES
    AnyFolder SPL2T1 =
    {
      AnyString Muscle = "SPL2T1"; ///< Descriptive name for the muscle, e.g. for plotting
      AnyIntVar MuscleElemAmount = 1; ///< The total amount of elements for this muscle
      AnyFloat Pennationangle ??= DesignVar(0); ///< Pennation angle of the muscle fibers (degres)
      AnyFloat VolumeScaleFactor ??= DesignVar(1.0); ///< Factor for scaling the muscle volume
      AnyFloat MuscleVolume ??= .Volume*0.23775; ///< Volume of the muscle (ml) (the fraction of the group volume is based on the strength of the previous model)
      AnyFloat MuscleVolumeSIScaled ??= ..VolumeUnitFactor*VolumeScaleFactor*MuscleVolume; ///< Scaled Volume of the muscle in SI base unit (m^3)
      AnyFloat OptimalFiberlength ??= _FIBER_LENGTH_DESIGNVAR(0.38633); ///< Optimal working length of the muscle fiber (m)
      AnyFloat TotalTendonLength ??= _TENDON_LENGTH_DESIGNVAR(0.01);///< The total tendon length (m)
      AnyFloat K1 ??= DesignVar(10); ///< K1 constant in the muscle model.  Factor for determining shortening speed at optimum length
      AnyFloat K2 ??= DesignVar(1); ///< K2 constant in the muscle model.  Factor for determining shortening speed at optimum length
      AnyFloat Epsilon0 ??= DesignVar(0.053); ///< Epsilon bar in the muscle model. Represents tendon strain at F0
      AnyFloat Fcfast ??= DesignVar(0.4); ///< Factor for determining shortening speed at optimum length
    };
    #endif

    #if BM_TRUNK_MUSCLES
    AnyFolder SPT11T6 =
    {
      AnyString Muscle = "SPT11T6"; ///< Descriptive name for the muscle, e.g. for plotting
      AnyIntVar MuscleElemAmount = 1; ///< The total amount of elements for this muscle
      AnyFloat Pennationangle ??= DesignVar(0); ///< Pennation angle of the muscle fibers (degres)
      AnyFloat VolumeScaleFactor ??= DesignVar(1.0); ///< Factor for scaling the muscle volume
      AnyFloat MuscleVolume ??= .Volume*0.092684; ///< Volume of the muscle (ml) (the fraction of the group volume is based on the strength of the previous model)
      AnyFloat MuscleVolumeSIScaled ??= ..VolumeUnitFactor*VolumeScaleFactor*MuscleVolume; ///< Scaled Volume of the muscle in SI base unit (m^3)
      AnyFloat OptimalFiberlength ??= _FIBER_LENGTH_DESIGNVAR(0.1506); ///< Optimal working length of the muscle fiber (m)
      AnyFloat TotalTendonLength ??= _TENDON_LENGTH_DESIGNVAR(0.01);///< The total tendon length (m)
      AnyFloat K1 ??= DesignVar(10); ///< K1 constant in the muscle model.  Factor for determining shortening speed at optimum length
      AnyFloat K2 ??= DesignVar(1); ///< K2 constant in the muscle model.  Factor for determining shortening speed at optimum length
      AnyFloat Epsilon0 ??= DesignVar(0.053); ///< Epsilon bar in the muscle model. Represents tendon strain at F0
      AnyFloat Fcfast ??= DesignVar(0.4); ///< Factor for determining shortening speed at optimum length
    };
    #endif

    #if BM_TRUNK_MUSCLES
    AnyFolder SPT12T4 =
    {
      AnyString Muscle = "SPT12T4"; ///< Descriptive name for the muscle, e.g. for plotting
      AnyIntVar MuscleElemAmount = 1; ///< The total amount of elements for this muscle
      AnyFloat Pennationangle ??= DesignVar(0); ///< Pennation angle of the muscle fibers (degres)
      AnyFloat VolumeScaleFactor ??= DesignVar(1.0); ///< Factor for scaling the muscle volume
      AnyFloat MuscleVolume ??= .Volume*0.1518; ///< Volume of the muscle (ml) (the fraction of the group volume is based on the strength of the previous model)
      AnyFloat MuscleVolumeSIScaled ??= ..VolumeUnitFactor*VolumeScaleFactor*MuscleVolume; ///< Scaled Volume of the muscle in SI base unit (m^3)
      AnyFloat OptimalFiberlength ??= _FIBER_LENGTH_DESIGNVAR(0.24666); ///< Optimal working length of the muscle fiber (m)
      AnyFloat TotalTendonLength ??= _TENDON_LENGTH_DESIGNVAR(0.01);///< The total tendon length (m)
      AnyFloat K1 ??= DesignVar(10); ///< K1 constant in the muscle model.  Factor for determining shortening speed at optimum length
      AnyFloat K2 ??= DesignVar(1); ///< K2 constant in the muscle model.  Factor for determining shortening speed at optimum length
      AnyFloat Epsilon0 ??= DesignVar(0.053); ///< Epsilon bar in the muscle model. Represents tendon strain at F0
      AnyFloat Fcfast ??= DesignVar(0.4); ///< Factor for determining shortening speed at optimum length
    };
    #endif

    #if BM_TRUNK_MUSCLES
    AnyFolder SPT12T5 =
    {
      AnyString Muscle = "SPT12T5"; ///< Descriptive name for the muscle, e.g. for plotting
      AnyIntVar MuscleElemAmount = 1; ///< The total amount of elements for this muscle
      AnyFloat Pennationangle ??= DesignVar(0); ///< Pennation angle of the muscle fibers (degres)
      AnyFloat VolumeScaleFactor ??= DesignVar(1.0); ///< Factor for scaling the muscle volume
      AnyFloat MuscleVolume ??= .Volume*0.13646; ///< Volume of the muscle (ml) (the fraction of the group volume is based on the strength of the previous model)
      AnyFloat MuscleVolumeSIScaled ??= ..VolumeUnitFactor*VolumeScaleFactor*MuscleVolume; ///< Scaled Volume of the muscle in SI base unit (m^3)
      AnyFloat OptimalFiberlength ??= _FIBER_LENGTH_DESIGNVAR(0.22174); ///< Optimal working length of the muscle fiber (m)
      AnyFloat TotalTendonLength ??= _TENDON_LENGTH_DESIGNVAR(0.01);///< The total tendon length (m)
      AnyFloat K1 ??= DesignVar(10); ///< K1 constant in the muscle model.  Factor for determining shortening speed at optimum length
      AnyFloat K2 ??= DesignVar(1); ///< K2 constant in the muscle model.  Factor for determining shortening speed at optimum length
      AnyFloat Epsilon0 ??= DesignVar(0.053); ///< Epsilon bar in the muscle model. Represents tendon strain at F0
      AnyFloat Fcfast ??= DesignVar(0.4); ///< Factor for determining shortening speed at optimum length
    };
    #endif
  }; // Spinalis group
  AnyFolder Multifidi =
  {
    #if BM_TRUNK_MUSCLES
    AnyVar Volume ??= DesignVar(89.32); ///< Total volume of the muscle group (ml)
    AnyFolder MFdL1L3 =
    {
      AnyString Muscle = "MFdL1L3"; ///< Descriptive name for the muscle, e.g. for plotting
      AnyIntVar MuscleElemAmount = 1; ///< The total amount of elements for this muscle
      AnyFloat Pennationangle ??= DesignVar(0); ///< Pennation angle of the muscle fibers (degres)
      AnyFloat VolumeScaleFactor ??= DesignVar(1.0); ///< Factor for scaling the muscle volume
      AnyFloat MuscleVolume ??= .Volume*0.016541; ///< Volume of the muscle (ml) (the fraction of the group volume is based on the strength of the previous model)
      AnyFloat MuscleVolumeSIScaled ??= ..VolumeUnitFactor*VolumeScaleFactor*MuscleVolume; ///< Scaled Volume of the muscle in SI base unit (m^3)
      AnyFloat OptimalFiberlength ??= _FIBER_LENGTH_DESIGNVAR(0.038878); ///< Optimal working length of the muscle fiber (m)
      AnyFloat TotalTendonLength ??= _TENDON_LENGTH_DESIGNVAR(0.01);///< The total tendon length (m)
      AnyFloat K1 ??= DesignVar(10); ///< K1 constant in the muscle model.  Factor for determining shortening speed at optimum length
      AnyFloat K2 ??= DesignVar(1); ///< K2 constant in the muscle model.  Factor for determining shortening speed at optimum length
      AnyFloat Epsilon0 ??= DesignVar(0.053); ///< Epsilon bar in the muscle model. Represents tendon strain at F0
      AnyFloat Fcfast ??= DesignVar(0.4); ///< Factor for determining shortening speed at optimum length
    };
    #endif

    #if BM_TRUNK_MUSCLES
    AnyFolder MFdL2L4 =
    {
      AnyString Muscle = "MFdL2L4"; ///< Descriptive name for the muscle, e.g. for plotting
      AnyIntVar MuscleElemAmount = 1; ///< The total amount of elements for this muscle
      AnyFloat Pennationangle ??= DesignVar(0); ///< Pennation angle of the muscle fibers (degres)
      AnyFloat VolumeScaleFactor ??= DesignVar(1.0); ///< Factor for scaling the muscle volume
      AnyFloat MuscleVolume ??= .Volume*0.014504; ///< Volume of the muscle (ml) (the fraction of the group volume is based on the strength of the previous model)
      AnyFloat MuscleVolumeSIScaled ??= ..VolumeUnitFactor*VolumeScaleFactor*MuscleVolume; ///< Scaled Volume of the muscle in SI base unit (m^3)
      AnyFloat OptimalFiberlength ??= _FIBER_LENGTH_DESIGNVAR(0.034092); ///< Optimal working length of the muscle fiber (m)
      AnyFloat TotalTendonLength ??= _TENDON_LENGTH_DESIGNVAR(0.01);///< The total tendon length (m)
      AnyFloat K1 ??= DesignVar(10); ///< K1 constant in the muscle model.  Factor for determining shortening speed at optimum length
      AnyFloat K2 ??= DesignVar(1); ///< K2 constant in the muscle model.  Factor for determining shortening speed at optimum length
      AnyFloat Epsilon0 ??= DesignVar(0.053); ///< Epsilon bar in the muscle model. Represents tendon strain at F0
      AnyFloat Fcfast ??= DesignVar(0.4); ///< Factor for determining shortening speed at optimum length
    };
    #endif

    #if BM_TRUNK_MUSCLES
    AnyFolder MFdL3L5 =
    {
      AnyString Muscle = "MFdL3L5"; ///< Descriptive name for the muscle, e.g. for plotting
      AnyIntVar MuscleElemAmount = 1; ///< The total amount of elements for this muscle
      AnyFloat Pennationangle ??= DesignVar(0); ///< Pennation angle of the muscle fibers (degres)
      AnyFloat VolumeScaleFactor ??= DesignVar(1.0); ///< Factor for scaling the muscle volume
      AnyFloat MuscleVolume ??= .Volume*0.015483; ///< Volume of the muscle (ml) (the fraction of the group volume is based on the strength of the previous model)
      AnyFloat MuscleVolumeSIScaled ??= ..VolumeUnitFactor*VolumeScaleFactor*MuscleVolume; ///< Scaled Volume of the muscle in SI base unit (m^3)
      AnyFloat OptimalFiberlength ??= _FIBER_LENGTH_DESIGNVAR(0.036391); ///< Optimal working length of the muscle fiber (m)
      AnyFloat TotalTendonLength ??= _TENDON_LENGTH_DESIGNVAR(0.01);///< The total tendon length (m)
      AnyFloat K1 ??= DesignVar(10); ///< K1 constant in the muscle model.  Factor for determining shortening speed at optimum length
      AnyFloat K2 ??= DesignVar(1); ///< K2 constant in the muscle model.  Factor for determining shortening speed at optimum length
      AnyFloat Epsilon0 ??= DesignVar(0.053); ///< Epsilon bar in the muscle model. Represents tendon strain at F0
      AnyFloat Fcfast ??= DesignVar(0.4); ///< Factor for determining shortening speed at optimum length
    };
    #endif

    #if BM_TRUNK_MUSCLES
    AnyFolder MFdL4S1 =
    {
      AnyString Muscle = "MFdL4S1"; ///< Descriptive name for the muscle, e.g. for plotting
      AnyIntVar MuscleElemAmount = 1; ///< The total amount of elements for this muscle
      AnyFloat Pennationangle ??= DesignVar(0); ///< Pennation angle of the muscle fibers (degres)
      AnyFloat VolumeScaleFactor ??= DesignVar(1.0); ///< Factor for scaling the muscle volume
      AnyFloat MuscleVolume ??= .Volume*0.015391; ///< Volume of the muscle (ml) (the fraction of the group volume is based on the strength of the previous model)
      AnyFloat MuscleVolumeSIScaled ??= ..VolumeUnitFactor*VolumeScaleFactor*MuscleVolume; ///< Scaled Volume of the muscle in SI base unit (m^3)
      AnyFloat OptimalFiberlength ??= _FIBER_LENGTH_DESIGNVAR(0.036176); ///< Optimal working length of the muscle fiber (m)
      AnyFloat TotalTendonLength ??= _TENDON_LENGTH_DESIGNVAR(0.01);///< The total tendon length (m)
      AnyFloat K1 ??= DesignVar(10); ///< K1 constant in the muscle model.  Factor for determining shortening speed at optimum length
      AnyFloat K2 ??= DesignVar(1); ///< K2 constant in the muscle model.  Factor for determining shortening speed at optimum length
      AnyFloat Epsilon0 ??= DesignVar(0.053); ///< Epsilon bar in the muscle model. Represents tendon strain at F0
      AnyFloat Fcfast ??= DesignVar(0.4); ///< Factor for determining shortening speed at optimum length
    };
    #endif

    #if BM_TRUNK_MUSCLES
    AnyFolder MFdL5S1 =
    {
      AnyString Muscle = "MFdL5S1"; ///< Descriptive name for the muscle, e.g. for plotting
      AnyIntVar MuscleElemAmount = 1; ///< The total amount of elements for this muscle
      AnyFloat Pennationangle ??= DesignVar(0); ///< Pennation angle of the muscle fibers (degres)
      AnyFloat VolumeScaleFactor ??= DesignVar(1.0); ///< Factor for scaling the muscle volume
      AnyFloat MuscleVolume ??= .Volume*0.0050526; ///< Volume of the muscle (ml) (the fraction of the group volume is based on the strength of the previous model)
      AnyFloat MuscleVolumeSIScaled ??= ..VolumeUnitFactor*VolumeScaleFactor*MuscleVolume; ///< Scaled Volume of the muscle in SI base unit (m^3)
      AnyFloat OptimalFiberlength ??= _FIBER_LENGTH_DESIGNVAR(0.011876); ///< Optimal working length of the muscle fiber (m)
      AnyFloat TotalTendonLength ??= _TENDON_LENGTH_DESIGNVAR(0.01);///< The total tendon length (m)
      AnyFloat K1 ??= DesignVar(10); ///< K1 constant in the muscle model.  Factor for determining shortening speed at optimum length
      AnyFloat K2 ??= DesignVar(1); ///< K2 constant in the muscle model.  Factor for determining shortening speed at optimum length
      AnyFloat Epsilon0 ??= DesignVar(0.053); ///< Epsilon bar in the muscle model. Represents tendon strain at F0
      AnyFloat Fcfast ??= DesignVar(0.4); ///< Factor for determining shortening speed at optimum length
    };
    #endif

    #if BM_TRUNK_MUSCLES
    AnyFolder MFmL1L4 =
    {
      AnyString Muscle = "MFmL1L4"; ///< Descriptive name for the muscle, e.g. for plotting
      AnyIntVar MuscleElemAmount = 1; ///< The total amount of elements for this muscle
      AnyFloat Pennationangle ??= DesignVar(0); ///< Pennation angle of the muscle fibers (degres)
      AnyFloat VolumeScaleFactor ??= DesignVar(1.0); ///< Factor for scaling the muscle volume
      AnyFloat MuscleVolume ??= .Volume*0.028696; ///< Volume of the muscle (ml) (the fraction of the group volume is based on the strength of the previous model)
      AnyFloat MuscleVolumeSIScaled ??= ..VolumeUnitFactor*VolumeScaleFactor*MuscleVolume; ///< Scaled Volume of the muscle in SI base unit (m^3)
      AnyFloat OptimalFiberlength ??= _FIBER_LENGTH_DESIGNVAR(0.064076); ///< Optimal working length of the muscle fiber (m)
      AnyFloat TotalTendonLength ??= _TENDON_LENGTH_DESIGNVAR(0.01);///< The total tendon length (m)
      AnyFloat K1 ??= DesignVar(10); ///< K1 constant in the muscle model.  Factor for determining shortening speed at optimum length
      AnyFloat K2 ??= DesignVar(1); ///< K2 constant in the muscle model.  Factor for determining shortening speed at optimum length
      AnyFloat Epsilon0 ??= DesignVar(0.053); ///< Epsilon bar in the muscle model. Represents tendon strain at F0
      AnyFloat Fcfast ??= DesignVar(0.4); ///< Factor for determining shortening speed at optimum length
    };
    #endif

    #if BM_TRUNK_MUSCLES
    AnyFolder MFmL2L5 =
    {
      AnyString Muscle = "MFmL2L5"; ///< Descriptive name for the muscle, e.g. for plotting
      AnyIntVar MuscleElemAmount = 1; ///< The total amount of elements for this muscle
      AnyFloat Pennationangle ??= DesignVar(0); ///< Pennation angle of the muscle fibers (degres)
      AnyFloat VolumeScaleFactor ??= DesignVar(1.0); ///< Factor for scaling the muscle volume
      AnyFloat MuscleVolume ??= .Volume*0.025465; ///< Volume of the muscle (ml) (the fraction of the group volume is based on the strength of the previous model)
      AnyFloat MuscleVolumeSIScaled ??= ..VolumeUnitFactor*VolumeScaleFactor*MuscleVolume; ///< Scaled Volume of the muscle in SI base unit (m^3)
      AnyFloat OptimalFiberlength ??= _FIBER_LENGTH_DESIGNVAR(0.058319); ///< Optimal working length of the muscle fiber (m)
      AnyFloat TotalTendonLength ??= _TENDON_LENGTH_DESIGNVAR(0.01);///< The total tendon length (m)
      AnyFloat K1 ??= DesignVar(10); ///< K1 constant in the muscle model.  Factor for determining shortening speed at optimum length
      AnyFloat K2 ??= DesignVar(1); ///< K2 constant in the muscle model.  Factor for determining shortening speed at optimum length
      AnyFloat Epsilon0 ??= DesignVar(0.053); ///< Epsilon bar in the muscle model. Represents tendon strain at F0
      AnyFloat Fcfast ??= DesignVar(0.4); ///< Factor for determining shortening speed at optimum length
    };
    #endif

    #if BM_TRUNK_MUSCLES
    AnyFolder MFmL3S1 =
    {
      AnyString Muscle = "MFmL3S1"; ///< Descriptive name for the muscle, e.g. for plotting
      AnyIntVar MuscleElemAmount = 1; ///< The total amount of elements for this muscle
      AnyFloat Pennationangle ??= DesignVar(0); ///< Pennation angle of the muscle fibers (degres)
      AnyFloat VolumeScaleFactor ??= DesignVar(1.0); ///< Factor for scaling the muscle volume
      AnyFloat MuscleVolume ??= .Volume*0.031107; ///< Volume of the muscle (ml) (the fraction of the group volume is based on the strength of the previous model)
      AnyFloat MuscleVolumeSIScaled ??= ..VolumeUnitFactor*VolumeScaleFactor*MuscleVolume; ///< Scaled Volume of the muscle in SI base unit (m^3)
      AnyFloat OptimalFiberlength ??= _FIBER_LENGTH_DESIGNVAR(0.051452); ///< Optimal working length of the muscle fiber (m)
      AnyFloat TotalTendonLength ??= _TENDON_LENGTH_DESIGNVAR(0.01);///< The total tendon length (m)
      AnyFloat K1 ??= DesignVar(10); ///< K1 constant in the muscle model.  Factor for determining shortening speed at optimum length
      AnyFloat K2 ??= DesignVar(1); ///< K2 constant in the muscle model.  Factor for determining shortening speed at optimum length
      AnyFloat Epsilon0 ??= DesignVar(0.053); ///< Epsilon bar in the muscle model. Represents tendon strain at F0
      AnyFloat Fcfast ??= DesignVar(0.4); ///< Factor for determining shortening speed at optimum length
    };
    #endif

    #if BM_TRUNK_MUSCLES
    AnyFolder MFmL4Sacrum =
    {
      AnyString Muscle = "MFmL4Sacrum"; ///< Descriptive name for the muscle, e.g. for plotting
      AnyIntVar MuscleElemAmount = 1; ///< The total amount of elements for this muscle
      AnyFloat Pennationangle ??= DesignVar(0); ///< Pennation angle of the muscle fibers (degres)
      AnyFloat VolumeScaleFactor ??= DesignVar(1.0); ///< Factor for scaling the muscle volume
      AnyFloat MuscleVolume ??= .Volume*0.10676; ///< Volume of the muscle (ml) (the fraction of the group volume is based on the strength of the previous model)
      AnyFloat MuscleVolumeSIScaled ??= ..VolumeUnitFactor*VolumeScaleFactor*MuscleVolume; ///< Scaled Volume of the muscle in SI base unit (m^3)
      AnyFloat OptimalFiberlength ??= _FIBER_LENGTH_DESIGNVAR(0.051267); ///< Optimal working length of the muscle fiber (m)
      AnyFloat TotalTendonLength ??= _TENDON_LENGTH_DESIGNVAR(0.01);///< The total tendon length (m)
      AnyFloat K1 ??= DesignVar(10); ///< K1 constant in the muscle model.  Factor for determining shortening speed at optimum length
      AnyFloat K2 ??= DesignVar(1); ///< K2 constant in the muscle model.  Factor for determining shortening speed at optimum length
      AnyFloat Epsilon0 ??= DesignVar(0.053); ///< Epsilon bar in the muscle model. Represents tendon strain at F0
      AnyFloat Fcfast ??= DesignVar(0.4); ///< Factor for determining shortening speed at optimum length
    };
    #endif

    #if BM_TRUNK_MUSCLES
    AnyFolder MFmL5Sacrum =
    {
      AnyString Muscle = "MFmL5Sacrum"; ///< Descriptive name for the muscle, e.g. for plotting
      AnyIntVar MuscleElemAmount = 1; ///< The total amount of elements for this muscle
      AnyFloat Pennationangle ??= DesignVar(0); ///< Pennation angle of the muscle fibers (degres)
      AnyFloat VolumeScaleFactor ??= DesignVar(1.0); ///< Factor for scaling the muscle volume
      AnyFloat MuscleVolume ??= .Volume*0.0077608; ///< Volume of the muscle (ml) (the fraction of the group volume is based on the strength of the previous model)
      AnyFloat MuscleVolumeSIScaled ??= ..VolumeUnitFactor*VolumeScaleFactor*MuscleVolume; ///< Scaled Volume of the muscle in SI base unit (m^3)
      AnyFloat OptimalFiberlength ??= _FIBER_LENGTH_DESIGNVAR(0.0077019); ///< Optimal working length of the muscle fiber (m)
      AnyFloat TotalTendonLength ??= _TENDON_LENGTH_DESIGNVAR(0.01);///< The total tendon length (m)
      AnyFloat K1 ??= DesignVar(10); ///< K1 constant in the muscle model.  Factor for determining shortening speed at optimum length
      AnyFloat K2 ??= DesignVar(1); ///< K2 constant in the muscle model.  Factor for determining shortening speed at optimum length
      AnyFloat Epsilon0 ??= DesignVar(0.053); ///< Epsilon bar in the muscle model. Represents tendon strain at F0
      AnyFloat Fcfast ??= DesignVar(0.4); ///< Factor for determining shortening speed at optimum length
    };
    #endif

    #if BM_TRUNK_MUSCLES
    AnyFolder MFtsL1L5 =
    {
      AnyString Muscle = "MFtsL1L5"; ///< Descriptive name for the muscle, e.g. for plotting
      AnyIntVar MuscleElemAmount = 1; ///< The total amount of elements for this muscle
      AnyFloat Pennationangle ??= DesignVar(0); ///< Pennation angle of the muscle fibers (degres)
      AnyFloat VolumeScaleFactor ??= DesignVar(1.0); ///< Factor for scaling the muscle volume
      AnyFloat MuscleVolume ??= .Volume*0.041787; ///< Volume of the muscle (ml) (the fraction of the group volume is based on the strength of the previous model)
      AnyFloat MuscleVolumeSIScaled ??= ..VolumeUnitFactor*VolumeScaleFactor*MuscleVolume; ///< Scaled Volume of the muscle in SI base unit (m^3)
      AnyFloat OptimalFiberlength ??= _FIBER_LENGTH_DESIGNVAR(0.088863); ///< Optimal working length of the muscle fiber (m)
      AnyFloat TotalTendonLength ??= _TENDON_LENGTH_DESIGNVAR(0.01);///< The total tendon length (m)
      AnyFloat K1 ??= DesignVar(10); ///< K1 constant in the muscle model.  Factor for determining shortening speed at optimum length
      AnyFloat K2 ??= DesignVar(1); ///< K2 constant in the muscle model.  Factor for determining shortening speed at optimum length
      AnyFloat Epsilon0 ??= DesignVar(0.053); ///< Epsilon bar in the muscle model. Represents tendon strain at F0
      AnyFloat Fcfast ??= DesignVar(0.4); ///< Factor for determining shortening speed at optimum length
    };
    #endif

    #if BM_TRUNK_MUSCLES
    AnyFolder MFtsL1S1 =
    {
      AnyString Muscle = "MFtsL1S1"; ///< Descriptive name for the muscle, e.g. for plotting
      AnyIntVar MuscleElemAmount = 1; ///< The total amount of elements for this muscle
      AnyFloat Pennationangle ??= DesignVar(0); ///< Pennation angle of the muscle fibers (degres)
      AnyFloat VolumeScaleFactor ??= DesignVar(1.0); ///< Factor for scaling the muscle volume
      AnyFloat MuscleVolume ??= .Volume*0.041909; ///< Volume of the muscle (ml) (the fraction of the group volume is based on the strength of the previous model)
      AnyFloat MuscleVolumeSIScaled ??= ..VolumeUnitFactor*VolumeScaleFactor*MuscleVolume; ///< Scaled Volume of the muscle in SI base unit (m^3)
      AnyFloat OptimalFiberlength ??= _FIBER_LENGTH_DESIGNVAR(0.10398); ///< Optimal working length of the muscle fiber (m)
      AnyFloat TotalTendonLength ??= _TENDON_LENGTH_DESIGNVAR(0.01);///< The total tendon length (m)
      AnyFloat K1 ??= DesignVar(10); ///< K1 constant in the muscle model.  Factor for determining shortening speed at optimum length
      AnyFloat K2 ??= DesignVar(1); ///< K2 constant in the muscle model.  Factor for determining shortening speed at optimum length
      AnyFloat Epsilon0 ??= DesignVar(0.053); ///< Epsilon bar in the muscle model. Represents tendon strain at F0
      AnyFloat Fcfast ??= DesignVar(0.4); ///< Factor for determining shortening speed at optimum length
    };
    #endif

    #if BM_TRUNK_MUSCLES
    AnyFolder MFtsL2L5 =
    {
      AnyString Muscle = "MFtsL2L5"; ///< Descriptive name for the muscle, e.g. for plotting
      AnyIntVar MuscleElemAmount = 1; ///< The total amount of elements for this muscle
      AnyFloat Pennationangle ??= DesignVar(0); ///< Pennation angle of the muscle fibers (degres)
      AnyFloat VolumeScaleFactor ??= DesignVar(1.0); ///< Factor for scaling the muscle volume
      AnyFloat MuscleVolume ??= .Volume*0.024126; ///< Volume of the muscle (ml) (the fraction of the group volume is based on the strength of the previous model)
      AnyFloat MuscleVolumeSIScaled ??= ..VolumeUnitFactor*VolumeScaleFactor*MuscleVolume; ///< Scaled Volume of the muscle in SI base unit (m^3)
      AnyFloat OptimalFiberlength ??= _FIBER_LENGTH_DESIGNVAR(0.055253); ///< Optimal working length of the muscle fiber (m)
      AnyFloat TotalTendonLength ??= _TENDON_LENGTH_DESIGNVAR(0.01);///< The total tendon length (m)
      AnyFloat K1 ??= DesignVar(10); ///< K1 constant in the muscle model.  Factor for determining shortening speed at optimum length
      AnyFloat K2 ??= DesignVar(1); ///< K2 constant in the muscle model.  Factor for determining shortening speed at optimum length
      AnyFloat Epsilon0 ??= DesignVar(0.053); ///< Epsilon bar in the muscle model. Represents tendon strain at F0
      AnyFloat Fcfast ??= DesignVar(0.4); ///< Factor for determining shortening speed at optimum length
    };
    #endif

    #if BM_TRUNK_MUSCLES
    AnyFolder MFtsL2S1 =
    {
      AnyString Muscle = "MFtsL2S1"; ///< Descriptive name for the muscle, e.g. for plotting
      AnyIntVar MuscleElemAmount = 1; ///< The total amount of elements for this muscle
      AnyFloat Pennationangle ??= DesignVar(0); ///< Pennation angle of the muscle fibers (degres)
      AnyFloat VolumeScaleFactor ??= DesignVar(1.0); ///< Factor for scaling the muscle volume
      AnyFloat MuscleVolume ??= .Volume*0.078801; ///< Volume of the muscle (ml) (the fraction of the group volume is based on the strength of the previous model)
      AnyFloat MuscleVolumeSIScaled ??= ..VolumeUnitFactor*VolumeScaleFactor*MuscleVolume; ///< Scaled Volume of the muscle in SI base unit (m^3)
      AnyFloat OptimalFiberlength ??= _FIBER_LENGTH_DESIGNVAR(0.071094); ///< Optimal working length of the muscle fiber (m)
      AnyFloat TotalTendonLength ??= _TENDON_LENGTH_DESIGNVAR(0.01);///< The total tendon length (m)
      AnyFloat K1 ??= DesignVar(10); ///< K1 constant in the muscle model.  Factor for determining shortening speed at optimum length
      AnyFloat K2 ??= DesignVar(1); ///< K2 constant in the muscle model.  Factor for determining shortening speed at optimum length
      AnyFloat Epsilon0 ??= DesignVar(0.053); ///< Epsilon bar in the muscle model. Represents tendon strain at F0
      AnyFloat Fcfast ??= DesignVar(0.4); ///< Factor for determining shortening speed at optimum length
    };
    #endif

    #if BM_TRUNK_MUSCLES
    AnyFolder MFtsL3Ligament =
    {
      AnyString Muscle = "MFtsL3Ligament"; ///< Descriptive name for the muscle, e.g. for plotting
      AnyIntVar MuscleElemAmount = 1; ///< The total amount of elements for this muscle
      AnyFloat Pennationangle ??= DesignVar(0); ///< Pennation angle of the muscle fibers (degres)
      AnyFloat VolumeScaleFactor ??= DesignVar(1.0); ///< Factor for scaling the muscle volume
      AnyFloat MuscleVolume ??= .Volume*0.16606; ///< Volume of the muscle (ml) (the fraction of the group volume is based on the strength of the previous model)
      AnyFloat MuscleVolumeSIScaled ??= ..VolumeUnitFactor*VolumeScaleFactor*MuscleVolume; ///< Scaled Volume of the muscle in SI base unit (m^3)
      AnyFloat OptimalFiberlength ??= _FIBER_LENGTH_DESIGNVAR(0.09447); ///< Optimal working length of the muscle fiber (m)
      AnyFloat TotalTendonLength ??= _TENDON_LENGTH_DESIGNVAR(0.01);///< The total tendon length (m)
      AnyFloat K1 ??= DesignVar(10); ///< K1 constant in the muscle model.  Factor for determining shortening speed at optimum length
      AnyFloat K2 ??= DesignVar(1); ///< K2 constant in the muscle model.  Factor for determining shortening speed at optimum length
      AnyFloat Epsilon0 ??= DesignVar(0.053); ///< Epsilon bar in the muscle model. Represents tendon strain at F0
      AnyFloat Fcfast ??= DesignVar(0.4); ///< Factor for determining shortening speed at optimum length
    };
    #endif

    #if BM_TRUNK_MUSCLES
    AnyFolder MFtsL4Sacrum =
    {
      AnyString Muscle = "MFtsL4Sacrum"; ///< Descriptive name for the muscle, e.g. for plotting
      AnyIntVar MuscleElemAmount = 1; ///< The total amount of elements for this muscle
      AnyFloat Pennationangle ??= DesignVar(0); ///< Pennation angle of the muscle fibers (degres)
      AnyFloat VolumeScaleFactor ??= DesignVar(1.0); ///< Factor for scaling the muscle volume
      AnyFloat MuscleVolume ??= .Volume*0.12954; ///< Volume of the muscle (ml) (the fraction of the group volume is based on the strength of the previous model)
      AnyFloat MuscleVolumeSIScaled ??= ..VolumeUnitFactor*VolumeScaleFactor*MuscleVolume; ///< Scaled Volume of the muscle in SI base unit (m^3)
      AnyFloat OptimalFiberlength ??= _FIBER_LENGTH_DESIGNVAR(0.062206); ///< Optimal working length of the muscle fiber (m)
      AnyFloat TotalTendonLength ??= _TENDON_LENGTH_DESIGNVAR(0.01);///< The total tendon length (m)
      AnyFloat K1 ??= DesignVar(10); ///< K1 constant in the muscle model.  Factor for determining shortening speed at optimum length
      AnyFloat K2 ??= DesignVar(1); ///< K2 constant in the muscle model.  Factor for determining shortening speed at optimum length
      AnyFloat Epsilon0 ??= DesignVar(0.053); ///< Epsilon bar in the muscle model. Represents tendon strain at F0
      AnyFloat Fcfast ??= DesignVar(0.4); ///< Factor for determining shortening speed at optimum length
    };
    #endif

    #if BM_TRUNK_MUSCLES
    AnyFolder MFtsL5Sacrum =
    {
      AnyString Muscle = "MFtsL5Sacrum"; ///< Descriptive name for the muscle, e.g. for plotting
      AnyIntVar MuscleElemAmount = 1; ///< The total amount of elements for this muscle
      AnyFloat Pennationangle ??= DesignVar(0); ///< Pennation angle of the muscle fibers (degres)
      AnyFloat VolumeScaleFactor ??= DesignVar(1.0); ///< Factor for scaling the muscle volume
      AnyFloat MuscleVolume ??= .Volume*0.079333; ///< Volume of the muscle (ml) (the fraction of the group volume is based on the strength of the previous model)
      AnyFloat MuscleVolumeSIScaled ??= ..VolumeUnitFactor*VolumeScaleFactor*MuscleVolume; ///< Scaled Volume of the muscle in SI base unit (m^3)
      AnyFloat OptimalFiberlength ??= _FIBER_LENGTH_DESIGNVAR(0.078731); ///< Optimal working length of the muscle fiber (m)
      AnyFloat TotalTendonLength ??= _TENDON_LENGTH_DESIGNVAR(0.01);///< The total tendon length (m)
      AnyFloat K1 ??= DesignVar(10); ///< K1 constant in the muscle model.  Factor for determining shortening speed at optimum length
      AnyFloat K2 ??= DesignVar(1); ///< K2 constant in the muscle model.  Factor for determining shortening speed at optimum length
      AnyFloat Epsilon0 ??= DesignVar(0.053); ///< Epsilon bar in the muscle model. Represents tendon strain at F0
      AnyFloat Fcfast ??= DesignVar(0.4); ///< Factor for determining shortening speed at optimum length
    };
    #endif

    #if BM_TRUNK_MUSCLES
    AnyFolder MFtstL1SIPS =
    {
      AnyString Muscle = "MFtstL1SIPS"; ///< Descriptive name for the muscle, e.g. for plotting
      AnyIntVar MuscleElemAmount = 1; ///< The total amount of elements for this muscle
      AnyFloat Pennationangle ??= DesignVar(0); ///< Pennation angle of the muscle fibers (degres)
      AnyFloat VolumeScaleFactor ??= DesignVar(1.0); ///< Factor for scaling the muscle volume
      AnyFloat MuscleVolume ??= .Volume*0.076617; ///< Volume of the muscle (ml) (the fraction of the group volume is based on the strength of the previous model)
      AnyFloat MuscleVolumeSIScaled ??= ..VolumeUnitFactor*VolumeScaleFactor*MuscleVolume; ///< Scaled Volume of the muscle in SI base unit (m^3)
      AnyFloat OptimalFiberlength ??= _FIBER_LENGTH_DESIGNVAR(0.11405); ///< Optimal working length of the muscle fiber (m)
      AnyFloat TotalTendonLength ??= _TENDON_LENGTH_DESIGNVAR(0.01);///< The total tendon length (m)
      AnyFloat K1 ??= DesignVar(10); ///< K1 constant in the muscle model.  Factor for determining shortening speed at optimum length
      AnyFloat K2 ??= DesignVar(1); ///< K2 constant in the muscle model.  Factor for determining shortening speed at optimum length
      AnyFloat Epsilon0 ??= DesignVar(0.053); ///< Epsilon bar in the muscle model. Represents tendon strain at F0
      AnyFloat Fcfast ??= DesignVar(0.4); ///< Factor for determining shortening speed at optimum length
    };
    #endif

    #if BM_TRUNK_MUSCLES
    AnyFolder MFtstL2SIPS =
    {
      AnyString Muscle = "MFtstL2SIPS"; ///< Descriptive name for the muscle, e.g. for plotting
      AnyIntVar MuscleElemAmount = 1; ///< The total amount of elements for this muscle
      AnyFloat Pennationangle ??= DesignVar(0); ///< Pennation angle of the muscle fibers (degres)
      AnyFloat VolumeScaleFactor ??= DesignVar(1.0); ///< Factor for scaling the muscle volume
      AnyFloat MuscleVolume ??= .Volume*0.095062; ///< Volume of the muscle (ml) (the fraction of the group volume is based on the strength of the previous model)
      AnyFloat MuscleVolumeSIScaled ??= ..VolumeUnitFactor*VolumeScaleFactor*MuscleVolume; ///< Scaled Volume of the muscle in SI base unit (m^3)
      AnyFloat OptimalFiberlength ??= _FIBER_LENGTH_DESIGNVAR(0.085764); ///< Optimal working length of the muscle fiber (m)
      AnyFloat TotalTendonLength ??= _TENDON_LENGTH_DESIGNVAR(0.01);///< The total tendon length (m)
      AnyFloat K1 ??= DesignVar(10); ///< K1 constant in the muscle model.  Factor for determining shortening speed at optimum length
      AnyFloat K2 ??= DesignVar(1); ///< K2 constant in the muscle model.  Factor for determining shortening speed at optimum length
      AnyFloat Epsilon0 ??= DesignVar(0.053); ///< Epsilon bar in the muscle model. Represents tendon strain at F0
      AnyFloat Fcfast ??= DesignVar(0.4); ///< Factor for determining shortening speed at optimum length
    };
    #endif
  }; // Multifidi group
  AnyFolder ErectorSpinae =
  {
    #if BM_TRUNK_MUSCLES
    AnyVar Volume ??= DesignVar(568.92); ///< Total volume of the muscle group (ml)
    AnyFolder ILplL1CI =
    {
      AnyString Muscle = "ILplL1CI"; ///< Descriptive name for the muscle, e.g. for plotting
      AnyIntVar MuscleElemAmount = 1; ///< The total amount of elements for this muscle
      AnyFloat Pennationangle ??= DesignVar(0); ///< Pennation angle of the muscle fibers (degres)
      AnyFloat VolumeScaleFactor ??= DesignVar(1.0); ///< Factor for scaling the muscle volume
      AnyFloat MuscleVolume ??= .Volume*0.023823; ///< Volume of the muscle (ml) (the fraction of the group volume is based on the strength of the previous model)
      AnyFloat MuscleVolumeSIScaled ??= ..VolumeUnitFactor*VolumeScaleFactor*MuscleVolume; ///< Scaled Volume of the muscle in SI base unit (m^3)
      AnyFloat OptimalFiberlength ??= _FIBER_LENGTH_DESIGNVAR(0.12549); ///< Optimal working length of the muscle fiber (m)
      AnyFloat TotalTendonLength ??= _TENDON_LENGTH_DESIGNVAR(0.01);///< The total tendon length (m)
      AnyFloat K1 ??= DesignVar(10); ///< K1 constant in the muscle model.  Factor for determining shortening speed at optimum length
      AnyFloat K2 ??= DesignVar(1); ///< K2 constant in the muscle model.  Factor for determining shortening speed at optimum length
      AnyFloat Epsilon0 ??= DesignVar(0.053); ///< Epsilon bar in the muscle model. Represents tendon strain at F0
      AnyFloat Fcfast ??= DesignVar(0.4); ///< Factor for determining shortening speed at optimum length
    };
    #endif

    #if BM_TRUNK_MUSCLES
    AnyFolder ILplL2CI =
    {
      AnyString Muscle = "ILplL2CI"; ///< Descriptive name for the muscle, e.g. for plotting
      AnyIntVar MuscleElemAmount = 1; ///< The total amount of elements for this muscle
      AnyFloat Pennationangle ??= DesignVar(0); ///< Pennation angle of the muscle fibers (degres)
      AnyFloat VolumeScaleFactor ??= DesignVar(1.0); ///< Factor for scaling the muscle volume
      AnyFloat MuscleVolume ??= .Volume*0.024217; ///< Volume of the muscle (ml) (the fraction of the group volume is based on the strength of the previous model)
      AnyFloat MuscleVolumeSIScaled ??= ..VolumeUnitFactor*VolumeScaleFactor*MuscleVolume; ///< Scaled Volume of the muscle in SI base unit (m^3)
      AnyFloat OptimalFiberlength ??= _FIBER_LENGTH_DESIGNVAR(0.089464); ///< Optimal working length of the muscle fiber (m)
      AnyFloat TotalTendonLength ??= _TENDON_LENGTH_DESIGNVAR(0.01);///< The total tendon length (m)
      AnyFloat K1 ??= DesignVar(10); ///< K1 constant in the muscle model.  Factor for determining shortening speed at optimum length
      AnyFloat K2 ??= DesignVar(1); ///< K2 constant in the muscle model.  Factor for determining shortening speed at optimum length
      AnyFloat Epsilon0 ??= DesignVar(0.053); ///< Epsilon bar in the muscle model. Represents tendon strain at F0
      AnyFloat Fcfast ??= DesignVar(0.4); ///< Factor for determining shortening speed at optimum length
    };
    #endif

    #if BM_TRUNK_MUSCLES
    AnyFolder ILplL3CI =
    {
      AnyString Muscle = "ILplL3CI"; ///< Descriptive name for the muscle, e.g. for plotting
      AnyIntVar MuscleElemAmount = 1; ///< The total amount of elements for this muscle
      AnyFloat Pennationangle ??= DesignVar(0); ///< Pennation angle of the muscle fibers (degres)
      AnyFloat VolumeScaleFactor ??= DesignVar(1.0); ///< Factor for scaling the muscle volume
      AnyFloat MuscleVolume ??= .Volume*0.019812; ///< Volume of the muscle (ml) (the fraction of the group volume is based on the strength of the previous model)
      AnyFloat MuscleVolumeSIScaled ??= ..VolumeUnitFactor*VolumeScaleFactor*MuscleVolume; ///< Scaled Volume of the muscle in SI base unit (m^3)
      AnyFloat OptimalFiberlength ??= _FIBER_LENGTH_DESIGNVAR(0.061929); ///< Optimal working length of the muscle fiber (m)
      AnyFloat TotalTendonLength ??= _TENDON_LENGTH_DESIGNVAR(0.01);///< The total tendon length (m)
      AnyFloat K1 ??= DesignVar(10); ///< K1 constant in the muscle model.  Factor for determining shortening speed at optimum length
      AnyFloat K2 ??= DesignVar(1); ///< K2 constant in the muscle model.  Factor for determining shortening speed at optimum length
      AnyFloat Epsilon0 ??= DesignVar(0.053); ///< Epsilon bar in the muscle model. Represents tendon strain at F0
      AnyFloat Fcfast ??= DesignVar(0.4); ///< Factor for determining shortening speed at optimum length
    };
    #endif

    #if BM_TRUNK_MUSCLES
    AnyFolder ILplL4CI =
    {
      AnyString Muscle = "ILplL4CI"; ///< Descriptive name for the muscle, e.g. for plotting
      AnyIntVar MuscleElemAmount = 1; ///< The total amount of elements for this muscle
      AnyFloat Pennationangle ??= DesignVar(0); ///< Pennation angle of the muscle fibers (degres)
      AnyFloat VolumeScaleFactor ??= DesignVar(1.0); ///< Factor for scaling the muscle volume
      AnyFloat MuscleVolume ??= .Volume*0.016415; ///< Volume of the muscle (ml) (the fraction of the group volume is based on the strength of the previous model)
      AnyFloat MuscleVolumeSIScaled ??= ..VolumeUnitFactor*VolumeScaleFactor*MuscleVolume; ///< Scaled Volume of the muscle in SI base unit (m^3)
      AnyFloat OptimalFiberlength ??= _FIBER_LENGTH_DESIGNVAR(0.049411); ///< Optimal working length of the muscle fiber (m)
      AnyFloat TotalTendonLength ??= _TENDON_LENGTH_DESIGNVAR(0.01);///< The total tendon length (m)
      AnyFloat K1 ??= DesignVar(10); ///< K1 constant in the muscle model.  Factor for determining shortening speed at optimum length
      AnyFloat K2 ??= DesignVar(1); ///< K2 constant in the muscle model.  Factor for determining shortening speed at optimum length
      AnyFloat Epsilon0 ??= DesignVar(0.053); ///< Epsilon bar in the muscle model. Represents tendon strain at F0
      AnyFloat Fcfast ??= DesignVar(0.4); ///< Factor for determining shortening speed at optimum length
    };
    #endif

    #if BM_TRUNK_MUSCLES
    AnyFolder LTplL1SIPS =
    {
      AnyString Muscle = "LTplL1SIPS"; ///< Descriptive name for the muscle, e.g. for plotting
      AnyIntVar MuscleElemAmount = 1; ///< The total amount of elements for this muscle
      AnyFloat Pennationangle ??= DesignVar(0); ///< Pennation angle of the muscle fibers (degres)
      AnyFloat VolumeScaleFactor ??= DesignVar(1.0); ///< Factor for scaling the muscle volume
      AnyFloat MuscleVolume ??= .Volume*0.015557; ///< Volume of the muscle (ml) (the fraction of the group volume is based on the strength of the previous model)
      AnyFloat MuscleVolumeSIScaled ??= ..VolumeUnitFactor*VolumeScaleFactor*MuscleVolume; ///< Scaled Volume of the muscle in SI base unit (m^3)
      AnyFloat OptimalFiberlength ??= _FIBER_LENGTH_DESIGNVAR(0.11203); ///< Optimal working length of the muscle fiber (m)
      AnyFloat TotalTendonLength ??= _TENDON_LENGTH_DESIGNVAR(0.01);///< The total tendon length (m)
      AnyFloat K1 ??= DesignVar(10); ///< K1 constant in the muscle model.  Factor for determining shortening speed at optimum length
      AnyFloat K2 ??= DesignVar(1); ///< K2 constant in the muscle model.  Factor for determining shortening speed at optimum length
      AnyFloat Epsilon0 ??= DesignVar(0.053); ///< Epsilon bar in the muscle model. Represents tendon strain at F0
      AnyFloat Fcfast ??= DesignVar(0.4); ///< Factor for determining shortening speed at optimum length
    };
    #endif

    #if BM_TRUNK_MUSCLES
    AnyFolder LTplL2SIPS =
    {
      AnyString Muscle = "LTplL2SIPS"; ///< Descriptive name for the muscle, e.g. for plotting
      AnyIntVar MuscleElemAmount = 1; ///< The total amount of elements for this muscle
      AnyFloat Pennationangle ??= DesignVar(0); ///< Pennation angle of the muscle fibers (degres)
      AnyFloat VolumeScaleFactor ??= DesignVar(1.0); ///< Factor for scaling the muscle volume
      AnyFloat MuscleVolume ??= .Volume*0.013155; ///< Volume of the muscle (ml) (the fraction of the group volume is based on the strength of the previous model)
      AnyFloat MuscleVolumeSIScaled ??= ..VolumeUnitFactor*VolumeScaleFactor*MuscleVolume; ///< Scaled Volume of the muscle in SI base unit (m^3)
      AnyFloat OptimalFiberlength ??= _FIBER_LENGTH_DESIGNVAR(0.082243); ///< Optimal working length of the muscle fiber (m)
      AnyFloat TotalTendonLength ??= _TENDON_LENGTH_DESIGNVAR(0.01);///< The total tendon length (m)
      AnyFloat K1 ??= DesignVar(10); ///< K1 constant in the muscle model.  Factor for determining shortening speed at optimum length
      AnyFloat K2 ??= DesignVar(1); ///< K2 constant in the muscle model.  Factor for determining shortening speed at optimum length
      AnyFloat Epsilon0 ??= DesignVar(0.053); ///< Epsilon bar in the muscle model. Represents tendon strain at F0
      AnyFloat Fcfast ??= DesignVar(0.4); ///< Factor for determining shortening speed at optimum length
    };
    #endif

    #if BM_TRUNK_MUSCLES
    AnyFolder LTplL3SIPS =
    {
      AnyString Muscle = "LTplL3SIPS"; ///< Descriptive name for the muscle, e.g. for plotting
      AnyIntVar MuscleElemAmount = 1; ///< The total amount of elements for this muscle
      AnyFloat Pennationangle ??= DesignVar(0); ///< Pennation angle of the muscle fibers (degres)
      AnyFloat VolumeScaleFactor ??= DesignVar(1.0); ///< Factor for scaling the muscle volume
      AnyFloat MuscleVolume ??= .Volume*0.0095272; ///< Volume of the muscle (ml) (the fraction of the group volume is based on the strength of the previous model)
      AnyFloat MuscleVolumeSIScaled ??= ..VolumeUnitFactor*VolumeScaleFactor*MuscleVolume; ///< Scaled Volume of the muscle in SI base unit (m^3)
      AnyFloat OptimalFiberlength ??= _FIBER_LENGTH_DESIGNVAR(0.052623); ///< Optimal working length of the muscle fiber (m)
      AnyFloat TotalTendonLength ??= _TENDON_LENGTH_DESIGNVAR(0.01);///< The total tendon length (m)
      AnyFloat K1 ??= DesignVar(10); ///< K1 constant in the muscle model.  Factor for determining shortening speed at optimum length
      AnyFloat K2 ??= DesignVar(1); ///< K2 constant in the muscle model.  Factor for determining shortening speed at optimum length
      AnyFloat Epsilon0 ??= DesignVar(0.053); ///< Epsilon bar in the muscle model. Represents tendon strain at F0
      AnyFloat Fcfast ??= DesignVar(0.4); ///< Factor for determining shortening speed at optimum length
    };
    #endif

    #if BM_TRUNK_MUSCLES
    AnyFolder LTplL4SIPS =
    {
      AnyString Muscle = "LTplL4SIPS"; ///< Descriptive name for the muscle, e.g. for plotting
      AnyIntVar MuscleElemAmount = 1; ///< The total amount of elements for this muscle
      AnyFloat Pennationangle ??= DesignVar(0); ///< Pennation angle of the muscle fibers (degres)
      AnyFloat VolumeScaleFactor ??= DesignVar(1.0); ///< Factor for scaling the muscle volume
      AnyFloat MuscleVolume ??= .Volume*0.0066298; ///< Volume of the muscle (ml) (the fraction of the group volume is based on the strength of the previous model)
      AnyFloat MuscleVolumeSIScaled ??= ..VolumeUnitFactor*VolumeScaleFactor*MuscleVolume; ///< Scaled Volume of the muscle in SI base unit (m^3)
      AnyFloat OptimalFiberlength ??= _FIBER_LENGTH_DESIGNVAR(0.034289); ///< Optimal working length of the muscle fiber (m)
      AnyFloat TotalTendonLength ??= _TENDON_LENGTH_DESIGNVAR(0.01);///< The total tendon length (m)
      AnyFloat K1 ??= DesignVar(10); ///< K1 constant in the muscle model.  Factor for determining shortening speed at optimum length
      AnyFloat K2 ??= DesignVar(1); ///< K2 constant in the muscle model.  Factor for determining shortening speed at optimum length
      AnyFloat Epsilon0 ??= DesignVar(0.053); ///< Epsilon bar in the muscle model. Represents tendon strain at F0
      AnyFloat Fcfast ??= DesignVar(0.4); ///< Factor for determining shortening speed at optimum length
    };
    #endif

    #if BM_TRUNK_MUSCLES
    AnyFolder LTplL5Ilium =
    {
      AnyString Muscle = "LTplL5Ilium"; ///< Descriptive name for the muscle, e.g. for plotting
      AnyIntVar MuscleElemAmount = 1; ///< The total amount of elements for this muscle
      AnyFloat Pennationangle ??= DesignVar(0); ///< Pennation angle of the muscle fibers (degres)
      AnyFloat VolumeScaleFactor ??= DesignVar(1.0); ///< Factor for scaling the muscle volume
      AnyFloat MuscleVolume ??= .Volume*0.0054169; ///< Volume of the muscle (ml) (the fraction of the group volume is based on the strength of the previous model)
      AnyFloat MuscleVolumeSIScaled ??= ..VolumeUnitFactor*VolumeScaleFactor*MuscleVolume; ///< Scaled Volume of the muscle in SI base unit (m^3)
      AnyFloat OptimalFiberlength ??= _FIBER_LENGTH_DESIGNVAR(0.026567); ///< Optimal working length of the muscle fiber (m)
      AnyFloat TotalTendonLength ??= _TENDON_LENGTH_DESIGNVAR(0.01);///< The total tendon length (m)
      AnyFloat K1 ??= DesignVar(10); ///< K1 constant in the muscle model.  Factor for determining shortening speed at optimum length
      AnyFloat K2 ??= DesignVar(1); ///< K2 constant in the muscle model.  Factor for determining shortening speed at optimum length
      AnyFloat Epsilon0 ??= DesignVar(0.053); ///< Epsilon bar in the muscle model. Represents tendon strain at F0
      AnyFloat Fcfast ??= DesignVar(0.4); ///< Factor for determining shortening speed at optimum length
    };
    #endif

    #if BM_TRUNK_MUSCLES
    AnyFolder ILptC5SIPS =
    {
      AnyString Muscle = "ILptC5SIPS"; ///< Descriptive name for the muscle, e.g. for plotting
      AnyIntVar MuscleElemAmount = 1; ///< The total amount of elements for this muscle
      AnyFloat Pennationangle ??= DesignVar(0); ///< Pennation angle of the muscle fibers (degres)
      AnyFloat VolumeScaleFactor ??= DesignVar(1.0); ///< Factor for scaling the muscle volume
      AnyFloat MuscleVolume ??= .Volume*0.0139; ///< Volume of the muscle (ml) (the fraction of the group volume is based on the strength of the previous model)
      AnyFloat MuscleVolumeSIScaled ??= ..VolumeUnitFactor*VolumeScaleFactor*MuscleVolume; ///< Scaled Volume of the muscle in SI base unit (m^3)
      AnyFloat OptimalFiberlength ??= _FIBER_LENGTH_DESIGNVAR(0.34383); ///< Optimal working length of the muscle fiber (m)
      AnyFloat TotalTendonLength ??= _TENDON_LENGTH_DESIGNVAR(0.01);///< The total tendon length (m)
      AnyFloat K1 ??= DesignVar(10); ///< K1 constant in the muscle model.  Factor for determining shortening speed at optimum length
      AnyFloat K2 ??= DesignVar(1); ///< K2 constant in the muscle model.  Factor for determining shortening speed at optimum length
      AnyFloat Epsilon0 ??= DesignVar(0.053); ///< Epsilon bar in the muscle model. Represents tendon strain at F0
      AnyFloat Fcfast ??= DesignVar(0.4); ///< Factor for determining shortening speed at optimum length
    };
    #endif

    #if BM_TRUNK_MUSCLES
    AnyFolder ILptC6SIPS =
    {
      AnyString Muscle = "ILptC6SIPS"; ///< Descriptive name for the muscle, e.g. for plotting
      AnyIntVar MuscleElemAmount = 1; ///< The total amount of elements for this muscle
      AnyFloat Pennationangle ??= DesignVar(0); ///< Pennation angle of the muscle fibers (degres)
      AnyFloat VolumeScaleFactor ??= DesignVar(1.0); ///< Factor for scaling the muscle volume
      AnyFloat MuscleVolume ??= .Volume*0.017977; ///< Volume of the muscle (ml) (the fraction of the group volume is based on the strength of the previous model)
      AnyFloat MuscleVolumeSIScaled ??= ..VolumeUnitFactor*VolumeScaleFactor*MuscleVolume; ///< Scaled Volume of the muscle in SI base unit (m^3)
      AnyFloat OptimalFiberlength ??= _FIBER_LENGTH_DESIGNVAR(0.3196); ///< Optimal working length of the muscle fiber (m)
      AnyFloat TotalTendonLength ??= _TENDON_LENGTH_DESIGNVAR(0.01);///< The total tendon length (m)
      AnyFloat K1 ??= DesignVar(10); ///< K1 constant in the muscle model.  Factor for determining shortening speed at optimum length
      AnyFloat K2 ??= DesignVar(1); ///< K2 constant in the muscle model.  Factor for determining shortening speed at optimum length
      AnyFloat Epsilon0 ??= DesignVar(0.053); ///< Epsilon bar in the muscle model. Represents tendon strain at F0
      AnyFloat Fcfast ??= DesignVar(0.4); ///< Factor for determining shortening speed at optimum length
    };
    #endif

    #if BM_TRUNK_MUSCLES
    AnyFolder ILptC7CI =
    {
      AnyString Muscle = "ILptC7CI"; ///< Descriptive name for the muscle, e.g. for plotting
      AnyIntVar MuscleElemAmount = 1; ///< The total amount of elements for this muscle
      AnyFloat Pennationangle ??= DesignVar(0); ///< Pennation angle of the muscle fibers (degres)
      AnyFloat VolumeScaleFactor ??= DesignVar(1.0); ///< Factor for scaling the muscle volume
      AnyFloat MuscleVolume ??= .Volume*0.02127; ///< Volume of the muscle (ml) (the fraction of the group volume is based on the strength of the previous model)
      AnyFloat MuscleVolumeSIScaled ??= ..VolumeUnitFactor*VolumeScaleFactor*MuscleVolume; ///< Scaled Volume of the muscle in SI base unit (m^3)
      AnyFloat OptimalFiberlength ??= _FIBER_LENGTH_DESIGNVAR(0.31029); ///< Optimal working length of the muscle fiber (m)
      AnyFloat TotalTendonLength ??= _TENDON_LENGTH_DESIGNVAR(0.01);///< The total tendon length (m)
      AnyFloat K1 ??= DesignVar(10); ///< K1 constant in the muscle model.  Factor for determining shortening speed at optimum length
      AnyFloat K2 ??= DesignVar(1); ///< K2 constant in the muscle model.  Factor for determining shortening speed at optimum length
      AnyFloat Epsilon0 ??= DesignVar(0.053); ///< Epsilon bar in the muscle model. Represents tendon strain at F0
      AnyFloat Fcfast ??= DesignVar(0.4); ///< Factor for determining shortening speed at optimum length
    };
    #endif

    #if BM_TRUNK_MUSCLES
    AnyFolder ILptC8CI =
    {
      AnyString Muscle = "ILptC8CI"; ///< Descriptive name for the muscle, e.g. for plotting
      AnyIntVar MuscleElemAmount = 1; ///< The total amount of elements for this muscle
      AnyFloat Pennationangle ??= DesignVar(0); ///< Pennation angle of the muscle fibers (degres)
      AnyFloat VolumeScaleFactor ??= DesignVar(1.0); ///< Factor for scaling the muscle volume
      AnyFloat MuscleVolume ??= .Volume*0.016112; ///< Volume of the muscle (ml) (the fraction of the group volume is based on the strength of the previous model)
      AnyFloat MuscleVolumeSIScaled ??= ..VolumeUnitFactor*VolumeScaleFactor*MuscleVolume; ///< Scaled Volume of the muscle in SI base unit (m^3)
      AnyFloat OptimalFiberlength ??= _FIBER_LENGTH_DESIGNVAR(0.26959); ///< Optimal working length of the muscle fiber (m)
      AnyFloat TotalTendonLength ??= _TENDON_LENGTH_DESIGNVAR(0.01);///< The total tendon length (m)
      AnyFloat K1 ??= DesignVar(10); ///< K1 constant in the muscle model.  Factor for determining shortening speed at optimum length
      AnyFloat K2 ??= DesignVar(1); ///< K2 constant in the muscle model.  Factor for determining shortening speed at optimum length
      AnyFloat Epsilon0 ??= DesignVar(0.053); ///< Epsilon bar in the muscle model. Represents tendon strain at F0
      AnyFloat Fcfast ??= DesignVar(0.4); ///< Factor for determining shortening speed at optimum length
    };
    #endif

    #if BM_TRUNK_MUSCLES
    AnyFolder ILptC9CI =
    {
      AnyString Muscle = "ILptC9CI"; ///< Descriptive name for the muscle, e.g. for plotting
      AnyIntVar MuscleElemAmount = 1; ///< The total amount of elements for this muscle
      AnyFloat Pennationangle ??= DesignVar(0); ///< Pennation angle of the muscle fibers (degres)
      AnyFloat VolumeScaleFactor ??= DesignVar(1.0); ///< Factor for scaling the muscle volume
      AnyFloat MuscleVolume ??= .Volume*0.019803; ///< Volume of the muscle (ml) (the fraction of the group volume is based on the strength of the previous model)
      AnyFloat MuscleVolumeSIScaled ??= ..VolumeUnitFactor*VolumeScaleFactor*MuscleVolume; ///< Scaled Volume of the muscle in SI base unit (m^3)
      AnyFloat OptimalFiberlength ??= _FIBER_LENGTH_DESIGNVAR(0.22533); ///< Optimal working length of the muscle fiber (m)
      AnyFloat TotalTendonLength ??= _TENDON_LENGTH_DESIGNVAR(0.01);///< The total tendon length (m)
      AnyFloat K1 ??= DesignVar(10); ///< K1 constant in the muscle model.  Factor for determining shortening speed at optimum length
      AnyFloat K2 ??= DesignVar(1); ///< K2 constant in the muscle model.  Factor for determining shortening speed at optimum length
      AnyFloat Epsilon0 ??= DesignVar(0.053); ///< Epsilon bar in the muscle model. Represents tendon strain at F0
      AnyFloat Fcfast ??= DesignVar(0.4); ///< Factor for determining shortening speed at optimum length
    };
    #endif

    #if BM_TRUNK_MUSCLES
    AnyFolder ILptC10CI =
    {
      AnyString Muscle = "ILptC10CI"; ///< Descriptive name for the muscle, e.g. for plotting
      AnyIntVar MuscleElemAmount = 1; ///< The total amount of elements for this muscle
      AnyFloat Pennationangle ??= DesignVar(0); ///< Pennation angle of the muscle fibers (degres)
      AnyFloat VolumeScaleFactor ??= DesignVar(1.0); ///< Factor for scaling the muscle volume
      AnyFloat MuscleVolume ??= .Volume*0.033285; ///< Volume of the muscle (ml) (the fraction of the group volume is based on the strength of the previous model)
      AnyFloat MuscleVolumeSIScaled ??= ..VolumeUnitFactor*VolumeScaleFactor*MuscleVolume; ///< Scaled Volume of the muscle in SI base unit (m^3)
      AnyFloat OptimalFiberlength ??= _FIBER_LENGTH_DESIGNVAR(0.18936); ///< Optimal working length of the muscle fiber (m)
      AnyFloat TotalTendonLength ??= _TENDON_LENGTH_DESIGNVAR(0.01);///< The total tendon length (m)
      AnyFloat K1 ??= DesignVar(10); ///< K1 constant in the muscle model.  Factor for determining shortening speed at optimum length
      AnyFloat K2 ??= DesignVar(1); ///< K2 constant in the muscle model.  Factor for determining shortening speed at optimum length
      AnyFloat Epsilon0 ??= DesignVar(0.053); ///< Epsilon bar in the muscle model. Represents tendon strain at F0
      AnyFloat Fcfast ??= DesignVar(0.4); ///< Factor for determining shortening speed at optimum length
    };
    #endif

    #if BM_TRUNK_MUSCLES
    AnyFolder ILptC11CI =
    {
      AnyString Muscle = "ILptC11CI"; ///< Descriptive name for the muscle, e.g. for plotting
      AnyIntVar MuscleElemAmount = 1; ///< The total amount of elements for this muscle
      AnyFloat Pennationangle ??= DesignVar(0); ///< Pennation angle of the muscle fibers (degres)
      AnyFloat VolumeScaleFactor ??= DesignVar(1.0); ///< Factor for scaling the muscle volume
      AnyFloat MuscleVolume ??= .Volume*0.033075; ///< Volume of the muscle (ml) (the fraction of the group volume is based on the strength of the previous model)
      AnyFloat MuscleVolumeSIScaled ??= ..VolumeUnitFactor*VolumeScaleFactor*MuscleVolume; ///< Scaled Volume of the muscle in SI base unit (m^3)
      AnyFloat OptimalFiberlength ??= _FIBER_LENGTH_DESIGNVAR(0.15298); ///< Optimal working length of the muscle fiber (m)
      AnyFloat TotalTendonLength ??= _TENDON_LENGTH_DESIGNVAR(0.01);///< The total tendon length (m)
      AnyFloat K1 ??= DesignVar(10); ///< K1 constant in the muscle model.  Factor for determining shortening speed at optimum length
      AnyFloat K2 ??= DesignVar(1); ///< K2 constant in the muscle model.  Factor for determining shortening speed at optimum length
      AnyFloat Epsilon0 ??= DesignVar(0.053); ///< Epsilon bar in the muscle model. Represents tendon strain at F0
      AnyFloat Fcfast ??= DesignVar(0.4); ///< Factor for determining shortening speed at optimum length
    };
    #endif

    #if BM_TRUNK_MUSCLES
    AnyFolder ILptC12CI =
    {
      AnyString Muscle = "ILptC12CI"; ///< Descriptive name for the muscle, e.g. for plotting
      AnyIntVar MuscleElemAmount = 1; ///< The total amount of elements for this muscle
      AnyFloat Pennationangle ??= DesignVar(0); ///< Pennation angle of the muscle fibers (degres)
      AnyFloat VolumeScaleFactor ??= DesignVar(1.0); ///< Factor for scaling the muscle volume
      AnyFloat MuscleVolume ??= .Volume*0.028697; ///< Volume of the muscle (ml) (the fraction of the group volume is based on the strength of the previous model)
      AnyFloat MuscleVolumeSIScaled ??= ..VolumeUnitFactor*VolumeScaleFactor*MuscleVolume; ///< Scaled Volume of the muscle in SI base unit (m^3)
      AnyFloat OptimalFiberlength ??= _FIBER_LENGTH_DESIGNVAR(0.11106); ///< Optimal working length of the muscle fiber (m)
      AnyFloat TotalTendonLength ??= _TENDON_LENGTH_DESIGNVAR(0.01);///< The total tendon length (m)
      AnyFloat K1 ??= DesignVar(10); ///< K1 constant in the muscle model.  Factor for determining shortening speed at optimum length
      AnyFloat K2 ??= DesignVar(1); ///< K2 constant in the muscle model.  Factor for determining shortening speed at optimum length
      AnyFloat Epsilon0 ??= DesignVar(0.053); ///< Epsilon bar in the muscle model. Represents tendon strain at F0
      AnyFloat Fcfast ??= DesignVar(0.4); ///< Factor for determining shortening speed at optimum length
    };
    #endif

    #if BM_TRUNK_MUSCLES
    AnyFolder LTptT1L1 =
    {
      AnyString Muscle = "LTptT1L1"; ///< Descriptive name for the muscle, e.g. for plotting
      AnyIntVar MuscleElemAmount = 1; ///< The total amount of elements for this muscle
      AnyFloat Pennationangle ??= DesignVar(0); ///< Pennation angle of the muscle fibers (degres)
      AnyFloat VolumeScaleFactor ??= DesignVar(1.0); ///< Factor for scaling the muscle volume
      AnyFloat MuscleVolume ??= .Volume*0.019197; ///< Volume of the muscle (ml) (the fraction of the group volume is based on the strength of the previous model)
      AnyFloat MuscleVolumeSIScaled ??= ..VolumeUnitFactor*VolumeScaleFactor*MuscleVolume; ///< Scaled Volume of the muscle in SI base unit (m^3)
      AnyFloat OptimalFiberlength ??= _FIBER_LENGTH_DESIGNVAR(0.3766); ///< Optimal working length of the muscle fiber (m)
      AnyFloat TotalTendonLength ??= _TENDON_LENGTH_DESIGNVAR(0.01);///< The total tendon length (m)
      AnyFloat K1 ??= DesignVar(10); ///< K1 constant in the muscle model.  Factor for determining shortening speed at optimum length
      AnyFloat K2 ??= DesignVar(1); ///< K2 constant in the muscle model.  Factor for determining shortening speed at optimum length
      AnyFloat Epsilon0 ??= DesignVar(0.053); ///< Epsilon bar in the muscle model. Represents tendon strain at F0
      AnyFloat Fcfast ??= DesignVar(0.4); ///< Factor for determining shortening speed at optimum length
    };
    #endif

    #if BM_TRUNK_MUSCLES
    AnyFolder LTptT2L2 =
    {
      AnyString Muscle = "LTptT2L2"; ///< Descriptive name for the muscle, e.g. for plotting
      AnyIntVar MuscleElemAmount = 1; ///< The total amount of elements for this muscle
      AnyFloat Pennationangle ??= DesignVar(0); ///< Pennation angle of the muscle fibers (degres)
      AnyFloat VolumeScaleFactor ??= DesignVar(1.0); ///< Factor for scaling the muscle volume
      AnyFloat MuscleVolume ??= .Volume*0.038894; ///< Volume of the muscle (ml) (the fraction of the group volume is based on the strength of the previous model)
      AnyFloat MuscleVolumeSIScaled ??= ..VolumeUnitFactor*VolumeScaleFactor*MuscleVolume; ///< Scaled Volume of the muscle in SI base unit (m^3)
      AnyFloat OptimalFiberlength ??= _FIBER_LENGTH_DESIGNVAR(0.3882); ///< Optimal working length of the muscle fiber (m)
      AnyFloat TotalTendonLength ??= _TENDON_LENGTH_DESIGNVAR(0.01);///< The total tendon length (m)
      AnyFloat K1 ??= DesignVar(10); ///< K1 constant in the muscle model.  Factor for determining shortening speed at optimum length
      AnyFloat K2 ??= DesignVar(1); ///< K2 constant in the muscle model.  Factor for determining shortening speed at optimum length
      AnyFloat Epsilon0 ??= DesignVar(0.053); ///< Epsilon bar in the muscle model. Represents tendon strain at F0
      AnyFloat Fcfast ??= DesignVar(0.4); ///< Factor for determining shortening speed at optimum length
    };
    #endif

    #if BM_TRUNK_MUSCLES
    AnyFolder LTptT3L3 =
    {
      AnyString Muscle = "LTptT3L3"; ///< Descriptive name for the muscle, e.g. for plotting
      AnyIntVar MuscleElemAmount = 1; ///< The total amount of elements for this muscle
      AnyFloat Pennationangle ??= DesignVar(0); ///< Pennation angle of the muscle fibers (degres)
      AnyFloat VolumeScaleFactor ??= DesignVar(1.0); ///< Factor for scaling the muscle volume
      AnyFloat MuscleVolume ??= .Volume*0.018899; ///< Volume of the muscle (ml) (the fraction of the group volume is based on the strength of the previous model)
      AnyFloat MuscleVolumeSIScaled ??= ..VolumeUnitFactor*VolumeScaleFactor*MuscleVolume; ///< Scaled Volume of the muscle in SI base unit (m^3)
      AnyFloat OptimalFiberlength ??= _FIBER_LENGTH_DESIGNVAR(0.38401); ///< Optimal working length of the muscle fiber (m)
      AnyFloat TotalTendonLength ??= _TENDON_LENGTH_DESIGNVAR(0.01);///< The total tendon length (m)
      AnyFloat K1 ??= DesignVar(10); ///< K1 constant in the muscle model.  Factor for determining shortening speed at optimum length
      AnyFloat K2 ??= DesignVar(1); ///< K2 constant in the muscle model.  Factor for determining shortening speed at optimum length
      AnyFloat Epsilon0 ??= DesignVar(0.053); ///< Epsilon bar in the muscle model. Represents tendon strain at F0
      AnyFloat Fcfast ??= DesignVar(0.4); ///< Factor for determining shortening speed at optimum length
    };
    #endif

    #if BM_TRUNK_MUSCLES
    AnyFolder LTptT4L4 =
    {
      AnyString Muscle = "LTptT4L4"; ///< Descriptive name for the muscle, e.g. for plotting
      AnyIntVar MuscleElemAmount = 1; ///< The total amount of elements for this muscle
      AnyFloat Pennationangle ??= DesignVar(0); ///< Pennation angle of the muscle fibers (degres)
      AnyFloat VolumeScaleFactor ??= DesignVar(1.0); ///< Factor for scaling the muscle volume
      AnyFloat MuscleVolume ??= .Volume*0.014883; ///< Volume of the muscle (ml) (the fraction of the group volume is based on the strength of the previous model)
      AnyFloat MuscleVolumeSIScaled ??= ..VolumeUnitFactor*VolumeScaleFactor*MuscleVolume; ///< Scaled Volume of the muscle in SI base unit (m^3)
      AnyFloat OptimalFiberlength ??= _FIBER_LENGTH_DESIGNVAR(0.37632); ///< Optimal working length of the muscle fiber (m)
      AnyFloat TotalTendonLength ??= _TENDON_LENGTH_DESIGNVAR(0.01);///< The total tendon length (m)
      AnyFloat K1 ??= DesignVar(10); ///< K1 constant in the muscle model.  Factor for determining shortening speed at optimum length
      AnyFloat K2 ??= DesignVar(1); ///< K2 constant in the muscle model.  Factor for determining shortening speed at optimum length
      AnyFloat Epsilon0 ??= DesignVar(0.053); ///< Epsilon bar in the muscle model. Represents tendon strain at F0
      AnyFloat Fcfast ??= DesignVar(0.4); ///< Factor for determining shortening speed at optimum length
    };
    #endif

    #if BM_TRUNK_MUSCLES
    AnyFolder LTptT5L5 =
    {
      AnyString Muscle = "LTptT5L5"; ///< Descriptive name for the muscle, e.g. for plotting
      AnyIntVar MuscleElemAmount = 1; ///< The total amount of elements for this muscle
      AnyFloat Pennationangle ??= DesignVar(0); ///< Pennation angle of the muscle fibers (degres)
      AnyFloat VolumeScaleFactor ??= DesignVar(1.0); ///< Factor for scaling the muscle volume
      AnyFloat MuscleVolume ??= .Volume*0.0142; ///< Volume of the muscle (ml) (the fraction of the group volume is based on the strength of the previous model)
      AnyFloat MuscleVolumeSIScaled ??= ..VolumeUnitFactor*VolumeScaleFactor*MuscleVolume; ///< Scaled Volume of the muscle in SI base unit (m^3)
      AnyFloat OptimalFiberlength ??= _FIBER_LENGTH_DESIGNVAR(0.36722); ///< Optimal working length of the muscle fiber (m)
      AnyFloat TotalTendonLength ??= _TENDON_LENGTH_DESIGNVAR(0.01);///< The total tendon length (m)
      AnyFloat K1 ??= DesignVar(10); ///< K1 constant in the muscle model.  Factor for determining shortening speed at optimum length
      AnyFloat K2 ??= DesignVar(1); ///< K2 constant in the muscle model.  Factor for determining shortening speed at optimum length
      AnyFloat Epsilon0 ??= DesignVar(0.053); ///< Epsilon bar in the muscle model. Represents tendon strain at F0
      AnyFloat Fcfast ??= DesignVar(0.4); ///< Factor for determining shortening speed at optimum length
    };
    #endif

    #if BM_TRUNK_MUSCLES
    AnyFolder LTptT6S1 =
    {
      AnyString Muscle = "LTptT6S1"; ///< Descriptive name for the muscle, e.g. for plotting
      AnyIntVar MuscleElemAmount = 1; ///< The total amount of elements for this muscle
      AnyFloat Pennationangle ??= DesignVar(0); ///< Pennation angle of the muscle fibers (degres)
      AnyFloat VolumeScaleFactor ??= DesignVar(1.0); ///< Factor for scaling the muscle volume
      AnyFloat MuscleVolume ??= .Volume*0.02; ///< Volume of the muscle (ml) (the fraction of the group volume is based on the strength of the previous model)
      AnyFloat MuscleVolumeSIScaled ??= ..VolumeUnitFactor*VolumeScaleFactor*MuscleVolume; ///< Scaled Volume of the muscle in SI base unit (m^3)
      AnyFloat OptimalFiberlength ??= _FIBER_LENGTH_DESIGNVAR(0.35557); ///< Optimal working length of the muscle fiber (m)
      AnyFloat TotalTendonLength ??= _TENDON_LENGTH_DESIGNVAR(0.01);///< The total tendon length (m)
      AnyFloat K1 ??= DesignVar(10); ///< K1 constant in the muscle model.  Factor for determining shortening speed at optimum length
      AnyFloat K2 ??= DesignVar(1); ///< K2 constant in the muscle model.  Factor for determining shortening speed at optimum length
      AnyFloat Epsilon0 ??= DesignVar(0.053); ///< Epsilon bar in the muscle model. Represents tendon strain at F0
      AnyFloat Fcfast ??= DesignVar(0.4); ///< Factor for determining shortening speed at optimum length
    };
    #endif

    #if BM_TRUNK_MUSCLES
    AnyFolder LTptT7S2 =
    {
      AnyString Muscle = "LTptT7S2"; ///< Descriptive name for the muscle, e.g. for plotting
      AnyIntVar MuscleElemAmount = 1; ///< The total amount of elements for this muscle
      AnyFloat Pennationangle ??= DesignVar(0); ///< Pennation angle of the muscle fibers (degres)
      AnyFloat VolumeScaleFactor ??= DesignVar(1.0); ///< Factor for scaling the muscle volume
      AnyFloat MuscleVolume ??= .Volume*0.024814; ///< Volume of the muscle (ml) (the fraction of the group volume is based on the strength of the previous model)
      AnyFloat MuscleVolumeSIScaled ??= ..VolumeUnitFactor*VolumeScaleFactor*MuscleVolume; ///< Scaled Volume of the muscle in SI base unit (m^3)
      AnyFloat OptimalFiberlength ??= _FIBER_LENGTH_DESIGNVAR(0.36198); ///< Optimal working length of the muscle fiber (m)
      AnyFloat TotalTendonLength ??= _TENDON_LENGTH_DESIGNVAR(0.01);///< The total tendon length (m)
      AnyFloat K1 ??= DesignVar(10); ///< K1 constant in the muscle model.  Factor for determining shortening speed at optimum length
      AnyFloat K2 ??= DesignVar(1); ///< K2 constant in the muscle model.  Factor for determining shortening speed at optimum length
      AnyFloat Epsilon0 ??= DesignVar(0.053); ///< Epsilon bar in the muscle model. Represents tendon strain at F0
      AnyFloat Fcfast ??= DesignVar(0.4); ///< Factor for determining shortening speed at optimum length
    };
    #endif

    #if BM_TRUNK_MUSCLES
    AnyFolder LTptT8S3 =
    {
      AnyString Muscle = "LTptT8S3"; ///< Descriptive name for the muscle, e.g. for plotting
      AnyIntVar MuscleElemAmount = 1; ///< The total amount of elements for this muscle
      AnyFloat Pennationangle ??= DesignVar(0); ///< Pennation angle of the muscle fibers (degres)
      AnyFloat VolumeScaleFactor ??= DesignVar(1.0); ///< Factor for scaling the muscle volume
      AnyFloat MuscleVolume ??= .Volume*0.037865; ///< Volume of the muscle (ml) (the fraction of the group volume is based on the strength of the previous model)
      AnyFloat MuscleVolumeSIScaled ??= ..VolumeUnitFactor*VolumeScaleFactor*MuscleVolume; ///< Scaled Volume of the muscle in SI base unit (m^3)
      AnyFloat OptimalFiberlength ??= _FIBER_LENGTH_DESIGNVAR(0.34467); ///< Optimal working length of the muscle fiber (m)
      AnyFloat TotalTendonLength ??= _TENDON_LENGTH_DESIGNVAR(0.01);///< The total tendon length (m)
      AnyFloat K1 ??= DesignVar(10); ///< K1 constant in the muscle model.  Factor for determining shortening speed at optimum length
      AnyFloat K2 ??= DesignVar(1); ///< K2 constant in the muscle model.  Factor for determining shortening speed at optimum length
      AnyFloat Epsilon0 ??= DesignVar(0.053); ///< Epsilon bar in the muscle model. Represents tendon strain at F0
      AnyFloat Fcfast ??= DesignVar(0.4); ///< Factor for determining shortening speed at optimum length
    };
    #endif

    #if BM_TRUNK_MUSCLES
    AnyFolder LTptT9S4 =
    {
      AnyString Muscle = "LTptT9S4"; ///< Descriptive name for the muscle, e.g. for plotting
      AnyIntVar MuscleElemAmount = 1; ///< The total amount of elements for this muscle
      AnyFloat Pennationangle ??= DesignVar(0); ///< Pennation angle of the muscle fibers (degres)
      AnyFloat VolumeScaleFactor ??= DesignVar(1.0); ///< Factor for scaling the muscle volume
      AnyFloat MuscleVolume ??= .Volume*0.044499; ///< Volume of the muscle (ml) (the fraction of the group volume is based on the strength of the previous model)
      AnyFloat MuscleVolumeSIScaled ??= ..VolumeUnitFactor*VolumeScaleFactor*MuscleVolume; ///< Scaled Volume of the muscle in SI base unit (m^3)
      AnyFloat OptimalFiberlength ??= _FIBER_LENGTH_DESIGNVAR(0.3468); ///< Optimal working length of the muscle fiber (m)
      AnyFloat TotalTendonLength ??= _TENDON_LENGTH_DESIGNVAR(0.01);///< The total tendon length (m)
      AnyFloat K1 ??= DesignVar(10); ///< K1 constant in the muscle model.  Factor for determining shortening speed at optimum length
      AnyFloat K2 ??= DesignVar(1); ///< K2 constant in the muscle model.  Factor for determining shortening speed at optimum length
      AnyFloat Epsilon0 ??= DesignVar(0.053); ///< Epsilon bar in the muscle model. Represents tendon strain at F0
      AnyFloat Fcfast ??= DesignVar(0.4); ///< Factor for determining shortening speed at optimum length
    };
    #endif

    #if BM_TRUNK_MUSCLES
    AnyFolder LTptT10Sacrum =
    {
      AnyString Muscle = "LTptT10Sacrum"; ///< Descriptive name for the muscle, e.g. for plotting
      AnyIntVar MuscleElemAmount = 1; ///< The total amount of elements for this muscle
      AnyFloat Pennationangle ??= DesignVar(0); ///< Pennation angle of the muscle fibers (degres)
      AnyFloat VolumeScaleFactor ??= DesignVar(1.0); ///< Factor for scaling the muscle volume
      AnyFloat MuscleVolume ??= .Volume*0.03963; ///< Volume of the muscle (ml) (the fraction of the group volume is based on the strength of the previous model)
      AnyFloat MuscleVolumeSIScaled ??= ..VolumeUnitFactor*VolumeScaleFactor*MuscleVolume; ///< Scaled Volume of the muscle in SI base unit (m^3)
      AnyFloat OptimalFiberlength ??= _FIBER_LENGTH_DESIGNVAR(0.28183); ///< Optimal working length of the muscle fiber (m)
      AnyFloat TotalTendonLength ??= _TENDON_LENGTH_DESIGNVAR(0.01);///< The total tendon length (m)
      AnyFloat K1 ??= DesignVar(10); ///< K1 constant in the muscle model.  Factor for determining shortening speed at optimum length
      AnyFloat K2 ??= DesignVar(1); ///< K2 constant in the muscle model.  Factor for determining shortening speed at optimum length
      AnyFloat Epsilon0 ??= DesignVar(0.053); ///< Epsilon bar in the muscle model. Represents tendon strain at F0
      AnyFloat Fcfast ??= DesignVar(0.4); ///< Factor for determining shortening speed at optimum length
    };
    #endif

    #if BM_TRUNK_MUSCLES
    AnyFolder LTptT11Sacrum =
    {
      AnyString Muscle = "LTptT11Sacrum"; ///< Descriptive name for the muscle, e.g. for plotting
      AnyIntVar MuscleElemAmount = 1; ///< The total amount of elements for this muscle
      AnyFloat Pennationangle ??= DesignVar(0); ///< Pennation angle of the muscle fibers (degres)
      AnyFloat VolumeScaleFactor ??= DesignVar(1.0); ///< Factor for scaling the muscle volume
      AnyFloat MuscleVolume ??= .Volume*0.035954; ///< Volume of the muscle (ml) (the fraction of the group volume is based on the strength of the previous model)
      AnyFloat MuscleVolumeSIScaled ??= ..VolumeUnitFactor*VolumeScaleFactor*MuscleVolume; ///< Scaled Volume of the muscle in SI base unit (m^3)
      AnyFloat OptimalFiberlength ??= _FIBER_LENGTH_DESIGNVAR(0.24351); ///< Optimal working length of the muscle fiber (m)
      AnyFloat TotalTendonLength ??= _TENDON_LENGTH_DESIGNVAR(0.01);///< The total tendon length (m)
      AnyFloat K1 ??= DesignVar(10); ///< K1 constant in the muscle model.  Factor for determining shortening speed at optimum length
      AnyFloat K2 ??= DesignVar(1); ///< K2 constant in the muscle model.  Factor for determining shortening speed at optimum length
      AnyFloat Epsilon0 ??= DesignVar(0.053); ///< Epsilon bar in the muscle model. Represents tendon strain at F0
      AnyFloat Fcfast ??= DesignVar(0.4); ///< Factor for determining shortening speed at optimum length
    };
    #endif

    #if BM_TRUNK_MUSCLES
    AnyFolder LTptT12Sacrum =
    {
      AnyString Muscle = "LTptT12Sacrum"; ///< Descriptive name for the muscle, e.g. for plotting
      AnyIntVar MuscleElemAmount = 1; ///< The total amount of elements for this muscle
      AnyFloat Pennationangle ??= DesignVar(0); ///< Pennation angle of the muscle fibers (degres)
      AnyFloat VolumeScaleFactor ??= DesignVar(1.0); ///< Factor for scaling the muscle volume
      AnyFloat MuscleVolume ??= .Volume*0.024843; ///< Volume of the muscle (ml) (the fraction of the group volume is based on the strength of the previous model)
      AnyFloat MuscleVolumeSIScaled ??= ..VolumeUnitFactor*VolumeScaleFactor*MuscleVolume; ///< Scaled Volume of the muscle in SI base unit (m^3)
      AnyFloat OptimalFiberlength ??= _FIBER_LENGTH_DESIGNVAR(0.20483); ///< Optimal working length of the muscle fiber (m)
      AnyFloat TotalTendonLength ??= _TENDON_LENGTH_DESIGNVAR(0.01);///< The total tendon length (m)
      AnyFloat K1 ??= DesignVar(10); ///< K1 constant in the muscle model.  Factor for determining shortening speed at optimum length
      AnyFloat K2 ??= DesignVar(1); ///< K2 constant in the muscle model.  Factor for determining shortening speed at optimum length
      AnyFloat Epsilon0 ??= DesignVar(0.053); ///< Epsilon bar in the muscle model. Represents tendon strain at F0
      AnyFloat Fcfast ??= DesignVar(0.4); ///< Factor for determining shortening speed at optimum length
    };
    #endif

    #if BM_TRUNK_MUSCLES
    AnyFolder LTptC3L3 =
    {
      AnyString Muscle = "LTptC3L3"; ///< Descriptive name for the muscle, e.g. for plotting
      AnyIntVar MuscleElemAmount = 1; ///< The total amount of elements for this muscle
      AnyFloat Pennationangle ??= DesignVar(0); ///< Pennation angle of the muscle fibers (degres)
      AnyFloat VolumeScaleFactor ??= DesignVar(1.0); ///< Factor for scaling the muscle volume
      AnyFloat MuscleVolume ??= .Volume*0.018899; ///< Volume of the muscle (ml) (the fraction of the group volume is based on the strength of the previous model)
      AnyFloat MuscleVolumeSIScaled ??= ..VolumeUnitFactor*VolumeScaleFactor*MuscleVolume; ///< Scaled Volume of the muscle in SI base unit (m^3)
      AnyFloat OptimalFiberlength ??= _FIBER_LENGTH_DESIGNVAR(0.38401); ///< Optimal working length of the muscle fiber (m)
      AnyFloat TotalTendonLength ??= _TENDON_LENGTH_DESIGNVAR(0.01);///< The total tendon length (m)
      AnyFloat K1 ??= DesignVar(10); ///< K1 constant in the muscle model.  Factor for determining shortening speed at optimum length
      AnyFloat K2 ??= DesignVar(1); ///< K2 constant in the muscle model.  Factor for determining shortening speed at optimum length
      AnyFloat Epsilon0 ??= DesignVar(0.053); ///< Epsilon bar in the muscle model. Represents tendon strain at F0
      AnyFloat Fcfast ??= DesignVar(0.4); ///< Factor for determining shortening speed at optimum length
    };
    #endif

    #if BM_TRUNK_MUSCLES
    AnyFolder LTptC4L4 =
    {
      AnyString Muscle = "LTptC4L4"; ///< Descriptive name for the muscle, e.g. for plotting
      AnyIntVar MuscleElemAmount = 1; ///< The total amount of elements for this muscle
      AnyFloat Pennationangle ??= DesignVar(0); ///< Pennation angle of the muscle fibers (degres)
      AnyFloat VolumeScaleFactor ??= DesignVar(1.0); ///< Factor for scaling the muscle volume
      AnyFloat MuscleVolume ??= .Volume*0.014883; ///< Volume of the muscle (ml) (the fraction of the group volume is based on the strength of the previous model)
      AnyFloat MuscleVolumeSIScaled ??= ..VolumeUnitFactor*VolumeScaleFactor*MuscleVolume; ///< Scaled Volume of the muscle in SI base unit (m^3)
      AnyFloat OptimalFiberlength ??= _FIBER_LENGTH_DESIGNVAR(0.37632); ///< Optimal working length of the muscle fiber (m)
      AnyFloat TotalTendonLength ??= _TENDON_LENGTH_DESIGNVAR(0.01);///< The total tendon length (m)
      AnyFloat K1 ??= DesignVar(10); ///< K1 constant in the muscle model.  Factor for determining shortening speed at optimum length
      AnyFloat K2 ??= DesignVar(1); ///< K2 constant in the muscle model.  Factor for determining shortening speed at optimum length
      AnyFloat Epsilon0 ??= DesignVar(0.053); ///< Epsilon bar in the muscle model. Represents tendon strain at F0
      AnyFloat Fcfast ??= DesignVar(0.4); ///< Factor for determining shortening speed at optimum length
    };
    #endif

    #if BM_TRUNK_MUSCLES
    AnyFolder LTptC5L5 =
    {
      AnyString Muscle = "LTptC5L5"; ///< Descriptive name for the muscle, e.g. for plotting
      AnyIntVar MuscleElemAmount = 1; ///< The total amount of elements for this muscle
      AnyFloat Pennationangle ??= DesignVar(0); ///< Pennation angle of the muscle fibers (degres)
      AnyFloat VolumeScaleFactor ??= DesignVar(1.0); ///< Factor for scaling the muscle volume
      AnyFloat MuscleVolume ??= .Volume*0.0142; ///< Volume of the muscle (ml) (the fraction of the group volume is based on the strength of the previous model)
      AnyFloat MuscleVolumeSIScaled ??= ..VolumeUnitFactor*VolumeScaleFactor*MuscleVolume; ///< Scaled Volume of the muscle in SI base unit (m^3)
      AnyFloat OptimalFiberlength ??= _FIBER_LENGTH_DESIGNVAR(0.36722); ///< Optimal working length of the muscle fiber (m)
      AnyFloat TotalTendonLength ??= _TENDON_LENGTH_DESIGNVAR(0.01);///< The total tendon length (m)
      AnyFloat K1 ??= DesignVar(10); ///< K1 constant in the muscle model.  Factor for determining shortening speed at optimum length
      AnyFloat K2 ??= DesignVar(1); ///< K2 constant in the muscle model.  Factor for determining shortening speed at optimum length
      AnyFloat Epsilon0 ??= DesignVar(0.053); ///< Epsilon bar in the muscle model. Represents tendon strain at F0
      AnyFloat Fcfast ??= DesignVar(0.4); ///< Factor for determining shortening speed at optimum length
    };
    #endif

    #if BM_TRUNK_MUSCLES
    AnyFolder LTptC6S1 =
    {
      AnyString Muscle = "LTptC6S1"; ///< Descriptive name for the muscle, e.g. for plotting
      AnyIntVar MuscleElemAmount = 1; ///< The total amount of elements for this muscle
      AnyFloat Pennationangle ??= DesignVar(0); ///< Pennation angle of the muscle fibers (degres)
      AnyFloat VolumeScaleFactor ??= DesignVar(1.0); ///< Factor for scaling the muscle volume
      AnyFloat MuscleVolume ??= .Volume*0.02; ///< Volume of the muscle (ml) (the fraction of the group volume is based on the strength of the previous model)
      AnyFloat MuscleVolumeSIScaled ??= ..VolumeUnitFactor*VolumeScaleFactor*MuscleVolume; ///< Scaled Volume of the muscle in SI base unit (m^3)
      AnyFloat OptimalFiberlength ??= _FIBER_LENGTH_DESIGNVAR(0.35557); ///< Optimal working length of the muscle fiber (m)
      AnyFloat TotalTendonLength ??= _TENDON_LENGTH_DESIGNVAR(0.01);///< The total tendon length (m)
      AnyFloat K1 ??= DesignVar(10); ///< K1 constant in the muscle model.  Factor for determining shortening speed at optimum length
      AnyFloat K2 ??= DesignVar(1); ///< K2 constant in the muscle model.  Factor for determining shortening speed at optimum length
      AnyFloat Epsilon0 ??= DesignVar(0.053); ///< Epsilon bar in the muscle model. Represents tendon strain at F0
      AnyFloat Fcfast ??= DesignVar(0.4); ///< Factor for determining shortening speed at optimum length
    };
    #endif

    #if BM_TRUNK_MUSCLES
    AnyFolder LTptC7S2 =
    {
      AnyString Muscle = "LTptC7S2"; ///< Descriptive name for the muscle, e.g. for plotting
      AnyIntVar MuscleElemAmount = 1; ///< The total amount of elements for this muscle
      AnyFloat Pennationangle ??= DesignVar(0); ///< Pennation angle of the muscle fibers (degres)
      AnyFloat VolumeScaleFactor ??= DesignVar(1.0); ///< Factor for scaling the muscle volume
      AnyFloat MuscleVolume ??= .Volume*0.024814; ///< Volume of the muscle (ml) (the fraction of the group volume is based on the strength of the previous model)
      AnyFloat MuscleVolumeSIScaled ??= ..VolumeUnitFactor*VolumeScaleFactor*MuscleVolume; ///< Scaled Volume of the muscle in SI base unit (m^3)
      AnyFloat OptimalFiberlength ??= _FIBER_LENGTH_DESIGNVAR(0.36198); ///< Optimal working length of the muscle fiber (m)
      AnyFloat TotalTendonLength ??= _TENDON_LENGTH_DESIGNVAR(0.01);///< The total tendon length (m)
      AnyFloat K1 ??= DesignVar(10); ///< K1 constant in the muscle model.  Factor for determining shortening speed at optimum length
      AnyFloat K2 ??= DesignVar(1); ///< K2 constant in the muscle model.  Factor for determining shortening speed at optimum length
      AnyFloat Epsilon0 ??= DesignVar(0.053); ///< Epsilon bar in the muscle model. Represents tendon strain at F0
      AnyFloat Fcfast ??= DesignVar(0.4); ///< Factor for determining shortening speed at optimum length
    };
    #endif

    #if BM_TRUNK_MUSCLES
    AnyFolder LTptC8S3 =
    {
      AnyString Muscle = "LTptC8S3"; ///< Descriptive name for the muscle, e.g. for plotting
      AnyIntVar MuscleElemAmount = 1; ///< The total amount of elements for this muscle
      AnyFloat Pennationangle ??= DesignVar(0); ///< Pennation angle of the muscle fibers (degres)
      AnyFloat VolumeScaleFactor ??= DesignVar(1.0); ///< Factor for scaling the muscle volume
      AnyFloat MuscleVolume ??= .Volume*0.037865; ///< Volume of the muscle (ml) (the fraction of the group volume is based on the strength of the previous model)
      AnyFloat MuscleVolumeSIScaled ??= ..VolumeUnitFactor*VolumeScaleFactor*MuscleVolume; ///< Scaled Volume of the muscle in SI base unit (m^3)
      AnyFloat OptimalFiberlength ??= _FIBER_LENGTH_DESIGNVAR(0.34467); ///< Optimal working length of the muscle fiber (m)
      AnyFloat TotalTendonLength ??= _TENDON_LENGTH_DESIGNVAR(0.01);///< The total tendon length (m)
      AnyFloat K1 ??= DesignVar(10); ///< K1 constant in the muscle model.  Factor for determining shortening speed at optimum length
      AnyFloat K2 ??= DesignVar(1); ///< K2 constant in the muscle model.  Factor for determining shortening speed at optimum length
      AnyFloat Epsilon0 ??= DesignVar(0.053); ///< Epsilon bar in the muscle model. Represents tendon strain at F0
      AnyFloat Fcfast ??= DesignVar(0.4); ///< Factor for determining shortening speed at optimum length
    };
    #endif

    #if BM_TRUNK_MUSCLES
    AnyFolder LTptC9S4 =
    {
      AnyString Muscle = "LTptC9S4"; ///< Descriptive name for the muscle, e.g. for plotting
      AnyIntVar MuscleElemAmount = 1; ///< The total amount of elements for this muscle
      AnyFloat Pennationangle ??= DesignVar(0); ///< Pennation angle of the muscle fibers (degres)
      AnyFloat VolumeScaleFactor ??= DesignVar(1.0); ///< Factor for scaling the muscle volume
      AnyFloat MuscleVolume ??= .Volume*0.044499; ///< Volume of the muscle (ml) (the fraction of the group volume is based on the strength of the previous model)
      AnyFloat MuscleVolumeSIScaled ??= ..VolumeUnitFactor*VolumeScaleFactor*MuscleVolume; ///< Scaled Volume of the muscle in SI base unit (m^3)
      AnyFloat OptimalFiberlength ??= _FIBER_LENGTH_DESIGNVAR(0.3468); ///< Optimal working length of the muscle fiber (m)
      AnyFloat TotalTendonLength ??= _TENDON_LENGTH_DESIGNVAR(0.01);///< The total tendon length (m)
      AnyFloat K1 ??= DesignVar(10); ///< K1 constant in the muscle model.  Factor for determining shortening speed at optimum length
      AnyFloat K2 ??= DesignVar(1); ///< K2 constant in the muscle model.  Factor for determining shortening speed at optimum length
      AnyFloat Epsilon0 ??= DesignVar(0.053); ///< Epsilon bar in the muscle model. Represents tendon strain at F0
      AnyFloat Fcfast ??= DesignVar(0.4); ///< Factor for determining shortening speed at optimum length
    };
    #endif
    #if BM_TRUNK_MUSCLES
    AnyFolder LTptC10Sacrum =
    {
      AnyString Muscle = "LTptC10Sacrum"; ///< Descriptive name for the muscle, e.g. for plotting
      AnyIntVar MuscleElemAmount = 1; ///< The total amount of elements for this muscle
      AnyFloat Pennationangle ??= DesignVar(0); ///< Pennation angle of the muscle fibers (degres)
      AnyFloat VolumeScaleFactor ??= DesignVar(1.0); ///< Factor for scaling the muscle volume
      AnyFloat MuscleVolume ??= .Volume*0.03963; ///< Volume of the muscle (ml) (the fraction of the group volume is based on the strength of the previous model)
      AnyFloat MuscleVolumeSIScaled ??= ..VolumeUnitFactor*VolumeScaleFactor*MuscleVolume; ///< Scaled Volume of the muscle in SI base unit (m^3)
      AnyFloat OptimalFiberlength ??= _FIBER_LENGTH_DESIGNVAR(0.28183); ///< Optimal working length of the muscle fiber (m)
      AnyFloat TotalTendonLength ??= _TENDON_LENGTH_DESIGNVAR(0.01);///< The total tendon length (m)
      AnyFloat K1 ??= DesignVar(10); ///< K1 constant in the muscle model.  Factor for determining shortening speed at optimum length
      AnyFloat K2 ??= DesignVar(1); ///< K2 constant in the muscle model.  Factor for determining shortening speed at optimum length
      AnyFloat Epsilon0 ??= DesignVar(0.053); ///< Epsilon bar in the muscle model. Represents tendon strain at F0
      AnyFloat Fcfast ??= DesignVar(0.4); ///< Factor for determining shortening speed at optimum length
    };
    #endif

    #if BM_TRUNK_MUSCLES
    AnyFolder LTptC11Sacrum =
    {
      AnyString Muscle = "LTptC11Sacrum"; ///< Descriptive name for the muscle, e.g. for plotting
      AnyIntVar MuscleElemAmount = 1; ///< The total amount of elements for this muscle
      AnyFloat Pennationangle ??= DesignVar(0); ///< Pennation angle of the muscle fibers (degres)
      AnyFloat VolumeScaleFactor ??= DesignVar(1.0); ///< Factor for scaling the muscle volume
      AnyFloat MuscleVolume ??= .Volume*0.035954; ///< Volume of the muscle (ml) (the fraction of the group volume is based on the strength of the previous model)
      AnyFloat MuscleVolumeSIScaled ??= ..VolumeUnitFactor*VolumeScaleFactor*MuscleVolume; ///< Scaled Volume of the muscle in SI base unit (m^3)
      AnyFloat OptimalFiberlength ??= _FIBER_LENGTH_DESIGNVAR(0.24351); ///< Optimal working length of the muscle fiber (m)
      AnyFloat TotalTendonLength ??= _TENDON_LENGTH_DESIGNVAR(0.01);///< The total tendon length (m)
      AnyFloat K1 ??= DesignVar(10); ///< K1 constant in the muscle model.  Factor for determining shortening speed at optimum length
      AnyFloat K2 ??= DesignVar(1); ///< K2 constant in the muscle model.  Factor for determining shortening speed at optimum length
      AnyFloat Epsilon0 ??= DesignVar(0.053); ///< Epsilon bar in the muscle model. Represents tendon strain at F0
      AnyFloat Fcfast ??= DesignVar(0.4); ///< Factor for determining shortening speed at optimum length
    };
    #endif

    #if BM_TRUNK_MUSCLES
    AnyFolder LTptC12Sacrum =
    {
      AnyString Muscle = "LTptC12Sacrum"; ///< Descriptive name for the muscle, e.g. for plotting
      AnyIntVar MuscleElemAmount = 1; ///< The total amount of elements for this muscle
      AnyFloat Pennationangle ??= DesignVar(0); ///< Pennation angle of the muscle fibers (degres)
      AnyFloat VolumeScaleFactor ??= DesignVar(1.0); ///< Factor for scaling the muscle volume
      AnyFloat MuscleVolume ??= .Volume*0.024843; ///< Volume of the muscle (ml) (the fraction of the group volume is based on the strength of the previous model)
      AnyFloat MuscleVolumeSIScaled ??= ..VolumeUnitFactor*VolumeScaleFactor*MuscleVolume; ///< Scaled Volume of the muscle in SI base unit (m^3)
      AnyFloat OptimalFiberlength ??= _FIBER_LENGTH_DESIGNVAR(0.20483); ///< Optimal working length of the muscle fiber (m)
      AnyFloat TotalTendonLength ??= _TENDON_LENGTH_DESIGNVAR(0.01);///< The total tendon length (m)
      AnyFloat K1 ??= DesignVar(10); ///< K1 constant in the muscle model.  Factor for determining shortening speed at optimum length
      AnyFloat K2 ??= DesignVar(1); ///< K2 constant in the muscle model.  Factor for determining shortening speed at optimum length
      AnyFloat Epsilon0 ??= DesignVar(0.053); ///< Epsilon bar in the muscle model. Represents tendon strain at F0
      AnyFloat Fcfast ??= DesignVar(0.4); ///< Factor for determining shortening speed at optimum length
    };
    #endif

    #if BM_TRUNK_MUSCLES
    AnyFolder ITC7R7 =
    {
      AnyString Muscle = "ITC7R7"; ///< Descriptive name for the muscle, e.g. for plotting
      AnyIntVar MuscleElemAmount = 1; ///< The total amount of elements for this muscle
      AnyFloat Pennationangle ??= DesignVar(0); ///< Pennation angle of the muscle fibers (degres)
      AnyFloat VolumeScaleFactor ??= DesignVar(1.0); ///< Factor for scaling the muscle volume
      AnyFloat MuscleVolume ??= .Volume*0.0066189; ///< Volume of the muscle (ml) (the fraction of the group volume is based on the strength of the previous model)
      AnyFloat MuscleVolumeSIScaled ??= ..VolumeUnitFactor*VolumeScaleFactor*MuscleVolume; ///< Scaled Volume of the muscle in SI base unit (m^3)
      AnyFloat OptimalFiberlength ??= _FIBER_LENGTH_DESIGNVAR(0.16372); ///< Optimal working length of the muscle fiber (m)
      AnyFloat TotalTendonLength ??= _TENDON_LENGTH_DESIGNVAR(0.01);///< The total tendon length (m)
      AnyFloat K1 ??= DesignVar(10); ///< K1 constant in the muscle model.  Factor for determining shortening speed at optimum length
      AnyFloat K2 ??= DesignVar(1); ///< K2 constant in the muscle model.  Factor for determining shortening speed at optimum length
      AnyFloat Epsilon0 ??= DesignVar(0.053); ///< Epsilon bar in the muscle model. Represents tendon strain at F0
      AnyFloat Fcfast ??= DesignVar(0.4); ///< Factor for determining shortening speed at optimum length
    };
    #endif

    #if BM_TRUNK_MUSCLES
    AnyFolder ITR1R7 =
    {
      AnyString Muscle = "ITR1R7"; ///< Descriptive name for the muscle, e.g. for plotting
      AnyIntVar MuscleElemAmount = 1; ///< The total amount of elements for this muscle
      AnyFloat Pennationangle ??= DesignVar(0); ///< Pennation angle of the muscle fibers (degres)
      AnyFloat VolumeScaleFactor ??= DesignVar(1.0); ///< Factor for scaling the muscle volume
      AnyFloat MuscleVolume ??= .Volume*0.0058475; ///< Volume of the muscle (ml) (the fraction of the group volume is based on the strength of the previous model)
      AnyFloat MuscleVolumeSIScaled ??= ..VolumeUnitFactor*VolumeScaleFactor*MuscleVolume; ///< Scaled Volume of the muscle in SI base unit (m^3)
      AnyFloat OptimalFiberlength ??= _FIBER_LENGTH_DESIGNVAR(0.14464); ///< Optimal working length of the muscle fiber (m)
      AnyFloat TotalTendonLength ??= _TENDON_LENGTH_DESIGNVAR(0.01);///< The total tendon length (m)
      AnyFloat K1 ??= DesignVar(10); ///< K1 constant in the muscle model.  Factor for determining shortening speed at optimum length
      AnyFloat K2 ??= DesignVar(1); ///< K2 constant in the muscle model.  Factor for determining shortening speed at optimum length
      AnyFloat Epsilon0 ??= DesignVar(0.053); ///< Epsilon bar in the muscle model. Represents tendon strain at F0
      AnyFloat Fcfast ??= DesignVar(0.4); ///< Factor for determining shortening speed at optimum length
    };
    #endif

    #if BM_TRUNK_MUSCLES
    AnyFolder ITR2R8 =
    {
      AnyString Muscle = "ITR2R8"; ///< Descriptive name for the muscle, e.g. for plotting
      AnyIntVar MuscleElemAmount = 1; ///< The total amount of elements for this muscle
      AnyFloat Pennationangle ??= DesignVar(0); ///< Pennation angle of the muscle fibers (degres)
      AnyFloat VolumeScaleFactor ??= DesignVar(1.0); ///< Factor for scaling the muscle volume
      AnyFloat MuscleVolume ??= .Volume*0.0068462; ///< Volume of the muscle (ml) (the fraction of the group volume is based on the strength of the previous model)
      AnyFloat MuscleVolumeSIScaled ??= ..VolumeUnitFactor*VolumeScaleFactor*MuscleVolume; ///< Scaled Volume of the muscle in SI base unit (m^3)
      AnyFloat OptimalFiberlength ??= _FIBER_LENGTH_DESIGNVAR(0.16934); ///< Optimal working length of the muscle fiber (m)
      AnyFloat TotalTendonLength ??= _TENDON_LENGTH_DESIGNVAR(0.01);///< The total tendon length (m)
      AnyFloat K1 ??= DesignVar(10); ///< K1 constant in the muscle model.  Factor for determining shortening speed at optimum length
      AnyFloat K2 ??= DesignVar(1); ///< K2 constant in the muscle model.  Factor for determining shortening speed at optimum length
      AnyFloat Epsilon0 ??= DesignVar(0.053); ///< Epsilon bar in the muscle model. Represents tendon strain at F0
      AnyFloat Fcfast ??= DesignVar(0.4); ///< Factor for determining shortening speed at optimum length
    };
    #endif

    #if BM_TRUNK_MUSCLES
    AnyFolder ITR3R9 =
    {
      AnyString Muscle = "ITR3R9"; ///< Descriptive name for the muscle, e.g. for plotting
      AnyIntVar MuscleElemAmount = 1; ///< The total amount of elements for this muscle
      AnyFloat Pennationangle ??= DesignVar(0); ///< Pennation angle of the muscle fibers (degres)
      AnyFloat VolumeScaleFactor ??= DesignVar(1.0); ///< Factor for scaling the muscle volume
      AnyFloat MuscleVolume ??= .Volume*0.0069153; ///< Volume of the muscle (ml) (the fraction of the group volume is based on the strength of the previous model)
      AnyFloat MuscleVolumeSIScaled ??= ..VolumeUnitFactor*VolumeScaleFactor*MuscleVolume; ///< Scaled Volume of the muscle in SI base unit (m^3)
      AnyFloat OptimalFiberlength ??= _FIBER_LENGTH_DESIGNVAR(0.17105); ///< Optimal working length of the muscle fiber (m)
      AnyFloat TotalTendonLength ??= _TENDON_LENGTH_DESIGNVAR(0.01);///< The total tendon length (m)
      AnyFloat K1 ??= DesignVar(10); ///< K1 constant in the muscle model.  Factor for determining shortening speed at optimum length
      AnyFloat K2 ??= DesignVar(1); ///< K2 constant in the muscle model.  Factor for determining shortening speed at optimum length
      AnyFloat Epsilon0 ??= DesignVar(0.053); ///< Epsilon bar in the muscle model. Represents tendon strain at F0
      AnyFloat Fcfast ??= DesignVar(0.4); ///< Factor for determining shortening speed at optimum length
    };
    #endif

    #if BM_TRUNK_MUSCLES
    AnyFolder ITR4R10 =
    {
      AnyString Muscle = "ITR4R10"; ///< Descriptive name for the muscle, e.g. for plotting
      AnyIntVar MuscleElemAmount = 1; ///< The total amount of elements for this muscle
      AnyFloat Pennationangle ??= DesignVar(0); ///< Pennation angle of the muscle fibers (degres)
      AnyFloat VolumeScaleFactor ??= DesignVar(1.0); ///< Factor for scaling the muscle volume
      AnyFloat MuscleVolume ??= .Volume*0.0069354; ///< Volume of the muscle (ml) (the fraction of the group volume is based on the strength of the previous model)
      AnyFloat MuscleVolumeSIScaled ??= ..VolumeUnitFactor*VolumeScaleFactor*MuscleVolume; ///< Scaled Volume of the muscle in SI base unit (m^3)
      AnyFloat OptimalFiberlength ??= _FIBER_LENGTH_DESIGNVAR(0.17155); ///< Optimal working length of the muscle fiber (m)
      AnyFloat TotalTendonLength ??= _TENDON_LENGTH_DESIGNVAR(0.01);///< The total tendon length (m)
      AnyFloat K1 ??= DesignVar(10); ///< K1 constant in the muscle model.  Factor for determining shortening speed at optimum length
      AnyFloat K2 ??= DesignVar(1); ///< K2 constant in the muscle model.  Factor for determining shortening speed at optimum length
      AnyFloat Epsilon0 ??= DesignVar(0.053); ///< Epsilon bar in the muscle model. Represents tendon strain at F0
      AnyFloat Fcfast ??= DesignVar(0.4); ///< Factor for determining shortening speed at optimum length
    };
    #endif

    #if BM_TRUNK_MUSCLES
    AnyFolder ITR5T11 =
    {
      AnyString Muscle = "ITR5R11"; ///< Descriptive name for the muscle, e.g. for plotting
      AnyIntVar MuscleElemAmount = 1; ///< The total amount of elements for this muscle
      AnyFloat Pennationangle ??= DesignVar(0); ///< Pennation angle of the muscle fibers (degres)
      AnyFloat VolumeScaleFactor ??= DesignVar(1.0); ///< Factor for scaling the muscle volume
      AnyFloat MuscleVolume ??= .Volume*0.0069708; ///< Volume of the muscle (ml) (the fraction of the group volume is based on the strength of the previous model)
      AnyFloat MuscleVolumeSIScaled ??= ..VolumeUnitFactor*VolumeScaleFactor*MuscleVolume; ///< Scaled Volume of the muscle in SI base unit (m^3)
      AnyFloat OptimalFiberlength ??= _FIBER_LENGTH_DESIGNVAR(0.17243); ///< Optimal working length of the muscle fiber (m)
      AnyFloat TotalTendonLength ??= _TENDON_LENGTH_DESIGNVAR(0.01);///< The total tendon length (m)
      AnyFloat K1 ??= DesignVar(10); ///< K1 constant in the muscle model.  Factor for determining shortening speed at optimum length
      AnyFloat K2 ??= DesignVar(1); ///< K2 constant in the muscle model.  Factor for determining shortening speed at optimum length
      AnyFloat Epsilon0 ??= DesignVar(0.053); ///< Epsilon bar in the muscle model. Represents tendon strain at F0
      AnyFloat Fcfast ??= DesignVar(0.4); ///< Factor for determining shortening speed at optimum length
    };
    #endif

    #if BM_TRUNK_MUSCLES
    AnyFolder ITR6T12 =
    {
      AnyString Muscle = "ITR6R12"; ///< Descriptive name for the muscle, e.g. for plotting
      AnyIntVar MuscleElemAmount = 1; ///< The total amount of elements for this muscle
      AnyFloat Pennationangle ??= DesignVar(0); ///< Pennation angle of the muscle fibers (degres)
      AnyFloat VolumeScaleFactor ??= DesignVar(1.0); ///< Factor for scaling the muscle volume
      AnyFloat MuscleVolume ??= .Volume*0.00776; ///< Volume of the muscle (ml) (the fraction of the group volume is based on the strength of the previous model)
      AnyFloat MuscleVolumeSIScaled ??= ..VolumeUnitFactor*VolumeScaleFactor*MuscleVolume; ///< Scaled Volume of the muscle in SI base unit (m^3)
      AnyFloat OptimalFiberlength ??= _FIBER_LENGTH_DESIGNVAR(0.19195); ///< Optimal working length of the muscle fiber (m)
      AnyFloat TotalTendonLength ??= _TENDON_LENGTH_DESIGNVAR(0.01);///< The total tendon length (m)
      AnyFloat K1 ??= DesignVar(10); ///< K1 constant in the muscle model.  Factor for determining shortening speed at optimum length
      AnyFloat K2 ??= DesignVar(1); ///< K2 constant in the muscle model.  Factor for determining shortening speed at optimum length
      AnyFloat Epsilon0 ??= DesignVar(0.053); ///< Epsilon bar in the muscle model. Represents tendon strain at F0
      AnyFloat Fcfast ??= DesignVar(0.4); ///< Factor for determining shortening speed at optimum length
    };
    #endif

    #if BM_TRUNK_MUSCLES
    AnyFolder ICptR3C4 =
    {
      AnyString Muscle = "ICptR3C4"; ///< Descriptive name for the muscle, e.g. for plotting
      AnyIntVar MuscleElemAmount = 1; ///< The total amount of elements for this muscle
      AnyFloat Pennationangle ??= DesignVar(0); ///< Pennation angle of the muscle fibers (degres)
      AnyFloat VolumeScaleFactor ??= DesignVar(1.0); ///< Factor for scaling the muscle volume
      AnyFloat MuscleVolume ??= .Volume*0.0048587; ///< Volume of the muscle (ml) (the fraction of the group volume is based on the strength of the previous model)
      AnyFloat MuscleVolumeSIScaled ??= ..VolumeUnitFactor*VolumeScaleFactor*MuscleVolume; ///< Scaled Volume of the muscle in SI base unit (m^3)
      AnyFloat OptimalFiberlength ??= _FIBER_LENGTH_DESIGNVAR(0.12565); ///< Optimal working length of the muscle fiber (m)
      AnyFloat TotalTendonLength ??= _TENDON_LENGTH_DESIGNVAR(0.01);///< The total tendon length (m)
      AnyFloat K1 ??= DesignVar(10); ///< K1 constant in the muscle model.  Factor for determining shortening speed at optimum length
      AnyFloat K2 ??= DesignVar(1); ///< K2 constant in the muscle model.  Factor for determining shortening speed at optimum length
      AnyFloat Epsilon0 ??= DesignVar(0.053); ///< Epsilon bar in the muscle model. Represents tendon strain at F0
      AnyFloat Fcfast ??= DesignVar(0.4); ///< Factor for determining shortening speed at optimum length
    };
    #endif

    #if BM_TRUNK_MUSCLES
    AnyFolder ICptR4C5 =
    {
      AnyString Muscle = "ICptR4C5"; ///< Descriptive name for the muscle, e.g. for plotting
      AnyIntVar MuscleElemAmount = 1; ///< The total amount of elements for this muscle
      AnyFloat Pennationangle ??= DesignVar(0); ///< Pennation angle of the muscle fibers (degres)
      AnyFloat VolumeScaleFactor ??= DesignVar(1.0); ///< Factor for scaling the muscle volume
      AnyFloat MuscleVolume ??= .Volume*0.0053876; ///< Volume of the muscle (ml) (the fraction of the group volume is based on the strength of the previous model)
      AnyFloat MuscleVolumeSIScaled ??= ..VolumeUnitFactor*VolumeScaleFactor*MuscleVolume; ///< Scaled Volume of the muscle in SI base unit (m^3)
      AnyFloat OptimalFiberlength ??= _FIBER_LENGTH_DESIGNVAR(0.13932); ///< Optimal working length of the muscle fiber (m)
      AnyFloat TotalTendonLength ??= _TENDON_LENGTH_DESIGNVAR(0.01);///< The total tendon length (m)
      AnyFloat K1 ??= DesignVar(10); ///< K1 constant in the muscle model.  Factor for determining shortening speed at optimum length
      AnyFloat K2 ??= DesignVar(1); ///< K2 constant in the muscle model.  Factor for determining shortening speed at optimum length
      AnyFloat Epsilon0 ??= DesignVar(0.053); ///< Epsilon bar in the muscle model. Represents tendon strain at F0
      AnyFloat Fcfast ??= DesignVar(0.4); ///< Factor for determining shortening speed at optimum length
    };
    #endif

    #if BM_TRUNK_MUSCLES
    AnyFolder ICptR5C6 =
    {
      AnyString Muscle = "ICptR5C6"; ///< Descriptive name for the muscle, e.g. for plotting
      AnyIntVar MuscleElemAmount = 1; ///< The total amount of elements for this muscle
      AnyFloat Pennationangle ??= DesignVar(0); ///< Pennation angle of the muscle fibers (degres)
      AnyFloat VolumeScaleFactor ??= DesignVar(1.0); ///< Factor for scaling the muscle volume
      AnyFloat MuscleVolume ??= .Volume*0.0061279; ///< Volume of the muscle (ml) (the fraction of the group volume is based on the strength of the previous model)
      AnyFloat MuscleVolumeSIScaled ??= ..VolumeUnitFactor*VolumeScaleFactor*MuscleVolume; ///< Scaled Volume of the muscle in SI base unit (m^3)
      AnyFloat OptimalFiberlength ??= _FIBER_LENGTH_DESIGNVAR(0.15847); ///< Optimal working length of the muscle fiber (m)
      AnyFloat TotalTendonLength ??= _TENDON_LENGTH_DESIGNVAR(0.01);///< The total tendon length (m)
      AnyFloat K1 ??= DesignVar(10); ///< K1 constant in the muscle model.  Factor for determining shortening speed at optimum length
      AnyFloat K2 ??= DesignVar(1); ///< K2 constant in the muscle model.  Factor for determining shortening speed at optimum length
      AnyFloat Epsilon0 ??= DesignVar(0.053); ///< Epsilon bar in the muscle model. Represents tendon strain at F0
      AnyFloat Fcfast ??= DesignVar(0.4); ///< Factor for determining shortening speed at optimum length
    };
    #endif

    #if BM_TRUNK_MUSCLES
    AnyFolder ICptR6C4 =
    {
      AnyString Muscle = "ICptR6C4"; ///< Descriptive name for the muscle, e.g. for plotting
      AnyIntVar MuscleElemAmount = 1; ///< The total amount of elements for this muscle
      AnyFloat Pennationangle ??= DesignVar(0); ///< Pennation angle of the muscle fibers (degres)
      AnyFloat VolumeScaleFactor ??= DesignVar(1.0); ///< Factor for scaling the muscle volume
      AnyFloat MuscleVolume ??= .Volume*0.0077949; ///< Volume of the muscle (ml) (the fraction of the group volume is based on the strength of the previous model)
      AnyFloat MuscleVolumeSIScaled ??= ..VolumeUnitFactor*VolumeScaleFactor*MuscleVolume; ///< Scaled Volume of the muscle in SI base unit (m^3)
      AnyFloat OptimalFiberlength ??= _FIBER_LENGTH_DESIGNVAR(0.20157); ///< Optimal working length of the muscle fiber (m)
      AnyFloat TotalTendonLength ??= _TENDON_LENGTH_DESIGNVAR(0.01);///< The total tendon length (m)
      AnyFloat K1 ??= DesignVar(10); ///< K1 constant in the muscle model.  Factor for determining shortening speed at optimum length
      AnyFloat K2 ??= DesignVar(1); ///< K2 constant in the muscle model.  Factor for determining shortening speed at optimum length
      AnyFloat Epsilon0 ??= DesignVar(0.053); ///< Epsilon bar in the muscle model. Represents tendon strain at F0
      AnyFloat Fcfast ??= DesignVar(0.4); ///< Factor for determining shortening speed at optimum length
    };
    #endif
  }; // ErectorSpinae group
  AnyFolder PsoasMajor =
  {
    #if BM_TRUNK_MUSCLES  | BM_LEG_MUSCLES_LEFT  |  BM_LEG_MUSCLES_RIGHT
    AnyVar Volume ??= DesignVar(321.43); ///< Total volume of the muscle group (ml)
    AnyFolder PMT12I_TM =
    {
      AnyString Muscle = "PMT12I_TM"; ///< Descriptive name for the muscle, e.g. for plotting
      AnyIntVar MuscleElemAmount = 1; ///< The total amount of elements for this muscle
      AnyFloat Pennationangle ??= DesignVar(0); ///< Pennation angle of the muscle fibers (degres)
      AnyFloat VolumeScaleFactor ??= DesignVar(1.0); ///< Factor for scaling the muscle volume
      AnyFloat MuscleVolume ??= .Volume*0.18997; ///< Volume of the muscle (ml) (the fraction of the group volume is based on the strength of the previous model)
      AnyFloat MuscleVolumeSIScaled ??= ..VolumeUnitFactor*VolumeScaleFactor*MuscleVolume; ///< Scaled Volume of the muscle in SI base unit (m^3)
      AnyFloat OptimalFiberlength ??= _FIBER_LENGTH_DESIGNVAR(0.2894); ///< Optimal working length of the muscle fiber (m)
      AnyFloat TotalTendonLength ??= _TENDON_LENGTH_DESIGNVAR(0.01);///< The total tendon length (m)
      AnyFloat K1 ??= DesignVar(10); ///< K1 constant in the muscle model.  Factor for determining shortening speed at optimum length
      AnyFloat K2 ??= DesignVar(1); ///< K2 constant in the muscle model.  Factor for determining shortening speed at optimum length
      AnyFloat Epsilon0 ??= DesignVar(0.053); ///< Epsilon bar in the muscle model. Represents tendon strain at F0
      AnyFloat Fcfast ??= DesignVar(0.4); ///< Factor for determining shortening speed at optimum length
    };
    #endif

    #if BM_TRUNK_MUSCLES  | BM_LEG_MUSCLES_LEFT  |  BM_LEG_MUSCLES_RIGHT
    AnyFolder PML1I_TM =
    {
      AnyString Muscle = "PML1I_TM"; ///< Descriptive name for the muscle, e.g. for plotting
      AnyIntVar MuscleElemAmount = 1; ///< The total amount of elements for this muscle
      AnyFloat Pennationangle ??= DesignVar(0); ///< Pennation angle of the muscle fibers (degres)
      AnyFloat VolumeScaleFactor ??= DesignVar(1.0); ///< Factor for scaling the muscle volume
      AnyFloat MuscleVolume ??= .Volume*0.16874; ///< Volume of the muscle (ml) (the fraction of the group volume is based on the strength of the previous model)
      AnyFloat MuscleVolumeSIScaled ??= ..VolumeUnitFactor*VolumeScaleFactor*MuscleVolume; ///< Scaled Volume of the muscle in SI base unit (m^3)
      AnyFloat OptimalFiberlength ??= _FIBER_LENGTH_DESIGNVAR(0.25705); ///< Optimal working length of the muscle fiber (m)
      AnyFloat TotalTendonLength ??= _TENDON_LENGTH_DESIGNVAR(0.01);///< The total tendon length (m)
      AnyFloat K1 ??= DesignVar(10); ///< K1 constant in the muscle model.  Factor for determining shortening speed at optimum length
      AnyFloat K2 ??= DesignVar(1); ///< K2 constant in the muscle model.  Factor for determining shortening speed at optimum length
      AnyFloat Epsilon0 ??= DesignVar(0.053); ///< Epsilon bar in the muscle model. Represents tendon strain at F0
      AnyFloat Fcfast ??= DesignVar(0.4); ///< Factor for determining shortening speed at optimum length
    };
    #endif

    #if BM_TRUNK_MUSCLES  | BM_LEG_MUSCLES_LEFT  |  BM_LEG_MUSCLES_RIGHT
    AnyFolder PML1T_TM =
    {
      AnyString Muscle = "PML1T_TM"; ///< Descriptive name for the muscle, e.g. for plotting
      AnyIntVar MuscleElemAmount = 1; ///< The total amount of elements for this muscle
      AnyFloat Pennationangle ??= DesignVar(0); ///< Pennation angle of the muscle fibers (degres)
      AnyFloat VolumeScaleFactor ??= DesignVar(1.0); ///< Factor for scaling the muscle volume
      AnyFloat MuscleVolume ??= .Volume*0.051253; ///< Volume of the muscle (ml) (the fraction of the group volume is based on the strength of the previous model)
      AnyFloat MuscleVolumeSIScaled ??= ..VolumeUnitFactor*VolumeScaleFactor*MuscleVolume; ///< Scaled Volume of the muscle in SI base unit (m^3)
      AnyFloat OptimalFiberlength ??= _FIBER_LENGTH_DESIGNVAR(0.27007); ///< Optimal working length of the muscle fiber (m)
      AnyFloat TotalTendonLength ??= _TENDON_LENGTH_DESIGNVAR(0.01);///< The total tendon length (m)
      AnyFloat K1 ??= DesignVar(10); ///< K1 constant in the muscle model.  Factor for determining shortening speed at optimum length
      AnyFloat K2 ??= DesignVar(1); ///< K2 constant in the muscle model.  Factor for determining shortening speed at optimum length
      AnyFloat Epsilon0 ??= DesignVar(0.053); ///< Epsilon bar in the muscle model. Represents tendon strain at F0
      AnyFloat Fcfast ??= DesignVar(0.4); ///< Factor for determining shortening speed at optimum length
    };
    #endif

    #if BM_TRUNK_MUSCLES  | BM_LEG_MUSCLES_LEFT  |  BM_LEG_MUSCLES_RIGHT
    AnyFolder PML2I_TM =
    {
      AnyString Muscle = "PML2I_TM"; ///< Descriptive name for the muscle, e.g. for plotting
      AnyIntVar MuscleElemAmount = 1; ///< The total amount of elements for this muscle
      AnyFloat Pennationangle ??= DesignVar(0); ///< Pennation angle of the muscle fibers (degres)
      AnyFloat VolumeScaleFactor ??= DesignVar(1.0); ///< Factor for scaling the muscle volume
      AnyFloat MuscleVolume ??= .Volume*0.11366; ///< Volume of the muscle (ml) (the fraction of the group volume is based on the strength of the previous model)
      AnyFloat MuscleVolumeSIScaled ??= ..VolumeUnitFactor*VolumeScaleFactor*MuscleVolume; ///< Scaled Volume of the muscle in SI base unit (m^3)
      AnyFloat OptimalFiberlength ??= _FIBER_LENGTH_DESIGNVAR(0.22692); ///< Optimal working length of the muscle fiber (m)
      AnyFloat TotalTendonLength ??= _TENDON_LENGTH_DESIGNVAR(0.01);///< The total tendon length (m)
      AnyFloat K1 ??= DesignVar(10); ///< K1 constant in the muscle model.  Factor for determining shortening speed at optimum length
      AnyFloat K2 ??= DesignVar(1); ///< K2 constant in the muscle model.  Factor for determining shortening speed at optimum length
      AnyFloat Epsilon0 ??= DesignVar(0.053); ///< Epsilon bar in the muscle model. Represents tendon strain at F0
      AnyFloat Fcfast ??= DesignVar(0.4); ///< Factor for determining shortening speed at optimum length
    };
    #endif

    #if BM_TRUNK_MUSCLES  | BM_LEG_MUSCLES_LEFT  |  BM_LEG_MUSCLES_RIGHT
    AnyFolder PML2T_TM =
    {
      AnyString Muscle = "PML2T_TM"; ///< Descriptive name for the muscle, e.g. for plotting
      AnyIntVar MuscleElemAmount = 1; ///< The total amount of elements for this muscle
      AnyFloat Pennationangle ??= DesignVar(0); ///< Pennation angle of the muscle fibers (degres)
      AnyFloat VolumeScaleFactor ??= DesignVar(1.0); ///< Factor for scaling the muscle volume
      AnyFloat MuscleVolume ??= .Volume*0.074279; ///< Volume of the muscle (ml) (the fraction of the group volume is based on the strength of the previous model)
      AnyFloat MuscleVolumeSIScaled ??= ..VolumeUnitFactor*VolumeScaleFactor*MuscleVolume; ///< Scaled Volume of the muscle in SI base unit (m^3)
      AnyFloat OptimalFiberlength ??= _FIBER_LENGTH_DESIGNVAR(0.23639); ///< Optimal working length of the muscle fiber (m)
      AnyFloat TotalTendonLength ??= _TENDON_LENGTH_DESIGNVAR(0.01);///< The total tendon length (m)
      AnyFloat K1 ??= DesignVar(10); ///< K1 constant in the muscle model.  Factor for determining shortening speed at optimum length
      AnyFloat K2 ??= DesignVar(1); ///< K2 constant in the muscle model.  Factor for determining shortening speed at optimum length
      AnyFloat Epsilon0 ??= DesignVar(0.053); ///< Epsilon bar in the muscle model. Represents tendon strain at F0
      AnyFloat Fcfast ??= DesignVar(0.4); ///< Factor for determining shortening speed at optimum length
    };
    #endif

    #if BM_TRUNK_MUSCLES  | BM_LEG_MUSCLES_LEFT  |  BM_LEG_MUSCLES_RIGHT
    AnyFolder PML3I_TM =
    {
      AnyString Muscle = "PML3I_TM"; ///< Descriptive name for the muscle, e.g. for plotting
      AnyIntVar MuscleElemAmount = 1; ///< The total amount of elements for this muscle
      AnyFloat Pennationangle ??= DesignVar(0); ///< Pennation angle of the muscle fibers (degres)
      AnyFloat VolumeScaleFactor ??= DesignVar(1.0); ///< Factor for scaling the muscle volume
      AnyFloat MuscleVolume ??= .Volume*0.11535; ///< Volume of the muscle (ml) (the fraction of the group volume is based on the strength of the previous model)
      AnyFloat MuscleVolumeSIScaled ??= ..VolumeUnitFactor*VolumeScaleFactor*MuscleVolume; ///< Scaled Volume of the muscle in SI base unit (m^3)
      AnyFloat OptimalFiberlength ??= _FIBER_LENGTH_DESIGNVAR(0.19413); ///< Optimal working length of the muscle fiber (m)
      AnyFloat TotalTendonLength ??= _TENDON_LENGTH_DESIGNVAR(0.01);///< The total tendon length (m)
      AnyFloat K1 ??= DesignVar(10); ///< K1 constant in the muscle model.  Factor for determining shortening speed at optimum length
      AnyFloat K2 ??= DesignVar(1); ///< K2 constant in the muscle model.  Factor for determining shortening speed at optimum length
      AnyFloat Epsilon0 ??= DesignVar(0.053); ///< Epsilon bar in the muscle model. Represents tendon strain at F0
      AnyFloat Fcfast ??= DesignVar(0.4); ///< Factor for determining shortening speed at optimum length
    };
    #endif

    #if BM_TRUNK_MUSCLES  | BM_LEG_MUSCLES_LEFT  |  BM_LEG_MUSCLES_RIGHT
    AnyFolder PML3T_TM =
    {
      AnyString Muscle = "PML3T_TM"; ///< Descriptive name for the muscle, e.g. for plotting
      AnyIntVar MuscleElemAmount = 1; ///< The total amount of elements for this muscle
      AnyFloat Pennationangle ??= DesignVar(0); ///< Pennation angle of the muscle fibers (degres)
      AnyFloat VolumeScaleFactor ??= DesignVar(1.0); ///< Factor for scaling the muscle volume
      AnyFloat MuscleVolume ??= .Volume*0.11153; ///< Volume of the muscle (ml) (the fraction of the group volume is based on the strength of the previous model)
      AnyFloat MuscleVolumeSIScaled ??= ..VolumeUnitFactor*VolumeScaleFactor*MuscleVolume; ///< Scaled Volume of the muscle in SI base unit (m^3)
      AnyFloat OptimalFiberlength ??= _FIBER_LENGTH_DESIGNVAR(0.20723); ///< Optimal working length of the muscle fiber (m)
      AnyFloat TotalTendonLength ??= _TENDON_LENGTH_DESIGNVAR(0.01);///< The total tendon length (m)
      AnyFloat K1 ??= DesignVar(10); ///< K1 constant in the muscle model.  Factor for determining shortening speed at optimum length
      AnyFloat K2 ??= DesignVar(1); ///< K2 constant in the muscle model.  Factor for determining shortening speed at optimum length
      AnyFloat Epsilon0 ??= DesignVar(0.053); ///< Epsilon bar in the muscle model. Represents tendon strain at F0
      AnyFloat Fcfast ??= DesignVar(0.4); ///< Factor for determining shortening speed at optimum length
    };
    #endif

    #if BM_TRUNK_MUSCLES  | BM_LEG_MUSCLES_LEFT  |  BM_LEG_MUSCLES_RIGHT
    AnyFolder PML4I_TM =
    {
      AnyString Muscle = "PML4I_TM"; ///< Descriptive name for the muscle, e.g. for plotting
      AnyIntVar MuscleElemAmount = 1; ///< The total amount of elements for this muscle
      AnyFloat Pennationangle ??= DesignVar(0); ///< Pennation angle of the muscle fibers (degres)
      AnyFloat VolumeScaleFactor ??= DesignVar(1.0); ///< Factor for scaling the muscle volume
      AnyFloat MuscleVolume ??= .Volume*0.058415; ///< Volume of the muscle (ml) (the fraction of the group volume is based on the strength of the previous model)
      AnyFloat MuscleVolumeSIScaled ??= ..VolumeUnitFactor*VolumeScaleFactor*MuscleVolume; ///< Scaled Volume of the muscle in SI base unit (m^3)
      AnyFloat OptimalFiberlength ??= _FIBER_LENGTH_DESIGNVAR(0.15778); ///< Optimal working length of the muscle fiber (m)
      AnyFloat TotalTendonLength ??= _TENDON_LENGTH_DESIGNVAR(0.01);///< The total tendon length (m)
      AnyFloat K1 ??= DesignVar(10); ///< K1 constant in the muscle model.  Factor for determining shortening speed at optimum length
      AnyFloat K2 ??= DesignVar(1); ///< K2 constant in the muscle model.  Factor for determining shortening speed at optimum length
      AnyFloat Epsilon0 ??= DesignVar(0.053); ///< Epsilon bar in the muscle model. Represents tendon strain at F0
      AnyFloat Fcfast ??= DesignVar(0.4); ///< Factor for determining shortening speed at optimum length
    };
    #endif

    #if BM_TRUNK_MUSCLES  | BM_LEG_MUSCLES_LEFT  |  BM_LEG_MUSCLES_RIGHT
    AnyFolder PML4T_TM =
    {
      AnyString Muscle = "PML4T_TM"; ///< Descriptive name for the muscle, e.g. for plotting
      AnyIntVar MuscleElemAmount = 1; ///< The total amount of elements for this muscle
      AnyFloat Pennationangle ??= DesignVar(0); ///< Pennation angle of the muscle fibers (degres)
      AnyFloat VolumeScaleFactor ??= DesignVar(1.0); ///< Factor for scaling the muscle volume
      AnyFloat MuscleVolume ??= .Volume*0.066283; ///< Volume of the muscle (ml) (the fraction of the group volume is based on the strength of the previous model)
      AnyFloat MuscleVolumeSIScaled ??= ..VolumeUnitFactor*VolumeScaleFactor*MuscleVolume; ///< Scaled Volume of the muscle in SI base unit (m^3)
      AnyFloat OptimalFiberlength ??= _FIBER_LENGTH_DESIGNVAR(0.17755); ///< Optimal working length of the muscle fiber (m)
      AnyFloat TotalTendonLength ??= _TENDON_LENGTH_DESIGNVAR(0.01);///< The total tendon length (m)
      AnyFloat K1 ??= DesignVar(10); ///< K1 constant in the muscle model.  Factor for determining shortening speed at optimum length
      AnyFloat K2 ??= DesignVar(1); ///< K2 constant in the muscle model.  Factor for determining shortening speed at optimum length
      AnyFloat Epsilon0 ??= DesignVar(0.053); ///< Epsilon bar in the muscle model. Represents tendon strain at F0
      AnyFloat Fcfast ??= DesignVar(0.4); ///< Factor for determining shortening speed at optimum length
    };
    #endif

    #if BM_TRUNK_MUSCLES  | BM_LEG_MUSCLES_LEFT  |  BM_LEG_MUSCLES_RIGHT
    AnyFolder PML5_TM =
    {
      AnyString Muscle = "PML5_TM"; ///< Descriptive name for the muscle, e.g. for plotting
      AnyIntVar MuscleElemAmount = 1; ///< The total amount of elements for this muscle
      AnyFloat Pennationangle ??= DesignVar(0); ///< Pennation angle of the muscle fibers (degres)
      AnyFloat VolumeScaleFactor ??= DesignVar(1.0); ///< Factor for scaling the muscle volume
      AnyFloat MuscleVolume ??= .Volume*0.033886; ///< Volume of the muscle (ml) (the fraction of the group volume is based on the strength of the previous model)
      AnyFloat MuscleVolumeSIScaled ??= ..VolumeUnitFactor*VolumeScaleFactor*MuscleVolume; ///< Scaled Volume of the muscle in SI base unit (m^3)
      AnyFloat OptimalFiberlength ??= _FIBER_LENGTH_DESIGNVAR(0.13787); ///< Optimal working length of the muscle fiber (m)
      AnyFloat TotalTendonLength ??= _TENDON_LENGTH_DESIGNVAR(0.01);///< The total tendon length (m)
      AnyFloat K1 ??= DesignVar(10); ///< K1 constant in the muscle model.  Factor for determining shortening speed at optimum length
      AnyFloat K2 ??= DesignVar(1); ///< K2 constant in the muscle model.  Factor for determining shortening speed at optimum length
      AnyFloat Epsilon0 ??= DesignVar(0.053); ///< Epsilon bar in the muscle model. Represents tendon strain at F0
      AnyFloat Fcfast ??= DesignVar(0.4); ///< Factor for determining shortening speed at optimum length
    };
    #endif

    #if BM_TRUNK_MUSCLES  | BM_LEG_MUSCLES_LEFT  |  BM_LEG_MUSCLES_RIGHT
    AnyFolder PML5T_TM =
    {
      AnyString Muscle = "PML5T_TM"; ///< Descriptive name for the muscle, e.g. for plotting
      AnyIntVar MuscleElemAmount = 1; ///< The total amount of elements for this muscle
      AnyFloat Pennationangle ??= DesignVar(0); ///< Pennation angle of the muscle fibers (degres)
      AnyFloat VolumeScaleFactor ??= DesignVar(1.0); ///< Factor for scaling the muscle volume
      AnyFloat MuscleVolume ??= .Volume*0.016627; ///< Volume of the muscle (ml) (the fraction of the group volume is based on the strength of the previous model)
      AnyFloat MuscleVolumeSIScaled ??= ..VolumeUnitFactor*VolumeScaleFactor*MuscleVolume; ///< Scaled Volume of the muscle in SI base unit (m^3)
      AnyFloat OptimalFiberlength ??= _FIBER_LENGTH_DESIGNVAR(0.14846); ///< Optimal working length of the muscle fiber (m)
      AnyFloat TotalTendonLength ??= _TENDON_LENGTH_DESIGNVAR(0.01);///< The total tendon length (m)
      AnyFloat K1 ??= DesignVar(10); ///< K1 constant in the muscle model.  Factor for determining shortening speed at optimum length
      AnyFloat K2 ??= DesignVar(1); ///< K2 constant in the muscle model.  Factor for determining shortening speed at optimum length
      AnyFloat Epsilon0 ??= DesignVar(0.053); ///< Epsilon bar in the muscle model. Represents tendon strain at F0
      AnyFloat Fcfast ??= DesignVar(0.4); ///< Factor for determining shortening speed at optimum length
    };
    #endif
  }; // PsoasMajor group
  AnyFolder QuadratusLumborum =
  {
    #if BM_TRUNK_MUSCLES
    AnyVar Volume ??= DesignVar(39.85); ///< Total volume of the muscle group (ml)
    AnyFolder QL_1 =
    {
      AnyString Muscle = "Quadratus Lumborum"; ///< Descriptive name for the muscle, e.g. for plotting
      AnyIntVar MuscleElemAmount = 1; ///< The total amount of elements for this muscle
      AnyFloat Pennationangle ??= DesignVar(0); ///< Pennation angle of the muscle fibers (degres)
      AnyFloat VolumeScaleFactor ??= DesignVar(1.0); ///< Factor for scaling the muscle volume
      AnyFloat MuscleVolume ??= .Volume*0.039853; ///< Volume of the muscle (ml) (the fraction of the group volume is based on the strength of the previous model)
      AnyFloat MuscleVolumeSIScaled ??= ..VolumeUnitFactor*VolumeScaleFactor*MuscleVolume; ///< Scaled Volume of the muscle in SI base unit (m^3)
      AnyFloat OptimalFiberlength ??= _FIBER_LENGTH_DESIGNVAR(0.10084); ///< Optimal working length of the muscle fiber (m)
      AnyFloat TotalTendonLength ??= _TENDON_LENGTH_DESIGNVAR(0.01);///< The total tendon length (m)
      AnyFloat K1 ??= DesignVar(10); ///< K1 constant in the muscle model.  Factor for determining shortening speed at optimum length
      AnyFloat K2 ??= DesignVar(1); ///< K2 constant in the muscle model.  Factor for determining shortening speed at optimum length
      AnyFloat Epsilon0 ??= DesignVar(0.053); ///< Epsilon bar in the muscle model. Represents tendon strain at F0
      AnyFloat Fcfast ??= DesignVar(0.4); ///< Factor for determining shortening speed at optimum length
    };
    #endif

    #if BM_TRUNK_MUSCLES
    AnyFolder QL_2 =
    {
      AnyString Muscle = "Quadratus Lumborum"; ///< Descriptive name for the muscle, e.g. for plotting
      AnyIntVar MuscleElemAmount = 1; ///< The total amount of elements for this muscle
      AnyFloat Pennationangle ??= DesignVar(0); ///< Pennation angle of the muscle fibers (degres)
      AnyFloat VolumeScaleFactor ??= DesignVar(1.0); ///< Factor for scaling the muscle volume
      AnyFloat MuscleVolume ??= .Volume*0.041381; ///< Volume of the muscle (ml) (the fraction of the group volume is based on the strength of the previous model)
      AnyFloat MuscleVolumeSIScaled ??= ..VolumeUnitFactor*VolumeScaleFactor*MuscleVolume; ///< Scaled Volume of the muscle in SI base unit (m^3)
      AnyFloat OptimalFiberlength ??= _FIBER_LENGTH_DESIGNVAR(0.1047); ///< Optimal working length of the muscle fiber (m)
      AnyFloat TotalTendonLength ??= _TENDON_LENGTH_DESIGNVAR(0.01);///< The total tendon length (m)
      AnyFloat K1 ??= DesignVar(10); ///< K1 constant in the muscle model.  Factor for determining shortening speed at optimum length
      AnyFloat K2 ??= DesignVar(1); ///< K2 constant in the muscle model.  Factor for determining shortening speed at optimum length
      AnyFloat Epsilon0 ??= DesignVar(0.053); ///< Epsilon bar in the muscle model. Represents tendon strain at F0
      AnyFloat Fcfast ??= DesignVar(0.4); ///< Factor for determining shortening speed at optimum length
    };
    #endif

    #if BM_TRUNK_MUSCLES
    AnyFolder QL_3 =
    {
      AnyString Muscle = "Quadratus Lumborum"; ///< Descriptive name for the muscle, e.g. for plotting
      AnyIntVar MuscleElemAmount = 1; ///< The total amount of elements for this muscle
      AnyFloat Pennationangle ??= DesignVar(0); ///< Pennation angle of the muscle fibers (degres)
      AnyFloat VolumeScaleFactor ??= DesignVar(1.0); ///< Factor for scaling the muscle volume
      AnyFloat MuscleVolume ??= .Volume*0.044092; ///< Volume of the muscle (ml) (the fraction of the group volume is based on the strength of the previous model)
      AnyFloat MuscleVolumeSIScaled ??= ..VolumeUnitFactor*VolumeScaleFactor*MuscleVolume; ///< Scaled Volume of the muscle in SI base unit (m^3)
      AnyFloat OptimalFiberlength ??= _FIBER_LENGTH_DESIGNVAR(0.11156); ///< Optimal working length of the muscle fiber (m)
      AnyFloat TotalTendonLength ??= _TENDON_LENGTH_DESIGNVAR(0.01);///< The total tendon length (m)
      AnyFloat K1 ??= DesignVar(10); ///< K1 constant in the muscle model.  Factor for determining shortening speed at optimum length
      AnyFloat K2 ??= DesignVar(1); ///< K2 constant in the muscle model.  Factor for determining shortening speed at optimum length
      AnyFloat Epsilon0 ??= DesignVar(0.053); ///< Epsilon bar in the muscle model. Represents tendon strain at F0
      AnyFloat Fcfast ??= DesignVar(0.4); ///< Factor for determining shortening speed at optimum length
    };
    #endif

    #if BM_TRUNK_MUSCLES
    AnyFolder QL_4 =
    {
      AnyString Muscle = "Quadratus Lumborum"; ///< Descriptive name for the muscle, e.g. for plotting
      AnyIntVar MuscleElemAmount = 1; ///< The total amount of elements for this muscle
      AnyFloat Pennationangle ??= DesignVar(0); ///< Pennation angle of the muscle fibers (degres)
      AnyFloat VolumeScaleFactor ??= DesignVar(1.0); ///< Factor for scaling the muscle volume
      AnyFloat MuscleVolume ??= .Volume*0.045551; ///< Volume of the muscle (ml) (the fraction of the group volume is based on the strength of the previous model)
      AnyFloat MuscleVolumeSIScaled ??= ..VolumeUnitFactor*VolumeScaleFactor*MuscleVolume; ///< Scaled Volume of the muscle in SI base unit (m^3)
      AnyFloat OptimalFiberlength ??= _FIBER_LENGTH_DESIGNVAR(0.11525); ///< Optimal working length of the muscle fiber (m)
      AnyFloat TotalTendonLength ??= _TENDON_LENGTH_DESIGNVAR(0.01);///< The total tendon length (m)
      AnyFloat K1 ??= DesignVar(10); ///< K1 constant in the muscle model.  Factor for determining shortening speed at optimum length
      AnyFloat K2 ??= DesignVar(1); ///< K2 constant in the muscle model.  Factor for determining shortening speed at optimum length
      AnyFloat Epsilon0 ??= DesignVar(0.053); ///< Epsilon bar in the muscle model. Represents tendon strain at F0
      AnyFloat Fcfast ??= DesignVar(0.4); ///< Factor for determining shortening speed at optimum length
    };
    #endif

    #if BM_TRUNK_MUSCLES
    AnyFolder QL_5 =
    {
      AnyString Muscle = "Quadratus Lumborum"; ///< Descriptive name for the muscle, e.g. for plotting
      AnyIntVar MuscleElemAmount = 1; ///< The total amount of elements for this muscle
      AnyFloat Pennationangle ??= DesignVar(0); ///< Pennation angle of the muscle fibers (degres)
      AnyFloat VolumeScaleFactor ??= DesignVar(1.0); ///< Factor for scaling the muscle volume
      AnyFloat MuscleVolume ??= .Volume*0.049219; ///< Volume of the muscle (ml) (the fraction of the group volume is based on the strength of the previous model)
      AnyFloat MuscleVolumeSIScaled ??= ..VolumeUnitFactor*VolumeScaleFactor*MuscleVolume; ///< Scaled Volume of the muscle in SI base unit (m^3)
      AnyFloat OptimalFiberlength ??= _FIBER_LENGTH_DESIGNVAR(0.12453); ///< Optimal working length of the muscle fiber (m)
      AnyFloat TotalTendonLength ??= _TENDON_LENGTH_DESIGNVAR(0.01);///< The total tendon length (m)
      AnyFloat K1 ??= DesignVar(10); ///< K1 constant in the muscle model.  Factor for determining shortening speed at optimum length
      AnyFloat K2 ??= DesignVar(1); ///< K2 constant in the muscle model.  Factor for determining shortening speed at optimum length
      AnyFloat Epsilon0 ??= DesignVar(0.053); ///< Epsilon bar in the muscle model. Represents tendon strain at F0
      AnyFloat Fcfast ??= DesignVar(0.4); ///< Factor for determining shortening speed at optimum length
    };
    #endif

    #if BM_TRUNK_MUSCLES
    AnyFolder QL_6 =
    {
      AnyString Muscle = "Quadratus Lumborum"; ///< Descriptive name for the muscle, e.g. for plotting
      AnyIntVar MuscleElemAmount = 1; ///< The total amount of elements for this muscle
      AnyFloat Pennationangle ??= DesignVar(0); ///< Pennation angle of the muscle fibers (degres)
      AnyFloat VolumeScaleFactor ??= DesignVar(1.0); ///< Factor for scaling the muscle volume
      AnyFloat MuscleVolume ??= .Volume*0.055743; ///< Volume of the muscle (ml) (the fraction of the group volume is based on the strength of the previous model)
      AnyFloat MuscleVolumeSIScaled ??= ..VolumeUnitFactor*VolumeScaleFactor*MuscleVolume; ///< Scaled Volume of the muscle in SI base unit (m^3)
      AnyFloat OptimalFiberlength ??= _FIBER_LENGTH_DESIGNVAR(0.14104); ///< Optimal working length of the muscle fiber (m)
      AnyFloat TotalTendonLength ??= _TENDON_LENGTH_DESIGNVAR(0.01);///< The total tendon length (m)
      AnyFloat K1 ??= DesignVar(10); ///< K1 constant in the muscle model.  Factor for determining shortening speed at optimum length
      AnyFloat K2 ??= DesignVar(1); ///< K2 constant in the muscle model.  Factor for determining shortening speed at optimum length
      AnyFloat Epsilon0 ??= DesignVar(0.053); ///< Epsilon bar in the muscle model. Represents tendon strain at F0
      AnyFloat Fcfast ??= DesignVar(0.4); ///< Factor for determining shortening speed at optimum length
    };
    #endif

    #if BM_TRUNK_MUSCLES
    AnyFolder QL_7 =
    {
      AnyString Muscle = "Quadratus Lumborum"; ///< Descriptive name for the muscle, e.g. for plotting
      AnyIntVar MuscleElemAmount = 1; ///< The total amount of elements for this muscle
      AnyFloat Pennationangle ??= DesignVar(0); ///< Pennation angle of the muscle fibers (degres)
      AnyFloat VolumeScaleFactor ??= DesignVar(1.0); ///< Factor for scaling the muscle volume
      AnyFloat MuscleVolume ??= .Volume*0.04227; ///< Volume of the muscle (ml) (the fraction of the group volume is based on the strength of the previous model)
      AnyFloat MuscleVolumeSIScaled ??= ..VolumeUnitFactor*VolumeScaleFactor*MuscleVolume; ///< Scaled Volume of the muscle in SI base unit (m^3)
      AnyFloat OptimalFiberlength ??= _FIBER_LENGTH_DESIGNVAR(0.10695); ///< Optimal working length of the muscle fiber (m)
      AnyFloat TotalTendonLength ??= _TENDON_LENGTH_DESIGNVAR(0.01);///< The total tendon length (m)
      AnyFloat K1 ??= DesignVar(10); ///< K1 constant in the muscle model.  Factor for determining shortening speed at optimum length
      AnyFloat K2 ??= DesignVar(1); ///< K2 constant in the muscle model.  Factor for determining shortening speed at optimum length
      AnyFloat Epsilon0 ??= DesignVar(0.053); ///< Epsilon bar in the muscle model. Represents tendon strain at F0
      AnyFloat Fcfast ??= DesignVar(0.4); ///< Factor for determining shortening speed at optimum length
    };
    #endif

    #if BM_TRUNK_MUSCLES
    AnyFolder QL_8 =
    {
      AnyString Muscle = "Quadratus Lumborum"; ///< Descriptive name for the muscle, e.g. for plotting
      AnyIntVar MuscleElemAmount = 1; ///< The total amount of elements for this muscle
      AnyFloat Pennationangle ??= DesignVar(0); ///< Pennation angle of the muscle fibers (degres)
      AnyFloat VolumeScaleFactor ??= DesignVar(1.0); ///< Factor for scaling the muscle volume
      AnyFloat MuscleVolume ??= .Volume*0.030042; ///< Volume of the muscle (ml) (the fraction of the group volume is based on the strength of the previous model)
      AnyFloat MuscleVolumeSIScaled ??= ..VolumeUnitFactor*VolumeScaleFactor*MuscleVolume; ///< Scaled Volume of the muscle in SI base unit (m^3)
      AnyFloat OptimalFiberlength ??= _FIBER_LENGTH_DESIGNVAR(0.076012); ///< Optimal working length of the muscle fiber (m)
      AnyFloat TotalTendonLength ??= _TENDON_LENGTH_DESIGNVAR(0.01);///< The total tendon length (m)
      AnyFloat K1 ??= DesignVar(10); ///< K1 constant in the muscle model.  Factor for determining shortening speed at optimum length
      AnyFloat K2 ??= DesignVar(1); ///< K2 constant in the muscle model.  Factor for determining shortening speed at optimum length
      AnyFloat Epsilon0 ??= DesignVar(0.053); ///< Epsilon bar in the muscle model. Represents tendon strain at F0
      AnyFloat Fcfast ??= DesignVar(0.4); ///< Factor for determining shortening speed at optimum length
    };
    #endif

    #if BM_TRUNK_MUSCLES
    AnyFolder QL_9 =
    {
      AnyString Muscle = "Quadratus Lumborum"; ///< Descriptive name for the muscle, e.g. for plotting
      AnyIntVar MuscleElemAmount = 1; ///< The total amount of elements for this muscle
      AnyFloat Pennationangle ??= DesignVar(0); ///< Pennation angle of the muscle fibers (degres)
      AnyFloat VolumeScaleFactor ??= DesignVar(1.0); ///< Factor for scaling the muscle volume
      AnyFloat MuscleVolume ??= .Volume*0.020523; ///< Volume of the muscle (ml) (the fraction of the group volume is based on the strength of the previous model)
      AnyFloat MuscleVolumeSIScaled ??= ..VolumeUnitFactor*VolumeScaleFactor*MuscleVolume; ///< Scaled Volume of the muscle in SI base unit (m^3)
      AnyFloat OptimalFiberlength ??= _FIBER_LENGTH_DESIGNVAR(0.051928); ///< Optimal working length of the muscle fiber (m)
      AnyFloat TotalTendonLength ??= _TENDON_LENGTH_DESIGNVAR(0.01);///< The total tendon length (m)
      AnyFloat K1 ??= DesignVar(10); ///< K1 constant in the muscle model.  Factor for determining shortening speed at optimum length
      AnyFloat K2 ??= DesignVar(1); ///< K2 constant in the muscle model.  Factor for determining shortening speed at optimum length
      AnyFloat Epsilon0 ??= DesignVar(0.053); ///< Epsilon bar in the muscle model. Represents tendon strain at F0
      AnyFloat Fcfast ??= DesignVar(0.4); ///< Factor for determining shortening speed at optimum length
    };
    #endif

    #if BM_TRUNK_MUSCLES
    AnyFolder QL_10 =
    {
      AnyString Muscle = "Quadratus Lumborum"; ///< Descriptive name for the muscle, e.g. for plotting
      AnyIntVar MuscleElemAmount = 1; ///< The total amount of elements for this muscle
      AnyFloat Pennationangle ??= DesignVar(0); ///< Pennation angle of the muscle fibers (degres)
      AnyFloat VolumeScaleFactor ??= DesignVar(1.0); ///< Factor for scaling the muscle volume
      AnyFloat MuscleVolume ??= .Volume*0.053699; ///< Volume of the muscle (ml) (the fraction of the group volume is based on the strength of the previous model)
      AnyFloat MuscleVolumeSIScaled ??= ..VolumeUnitFactor*VolumeScaleFactor*MuscleVolume; ///< Scaled Volume of the muscle in SI base unit (m^3)
      AnyFloat OptimalFiberlength ??= _FIBER_LENGTH_DESIGNVAR(0.13587); ///< Optimal working length of the muscle fiber (m)
      AnyFloat TotalTendonLength ??= _TENDON_LENGTH_DESIGNVAR(0.01);///< The total tendon length (m)
      AnyFloat K1 ??= DesignVar(10); ///< K1 constant in the muscle model.  Factor for determining shortening speed at optimum length
      AnyFloat K2 ??= DesignVar(1); ///< K2 constant in the muscle model.  Factor for determining shortening speed at optimum length
      AnyFloat Epsilon0 ??= DesignVar(0.053); ///< Epsilon bar in the muscle model. Represents tendon strain at F0
      AnyFloat Fcfast ??= DesignVar(0.4); ///< Factor for determining shortening speed at optimum length
    };
    #endif

    #if BM_TRUNK_MUSCLES
    AnyFolder QL_11 =
    {
      AnyString Muscle = "Quadratus Lumborum"; ///< Descriptive name for the muscle, e.g. for plotting
      AnyIntVar MuscleElemAmount = 1; ///< The total amount of elements for this muscle
      AnyFloat Pennationangle ??= DesignVar(0); ///< Pennation angle of the muscle fibers (degres)
      AnyFloat VolumeScaleFactor ??= DesignVar(1.0); ///< Factor for scaling the muscle volume
      AnyFloat MuscleVolume ??= .Volume*0.04179; ///< Volume of the muscle (ml) (the fraction of the group volume is based on the strength of the previous model)
      AnyFloat MuscleVolumeSIScaled ??= ..VolumeUnitFactor*VolumeScaleFactor*MuscleVolume; ///< Scaled Volume of the muscle in SI base unit (m^3)
      AnyFloat OptimalFiberlength ??= _FIBER_LENGTH_DESIGNVAR(0.10574); ///< Optimal working length of the muscle fiber (m)
      AnyFloat TotalTendonLength ??= _TENDON_LENGTH_DESIGNVAR(0.01);///< The total tendon length (m)
      AnyFloat K1 ??= DesignVar(10); ///< K1 constant in the muscle model.  Factor for determining shortening speed at optimum length
      AnyFloat K2 ??= DesignVar(1); ///< K2 constant in the muscle model.  Factor for determining shortening speed at optimum length
      AnyFloat Epsilon0 ??= DesignVar(0.053); ///< Epsilon bar in the muscle model. Represents tendon strain at F0
      AnyFloat Fcfast ??= DesignVar(0.4); ///< Factor for determining shortening speed at optimum length
    };
    #endif

    #if BM_TRUNK_MUSCLES
    AnyFolder QL_12 =
    {
      AnyString Muscle = "Quadratus Lumborum"; ///< Descriptive name for the muscle, e.g. for plotting
      AnyIntVar MuscleElemAmount = 1; ///< The total amount of elements for this muscle
      AnyFloat Pennationangle ??= DesignVar(0); ///< Pennation angle of the muscle fibers (degres)
      AnyFloat VolumeScaleFactor ??= DesignVar(1.0); ///< Factor for scaling the muscle volume
      AnyFloat MuscleVolume ??= .Volume*0.029557; ///< Volume of the muscle (ml) (the fraction of the group volume is based on the strength of the previous model)
      AnyFloat MuscleVolumeSIScaled ??= ..VolumeUnitFactor*VolumeScaleFactor*MuscleVolume; ///< Scaled Volume of the muscle in SI base unit (m^3)
      AnyFloat OptimalFiberlength ??= _FIBER_LENGTH_DESIGNVAR(0.074786); ///< Optimal working length of the muscle fiber (m)
      AnyFloat TotalTendonLength ??= _TENDON_LENGTH_DESIGNVAR(0.01);///< The total tendon length (m)
      AnyFloat K1 ??= DesignVar(10); ///< K1 constant in the muscle model.  Factor for determining shortening speed at optimum length
      AnyFloat K2 ??= DesignVar(1); ///< K2 constant in the muscle model.  Factor for determining shortening speed at optimum length
      AnyFloat Epsilon0 ??= DesignVar(0.053); ///< Epsilon bar in the muscle model. Represents tendon strain at F0
      AnyFloat Fcfast ??= DesignVar(0.4); ///< Factor for determining shortening speed at optimum length
    };
    #endif

    #if BM_TRUNK_MUSCLES
    AnyFolder QL_13 =
    {
      AnyString Muscle = "Quadratus Lumborum"; ///< Descriptive name for the muscle, e.g. for plotting
      AnyIntVar MuscleElemAmount = 1; ///< The total amount of elements for this muscle
      AnyFloat Pennationangle ??= DesignVar(0); ///< Pennation angle of the muscle fibers (degres)
      AnyFloat VolumeScaleFactor ??= DesignVar(1.0); ///< Factor for scaling the muscle volume
      AnyFloat MuscleVolume ??= .Volume*0.021646; ///< Volume of the muscle (ml) (the fraction of the group volume is based on the strength of the previous model)
      AnyFloat MuscleVolumeSIScaled ??= ..VolumeUnitFactor*VolumeScaleFactor*MuscleVolume; ///< Scaled Volume of the muscle in SI base unit (m^3)
      AnyFloat OptimalFiberlength ??= _FIBER_LENGTH_DESIGNVAR(0.05477); ///< Optimal working length of the muscle fiber (m)
      AnyFloat TotalTendonLength ??= _TENDON_LENGTH_DESIGNVAR(0.01);///< The total tendon length (m)
      AnyFloat K1 ??= DesignVar(10); ///< K1 constant in the muscle model.  Factor for determining shortening speed at optimum length
      AnyFloat K2 ??= DesignVar(1); ///< K2 constant in the muscle model.  Factor for determining shortening speed at optimum length
      AnyFloat Epsilon0 ??= DesignVar(0.053); ///< Epsilon bar in the muscle model. Represents tendon strain at F0
      AnyFloat Fcfast ??= DesignVar(0.4); ///< Factor for determining shortening speed at optimum length
    };
    #endif

    #if BM_TRUNK_MUSCLES
    AnyFolder QL_14 =
    {
      AnyString Muscle = "Quadratus Lumborum"; ///< Descriptive name for the muscle, e.g. for plotting
      AnyIntVar MuscleElemAmount = 1; ///< The total amount of elements for this muscle
      AnyFloat Pennationangle ??= DesignVar(0); ///< Pennation angle of the muscle fibers (degres)
      AnyFloat VolumeScaleFactor ??= DesignVar(1.0); ///< Factor for scaling the muscle volume
      AnyFloat MuscleVolume ??= .Volume*0.015097; ///< Volume of the muscle (ml) (the fraction of the group volume is based on the strength of the previous model)
      AnyFloat MuscleVolumeSIScaled ??= ..VolumeUnitFactor*VolumeScaleFactor*MuscleVolume; ///< Scaled Volume of the muscle in SI base unit (m^3)
      AnyFloat OptimalFiberlength ??= _FIBER_LENGTH_DESIGNVAR(0.038199); ///< Optimal working length of the muscle fiber (m)
      AnyFloat TotalTendonLength ??= _TENDON_LENGTH_DESIGNVAR(0.01);///< The total tendon length (m)
      AnyFloat K1 ??= DesignVar(10); ///< K1 constant in the muscle model.  Factor for determining shortening speed at optimum length
      AnyFloat K2 ??= DesignVar(1); ///< K2 constant in the muscle model.  Factor for determining shortening speed at optimum length
      AnyFloat Epsilon0 ??= DesignVar(0.053); ///< Epsilon bar in the muscle model. Represents tendon strain at F0
      AnyFloat Fcfast ??= DesignVar(0.4); ///< Factor for determining shortening speed at optimum length
    };
    #endif

    #if BM_TRUNK_MUSCLES
    AnyFolder QL_15 =
    {
      AnyString Muscle = "Quadratus Lumborum"; ///< Descriptive name for the muscle, e.g. for plotting
      AnyIntVar MuscleElemAmount = 1; ///< The total amount of elements for this muscle
      AnyFloat Pennationangle ??= DesignVar(0); ///< Pennation angle of the muscle fibers (degres)
      AnyFloat VolumeScaleFactor ??= DesignVar(1.0); ///< Factor for scaling the muscle volume
      AnyFloat MuscleVolume ??= .Volume*0.055388; ///< Volume of the muscle (ml) (the fraction of the group volume is based on the strength of the previous model)
      AnyFloat MuscleVolumeSIScaled ??= ..VolumeUnitFactor*VolumeScaleFactor*MuscleVolume; ///< Scaled Volume of the muscle in SI base unit (m^3)
      AnyFloat OptimalFiberlength ??= _FIBER_LENGTH_DESIGNVAR(0.14014); ///< Optimal working length of the muscle fiber (m)
      AnyFloat TotalTendonLength ??= _TENDON_LENGTH_DESIGNVAR(0.01);///< The total tendon length (m)
      AnyFloat K1 ??= DesignVar(10); ///< K1 constant in the muscle model.  Factor for determining shortening speed at optimum length
      AnyFloat K2 ??= DesignVar(1); ///< K2 constant in the muscle model.  Factor for determining shortening speed at optimum length
      AnyFloat Epsilon0 ??= DesignVar(0.053); ///< Epsilon bar in the muscle model. Represents tendon strain at F0
      AnyFloat Fcfast ??= DesignVar(0.4); ///< Factor for determining shortening speed at optimum length
    };
    #endif

    #if BM_TRUNK_MUSCLES
    AnyFolder QL_16 =
    {
      AnyString Muscle = "Quadratus Lumborum"; ///< Descriptive name for the muscle, e.g. for plotting
      AnyIntVar MuscleElemAmount = 1; ///< The total amount of elements for this muscle
      AnyFloat Pennationangle ??= DesignVar(0); ///< Pennation angle of the muscle fibers (degres)
      AnyFloat VolumeScaleFactor ??= DesignVar(1.0); ///< Factor for scaling the muscle volume
      AnyFloat MuscleVolume ??= .Volume*0.043515; ///< Volume of the muscle (ml) (the fraction of the group volume is based on the strength of the previous model)
      AnyFloat MuscleVolumeSIScaled ??= ..VolumeUnitFactor*VolumeScaleFactor*MuscleVolume; ///< Scaled Volume of the muscle in SI base unit (m^3)
      AnyFloat OptimalFiberlength ??= _FIBER_LENGTH_DESIGNVAR(0.1101); ///< Optimal working length of the muscle fiber (m)
      AnyFloat TotalTendonLength ??= _TENDON_LENGTH_DESIGNVAR(0.01);///< The total tendon length (m)
      AnyFloat K1 ??= DesignVar(10); ///< K1 constant in the muscle model.  Factor for determining shortening speed at optimum length
      AnyFloat K2 ??= DesignVar(1); ///< K2 constant in the muscle model.  Factor for determining shortening speed at optimum length
      AnyFloat Epsilon0 ??= DesignVar(0.053); ///< Epsilon bar in the muscle model. Represents tendon strain at F0
      AnyFloat Fcfast ??= DesignVar(0.4); ///< Factor for determining shortening speed at optimum length
    };
    #endif

    #if BM_TRUNK_MUSCLES
    AnyFolder QL_17 =
    {
      AnyString Muscle = "Quadratus Lumborum"; ///< Descriptive name for the muscle, e.g. for plotting
      AnyIntVar MuscleElemAmount = 1; ///< The total amount of elements for this muscle
      AnyFloat Pennationangle ??= DesignVar(0); ///< Pennation angle of the muscle fibers (degres)
      AnyFloat VolumeScaleFactor ??= DesignVar(1.0); ///< Factor for scaling the muscle volume
      AnyFloat MuscleVolume ??= .Volume*0.032853; ///< Volume of the muscle (ml) (the fraction of the group volume is based on the strength of the previous model)
      AnyFloat MuscleVolumeSIScaled ??= ..VolumeUnitFactor*VolumeScaleFactor*MuscleVolume; ///< Scaled Volume of the muscle in SI base unit (m^3)
      AnyFloat OptimalFiberlength ??= _FIBER_LENGTH_DESIGNVAR(0.083126); ///< Optimal working length of the muscle fiber (m)
      AnyFloat TotalTendonLength ??= _TENDON_LENGTH_DESIGNVAR(0.01);///< The total tendon length (m)
      AnyFloat K1 ??= DesignVar(10); ///< K1 constant in the muscle model.  Factor for determining shortening speed at optimum length
      AnyFloat K2 ??= DesignVar(1); ///< K2 constant in the muscle model.  Factor for determining shortening speed at optimum length
      AnyFloat Epsilon0 ??= DesignVar(0.053); ///< Epsilon bar in the muscle model. Represents tendon strain at F0
      AnyFloat Fcfast ??= DesignVar(0.4); ///< Factor for determining shortening speed at optimum length
    };
    #endif

    #if BM_TRUNK_MUSCLES
    AnyFolder QL_18 =
    {
      AnyString Muscle = "Quadratus Lumborum"; ///< Descriptive name for the muscle, e.g. for plotting
      AnyIntVar MuscleElemAmount = 1; ///< The total amount of elements for this muscle
      AnyFloat Pennationangle ??= DesignVar(0); ///< Pennation angle of the muscle fibers (degres)
      AnyFloat VolumeScaleFactor ??= DesignVar(1.0); ///< Factor for scaling the muscle volume
      AnyFloat MuscleVolume ??= .Volume*0.024402; ///< Volume of the muscle (ml) (the fraction of the group volume is based on the strength of the previous model)
      AnyFloat MuscleVolumeSIScaled ??= ..VolumeUnitFactor*VolumeScaleFactor*MuscleVolume; ///< Scaled Volume of the muscle in SI base unit (m^3)
      AnyFloat OptimalFiberlength ??= _FIBER_LENGTH_DESIGNVAR(0.061742); ///< Optimal working length of the muscle fiber (m)
      AnyFloat TotalTendonLength ??= _TENDON_LENGTH_DESIGNVAR(0.01);///< The total tendon length (m)
      AnyFloat K1 ??= DesignVar(10); ///< K1 constant in the muscle model.  Factor for determining shortening speed at optimum length
      AnyFloat K2 ??= DesignVar(1); ///< K2 constant in the muscle model.  Factor for determining shortening speed at optimum length
      AnyFloat Epsilon0 ??= DesignVar(0.053); ///< Epsilon bar in the muscle model. Represents tendon strain at F0
      AnyFloat Fcfast ??= DesignVar(0.4); ///< Factor for determining shortening speed at optimum length
    };
    #endif

    #if BM_TRUNK_MUSCLES
    AnyFolder QL_19 =
    {
      AnyString Muscle = "Quadratus Lumborum"; ///< Descriptive name for the muscle, e.g. for plotting
      AnyIntVar MuscleElemAmount = 1; ///< The total amount of elements for this muscle
      AnyFloat Pennationangle ??= DesignVar(0); ///< Pennation angle of the muscle fibers (degres)
      AnyFloat VolumeScaleFactor ??= DesignVar(1.0); ///< Factor for scaling the muscle volume
      AnyFloat MuscleVolume ??= .Volume*0.019521; ///< Volume of the muscle (ml) (the fraction of the group volume is based on the strength of the previous model)
      AnyFloat MuscleVolumeSIScaled ??= ..VolumeUnitFactor*VolumeScaleFactor*MuscleVolume; ///< Scaled Volume of the muscle in SI base unit (m^3)
      AnyFloat OptimalFiberlength ??= _FIBER_LENGTH_DESIGNVAR(0.049393); ///< Optimal working length of the muscle fiber (m)
      AnyFloat TotalTendonLength ??= _TENDON_LENGTH_DESIGNVAR(0.01);///< The total tendon length (m)
      AnyFloat K1 ??= DesignVar(10); ///< K1 constant in the muscle model.  Factor for determining shortening speed at optimum length
      AnyFloat K2 ??= DesignVar(1); ///< K2 constant in the muscle model.  Factor for determining shortening speed at optimum length
      AnyFloat Epsilon0 ??= DesignVar(0.053); ///< Epsilon bar in the muscle model. Represents tendon strain at F0
      AnyFloat Fcfast ??= DesignVar(0.4); ///< Factor for determining shortening speed at optimum length
    };
    #endif

    #if BM_TRUNK_MUSCLES
    AnyFolder QL_20 =
    {
      AnyString Muscle = "Quadratus Lumborum"; ///< Descriptive name for the muscle, e.g. for plotting
      AnyIntVar MuscleElemAmount = 1; ///< The total amount of elements for this muscle
      AnyFloat Pennationangle ??= DesignVar(0); ///< Pennation angle of the muscle fibers (degres)
      AnyFloat VolumeScaleFactor ??= DesignVar(1.0); ///< Factor for scaling the muscle volume
      AnyFloat MuscleVolume ??= .Volume*0.039109; ///< Volume of the muscle (ml) (the fraction of the group volume is based on the strength of the previous model)
      AnyFloat MuscleVolumeSIScaled ??= ..VolumeUnitFactor*VolumeScaleFactor*MuscleVolume; ///< Scaled Volume of the muscle in SI base unit (m^3)
      AnyFloat OptimalFiberlength ??= _FIBER_LENGTH_DESIGNVAR(0.098955); ///< Optimal working length of the muscle fiber (m)
      AnyFloat TotalTendonLength ??= _TENDON_LENGTH_DESIGNVAR(0.01);///< The total tendon length (m)
      AnyFloat K1 ??= DesignVar(10); ///< K1 constant in the muscle model.  Factor for determining shortening speed at optimum length
      AnyFloat K2 ??= DesignVar(1); ///< K2 constant in the muscle model.  Factor for determining shortening speed at optimum length
      AnyFloat Epsilon0 ??= DesignVar(0.053); ///< Epsilon bar in the muscle model. Represents tendon strain at F0
      AnyFloat Fcfast ??= DesignVar(0.4); ///< Factor for determining shortening speed at optimum length
    };
    #endif

    #if BM_TRUNK_MUSCLES
    AnyFolder QL_21 =
    {
      AnyString Muscle = "Quadratus Lumborum"; ///< Descriptive name for the muscle, e.g. for plotting
      AnyIntVar MuscleElemAmount = 1; ///< The total amount of elements for this muscle
      AnyFloat Pennationangle ??= DesignVar(0); ///< Pennation angle of the muscle fibers (degres)
      AnyFloat VolumeScaleFactor ??= DesignVar(1.0); ///< Factor for scaling the muscle volume
      AnyFloat MuscleVolume ??= .Volume*0.029026; ///< Volume of the muscle (ml) (the fraction of the group volume is based on the strength of the previous model)
      AnyFloat MuscleVolumeSIScaled ??= ..VolumeUnitFactor*VolumeScaleFactor*MuscleVolume; ///< Scaled Volume of the muscle in SI base unit (m^3)
      AnyFloat OptimalFiberlength ??= _FIBER_LENGTH_DESIGNVAR(0.073441); ///< Optimal working length of the muscle fiber (m)
      AnyFloat TotalTendonLength ??= _TENDON_LENGTH_DESIGNVAR(0.01);///< The total tendon length (m)
      AnyFloat K1 ??= DesignVar(10); ///< K1 constant in the muscle model.  Factor for determining shortening speed at optimum length
      AnyFloat K2 ??= DesignVar(1); ///< K2 constant in the muscle model.  Factor for determining shortening speed at optimum length
      AnyFloat Epsilon0 ??= DesignVar(0.053); ///< Epsilon bar in the muscle model. Represents tendon strain at F0
      AnyFloat Fcfast ??= DesignVar(0.4); ///< Factor for determining shortening speed at optimum length
    };
    #endif

    #if BM_TRUNK_MUSCLES
    AnyFolder QL_22 =
    {
      AnyString Muscle = "Quadratus Lumborum"; ///< Descriptive name for the muscle, e.g. for plotting
      AnyIntVar MuscleElemAmount = 1; ///< The total amount of elements for this muscle
      AnyFloat Pennationangle ??= DesignVar(0); ///< Pennation angle of the muscle fibers (degres)
      AnyFloat VolumeScaleFactor ??= DesignVar(1.0); ///< Factor for scaling the muscle volume
      AnyFloat MuscleVolume ??= .Volume*0.019928; ///< Volume of the muscle (ml) (the fraction of the group volume is based on the strength of the previous model)
      AnyFloat MuscleVolumeSIScaled ??= ..VolumeUnitFactor*VolumeScaleFactor*MuscleVolume; ///< Scaled Volume of the muscle in SI base unit (m^3)
      AnyFloat OptimalFiberlength ??= _FIBER_LENGTH_DESIGNVAR(0.050423); ///< Optimal working length of the muscle fiber (m)
      AnyFloat TotalTendonLength ??= _TENDON_LENGTH_DESIGNVAR(0.01);///< The total tendon length (m)
      AnyFloat K1 ??= DesignVar(10); ///< K1 constant in the muscle model.  Factor for determining shortening speed at optimum length
      AnyFloat K2 ??= DesignVar(1); ///< K2 constant in the muscle model.  Factor for determining shortening speed at optimum length
      AnyFloat Epsilon0 ??= DesignVar(0.053); ///< Epsilon bar in the muscle model. Represents tendon strain at F0
      AnyFloat Fcfast ??= DesignVar(0.4); ///< Factor for determining shortening speed at optimum length
    };
    #endif

    #if BM_TRUNK_MUSCLES
    AnyFolder QL_23 =
    {
      AnyString Muscle = "Quadratus Lumborum"; ///< Descriptive name for the muscle, e.g. for plotting
      AnyIntVar MuscleElemAmount = 1; ///< The total amount of elements for this muscle
      AnyFloat Pennationangle ??= DesignVar(0); ///< Pennation angle of the muscle fibers (degres)
      AnyFloat VolumeScaleFactor ??= DesignVar(1.0); ///< Factor for scaling the muscle volume
      AnyFloat MuscleVolume ??= .Volume*0.042192; ///< Volume of the muscle (ml) (the fraction of the group volume is based on the strength of the previous model)
      AnyFloat MuscleVolumeSIScaled ??= ..VolumeUnitFactor*VolumeScaleFactor*MuscleVolume; ///< Scaled Volume of the muscle in SI base unit (m^3)
      AnyFloat OptimalFiberlength ??= _FIBER_LENGTH_DESIGNVAR(0.10676); ///< Optimal working length of the muscle fiber (m)
      AnyFloat TotalTendonLength ??= _TENDON_LENGTH_DESIGNVAR(0.01);///< The total tendon length (m)
      AnyFloat K1 ??= DesignVar(10); ///< K1 constant in the muscle model.  Factor for determining shortening speed at optimum length
      AnyFloat K2 ??= DesignVar(1); ///< K2 constant in the muscle model.  Factor for determining shortening speed at optimum length
      AnyFloat Epsilon0 ??= DesignVar(0.053); ///< Epsilon bar in the muscle model. Represents tendon strain at F0
      AnyFloat Fcfast ??= DesignVar(0.4); ///< Factor for determining shortening speed at optimum length
    };
    #endif

    #if BM_TRUNK_MUSCLES
    AnyFolder QL_24 =
    {
      AnyString Muscle = "Quadratus Lumborum"; ///< Descriptive name for the muscle, e.g. for plotting
      AnyIntVar MuscleElemAmount = 1; ///< The total amount of elements for this muscle
      AnyFloat Pennationangle ??= DesignVar(0); ///< Pennation angle of the muscle fibers (degres)
      AnyFloat VolumeScaleFactor ??= DesignVar(1.0); ///< Factor for scaling the muscle volume
      AnyFloat MuscleVolume ??= .Volume*0.03245; ///< Volume of the muscle (ml) (the fraction of the group volume is based on the strength of the previous model)
      AnyFloat MuscleVolumeSIScaled ??= ..VolumeUnitFactor*VolumeScaleFactor*MuscleVolume; ///< Scaled Volume of the muscle in SI base unit (m^3)
      AnyFloat OptimalFiberlength ??= _FIBER_LENGTH_DESIGNVAR(0.082106); ///< Optimal working length of the muscle fiber (m)
      AnyFloat TotalTendonLength ??= _TENDON_LENGTH_DESIGNVAR(0.01);///< The total tendon length (m)
      AnyFloat K1 ??= DesignVar(10); ///< K1 constant in the muscle model.  Factor for determining shortening speed at optimum length
      AnyFloat K2 ??= DesignVar(1); ///< K2 constant in the muscle model.  Factor for determining shortening speed at optimum length
      AnyFloat Epsilon0 ??= DesignVar(0.053); ///< Epsilon bar in the muscle model. Represents tendon strain at F0
      AnyFloat Fcfast ??= DesignVar(0.4); ///< Factor for determining shortening speed at optimum length
    };
    #endif

    #if BM_TRUNK_MUSCLES
    AnyFolder QL_25 =
    {
      AnyString Muscle = "Quadratus Lumborum"; ///< Descriptive name for the muscle, e.g. for plotting
      AnyIntVar MuscleElemAmount = 1; ///< The total amount of elements for this muscle
      AnyFloat Pennationangle ??= DesignVar(0); ///< Pennation angle of the muscle fibers (degres)
      AnyFloat VolumeScaleFactor ??= DesignVar(1.0); ///< Factor for scaling the muscle volume
      AnyFloat MuscleVolume ??= .Volume*0.022743; ///< Volume of the muscle (ml) (the fraction of the group volume is based on the strength of the previous model)
      AnyFloat MuscleVolumeSIScaled ??= ..VolumeUnitFactor*VolumeScaleFactor*MuscleVolume; ///< Scaled Volume of the muscle in SI base unit (m^3)
      AnyFloat OptimalFiberlength ??= _FIBER_LENGTH_DESIGNVAR(0.057544); ///< Optimal working length of the muscle fiber (m)
      AnyFloat TotalTendonLength ??= _TENDON_LENGTH_DESIGNVAR(0.01);///< The total tendon length (m)
      AnyFloat K1 ??= DesignVar(10); ///< K1 constant in the muscle model.  Factor for determining shortening speed at optimum length
      AnyFloat K2 ??= DesignVar(1); ///< K2 constant in the muscle model.  Factor for determining shortening speed at optimum length
      AnyFloat Epsilon0 ??= DesignVar(0.053); ///< Epsilon bar in the muscle model. Represents tendon strain at F0
      AnyFloat Fcfast ??= DesignVar(0.4); ///< Factor for determining shortening speed at optimum length
    };
    #endif

    #if BM_TRUNK_MUSCLES
    AnyFolder QL_26 =
    {
      AnyString Muscle = "Quadratus Lumborum"; ///< Descriptive name for the muscle, e.g. for plotting
      AnyIntVar MuscleElemAmount = 1; ///< The total amount of elements for this muscle
      AnyFloat Pennationangle ??= DesignVar(0); ///< Pennation angle of the muscle fibers (degres)
      AnyFloat VolumeScaleFactor ??= DesignVar(1.0); ///< Factor for scaling the muscle volume
      AnyFloat MuscleVolume ??= .Volume*0.046725; ///< Volume of the muscle (ml) (the fraction of the group volume is based on the strength of the previous model)
      AnyFloat MuscleVolumeSIScaled ??= ..VolumeUnitFactor*VolumeScaleFactor*MuscleVolume; ///< Scaled Volume of the muscle in SI base unit (m^3)
      AnyFloat OptimalFiberlength ??= _FIBER_LENGTH_DESIGNVAR(0.11822); ///< Optimal working length of the muscle fiber (m)
      AnyFloat TotalTendonLength ??= _TENDON_LENGTH_DESIGNVAR(0.01);///< The total tendon length (m)
      AnyFloat K1 ??= DesignVar(10); ///< K1 constant in the muscle model.  Factor for determining shortening speed at optimum length
      AnyFloat K2 ??= DesignVar(1); ///< K2 constant in the muscle model.  Factor for determining shortening speed at optimum length
      AnyFloat Epsilon0 ??= DesignVar(0.053); ///< Epsilon bar in the muscle model. Represents tendon strain at F0
      AnyFloat Fcfast ??= DesignVar(0.4); ///< Factor for determining shortening speed at optimum length
    };
    #endif

    #if BM_TRUNK_MUSCLES
    AnyFolder QL_27 =
    {
      AnyString Muscle = "Quadratus Lumborum"; ///< Descriptive name for the muscle, e.g. for plotting
      AnyIntVar MuscleElemAmount = 1; ///< The total amount of elements for this muscle
      AnyFloat Pennationangle ??= DesignVar(0); ///< Pennation angle of the muscle fibers (degres)
      AnyFloat VolumeScaleFactor ??= DesignVar(1.0); ///< Factor for scaling the muscle volume
      AnyFloat MuscleVolume ??= .Volume*0.035822; ///< Volume of the muscle (ml) (the fraction of the group volume is based on the strength of the previous model)
      AnyFloat MuscleVolumeSIScaled ??= ..VolumeUnitFactor*VolumeScaleFactor*MuscleVolume; ///< Scaled Volume of the muscle in SI base unit (m^3)
      AnyFloat OptimalFiberlength ??= _FIBER_LENGTH_DESIGNVAR(0.090636); ///< Optimal working length of the muscle fiber (m)
      AnyFloat TotalTendonLength ??= _TENDON_LENGTH_DESIGNVAR(0.01);///< The total tendon length (m)
      AnyFloat K1 ??= DesignVar(10); ///< K1 constant in the muscle model.  Factor for determining shortening speed at optimum length
      AnyFloat K2 ??= DesignVar(1); ///< K2 constant in the muscle model.  Factor for determining shortening speed at optimum length
      AnyFloat Epsilon0 ??= DesignVar(0.053); ///< Epsilon bar in the muscle model. Represents tendon strain at F0
      AnyFloat Fcfast ??= DesignVar(0.4); ///< Factor for determining shortening speed at optimum length
    };
    #endif

    #if BM_TRUNK_MUSCLES
    AnyFolder QL_28 =
    {
      AnyString Muscle = "Quadratus Lumborum"; ///< Descriptive name for the muscle, e.g. for plotting
      AnyIntVar MuscleElemAmount = 1; ///< The total amount of elements for this muscle
      AnyFloat Pennationangle ??= DesignVar(0); ///< Pennation angle of the muscle fibers (degres)
      AnyFloat VolumeScaleFactor ??= DesignVar(1.0); ///< Factor for scaling the muscle volume
      AnyFloat MuscleVolume ??= .Volume*0.025862; ///< Volume of the muscle (ml) (the fraction of the group volume is based on the strength of the previous model)
      AnyFloat MuscleVolumeSIScaled ??= ..VolumeUnitFactor*VolumeScaleFactor*MuscleVolume; ///< Scaled Volume of the muscle in SI base unit (m^3)
      AnyFloat OptimalFiberlength ??= _FIBER_LENGTH_DESIGNVAR(0.065435); ///< Optimal working length of the muscle fiber (m)
      AnyFloat TotalTendonLength ??= _TENDON_LENGTH_DESIGNVAR(0.01);///< The total tendon length (m)
      AnyFloat K1 ??= DesignVar(10); ///< K1 constant in the muscle model.  Factor for determining shortening speed at optimum length
      AnyFloat K2 ??= DesignVar(1); ///< K2 constant in the muscle model.  Factor for determining shortening speed at optimum length
      AnyFloat Epsilon0 ??= DesignVar(0.053); ///< Epsilon bar in the muscle model. Represents tendon strain at F0
      AnyFloat Fcfast ??= DesignVar(0.4); ///< Factor for determining shortening speed at optimum length
    };
    #endif
  }; // QuadratusLumborum group
  AnyFolder RectusAbdominis =
  {
    #if BM_TRUNK_MUSCLES
    AnyVar Volume ??= DesignVar(133.49); ///< Total volume of the muscle group (ml)
    AnyFolder RA_1 =
    {
      AnyString Muscle = "Rectus Abdominis"; ///< Descriptive name for the muscle, e.g. for plotting
      AnyIntVar MuscleElemAmount = 1; ///< The total amount of elements for this muscle
      AnyFloat Pennationangle ??= DesignVar(0); ///< Pennation angle of the muscle fibers (degres)
      AnyFloat VolumeScaleFactor ??= DesignVar(1.0); ///< Factor for scaling the muscle volume
      AnyFloat MuscleVolume ??= .Volume*0.46554; ///< Volume of the muscle (ml) (the fraction of the group volume is based on the strength of the previous model)
      AnyFloat MuscleVolumeSIScaled ??= ..VolumeUnitFactor*VolumeScaleFactor*MuscleVolume; ///< Scaled Volume of the muscle in SI base unit (m^3)
      AnyFloat OptimalFiberlength ??= _FIBER_LENGTH_DESIGNVAR(0.37664); ///< Optimal working length of the muscle fiber (m)
      AnyFloat TotalTendonLength ??= _TENDON_LENGTH_DESIGNVAR(0.01);///< The total tendon length (m)
      AnyFloat K1 ??= DesignVar(10); ///< K1 constant in the muscle model.  Factor for determining shortening speed at optimum length
      AnyFloat K2 ??= DesignVar(1); ///< K2 constant in the muscle model.  Factor for determining shortening speed at optimum length
      AnyFloat Epsilon0 ??= DesignVar(0.053); ///< Epsilon bar in the muscle model. Represents tendon strain at F0
      AnyFloat Fcfast ??= DesignVar(0.4); ///< Factor for determining shortening speed at optimum length
    };
    #endif

    #if BM_TRUNK_MUSCLES
    AnyFolder RA_2 =
    {
      AnyString Muscle = "Rectus Abdominis"; ///< Descriptive name for the muscle, e.g. for plotting
      AnyIntVar MuscleElemAmount = 1; ///< The total amount of elements for this muscle
      AnyFloat Pennationangle ??= DesignVar(0); ///< Pennation angle of the muscle fibers (degres)
      AnyFloat VolumeScaleFactor ??= DesignVar(1.0); ///< Factor for scaling the muscle volume
      AnyFloat MuscleVolume ??= .Volume*0.53446; ///< Volume of the muscle (ml) (the fraction of the group volume is based on the strength of the previous model)
      AnyFloat MuscleVolumeSIScaled ??= ..VolumeUnitFactor*VolumeScaleFactor*MuscleVolume; ///< Scaled Volume of the muscle in SI base unit (m^3)
      AnyFloat OptimalFiberlength ??= _FIBER_LENGTH_DESIGNVAR(0.43241); ///< Optimal working length of the muscle fiber (m)
      AnyFloat TotalTendonLength ??= _TENDON_LENGTH_DESIGNVAR(0.01);///< The total tendon length (m)
      AnyFloat K1 ??= DesignVar(10); ///< K1 constant in the muscle model.  Factor for determining shortening speed at optimum length
      AnyFloat K2 ??= DesignVar(1); ///< K2 constant in the muscle model.  Factor for determining shortening speed at optimum length
      AnyFloat Epsilon0 ??= DesignVar(0.053); ///< Epsilon bar in the muscle model. Represents tendon strain at F0
      AnyFloat Fcfast ??= DesignVar(0.4); ///< Factor for determining shortening speed at optimum length
    };
    #endif
  }; // RectusAbdominis group
  AnyFolder ObliquusInternus =
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