/* A detailed model of the human spine.

Lone Hansen (Institute of Medical Anatomy, University of Copenhagen, Denmark)
Mark de Zee (AnyBody Group, Institute of Mechanical Engineering, Aalborg University, Denmark)
Funded by the Danish Research Council

Start date: 13-11-2002
Last update: 30-8-2004

This model will include most muscles of the lumbar part. For a detailed description and for the references see:

http://www.ime.auc.dk/~mdz/pdf/DeZee_et_al_zaragoza.pdf

You should be aware of the following facts:
- The model is not evaluated. We are planning on doing some experiments in the beginning of next year. This of course doesn't mean that you couldn't use it, but maybe a sort of validation is needed for your own purpose.
- The muscles do not include the force-length-velocity relations (i.e. we use the socalled simple muscle model). The only input parameter in the muscle model is the cross-sectional area multiplied by a factor. At the moment we use a specific muscle tension of 65 N/cm2. Daggfeldt and Thorstensson (J.Biomech. 2003, 36: 815-825) didn't include the force-length-velocity relations either.
- In the paper we wrote that we include ligaments, but we have to exclude those in the first version of the spine model, because we do not have the necessary mechanical properties. This is however not a problem, because it has been shown that the torque production from ligaments might not be very important (Cholewicki and McGill, J.Biomech. 1992, 25: 17-28).

"Buckle.any"   this the main file for simulating the abdominal pressure
"Cyl.any" this is a small file which can create a cylinder inteded for muscle wrapping
"JointsReactionsLumbar.any"  this is the joints for the lumbar part of the spine
"LigamentSpineMiddle.any" this is the ligaments for the spine, remark: this file needs further work on ligament parameters
"SegmentsLumbar.any" this the segments for the lumbar part of the spine
"SegmentsThorax.any" this it the segment for thoracic part of the spine

"MuscleSpineLeft.any" this is the file which collects the muscles for the left side of the spine
"MuscleSpineRight.any" this is the file which collects the muscles for the right side of the spine

"MuscleParametersSpineSimpleLeft.any" the muscle strength parameters for the left side of the spine
"MuscleParametersSpineSimpleRight.any" the muscle strength parameters for the right side of the spine


"ErectorSpinaeLeft.any"   muscle definition
"ErectorSpinaeRight.any   muscle definition
"MultifidiLeft.any" muscle definition
"MultifidiRight.any" muscle definition
"ObliqusExternusLeft.any" muscle definition
"ObliqusExternusRight.any" muscle definition
"ObliqusInternusLeft.any" muscle definition
"ObliqusInternusRight.any" muscle definition
"PsoasMajorLeft.any" muscle definition
"PsoasMajorRight.any" muscle definition
"QuadratusLumborumLeft.any" muscle definition
"QuadratusLumborumRight.any" muscle definition
"RectusAbdominisRight.any" muscle definition
"RectusAbdominisLeft.any" muscle definition
"TransversusLeft.any" muscle definition
"TransversusRight.any" muscle definition


*/


/*
Data of vertebrae dimensions is taken from Nissan and Gilad (J.Biomech. 19: 753-758, 1986)
and also the WholeBodyParameters.
*/


AnyFolder &PsoasMajorRightRef=PsoasMajorRightReference;
AnyFolder &PsoasMajorLeftRef=PsoasMajorLeftReference;

#include "SegmentsLumbar.any"
#include "SegmentsThorax.any"
#include "NodeForScalingExt.any"

#include "JointsLumbar.any"

#include "BuckleNoAbdominalPressure.any"

AnyFolder MusclesSpineRight = {

  #include "MultifidiRight.any"

  #include "ErectorSpinaeRight.any"

  #include "PsoasMajorRight.any"

  #include "QuadratusLumborumRight.any"

  #include "ObliquusExternusRight.any"

  #include "ObliquusInternusRight.any"


}; // End of MuscleSpineRight


AnyFolder MusclesSpineLeft = {

 #include "MultifidiLeft.any"

  #include "ErectorSpinaeLeft.any"

  #include "PsoasMajorLeft.any"

  #include "QuadratusLumborumLeft.any"

  #include "ObliquusExternusLeft.any"

  #include "ObliquusInternusLeft.any"

};

#include "RectusAbdominis.any"

// End of MuscleSpineLeft
//#include "LigamentsSpineRight.any"
//#include "LigamentsSpineLeft.any"
//#include "LigamentsSpineMiddle.any"

#include "MuscleParametersSpineSimpleRight.any"
#include "MuscleParametersSpineSimpleLeft.any"


//Summation of masses in the spine
AnyFolder MassSummation={
  AnyVar Mass=.SegmentsThorax.SkullSeg.Mass+.SegmentsThorax.ThoraxSeg.Mass+
              .SegmentsLumbar.L1Seg.Mass+
              .SegmentsLumbar.L2Seg.Mass+
              .SegmentsLumbar.L3Seg.Mass+
              .SegmentsLumbar.L4Seg.Mass+
              .SegmentsLumbar.L5Seg.Mass+
              .SegmentsLumbar.SacrumSeg.Mass+
             .SegmentsLumbar.PelvisSeg.Mass;
};
#include "InitialPositions.any"
