/**^
This folder implements the simple muscle models for the trunk model.
Anatomical muscles are in many cases split into
several branches (elements). Strength parameters are split between the branches,
typically by uniform split.
*/

AnyFolder DefaultMusPar = {
  AnyVar PCSAfactor ??= ....StrengthParameters.SpecificMuscleTensionSpine; // = PCSAfactor in N/cm^2 , the PCSA itself is given in cm^2 so F0 is in Newton`s.
};

AnyVar StrengthScaleSpine = ...Scaling.StrengthScaling.Spine.StrengthScale;


AnyFolder TransversusSingle = {

    #if BM_TRUNK_MUSCLES & BM_TRUNK_CAVITY_MODEL == _CAVITY_MODEL_BUCKLE_
    AnyMuscleModel Transversus_1 = {
        AnyFolder& MuscleParameters = ...Data.unscaled.ModelParameters.Muscles.TransversusSingle.Transversus_1;
        AnyIntVar MuscleElemNo = 1; ///< The number of this element of the muscle
        AnyIntVar MuscleElemAmount = MuscleParameters.MuscleElemAmount; ///< The total amount of elements for this muscle
        F0 ??= ..DefaultMusPar.PCSAfactor*PCSA; ///< Maximum force output at optimum fiber length
        Lf0 ??= MuscleParameters.OptimalFiberlength / cos(pi/180*MuscleParameters.Pennationangle); //< Optimal fiber length corrected by pennation angle
        AnyVar PCSA ??= 1e4*..StrengthScaleSpine*MuscleParameters.MuscleVolumeSIScaled/(Lf0); ///< PCSA (cm2) of the individual element is total volumen divided by the sum of muscle element fiber lengths.
        Vol0 = (1e-4*PCSA) * Lf0; // New calculation of the vol for the specific muscle branch
    };
    #endif

    #if BM_TRUNK_MUSCLES & BM_TRUNK_CAVITY_MODEL == _CAVITY_MODEL_BUCKLE_
    AnyMuscleModel Transversus_2 = {
        AnyFolder& MuscleParameters = ...Data.unscaled.ModelParameters.Muscles.TransversusSingle.Transversus_2;
        AnyIntVar MuscleElemNo = 1; ///< The number of this element of the muscle
        AnyIntVar MuscleElemAmount = MuscleParameters.MuscleElemAmount; ///< The total amount of elements for this muscle
        F0 ??= ..DefaultMusPar.PCSAfactor*PCSA; ///< Maximum force output at optimum fiber length
        Lf0 ??= MuscleParameters.OptimalFiberlength / cos(pi/180*MuscleParameters.Pennationangle); //< Optimal fiber length corrected by pennation angle
        AnyVar PCSA ??= 1e4*..StrengthScaleSpine*MuscleParameters.MuscleVolumeSIScaled/(Lf0); ///< PCSA (cm2) of the individual element is total volumen divided by the sum of muscle element fiber lengths.
        Vol0 = (1e-4*PCSA) * Lf0; // New calculation of the vol for the specific muscle branch
    };
    #endif

    #if BM_TRUNK_MUSCLES & BM_TRUNK_CAVITY_MODEL == _CAVITY_MODEL_BUCKLE_
    AnyMuscleModel Transversus_3 = {
        AnyFolder& MuscleParameters = ...Data.unscaled.ModelParameters.Muscles.TransversusSingle.Transversus_3;
        AnyIntVar MuscleElemNo = 1; ///< The number of this element of the muscle
        AnyIntVar MuscleElemAmount = MuscleParameters.MuscleElemAmount; ///< The total amount of elements for this muscle
        F0 ??= ..DefaultMusPar.PCSAfactor*PCSA; ///< Maximum force output at optimum fiber length
        Lf0 ??= MuscleParameters.OptimalFiberlength / cos(pi/180*MuscleParameters.Pennationangle); //< Optimal fiber length corrected by pennation angle
        AnyVar PCSA ??= 1e4*..StrengthScaleSpine*MuscleParameters.MuscleVolumeSIScaled/(Lf0); ///< PCSA (cm2) of the individual element is total volumen divided by the sum of muscle element fiber lengths.
        Vol0 = (1e-4*PCSA) * Lf0; // New calculation of the vol for the specific muscle branch
    };
    #endif

    #if BM_TRUNK_MUSCLES & BM_TRUNK_CAVITY_MODEL == _CAVITY_MODEL_BUCKLE_
    AnyMuscleModel Transversus_4 = {
        AnyFolder& MuscleParameters = ...Data.unscaled.ModelParameters.Muscles.TransversusSingle.Transversus_4;
        AnyIntVar MuscleElemNo = 1; ///< The number of this element of the muscle
        AnyIntVar MuscleElemAmount = MuscleParameters.MuscleElemAmount; ///< The total amount of elements for this muscle
        F0 ??= ..DefaultMusPar.PCSAfactor*PCSA; ///< Maximum force output at optimum fiber length
        Lf0 ??= MuscleParameters.OptimalFiberlength / cos(pi/180*MuscleParameters.Pennationangle); //< Optimal fiber length corrected by pennation angle
        AnyVar PCSA ??= 1e4*..StrengthScaleSpine*MuscleParameters.MuscleVolumeSIScaled/(Lf0); ///< PCSA (cm2) of the individual element is total volumen divided by the sum of muscle element fiber lengths.
        Vol0 = (1e-4*PCSA) * Lf0; // New calculation of the vol for the specific muscle branch
    };
    #endif

    #if BM_TRUNK_MUSCLES & BM_TRUNK_CAVITY_MODEL == _CAVITY_MODEL_BUCKLE_
    AnyMuscleModel Transversus_5 = {
        AnyFolder& MuscleParameters = ...Data.unscaled.ModelParameters.Muscles.TransversusSingle.Transversus_5;
        AnyIntVar MuscleElemNo = 1; ///< The number of this element of the muscle
        AnyIntVar MuscleElemAmount = MuscleParameters.MuscleElemAmount; ///< The total amount of elements for this muscle
        F0 ??= ..DefaultMusPar.PCSAfactor*PCSA; ///< Maximum force output at optimum fiber length
        Lf0 ??= MuscleParameters.OptimalFiberlength / cos(pi/180*MuscleParameters.Pennationangle); //< Optimal fiber length corrected by pennation angle
        AnyVar PCSA ??= 1e4*..StrengthScaleSpine*MuscleParameters.MuscleVolumeSIScaled/(Lf0); ///< PCSA (cm2) of the individual element is total volumen divided by the sum of muscle element fiber lengths.
        Vol0 = (1e-4*PCSA) * Lf0; // New calculation of the vol for the specific muscle branch
    };
    #endif

};

AnyFolder Spinalis = {

    #if BM_TRUNK_MUSCLES
    AnyMuscleModel SPL1T2 = {
        AnyFolder& MuscleParameters = ...Data.unscaled.ModelParameters.Muscles.Spinalis.SPL1T2;
        AnyIntVar MuscleElemNo = 1; ///< The number of this element of the muscle
        AnyIntVar MuscleElemAmount = MuscleParameters.MuscleElemAmount; ///< The total amount of elements for this muscle
        F0 ??= ..DefaultMusPar.PCSAfactor*PCSA; ///< Maximum force output at optimum fiber length
        Lf0 ??= MuscleParameters.OptimalFiberlength / cos(pi/180*MuscleParameters.Pennationangle); //< Optimal fiber length corrected by pennation angle
        AnyVar PCSA ??= 1e4*..StrengthScaleSpine*MuscleParameters.MuscleVolumeSIScaled/(Lf0); ///< PCSA (cm2) of the individual element is total volumen divided by the sum of muscle element fiber lengths.
        Vol0 = (1e-4*PCSA) * Lf0; // New calculation of the vol for the specific muscle branch
    };
    #endif

    #if BM_TRUNK_MUSCLES
    AnyMuscleModel SPL1T3 = {
        AnyFolder& MuscleParameters = ...Data.unscaled.ModelParameters.Muscles.Spinalis.SPL1T3;
        AnyIntVar MuscleElemNo = 1; ///< The number of this element of the muscle
        AnyIntVar MuscleElemAmount = MuscleParameters.MuscleElemAmount; ///< The total amount of elements for this muscle
        F0 ??= ..DefaultMusPar.PCSAfactor*PCSA; ///< Maximum force output at optimum fiber length
        Lf0 ??= MuscleParameters.OptimalFiberlength / cos(pi/180*MuscleParameters.Pennationangle); //< Optimal fiber length corrected by pennation angle
        AnyVar PCSA ??= 1e4*..StrengthScaleSpine*MuscleParameters.MuscleVolumeSIScaled/(Lf0); ///< PCSA (cm2) of the individual element is total volumen divided by the sum of muscle element fiber lengths.
        Vol0 = (1e-4*PCSA) * Lf0; // New calculation of the vol for the specific muscle branch
    };
    #endif

    #if BM_TRUNK_MUSCLES
    AnyMuscleModel SPL2T1 = {
        AnyFolder& MuscleParameters = ...Data.unscaled.ModelParameters.Muscles.Spinalis.SPL2T1;
        AnyIntVar MuscleElemNo = 1; ///< The number of this element of the muscle
        AnyIntVar MuscleElemAmount = MuscleParameters.MuscleElemAmount; ///< The total amount of elements for this muscle
        F0 ??= ..DefaultMusPar.PCSAfactor*PCSA; ///< Maximum force output at optimum fiber length
        Lf0 ??= MuscleParameters.OptimalFiberlength / cos(pi/180*MuscleParameters.Pennationangle); //< Optimal fiber length corrected by pennation angle
        AnyVar PCSA ??= 1e4*..StrengthScaleSpine*MuscleParameters.MuscleVolumeSIScaled/(Lf0); ///< PCSA (cm2) of the individual element is total volumen divided by the sum of muscle element fiber lengths.
        Vol0 = (1e-4*PCSA) * Lf0; // New calculation of the vol for the specific muscle branch
    };
    #endif

    #if BM_TRUNK_MUSCLES
    AnyMuscleModel SPT11T6 = {
        AnyFolder& MuscleParameters = ...Data.unscaled.ModelParameters.Muscles.Spinalis.SPT11T6;
        AnyIntVar MuscleElemNo = 1; ///< The number of this element of the muscle
        AnyIntVar MuscleElemAmount = MuscleParameters.MuscleElemAmount; ///< The total amount of elements for this muscle
        F0 ??= ..DefaultMusPar.PCSAfactor*PCSA; ///< Maximum force output at optimum fiber length
        Lf0 ??= MuscleParameters.OptimalFiberlength / cos(pi/180*MuscleParameters.Pennationangle); //< Optimal fiber length corrected by pennation angle
        AnyVar PCSA ??= 1e4*..StrengthScaleSpine*MuscleParameters.MuscleVolumeSIScaled/(Lf0); ///< PCSA (cm2) of the individual element is total volumen divided by the sum of muscle element fiber lengths.
        Vol0 = (1e-4*PCSA) * Lf0; // New calculation of the vol for the specific muscle branch
    };
    #endif

    #if BM_TRUNK_MUSCLES
    AnyMuscleModel SPT12T4 = {
        AnyFolder& MuscleParameters = ...Data.unscaled.ModelParameters.Muscles.Spinalis.SPT12T4;
        AnyIntVar MuscleElemNo = 1; ///< The number of this element of the muscle
        AnyIntVar MuscleElemAmount = MuscleParameters.MuscleElemAmount; ///< The total amount of elements for this muscle
        F0 ??= ..DefaultMusPar.PCSAfactor*PCSA; ///< Maximum force output at optimum fiber length
        Lf0 ??= MuscleParameters.OptimalFiberlength / cos(pi/180*MuscleParameters.Pennationangle); //< Optimal fiber length corrected by pennation angle
        AnyVar PCSA ??= 1e4*..StrengthScaleSpine*MuscleParameters.MuscleVolumeSIScaled/(Lf0); ///< PCSA (cm2) of the individual element is total volumen divided by the sum of muscle element fiber lengths.
        Vol0 = (1e-4*PCSA) * Lf0; // New calculation of the vol for the specific muscle branch
    };
    #endif

    #if BM_TRUNK_MUSCLES
    AnyMuscleModel SPT12T5 = {
        AnyFolder& MuscleParameters = ...Data.unscaled.ModelParameters.Muscles.Spinalis.SPT12T5;
        AnyIntVar MuscleElemNo = 1; ///< The number of this element of the muscle
        AnyIntVar MuscleElemAmount = MuscleParameters.MuscleElemAmount; ///< The total amount of elements for this muscle
        F0 ??= ..DefaultMusPar.PCSAfactor*PCSA; ///< Maximum force output at optimum fiber length
        Lf0 ??= MuscleParameters.OptimalFiberlength / cos(pi/180*MuscleParameters.Pennationangle); //< Optimal fiber length corrected by pennation angle
        AnyVar PCSA ??= 1e4*..StrengthScaleSpine*MuscleParameters.MuscleVolumeSIScaled/(Lf0); ///< PCSA (cm2) of the individual element is total volumen divided by the sum of muscle element fiber lengths.
        Vol0 = (1e-4*PCSA) * Lf0; // New calculation of the vol for the specific muscle branch
    };
    #endif

};

AnyFolder Left = {

    AnyFolder Multifidi = {

        #if BM_TRUNK_MUSCLES
        AnyMuscleModel MFdL1L3 = {
            AnyFolder& MuscleParameters = ....Data.unscaled.ModelParameters.Muscles.Multifidi.MFdL1L3;
            AnyIntVar MuscleElemNo = 1; ///< The number of this element of the muscle
            AnyIntVar MuscleElemAmount = MuscleParameters.MuscleElemAmount; ///< The total amount of elements for this muscle
            F0 ??= ...DefaultMusPar.PCSAfactor*PCSA; ///< Maximum force output at optimum fiber length
            Lf0 ??= MuscleParameters.OptimalFiberlength / cos(pi/180*MuscleParameters.Pennationangle); //< Optimal fiber length corrected by pennation angle
            AnyVar PCSA ??= 1e4*...StrengthScaleSpine*MuscleParameters.MuscleVolumeSIScaled/(Lf0); ///< PCSA (cm2) of the individual element is total volumen divided by the sum of muscle element fiber lengths.
            Vol0 = (1e-4*PCSA) * Lf0; // New calculation of the vol for the specific muscle branch
        };
        #endif

        #if BM_TRUNK_MUSCLES
        AnyMuscleModel MFdL2L4 = {
            AnyFolder& MuscleParameters = ....Data.unscaled.ModelParameters.Muscles.Multifidi.MFdL2L4;
            AnyIntVar MuscleElemNo = 1; ///< The number of this element of the muscle
            AnyIntVar MuscleElemAmount = MuscleParameters.MuscleElemAmount; ///< The total amount of elements for this muscle
            F0 ??= ...DefaultMusPar.PCSAfactor*PCSA; ///< Maximum force output at optimum fiber length
            Lf0 ??= MuscleParameters.OptimalFiberlength / cos(pi/180*MuscleParameters.Pennationangle); //< Optimal fiber length corrected by pennation angle
            AnyVar PCSA ??= 1e4*...StrengthScaleSpine*MuscleParameters.MuscleVolumeSIScaled/(Lf0); ///< PCSA (cm2) of the individual element is total volumen divided by the sum of muscle element fiber lengths.
            Vol0 = (1e-4*PCSA) * Lf0; // New calculation of the vol for the specific muscle branch
        };
        #endif

        #if BM_TRUNK_MUSCLES
        AnyMuscleModel MFdL3L5 = {
            AnyFolder& MuscleParameters = ....Data.unscaled.ModelParameters.Muscles.Multifidi.MFdL3L5;
            AnyIntVar MuscleElemNo = 1; ///< The number of this element of the muscle
            AnyIntVar MuscleElemAmount = MuscleParameters.MuscleElemAmount; ///< The total amount of elements for this muscle
            F0 ??= ...DefaultMusPar.PCSAfactor*PCSA; ///< Maximum force output at optimum fiber length
            Lf0 ??= MuscleParameters.OptimalFiberlength / cos(pi/180*MuscleParameters.Pennationangle); //< Optimal fiber length corrected by pennation angle
            AnyVar PCSA ??= 1e4*...StrengthScaleSpine*MuscleParameters.MuscleVolumeSIScaled/(Lf0); ///< PCSA (cm2) of the individual element is total volumen divided by the sum of muscle element fiber lengths.
            Vol0 = (1e-4*PCSA) * Lf0; // New calculation of the vol for the specific muscle branch
        };
        #endif

        #if BM_TRUNK_MUSCLES
        AnyMuscleModel MFdL4S1 = {
            AnyFolder& MuscleParameters = ....Data.unscaled.ModelParameters.Muscles.Multifidi.MFdL4S1;
            AnyIntVar MuscleElemNo = 1; ///< The number of this element of the muscle
            AnyIntVar MuscleElemAmount = MuscleParameters.MuscleElemAmount; ///< The total amount of elements for this muscle
            F0 ??= ...DefaultMusPar.PCSAfactor*PCSA; ///< Maximum force output at optimum fiber length
            Lf0 ??= MuscleParameters.OptimalFiberlength / cos(pi/180*MuscleParameters.Pennationangle); //< Optimal fiber length corrected by pennation angle
            AnyVar PCSA ??= 1e4*...StrengthScaleSpine*MuscleParameters.MuscleVolumeSIScaled/(Lf0); ///< PCSA (cm2) of the individual element is total volumen divided by the sum of muscle element fiber lengths.
            Vol0 = (1e-4*PCSA) * Lf0; // New calculation of the vol for the specific muscle branch
        };
        #endif

        #if BM_TRUNK_MUSCLES
        AnyMuscleModel MFdL5S1 = {
            AnyFolder& MuscleParameters = ....Data.unscaled.ModelParameters.Muscles.Multifidi.MFdL5S1;
            AnyIntVar MuscleElemNo = 1; ///< The number of this element of the muscle
            AnyIntVar MuscleElemAmount = MuscleParameters.MuscleElemAmount; ///< The total amount of elements for this muscle
            F0 ??= ...DefaultMusPar.PCSAfactor*PCSA; ///< Maximum force output at optimum fiber length
            Lf0 ??= MuscleParameters.OptimalFiberlength / cos(pi/180*MuscleParameters.Pennationangle); //< Optimal fiber length corrected by pennation angle
            AnyVar PCSA ??= 1e4*...StrengthScaleSpine*MuscleParameters.MuscleVolumeSIScaled/(Lf0); ///< PCSA (cm2) of the individual element is total volumen divided by the sum of muscle element fiber lengths.
            Vol0 = (1e-4*PCSA) * Lf0; // New calculation of the vol for the specific muscle branch
        };
        #endif

        #if BM_TRUNK_MUSCLES
        AnyMuscleModel MFmL1L4 = {
            AnyFolder& MuscleParameters = ....Data.unscaled.ModelParameters.Muscles.Multifidi.MFmL1L4;
            AnyIntVar MuscleElemNo = 1; ///< The number of this element of the muscle
            AnyIntVar MuscleElemAmount = MuscleParameters.MuscleElemAmount; ///< The total amount of elements for this muscle
            F0 ??= ...DefaultMusPar.PCSAfactor*PCSA; ///< Maximum force output at optimum fiber length
            Lf0 ??= MuscleParameters.OptimalFiberlength / cos(pi/180*MuscleParameters.Pennationangle); //< Optimal fiber length corrected by pennation angle
            AnyVar PCSA ??= 1e4*...StrengthScaleSpine*MuscleParameters.MuscleVolumeSIScaled/(Lf0); ///< PCSA (cm2) of the individual element is total volumen divided by the sum of muscle element fiber lengths.
            Vol0 = (1e-4*PCSA) * Lf0; // New calculation of the vol for the specific muscle branch
        };
        #endif

        #if BM_TRUNK_MUSCLES
        AnyMuscleModel MFmL2L5 = {
            AnyFolder& MuscleParameters = ....Data.unscaled.ModelParameters.Muscles.Multifidi.MFmL2L5;
            AnyIntVar MuscleElemNo = 1; ///< The number of this element of the muscle
            AnyIntVar MuscleElemAmount = MuscleParameters.MuscleElemAmount; ///< The total amount of elements for this muscle
            F0 ??= ...DefaultMusPar.PCSAfactor*PCSA; ///< Maximum force output at optimum fiber length
            Lf0 ??= MuscleParameters.OptimalFiberlength / cos(pi/180*MuscleParameters.Pennationangle); //< Optimal fiber length corrected by pennation angle
            AnyVar PCSA ??= 1e4*...StrengthScaleSpine*MuscleParameters.MuscleVolumeSIScaled/(Lf0); ///< PCSA (cm2) of the individual element is total volumen divided by the sum of muscle element fiber lengths.
            Vol0 = (1e-4*PCSA) * Lf0; // New calculation of the vol for the specific muscle branch
        };
        #endif

        #if BM_TRUNK_MUSCLES
        AnyMuscleModel MFmL3S1 = {
            AnyFolder& MuscleParameters = ....Data.unscaled.ModelParameters.Muscles.Multifidi.MFmL3S1;
            AnyIntVar MuscleElemNo = 1; ///< The number of this element of the muscle
            AnyIntVar MuscleElemAmount = MuscleParameters.MuscleElemAmount; ///< The total amount of elements for this muscle
            F0 ??= ...DefaultMusPar.PCSAfactor*PCSA; ///< Maximum force output at optimum fiber length
            Lf0 ??= MuscleParameters.OptimalFiberlength / cos(pi/180*MuscleParameters.Pennationangle); //< Optimal fiber length corrected by pennation angle
            AnyVar PCSA ??= 1e4*...StrengthScaleSpine*MuscleParameters.MuscleVolumeSIScaled/(Lf0); ///< PCSA (cm2) of the individual element is total volumen divided by the sum of muscle element fiber lengths.
            Vol0 = (1e-4*PCSA) * Lf0; // New calculation of the vol for the specific muscle branch
        };
        #endif

        #if BM_TRUNK_MUSCLES
        AnyMuscleModel MFmL4Sacrum = {
            AnyFolder& MuscleParameters = ....Data.unscaled.ModelParameters.Muscles.Multifidi.MFmL4Sacrum;
            AnyIntVar MuscleElemNo = 1; ///< The number of this element of the muscle
            AnyIntVar MuscleElemAmount = MuscleParameters.MuscleElemAmount; ///< The total amount of elements for this muscle
            F0 ??= ...DefaultMusPar.PCSAfactor*PCSA; ///< Maximum force output at optimum fiber length
            Lf0 ??= MuscleParameters.OptimalFiberlength / cos(pi/180*MuscleParameters.Pennationangle); //< Optimal fiber length corrected by pennation angle
            AnyVar PCSA ??= 1e4*...StrengthScaleSpine*MuscleParameters.MuscleVolumeSIScaled/(Lf0); ///< PCSA (cm2) of the individual element is total volumen divided by the sum of muscle element fiber lengths.
            Vol0 = (1e-4*PCSA) * Lf0; // New calculation of the vol for the specific muscle branch
        };
        #endif

        #if BM_TRUNK_MUSCLES
        AnyMuscleModel MFmL5Sacrum = {
            AnyFolder& MuscleParameters = ....Data.unscaled.ModelParameters.Muscles.Multifidi.MFmL5Sacrum;
            AnyIntVar MuscleElemNo = 1; ///< The number of this element of the muscle
            AnyIntVar MuscleElemAmount = MuscleParameters.MuscleElemAmount; ///< The total amount of elements for this muscle
            F0 ??= ...DefaultMusPar.PCSAfactor*PCSA; ///< Maximum force output at optimum fiber length
            Lf0 ??= MuscleParameters.OptimalFiberlength / cos(pi/180*MuscleParameters.Pennationangle); //< Optimal fiber length corrected by pennation angle
            AnyVar PCSA ??= 1e4*...StrengthScaleSpine*MuscleParameters.MuscleVolumeSIScaled/(Lf0); ///< PCSA (cm2) of the individual element is total volumen divided by the sum of muscle element fiber lengths.
            Vol0 = (1e-4*PCSA) * Lf0; // New calculation of the vol for the specific muscle branch
        };
        #endif

        #if BM_TRUNK_MUSCLES
        AnyMuscleModel MFtsL1L5 = {
            AnyFolder& MuscleParameters = ....Data.unscaled.ModelParameters.Muscles.Multifidi.MFtsL1L5;
            AnyIntVar MuscleElemNo = 1; ///< The number of this element of the muscle
            AnyIntVar MuscleElemAmount = MuscleParameters.MuscleElemAmount; ///< The total amount of elements for this muscle
            F0 ??= ...DefaultMusPar.PCSAfactor*PCSA; ///< Maximum force output at optimum fiber length
            Lf0 ??= MuscleParameters.OptimalFiberlength / cos(pi/180*MuscleParameters.Pennationangle); //< Optimal fiber length corrected by pennation angle
            AnyVar PCSA ??= 1e4*...StrengthScaleSpine*MuscleParameters.MuscleVolumeSIScaled/(Lf0); ///< PCSA (cm2) of the individual element is total volumen divided by the sum of muscle element fiber lengths.
            Vol0 = (1e-4*PCSA) * Lf0; // New calculation of the vol for the specific muscle branch
        };
        #endif

        #if BM_TRUNK_MUSCLES
        AnyMuscleModel MFtsL1S1 = {
            AnyFolder& MuscleParameters = ....Data.unscaled.ModelParameters.Muscles.Multifidi.MFtsL1S1;
            AnyIntVar MuscleElemNo = 1; ///< The number of this element of the muscle
            AnyIntVar MuscleElemAmount = MuscleParameters.MuscleElemAmount; ///< The total amount of elements for this muscle
            F0 ??= ...DefaultMusPar.PCSAfactor*PCSA; ///< Maximum force output at optimum fiber length
            Lf0 ??= MuscleParameters.OptimalFiberlength / cos(pi/180*MuscleParameters.Pennationangle); //< Optimal fiber length corrected by pennation angle
            AnyVar PCSA ??= 1e4*...StrengthScaleSpine*MuscleParameters.MuscleVolumeSIScaled/(Lf0); ///< PCSA (cm2) of the individual element is total volumen divided by the sum of muscle element fiber lengths.
            Vol0 = (1e-4*PCSA) * Lf0; // New calculation of the vol for the specific muscle branch
        };
        #endif

        #if BM_TRUNK_MUSCLES
        AnyMuscleModel MFtsL2L5 = {
            AnyFolder& MuscleParameters = ....Data.unscaled.ModelParameters.Muscles.Multifidi.MFtsL2L5;
            AnyIntVar MuscleElemNo = 1; ///< The number of this element of the muscle
            AnyIntVar MuscleElemAmount = MuscleParameters.MuscleElemAmount; ///< The total amount of elements for this muscle
            F0 ??= ...DefaultMusPar.PCSAfactor*PCSA; ///< Maximum force output at optimum fiber length
            Lf0 ??= MuscleParameters.OptimalFiberlength / cos(pi/180*MuscleParameters.Pennationangle); //< Optimal fiber length corrected by pennation angle
            AnyVar PCSA ??= 1e4*...StrengthScaleSpine*MuscleParameters.MuscleVolumeSIScaled/(Lf0); ///< PCSA (cm2) of the individual element is total volumen divided by the sum of muscle element fiber lengths.
            Vol0 = (1e-4*PCSA) * Lf0; // New calculation of the vol for the specific muscle branch
        };
        #endif

        #if BM_TRUNK_MUSCLES
        AnyMuscleModel MFtsL2S1 = {
            AnyFolder& MuscleParameters = ....Data.unscaled.ModelParameters.Muscles.Multifidi.MFtsL2S1;
            AnyIntVar MuscleElemNo = 1; ///< The number of this element of the muscle
            AnyIntVar MuscleElemAmount = MuscleParameters.MuscleElemAmount; ///< The total amount of elements for this muscle
            F0 ??= ...DefaultMusPar.PCSAfactor*PCSA; ///< Maximum force output at optimum fiber length
            Lf0 ??= MuscleParameters.OptimalFiberlength / cos(pi/180*MuscleParameters.Pennationangle); //< Optimal fiber length corrected by pennation angle
            AnyVar PCSA ??= 1e4*...StrengthScaleSpine*MuscleParameters.MuscleVolumeSIScaled/(Lf0); ///< PCSA (cm2) of the individual element is total volumen divided by the sum of muscle element fiber lengths.
            Vol0 = (1e-4*PCSA) * Lf0; // New calculation of the vol for the specific muscle branch
        };
        #endif

        #if BM_TRUNK_MUSCLES
        AnyMuscleModel MFtsL3Ligament = {
            AnyFolder& MuscleParameters = ....Data.unscaled.ModelParameters.Muscles.Multifidi.MFtsL3Ligament;
            AnyIntVar MuscleElemNo = 1; ///< The number of this element of the muscle
            AnyIntVar MuscleElemAmount = MuscleParameters.MuscleElemAmount; ///< The total amount of elements for this muscle
            F0 ??= ...DefaultMusPar.PCSAfactor*PCSA; ///< Maximum force output at optimum fiber length
            Lf0 ??= MuscleParameters.OptimalFiberlength / cos(pi/180*MuscleParameters.Pennationangle); //< Optimal fiber length corrected by pennation angle
            AnyVar PCSA ??= 1e4*...StrengthScaleSpine*MuscleParameters.MuscleVolumeSIScaled/(Lf0); ///< PCSA (cm2) of the individual element is total volumen divided by the sum of muscle element fiber lengths.
            Vol0 = (1e-4*PCSA) * Lf0; // New calculation of the vol for the specific muscle branch
        };
        #endif

        #if BM_TRUNK_MUSCLES
        AnyMuscleModel MFtsL4Sacrum = {
            AnyFolder& MuscleParameters = ....Data.unscaled.ModelParameters.Muscles.Multifidi.MFtsL4Sacrum;
            AnyIntVar MuscleElemNo = 1; ///< The number of this element of the muscle
            AnyIntVar MuscleElemAmount = MuscleParameters.MuscleElemAmount; ///< The total amount of elements for this muscle
            F0 ??= ...DefaultMusPar.PCSAfactor*PCSA; ///< Maximum force output at optimum fiber length
            Lf0 ??= MuscleParameters.OptimalFiberlength / cos(pi/180*MuscleParameters.Pennationangle); //< Optimal fiber length corrected by pennation angle
            AnyVar PCSA ??= 1e4*...StrengthScaleSpine*MuscleParameters.MuscleVolumeSIScaled/(Lf0); ///< PCSA (cm2) of the individual element is total volumen divided by the sum of muscle element fiber lengths.
            Vol0 = (1e-4*PCSA) * Lf0; // New calculation of the vol for the specific muscle branch
        };
        #endif

        #if BM_TRUNK_MUSCLES
        AnyMuscleModel MFtsL5Sacrum = {
            AnyFolder& MuscleParameters = ....Data.unscaled.ModelParameters.Muscles.Multifidi.MFtsL5Sacrum;
            AnyIntVar MuscleElemNo = 1; ///< The number of this element of the muscle
            AnyIntVar MuscleElemAmount = MuscleParameters.MuscleElemAmount; ///< The total amount of elements for this muscle
            F0 ??= ...DefaultMusPar.PCSAfactor*PCSA; ///< Maximum force output at optimum fiber length
            Lf0 ??= MuscleParameters.OptimalFiberlength / cos(pi/180*MuscleParameters.Pennationangle); //< Optimal fiber length corrected by pennation angle
            AnyVar PCSA ??= 1e4*...StrengthScaleSpine*MuscleParameters.MuscleVolumeSIScaled/(Lf0); ///< PCSA (cm2) of the individual element is total volumen divided by the sum of muscle element fiber lengths.
            Vol0 = (1e-4*PCSA) * Lf0; // New calculation of the vol for the specific muscle branch
        };
        #endif

        #if BM_TRUNK_MUSCLES
        AnyMuscleModel MFtstL1SIPS = {
            AnyFolder& MuscleParameters = ....Data.unscaled.ModelParameters.Muscles.Multifidi.MFtstL1SIPS;
            AnyIntVar MuscleElemNo = 1; ///< The number of this element of the muscle
            AnyIntVar MuscleElemAmount = MuscleParameters.MuscleElemAmount; ///< The total amount of elements for this muscle
            F0 ??= ...DefaultMusPar.PCSAfactor*PCSA; ///< Maximum force output at optimum fiber length
            Lf0 ??= MuscleParameters.OptimalFiberlength / cos(pi/180*MuscleParameters.Pennationangle); //< Optimal fiber length corrected by pennation angle
            AnyVar PCSA ??= 1e4*...StrengthScaleSpine*MuscleParameters.MuscleVolumeSIScaled/(Lf0); ///< PCSA (cm2) of the individual element is total volumen divided by the sum of muscle element fiber lengths.
            Vol0 = (1e-4*PCSA) * Lf0; // New calculation of the vol for the specific muscle branch
        };
        #endif

        #if BM_TRUNK_MUSCLES
        AnyMuscleModel MFtstL2SIPS = {
            AnyFolder& MuscleParameters = ....Data.unscaled.ModelParameters.Muscles.Multifidi.MFtstL2SIPS;
            AnyIntVar MuscleElemNo = 1; ///< The number of this element of the muscle
            AnyIntVar MuscleElemAmount = MuscleParameters.MuscleElemAmount; ///< The total amount of elements for this muscle
            F0 ??= ...DefaultMusPar.PCSAfactor*PCSA; ///< Maximum force output at optimum fiber length
            Lf0 ??= MuscleParameters.OptimalFiberlength / cos(pi/180*MuscleParameters.Pennationangle); //< Optimal fiber length corrected by pennation angle
            AnyVar PCSA ??= 1e4*...StrengthScaleSpine*MuscleParameters.MuscleVolumeSIScaled/(Lf0); ///< PCSA (cm2) of the individual element is total volumen divided by the sum of muscle element fiber lengths.
            Vol0 = (1e-4*PCSA) * Lf0; // New calculation of the vol for the specific muscle branch
        };
        #endif

    };

    AnyFolder ErectorSpinae = {

        #if BM_TRUNK_MUSCLES
        AnyMuscleModel ILplL1CI = {
            AnyFolder& MuscleParameters = ....Data.unscaled.ModelParameters.Muscles.ErectorSpinae.ILplL1CI;
            AnyIntVar MuscleElemNo = 1; ///< The number of this element of the muscle
            AnyIntVar MuscleElemAmount = MuscleParameters.MuscleElemAmount; ///< The total amount of elements for this muscle
            F0 ??= ...DefaultMusPar.PCSAfactor*PCSA; ///< Maximum force output at optimum fiber length
            Lf0 ??= MuscleParameters.OptimalFiberlength / cos(pi/180*MuscleParameters.Pennationangle); //< Optimal fiber length corrected by pennation angle
            AnyVar PCSA ??= 1e4*...StrengthScaleSpine*MuscleParameters.MuscleVolumeSIScaled/(Lf0); ///< PCSA (cm2) of the individual element is total volumen divided by the sum of muscle element fiber lengths.
            Vol0 = (1e-4*PCSA) * Lf0; // New calculation of the vol for the specific muscle branch
        };
        #endif

        #if BM_TRUNK_MUSCLES
        AnyMuscleModel ILplL2CI = {
            AnyFolder& MuscleParameters = ....Data.unscaled.ModelParameters.Muscles.ErectorSpinae.ILplL2CI;
            AnyIntVar MuscleElemNo = 1; ///< The number of this element of the muscle
            AnyIntVar MuscleElemAmount = MuscleParameters.MuscleElemAmount; ///< The total amount of elements for this muscle
            F0 ??= ...DefaultMusPar.PCSAfactor*PCSA; ///< Maximum force output at optimum fiber length
            Lf0 ??= MuscleParameters.OptimalFiberlength / cos(pi/180*MuscleParameters.Pennationangle); //< Optimal fiber length corrected by pennation angle
            AnyVar PCSA ??= 1e4*...StrengthScaleSpine*MuscleParameters.MuscleVolumeSIScaled/(Lf0); ///< PCSA (cm2) of the individual element is total volumen divided by the sum of muscle element fiber lengths.
            Vol0 = (1e-4*PCSA) * Lf0; // New calculation of the vol for the specific muscle branch
        };
        #endif

        #if BM_TRUNK_MUSCLES
        AnyMuscleModel ILplL3CI = {
            AnyFolder& MuscleParameters = ....Data.unscaled.ModelParameters.Muscles.ErectorSpinae.ILplL3CI;
            AnyIntVar MuscleElemNo = 1; ///< The number of this element of the muscle
            AnyIntVar MuscleElemAmount = MuscleParameters.MuscleElemAmount; ///< The total amount of elements for this muscle
            F0 ??= ...DefaultMusPar.PCSAfactor*PCSA; ///< Maximum force output at optimum fiber length
            Lf0 ??= MuscleParameters.OptimalFiberlength / cos(pi/180*MuscleParameters.Pennationangle); //< Optimal fiber length corrected by pennation angle
            AnyVar PCSA ??= 1e4*...StrengthScaleSpine*MuscleParameters.MuscleVolumeSIScaled/(Lf0); ///< PCSA (cm2) of the individual element is total volumen divided by the sum of muscle element fiber lengths.
            Vol0 = (1e-4*PCSA) * Lf0; // New calculation of the vol for the specific muscle branch
        };
        #endif

        #if BM_TRUNK_MUSCLES
        AnyMuscleModel ILplL4CI = {
            AnyFolder& MuscleParameters = ....Data.unscaled.ModelParameters.Muscles.ErectorSpinae.ILplL4CI;
            AnyIntVar MuscleElemNo = 1; ///< The number of this element of the muscle
            AnyIntVar MuscleElemAmount = MuscleParameters.MuscleElemAmount; ///< The total amount of elements for this muscle
            F0 ??= ...DefaultMusPar.PCSAfactor*PCSA; ///< Maximum force output at optimum fiber length
            Lf0 ??= MuscleParameters.OptimalFiberlength / cos(pi/180*MuscleParameters.Pennationangle); //< Optimal fiber length corrected by pennation angle
            AnyVar PCSA ??= 1e4*...StrengthScaleSpine*MuscleParameters.MuscleVolumeSIScaled/(Lf0); ///< PCSA (cm2) of the individual element is total volumen divided by the sum of muscle element fiber lengths.
            Vol0 = (1e-4*PCSA) * Lf0; // New calculation of the vol for the specific muscle branch
        };
        #endif

        #if BM_TRUNK_MUSCLES
        AnyMuscleModel LTplL1SIPS = {
            AnyFolder& MuscleParameters = ....Data.unscaled.ModelParameters.Muscles.ErectorSpinae.LTplL1SIPS;
            AnyIntVar MuscleElemNo = 1; ///< The number of this element of the muscle
            AnyIntVar MuscleElemAmount = MuscleParameters.MuscleElemAmount; ///< The total amount of elements for this muscle
            F0 ??= ...DefaultMusPar.PCSAfactor*PCSA; ///< Maximum force output at optimum fiber length
            Lf0 ??= MuscleParameters.OptimalFiberlength / cos(pi/180*MuscleParameters.Pennationangle); //< Optimal fiber length corrected by pennation angle
            AnyVar PCSA ??= 1e4*...StrengthScaleSpine*MuscleParameters.MuscleVolumeSIScaled/(Lf0); ///< PCSA (cm2) of the individual element is total volumen divided by the sum of muscle element fiber lengths.
            Vol0 = (1e-4*PCSA) * Lf0; // New calculation of the vol for the specific muscle branch
        };
        #endif

        #if BM_TRUNK_MUSCLES
        AnyMuscleModel LTplL2SIPS = {
            AnyFolder& MuscleParameters = ....Data.unscaled.ModelParameters.Muscles.ErectorSpinae.LTplL2SIPS;
            AnyIntVar MuscleElemNo = 1; ///< The number of this element of the muscle
            AnyIntVar MuscleElemAmount = MuscleParameters.MuscleElemAmount; ///< The total amount of elements for this muscle
            F0 ??= ...DefaultMusPar.PCSAfactor*PCSA; ///< Maximum force output at optimum fiber length
            Lf0 ??= MuscleParameters.OptimalFiberlength / cos(pi/180*MuscleParameters.Pennationangle); //< Optimal fiber length corrected by pennation angle
            AnyVar PCSA ??= 1e4*...StrengthScaleSpine*MuscleParameters.MuscleVolumeSIScaled/(Lf0); ///< PCSA (cm2) of the individual element is total volumen divided by the sum of muscle element fiber lengths.
            Vol0 = (1e-4*PCSA) * Lf0; // New calculation of the vol for the specific muscle branch
        };
        #endif

        #if BM_TRUNK_MUSCLES
        AnyMuscleModel LTplL3SIPS = {
            AnyFolder& MuscleParameters = ....Data.unscaled.ModelParameters.Muscles.ErectorSpinae.LTplL3SIPS;
            AnyIntVar MuscleElemNo = 1; ///< The number of this element of the muscle
            AnyIntVar MuscleElemAmount = MuscleParameters.MuscleElemAmount; ///< The total amount of elements for this muscle
            F0 ??= ...DefaultMusPar.PCSAfactor*PCSA; ///< Maximum force output at optimum fiber length
            Lf0 ??= MuscleParameters.OptimalFiberlength / cos(pi/180*MuscleParameters.Pennationangle); //< Optimal fiber length corrected by pennation angle
            AnyVar PCSA ??= 1e4*...StrengthScaleSpine*MuscleParameters.MuscleVolumeSIScaled/(Lf0); ///< PCSA (cm2) of the individual element is total volumen divided by the sum of muscle element fiber lengths.
            Vol0 = (1e-4*PCSA) * Lf0; // New calculation of the vol for the specific muscle branch
        };
        #endif

        #if BM_TRUNK_MUSCLES
        AnyMuscleModel LTplL4SIPS = {
            AnyFolder& MuscleParameters = ....Data.unscaled.ModelParameters.Muscles.ErectorSpinae.LTplL4SIPS;
            AnyIntVar MuscleElemNo = 1; ///< The number of this element of the muscle
            AnyIntVar MuscleElemAmount = MuscleParameters.MuscleElemAmount; ///< The total amount of elements for this muscle
            F0 ??= ...DefaultMusPar.PCSAfactor*PCSA; ///< Maximum force output at optimum fiber length
            Lf0 ??= MuscleParameters.OptimalFiberlength / cos(pi/180*MuscleParameters.Pennationangle); //< Optimal fiber length corrected by pennation angle
            AnyVar PCSA ??= 1e4*...StrengthScaleSpine*MuscleParameters.MuscleVolumeSIScaled/(Lf0); ///< PCSA (cm2) of the individual element is total volumen divided by the sum of muscle element fiber lengths.
            Vol0 = (1e-4*PCSA) * Lf0; // New calculation of the vol for the specific muscle branch
        };
        #endif

        #if BM_TRUNK_MUSCLES
        AnyMuscleModel LTplL5Ilium = {
            AnyFolder& MuscleParameters = ....Data.unscaled.ModelParameters.Muscles.ErectorSpinae.LTplL5Ilium;
            AnyIntVar MuscleElemNo = 1; ///< The number of this element of the muscle
            AnyIntVar MuscleElemAmount = MuscleParameters.MuscleElemAmount; ///< The total amount of elements for this muscle
            F0 ??= ...DefaultMusPar.PCSAfactor*PCSA; ///< Maximum force output at optimum fiber length
            Lf0 ??= MuscleParameters.OptimalFiberlength / cos(pi/180*MuscleParameters.Pennationangle); //< Optimal fiber length corrected by pennation angle
            AnyVar PCSA ??= 1e4*...StrengthScaleSpine*MuscleParameters.MuscleVolumeSIScaled/(Lf0); ///< PCSA (cm2) of the individual element is total volumen divided by the sum of muscle element fiber lengths.
            Vol0 = (1e-4*PCSA) * Lf0; // New calculation of the vol for the specific muscle branch
        };
        #endif

        #if BM_TRUNK_MUSCLES
        AnyMuscleModel ILptC5SIPS = {
            AnyFolder& MuscleParameters = ....Data.unscaled.ModelParameters.Muscles.ErectorSpinae.ILptC5SIPS;
            AnyIntVar MuscleElemNo = 1; ///< The number of this element of the muscle
            AnyIntVar MuscleElemAmount = MuscleParameters.MuscleElemAmount; ///< The total amount of elements for this muscle
            F0 ??= ...DefaultMusPar.PCSAfactor*PCSA; ///< Maximum force output at optimum fiber length
            Lf0 ??= MuscleParameters.OptimalFiberlength / cos(pi/180*MuscleParameters.Pennationangle); //< Optimal fiber length corrected by pennation angle
            AnyVar PCSA ??= 1e4*...StrengthScaleSpine*MuscleParameters.MuscleVolumeSIScaled/(Lf0); ///< PCSA (cm2) of the individual element is total volumen divided by the sum of muscle element fiber lengths.
            Vol0 = (1e-4*PCSA) * Lf0; // New calculation of the vol for the specific muscle branch
        };
        #endif

        #if BM_TRUNK_MUSCLES
        AnyMuscleModel ILptC6SIPS = {
            AnyFolder& MuscleParameters = ....Data.unscaled.ModelParameters.Muscles.ErectorSpinae.ILptC6SIPS;
            AnyIntVar MuscleElemNo = 1; ///< The number of this element of the muscle
            AnyIntVar MuscleElemAmount = MuscleParameters.MuscleElemAmount; ///< The total amount of elements for this muscle
            F0 ??= ...DefaultMusPar.PCSAfactor*PCSA; ///< Maximum force output at optimum fiber length
            Lf0 ??= MuscleParameters.OptimalFiberlength / cos(pi/180*MuscleParameters.Pennationangle); //< Optimal fiber length corrected by pennation angle
            AnyVar PCSA ??= 1e4*...StrengthScaleSpine*MuscleParameters.MuscleVolumeSIScaled/(Lf0); ///< PCSA (cm2) of the individual element is total volumen divided by the sum of muscle element fiber lengths.
            Vol0 = (1e-4*PCSA) * Lf0; // New calculation of the vol for the specific muscle branch
        };
        #endif

        #if BM_TRUNK_MUSCLES
        AnyMuscleModel ILptC7CI = {
            AnyFolder& MuscleParameters = ....Data.unscaled.ModelParameters.Muscles.ErectorSpinae.ILptC7CI;
            AnyIntVar MuscleElemNo = 1; ///< The number of this element of the muscle
            AnyIntVar MuscleElemAmount = MuscleParameters.MuscleElemAmount; ///< The total amount of elements for this muscle
            F0 ??= ...DefaultMusPar.PCSAfactor*PCSA; ///< Maximum force output at optimum fiber length
            Lf0 ??= MuscleParameters.OptimalFiberlength / cos(pi/180*MuscleParameters.Pennationangle); //< Optimal fiber length corrected by pennation angle
            AnyVar PCSA ??= 1e4*...StrengthScaleSpine*MuscleParameters.MuscleVolumeSIScaled/(Lf0); ///< PCSA (cm2) of the individual element is total volumen divided by the sum of muscle element fiber lengths.
            Vol0 = (1e-4*PCSA) * Lf0; // New calculation of the vol for the specific muscle branch
        };
        #endif

        #if BM_TRUNK_MUSCLES
        AnyMuscleModel ILptC8CI = {
            AnyFolder& MuscleParameters = ....Data.unscaled.ModelParameters.Muscles.ErectorSpinae.ILptC8CI;
            AnyIntVar MuscleElemNo = 1; ///< The number of this element of the muscle
            AnyIntVar MuscleElemAmount = MuscleParameters.MuscleElemAmount; ///< The total amount of elements for this muscle
            F0 ??= ...DefaultMusPar.PCSAfactor*PCSA; ///< Maximum force output at optimum fiber length
            Lf0 ??= MuscleParameters.OptimalFiberlength / cos(pi/180*MuscleParameters.Pennationangle); //< Optimal fiber length corrected by pennation angle
            AnyVar PCSA ??= 1e4*...StrengthScaleSpine*MuscleParameters.MuscleVolumeSIScaled/(Lf0); ///< PCSA (cm2) of the individual element is total volumen divided by the sum of muscle element fiber lengths.
            Vol0 = (1e-4*PCSA) * Lf0; // New calculation of the vol for the specific muscle branch
        };
        #endif

        #if BM_TRUNK_MUSCLES
        AnyMuscleModel ILptC9CI = {
            AnyFolder& MuscleParameters = ....Data.unscaled.ModelParameters.Muscles.ErectorSpinae.ILptC9CI;
            AnyIntVar MuscleElemNo = 1; ///< The number of this element of the muscle
            AnyIntVar MuscleElemAmount = MuscleParameters.MuscleElemAmount; ///< The total amount of elements for this muscle
            F0 ??= ...DefaultMusPar.PCSAfactor*PCSA; ///< Maximum force output at optimum fiber length
            Lf0 ??= MuscleParameters.OptimalFiberlength / cos(pi/180*MuscleParameters.Pennationangle); //< Optimal fiber length corrected by pennation angle
            AnyVar PCSA ??= 1e4*...StrengthScaleSpine*MuscleParameters.MuscleVolumeSIScaled/(Lf0); ///< PCSA (cm2) of the individual element is total volumen divided by the sum of muscle element fiber lengths.
            Vol0 = (1e-4*PCSA) * Lf0; // New calculation of the vol for the specific muscle branch
        };
        #endif

        #if BM_TRUNK_MUSCLES
        AnyMuscleModel ILptC10CI = {
            AnyFolder& MuscleParameters = ....Data.unscaled.ModelParameters.Muscles.ErectorSpinae.ILptC10CI;
            AnyIntVar MuscleElemNo = 1; ///< The number of this element of the muscle
            AnyIntVar MuscleElemAmount = MuscleParameters.MuscleElemAmount; ///< The total amount of elements for this muscle
            F0 ??= ...DefaultMusPar.PCSAfactor*PCSA; ///< Maximum force output at optimum fiber length
            Lf0 ??= MuscleParameters.OptimalFiberlength / cos(pi/180*MuscleParameters.Pennationangle); //< Optimal fiber length corrected by pennation angle
            AnyVar PCSA ??= 1e4*...StrengthScaleSpine*MuscleParameters.MuscleVolumeSIScaled/(Lf0); ///< PCSA (cm2) of the individual element is total volumen divided by the sum of muscle element fiber lengths.
            Vol0 = (1e-4*PCSA) * Lf0; // New calculation of the vol for the specific muscle branch
        };
        #endif

        #if BM_TRUNK_MUSCLES
        AnyMuscleModel ILptC11CI = {
            AnyFolder& MuscleParameters = ....Data.unscaled.ModelParameters.Muscles.ErectorSpinae.ILptC11CI;
            AnyIntVar MuscleElemNo = 1; ///< The number of this element of the muscle
            AnyIntVar MuscleElemAmount = MuscleParameters.MuscleElemAmount; ///< The total amount of elements for this muscle
            F0 ??= ...DefaultMusPar.PCSAfactor*PCSA; ///< Maximum force output at optimum fiber length
            Lf0 ??= MuscleParameters.OptimalFiberlength / cos(pi/180*MuscleParameters.Pennationangle); //< Optimal fiber length corrected by pennation angle
            AnyVar PCSA ??= 1e4*...StrengthScaleSpine*MuscleParameters.MuscleVolumeSIScaled/(Lf0); ///< PCSA (cm2) of the individual element is total volumen divided by the sum of muscle element fiber lengths.
            Vol0 = (1e-4*PCSA) * Lf0; // New calculation of the vol for the specific muscle branch
        };
        #endif

        #if BM_TRUNK_MUSCLES
        AnyMuscleModel ILptC12CI = {
            AnyFolder& MuscleParameters = ....Data.unscaled.ModelParameters.Muscles.ErectorSpinae.ILptC12CI;
            AnyIntVar MuscleElemNo = 1; ///< The number of this element of the muscle
            AnyIntVar MuscleElemAmount = MuscleParameters.MuscleElemAmount; ///< The total amount of elements for this muscle
            F0 ??= ...DefaultMusPar.PCSAfactor*PCSA; ///< Maximum force output at optimum fiber length
            Lf0 ??= MuscleParameters.OptimalFiberlength / cos(pi/180*MuscleParameters.Pennationangle); //< Optimal fiber length corrected by pennation angle
            AnyVar PCSA ??= 1e4*...StrengthScaleSpine*MuscleParameters.MuscleVolumeSIScaled/(Lf0); ///< PCSA (cm2) of the individual element is total volumen divided by the sum of muscle element fiber lengths.
            Vol0 = (1e-4*PCSA) * Lf0; // New calculation of the vol for the specific muscle branch
        };
        #endif

        #if BM_TRUNK_MUSCLES
        AnyMuscleModel LTptT1L1 = {
            AnyFolder& MuscleParameters = ....Data.unscaled.ModelParameters.Muscles.ErectorSpinae.LTptT1L1;
            AnyIntVar MuscleElemNo = 1; ///< The number of this element of the muscle
            AnyIntVar MuscleElemAmount = MuscleParameters.MuscleElemAmount; ///< The total amount of elements for this muscle
            F0 ??= ...DefaultMusPar.PCSAfactor*PCSA; ///< Maximum force output at optimum fiber length
            Lf0 ??= MuscleParameters.OptimalFiberlength / cos(pi/180*MuscleParameters.Pennationangle); //< Optimal fiber length corrected by pennation angle
            AnyVar PCSA ??= 1e4*...StrengthScaleSpine*MuscleParameters.MuscleVolumeSIScaled/(Lf0); ///< PCSA (cm2) of the individual element is total volumen divided by the sum of muscle element fiber lengths.
            Vol0 = (1e-4*PCSA) * Lf0; // New calculation of the vol for the specific muscle branch
        };
        #endif

        #if BM_TRUNK_MUSCLES
        AnyMuscleModel LTptT2L2 = {
            AnyFolder& MuscleParameters = ....Data.unscaled.ModelParameters.Muscles.ErectorSpinae.LTptT2L2;
            AnyIntVar MuscleElemNo = 1; ///< The number of this element of the muscle
            AnyIntVar MuscleElemAmount = MuscleParameters.MuscleElemAmount; ///< The total amount of elements for this muscle
            F0 ??= ...DefaultMusPar.PCSAfactor*PCSA; ///< Maximum force output at optimum fiber length
            Lf0 ??= MuscleParameters.OptimalFiberlength / cos(pi/180*MuscleParameters.Pennationangle); //< Optimal fiber length corrected by pennation angle
            AnyVar PCSA ??= 1e4*...StrengthScaleSpine*MuscleParameters.MuscleVolumeSIScaled/(Lf0); ///< PCSA (cm2) of the individual element is total volumen divided by the sum of muscle element fiber lengths.
            Vol0 = (1e-4*PCSA) * Lf0; // New calculation of the vol for the specific muscle branch
        };
        #endif

        #if BM_TRUNK_MUSCLES
        AnyMuscleModel LTptT3L3 = {
            AnyFolder& MuscleParameters = ....Data.unscaled.ModelParameters.Muscles.ErectorSpinae.LTptT3L3;
            AnyIntVar MuscleElemNo = 1; ///< The number of this element of the muscle
            AnyIntVar MuscleElemAmount = MuscleParameters.MuscleElemAmount; ///< The total amount of elements for this muscle
            F0 ??= ...DefaultMusPar.PCSAfactor*PCSA; ///< Maximum force output at optimum fiber length
            Lf0 ??= MuscleParameters.OptimalFiberlength / cos(pi/180*MuscleParameters.Pennationangle); //< Optimal fiber length corrected by pennation angle
            AnyVar PCSA ??= 1e4*...StrengthScaleSpine*MuscleParameters.MuscleVolumeSIScaled/(Lf0); ///< PCSA (cm2) of the individual element is total volumen divided by the sum of muscle element fiber lengths.
            Vol0 = (1e-4*PCSA) * Lf0; // New calculation of the vol for the specific muscle branch
        };
        #endif

        #if BM_TRUNK_MUSCLES
        AnyMuscleModel LTptT4L4 = {
            AnyFolder& MuscleParameters = ....Data.unscaled.ModelParameters.Muscles.ErectorSpinae.LTptT4L4;
            AnyIntVar MuscleElemNo = 1; ///< The number of this element of the muscle
            AnyIntVar MuscleElemAmount = MuscleParameters.MuscleElemAmount; ///< The total amount of elements for this muscle
            F0 ??= ...DefaultMusPar.PCSAfactor*PCSA; ///< Maximum force output at optimum fiber length
            Lf0 ??= MuscleParameters.OptimalFiberlength / cos(pi/180*MuscleParameters.Pennationangle); //< Optimal fiber length corrected by pennation angle
            AnyVar PCSA ??= 1e4*...StrengthScaleSpine*MuscleParameters.MuscleVolumeSIScaled/(Lf0); ///< PCSA (cm2) of the individual element is total volumen divided by the sum of muscle element fiber lengths.
            Vol0 = (1e-4*PCSA) * Lf0; // New calculation of the vol for the specific muscle branch
        };
        #endif

        #if BM_TRUNK_MUSCLES
        AnyMuscleModel LTptT5L5 = {
            AnyFolder& MuscleParameters = ....Data.unscaled.ModelParameters.Muscles.ErectorSpinae.LTptT5L5;
            AnyIntVar MuscleElemNo = 1; ///< The number of this element of the muscle
            AnyIntVar MuscleElemAmount = MuscleParameters.MuscleElemAmount; ///< The total amount of elements for this muscle
            F0 ??= ...DefaultMusPar.PCSAfactor*PCSA; ///< Maximum force output at optimum fiber length
            Lf0 ??= MuscleParameters.OptimalFiberlength / cos(pi/180*MuscleParameters.Pennationangle); //< Optimal fiber length corrected by pennation angle
            AnyVar PCSA ??= 1e4*...StrengthScaleSpine*MuscleParameters.MuscleVolumeSIScaled/(Lf0); ///< PCSA (cm2) of the individual element is total volumen divided by the sum of muscle element fiber lengths.
            Vol0 = (1e-4*PCSA) * Lf0; // New calculation of the vol for the specific muscle branch
        };
        #endif

        #if BM_TRUNK_MUSCLES
        AnyMuscleModel LTptT6S1 = {
            AnyFolder& MuscleParameters = ....Data.unscaled.ModelParameters.Muscles.ErectorSpinae.LTptT6S1;
            AnyIntVar MuscleElemNo = 1; ///< The number of this element of the muscle
            AnyIntVar MuscleElemAmount = MuscleParameters.MuscleElemAmount; ///< The total amount of elements for this muscle
            F0 ??= ...DefaultMusPar.PCSAfactor*PCSA; ///< Maximum force output at optimum fiber length
            Lf0 ??= MuscleParameters.OptimalFiberlength / cos(pi/180*MuscleParameters.Pennationangle); //< Optimal fiber length corrected by pennation angle
            AnyVar PCSA ??= 1e4*...StrengthScaleSpine*MuscleParameters.MuscleVolumeSIScaled/(Lf0); ///< PCSA (cm2) of the individual element is total volumen divided by the sum of muscle element fiber lengths.
            Vol0 = (1e-4*PCSA) * Lf0; // New calculation of the vol for the specific muscle branch
        };
        #endif

        #if BM_TRUNK_MUSCLES
        AnyMuscleModel LTptT7S2 = {
            AnyFolder& MuscleParameters = ....Data.unscaled.ModelParameters.Muscles.ErectorSpinae.LTptT7S2;
            AnyIntVar MuscleElemNo = 1; ///< The number of this element of the muscle
            AnyIntVar MuscleElemAmount = MuscleParameters.MuscleElemAmount; ///< The total amount of elements for this muscle
            F0 ??= ...DefaultMusPar.PCSAfactor*PCSA; ///< Maximum force output at optimum fiber length
            Lf0 ??= MuscleParameters.OptimalFiberlength / cos(pi/180*MuscleParameters.Pennationangle); //< Optimal fiber length corrected by pennation angle
            AnyVar PCSA ??= 1e4*...StrengthScaleSpine*MuscleParameters.MuscleVolumeSIScaled/(Lf0); ///< PCSA (cm2) of the individual element is total volumen divided by the sum of muscle element fiber lengths.
            Vol0 = (1e-4*PCSA) * Lf0; // New calculation of the vol for the specific muscle branch
        };
        #endif

        #if BM_TRUNK_MUSCLES
        AnyMuscleModel LTptT8S3 = {
            AnyFolder& MuscleParameters = ....Data.unscaled.ModelParameters.Muscles.ErectorSpinae.LTptT8S3;
            AnyIntVar MuscleElemNo = 1; ///< The number of this element of the muscle
            AnyIntVar MuscleElemAmount = MuscleParameters.MuscleElemAmount; ///< The total amount of elements for this muscle
            F0 ??= ...DefaultMusPar.PCSAfactor*PCSA; ///< Maximum force output at optimum fiber length
            Lf0 ??= MuscleParameters.OptimalFiberlength / cos(pi/180*MuscleParameters.Pennationangle); //< Optimal fiber length corrected by pennation angle
            AnyVar PCSA ??= 1e4*...StrengthScaleSpine*MuscleParameters.MuscleVolumeSIScaled/(Lf0); ///< PCSA (cm2) of the individual element is total volumen divided by the sum of muscle element fiber lengths.
            Vol0 = (1e-4*PCSA) * Lf0; // New calculation of the vol for the specific muscle branch
        };
        #endif

        #if BM_TRUNK_MUSCLES
        AnyMuscleModel LTptT9S4 = {
            AnyFolder& MuscleParameters = ....Data.unscaled.ModelParameters.Muscles.ErectorSpinae.LTptT9S4;
            AnyIntVar MuscleElemNo = 1; ///< The number of this element of the muscle
            AnyIntVar MuscleElemAmount = MuscleParameters.MuscleElemAmount; ///< The total amount of elements for this muscle
            F0 ??= ...DefaultMusPar.PCSAfactor*PCSA; ///< Maximum force output at optimum fiber length
            Lf0 ??= MuscleParameters.OptimalFiberlength / cos(pi/180*MuscleParameters.Pennationangle); //< Optimal fiber length corrected by pennation angle
            AnyVar PCSA ??= 1e4*...StrengthScaleSpine*MuscleParameters.MuscleVolumeSIScaled/(Lf0); ///< PCSA (cm2) of the individual element is total volumen divided by the sum of muscle element fiber lengths.
            Vol0 = (1e-4*PCSA) * Lf0; // New calculation of the vol for the specific muscle branch
        };
        #endif

        #if BM_TRUNK_MUSCLES
        AnyMuscleModel LTptT10Sacrum = {
            AnyFolder& MuscleParameters = ....Data.unscaled.ModelParameters.Muscles.ErectorSpinae.LTptT10Sacrum;
            AnyIntVar MuscleElemNo = 1; ///< The number of this element of the muscle
            AnyIntVar MuscleElemAmount = MuscleParameters.MuscleElemAmount; ///< The total amount of elements for this muscle
            F0 ??= ...DefaultMusPar.PCSAfactor*PCSA; ///< Maximum force output at optimum fiber length
            Lf0 ??= MuscleParameters.OptimalFiberlength / cos(pi/180*MuscleParameters.Pennationangle); //< Optimal fiber length corrected by pennation angle
            AnyVar PCSA ??= 1e4*...StrengthScaleSpine*MuscleParameters.MuscleVolumeSIScaled/(Lf0); ///< PCSA (cm2) of the individual element is total volumen divided by the sum of muscle element fiber lengths.
            Vol0 = (1e-4*PCSA) * Lf0; // New calculation of the vol for the specific muscle branch
        };
        #endif

        #if BM_TRUNK_MUSCLES
        AnyMuscleModel LTptT11Sacrum = {
            AnyFolder& MuscleParameters = ....Data.unscaled.ModelParameters.Muscles.ErectorSpinae.LTptT11Sacrum;
            AnyIntVar MuscleElemNo = 1; ///< The number of this element of the muscle
            AnyIntVar MuscleElemAmount = MuscleParameters.MuscleElemAmount; ///< The total amount of elements for this muscle
            F0 ??= ...DefaultMusPar.PCSAfactor*PCSA; ///< Maximum force output at optimum fiber length
            Lf0 ??= MuscleParameters.OptimalFiberlength / cos(pi/180*MuscleParameters.Pennationangle); //< Optimal fiber length corrected by pennation angle
            AnyVar PCSA ??= 1e4*...StrengthScaleSpine*MuscleParameters.MuscleVolumeSIScaled/(Lf0); ///< PCSA (cm2) of the individual element is total volumen divided by the sum of muscle element fiber lengths.
            Vol0 = (1e-4*PCSA) * Lf0; // New calculation of the vol for the specific muscle branch
        };
        #endif

        #if BM_TRUNK_MUSCLES
        AnyMuscleModel LTptT12Sacrum = {
            AnyFolder& MuscleParameters = ....Data.unscaled.ModelParameters.Muscles.ErectorSpinae.LTptT12Sacrum;
            AnyIntVar MuscleElemNo = 1; ///< The number of this element of the muscle
            AnyIntVar MuscleElemAmount = MuscleParameters.MuscleElemAmount; ///< The total amount of elements for this muscle
            F0 ??= ...DefaultMusPar.PCSAfactor*PCSA; ///< Maximum force output at optimum fiber length
            Lf0 ??= MuscleParameters.OptimalFiberlength / cos(pi/180*MuscleParameters.Pennationangle); //< Optimal fiber length corrected by pennation angle
            AnyVar PCSA ??= 1e4*...StrengthScaleSpine*MuscleParameters.MuscleVolumeSIScaled/(Lf0); ///< PCSA (cm2) of the individual element is total volumen divided by the sum of muscle element fiber lengths.
            Vol0 = (1e-4*PCSA) * Lf0; // New calculation of the vol for the specific muscle branch
        };
        #endif

        #if BM_TRUNK_MUSCLES
        AnyMuscleModel LTptC3L3 = {
            AnyFolder& MuscleParameters = ....Data.unscaled.ModelParameters.Muscles.ErectorSpinae.LTptC3L3;
            AnyIntVar MuscleElemNo = 1; ///< The number of this element of the muscle
            AnyIntVar MuscleElemAmount = MuscleParameters.MuscleElemAmount; ///< The total amount of elements for this muscle
            F0 ??= ...DefaultMusPar.PCSAfactor*PCSA; ///< Maximum force output at optimum fiber length
            Lf0 ??= MuscleParameters.OptimalFiberlength / cos(pi/180*MuscleParameters.Pennationangle); //< Optimal fiber length corrected by pennation angle
            AnyVar PCSA ??= 1e4*...StrengthScaleSpine*MuscleParameters.MuscleVolumeSIScaled/(Lf0); ///< PCSA (cm2) of the individual element is total volumen divided by the sum of muscle element fiber lengths.
            Vol0 = (1e-4*PCSA) * Lf0; // New calculation of the vol for the specific muscle branch
        };
        #endif

        #if BM_TRUNK_MUSCLES
        AnyMuscleModel LTptC4L4 = {
            AnyFolder& MuscleParameters = ....Data.unscaled.ModelParameters.Muscles.ErectorSpinae.LTptC4L4;
            AnyIntVar MuscleElemNo = 1; ///< The number of this element of the muscle
            AnyIntVar MuscleElemAmount = MuscleParameters.MuscleElemAmount; ///< The total amount of elements for this muscle
            F0 ??= ...DefaultMusPar.PCSAfactor*PCSA; ///< Maximum force output at optimum fiber length
            Lf0 ??= MuscleParameters.OptimalFiberlength / cos(pi/180*MuscleParameters.Pennationangle); //< Optimal fiber length corrected by pennation angle
            AnyVar PCSA ??= 1e4*...StrengthScaleSpine*MuscleParameters.MuscleVolumeSIScaled/(Lf0); ///< PCSA (cm2) of the individual element is total volumen divided by the sum of muscle element fiber lengths.
            Vol0 = (1e-4*PCSA) * Lf0; // New calculation of the vol for the specific muscle branch
        };
        #endif

        #if BM_TRUNK_MUSCLES
        AnyMuscleModel LTptC5L5 = {
            AnyFolder& MuscleParameters = ....Data.unscaled.ModelParameters.Muscles.ErectorSpinae.LTptC5L5;
            AnyIntVar MuscleElemNo = 1; ///< The number of this element of the muscle
            AnyIntVar MuscleElemAmount = MuscleParameters.MuscleElemAmount; ///< The total amount of elements for this muscle
            F0 ??= ...DefaultMusPar.PCSAfactor*PCSA; ///< Maximum force output at optimum fiber length
            Lf0 ??= MuscleParameters.OptimalFiberlength / cos(pi/180*MuscleParameters.Pennationangle); //< Optimal fiber length corrected by pennation angle
            AnyVar PCSA ??= 1e4*...StrengthScaleSpine*MuscleParameters.MuscleVolumeSIScaled/(Lf0); ///< PCSA (cm2) of the individual element is total volumen divided by the sum of muscle element fiber lengths.
            Vol0 = (1e-4*PCSA) * Lf0; // New calculation of the vol for the specific muscle branch
        };
        #endif

        #if BM_TRUNK_MUSCLES
        AnyMuscleModel LTptC6S1 = {
            AnyFolder& MuscleParameters = ....Data.unscaled.ModelParameters.Muscles.ErectorSpinae.LTptC6S1;
            AnyIntVar MuscleElemNo = 1; ///< The number of this element of the muscle
            AnyIntVar MuscleElemAmount = MuscleParameters.MuscleElemAmount; ///< The total amount of elements for this muscle
            F0 ??= ...DefaultMusPar.PCSAfactor*PCSA; ///< Maximum force output at optimum fiber length
            Lf0 ??= MuscleParameters.OptimalFiberlength / cos(pi/180*MuscleParameters.Pennationangle); //< Optimal fiber length corrected by pennation angle
            AnyVar PCSA ??= 1e4*...StrengthScaleSpine*MuscleParameters.MuscleVolumeSIScaled/(Lf0); ///< PCSA (cm2) of the individual element is total volumen divided by the sum of muscle element fiber lengths.
            Vol0 = (1e-4*PCSA) * Lf0; // New calculation of the vol for the specific muscle branch
        };
        #endif

        #if BM_TRUNK_MUSCLES
        AnyMuscleModel LTptC7S2 = {
            AnyFolder& MuscleParameters = ....Data.unscaled.ModelParameters.Muscles.ErectorSpinae.LTptC7S2;
            AnyIntVar MuscleElemNo = 1; ///< The number of this element of the muscle
            AnyIntVar MuscleElemAmount = MuscleParameters.MuscleElemAmount; ///< The total amount of elements for this muscle
            F0 ??= ...DefaultMusPar.PCSAfactor*PCSA; ///< Maximum force output at optimum fiber length
            Lf0 ??= MuscleParameters.OptimalFiberlength / cos(pi/180*MuscleParameters.Pennationangle); //< Optimal fiber length corrected by pennation angle
            AnyVar PCSA ??= 1e4*...StrengthScaleSpine*MuscleParameters.MuscleVolumeSIScaled/(Lf0); ///< PCSA (cm2) of the individual element is total volumen divided by the sum of muscle element fiber lengths.
            Vol0 = (1e-4*PCSA) * Lf0; // New calculation of the vol for the specific muscle branch
        };
        #endif

        #if BM_TRUNK_MUSCLES
        AnyMuscleModel LTptC8S3 = {
            AnyFolder& MuscleParameters = ....Data.unscaled.ModelParameters.Muscles.ErectorSpinae.LTptC8S3;
            AnyIntVar MuscleElemNo = 1; ///< The number of this element of the muscle
            AnyIntVar MuscleElemAmount = MuscleParameters.MuscleElemAmount; ///< The total amount of elements for this muscle
            F0 ??= ...DefaultMusPar.PCSAfactor*PCSA; ///< Maximum force output at optimum fiber length
            Lf0 ??= MuscleParameters.OptimalFiberlength / cos(pi/180*MuscleParameters.Pennationangle); //< Optimal fiber length corrected by pennation angle
            AnyVar PCSA ??= 1e4*...StrengthScaleSpine*MuscleParameters.MuscleVolumeSIScaled/(Lf0); ///< PCSA (cm2) of the individual element is total volumen divided by the sum of muscle element fiber lengths.
            Vol0 = (1e-4*PCSA) * Lf0; // New calculation of the vol for the specific muscle branch
        };
        #endif

        #if BM_TRUNK_MUSCLES
        AnyMuscleModel LTptC9S4 = {
            AnyFolder& MuscleParameters = ....Data.unscaled.ModelParameters.Muscles.ErectorSpinae.LTptC9S4;
            AnyIntVar MuscleElemNo = 1; ///< The number of this element of the muscle
            AnyIntVar MuscleElemAmount = MuscleParameters.MuscleElemAmount; ///< The total amount of elements for this muscle
            F0 ??= ...DefaultMusPar.PCSAfactor*PCSA; ///< Maximum force output at optimum fiber length
            Lf0 ??= MuscleParameters.OptimalFiberlength / cos(pi/180*MuscleParameters.Pennationangle); //< Optimal fiber length corrected by pennation angle
            AnyVar PCSA ??= 1e4*...StrengthScaleSpine*MuscleParameters.MuscleVolumeSIScaled/(Lf0); ///< PCSA (cm2) of the individual element is total volumen divided by the sum of muscle element fiber lengths.
            Vol0 = (1e-4*PCSA) * Lf0; // New calculation of the vol for the specific muscle branch
        };
        #endif

        #if BM_TRUNK_MUSCLES
        AnyMuscleModel LTptC10Sacrum = {
            AnyFolder& MuscleParameters = ....Data.unscaled.ModelParameters.Muscles.ErectorSpinae.LTptC10Sacrum;
            AnyIntVar MuscleElemNo = 1; ///< The number of this element of the muscle
            AnyIntVar MuscleElemAmount = MuscleParameters.MuscleElemAmount; ///< The total amount of elements for this muscle
            F0 ??= ...DefaultMusPar.PCSAfactor*PCSA; ///< Maximum force output at optimum fiber length
            Lf0 ??= MuscleParameters.OptimalFiberlength / cos(pi/180*MuscleParameters.Pennationangle); //< Optimal fiber length corrected by pennation angle
            AnyVar PCSA ??= 1e4*...StrengthScaleSpine*MuscleParameters.MuscleVolumeSIScaled/(Lf0); ///< PCSA (cm2) of the individual element is total volumen divided by the sum of muscle element fiber lengths.
            Vol0 = (1e-4*PCSA) * Lf0; // New calculation of the vol for the specific muscle branch
        };
        #endif

        #if BM_TRUNK_MUSCLES
        AnyMuscleModel LTptC11Sacrum = {
            AnyFolder& MuscleParameters = ....Data.unscaled.ModelParameters.Muscles.ErectorSpinae.LTptC11Sacrum;
            AnyIntVar MuscleElemNo = 1; ///< The number of this element of the muscle
            AnyIntVar MuscleElemAmount = MuscleParameters.MuscleElemAmount; ///< The total amount of elements for this muscle
            F0 ??= ...DefaultMusPar.PCSAfactor*PCSA; ///< Maximum force output at optimum fiber length
            Lf0 ??= MuscleParameters.OptimalFiberlength / cos(pi/180*MuscleParameters.Pennationangle); //< Optimal fiber length corrected by pennation angle
            AnyVar PCSA ??= 1e4*...StrengthScaleSpine*MuscleParameters.MuscleVolumeSIScaled/(Lf0); ///< PCSA (cm2) of the individual element is total volumen divided by the sum of muscle element fiber lengths.
            Vol0 = (1e-4*PCSA) * Lf0; // New calculation of the vol for the specific muscle branch
        };
        #endif

        #if BM_TRUNK_MUSCLES
        AnyMuscleModel LTptC12Sacrum = {
            AnyFolder& MuscleParameters = ....Data.unscaled.ModelParameters.Muscles.ErectorSpinae.LTptC12Sacrum;
            AnyIntVar MuscleElemNo = 1; ///< The number of this element of the muscle
            AnyIntVar MuscleElemAmount = MuscleParameters.MuscleElemAmount; ///< The total amount of elements for this muscle
            F0 ??= ...DefaultMusPar.PCSAfactor*PCSA; ///< Maximum force output at optimum fiber length
            Lf0 ??= MuscleParameters.OptimalFiberlength / cos(pi/180*MuscleParameters.Pennationangle); //< Optimal fiber length corrected by pennation angle
            AnyVar PCSA ??= 1e4*...StrengthScaleSpine*MuscleParameters.MuscleVolumeSIScaled/(Lf0); ///< PCSA (cm2) of the individual element is total volumen divided by the sum of muscle element fiber lengths.
            Vol0 = (1e-4*PCSA) * Lf0; // New calculation of the vol for the specific muscle branch
        };
        #endif

        #if BM_TRUNK_MUSCLES
        AnyMuscleModel ITC7R7 = {
            AnyFolder& MuscleParameters = ....Data.unscaled.ModelParameters.Muscles.ErectorSpinae.ITC7R7;
            AnyIntVar MuscleElemNo = 1; ///< The number of this element of the muscle
            AnyIntVar MuscleElemAmount = MuscleParameters.MuscleElemAmount; ///< The total amount of elements for this muscle
            F0 ??= ...DefaultMusPar.PCSAfactor*PCSA; ///< Maximum force output at optimum fiber length
            Lf0 ??= MuscleParameters.OptimalFiberlength / cos(pi/180*MuscleParameters.Pennationangle); //< Optimal fiber length corrected by pennation angle
            AnyVar PCSA ??= 1e4*...StrengthScaleSpine*MuscleParameters.MuscleVolumeSIScaled/(Lf0); ///< PCSA (cm2) of the individual element is total volumen divided by the sum of muscle element fiber lengths.
            Vol0 = (1e-4*PCSA) * Lf0; // New calculation of the vol for the specific muscle branch
        };
        #endif

        #if BM_TRUNK_MUSCLES
        AnyMuscleModel ITR1R7 = {
            AnyFolder& MuscleParameters = ....Data.unscaled.ModelParameters.Muscles.ErectorSpinae.ITR1R7;
            AnyIntVar MuscleElemNo = 1; ///< The number of this element of the muscle
            AnyIntVar MuscleElemAmount = MuscleParameters.MuscleElemAmount; ///< The total amount of elements for this muscle
            F0 ??= ...DefaultMusPar.PCSAfactor*PCSA; ///< Maximum force output at optimum fiber length
            Lf0 ??= MuscleParameters.OptimalFiberlength / cos(pi/180*MuscleParameters.Pennationangle); //< Optimal fiber length corrected by pennation angle
            AnyVar PCSA ??= 1e4*...StrengthScaleSpine*MuscleParameters.MuscleVolumeSIScaled/(Lf0); ///< PCSA (cm2) of the individual element is total volumen divided by the sum of muscle element fiber lengths.
            Vol0 = (1e-4*PCSA) * Lf0; // New calculation of the vol for the specific muscle branch
        };
        #endif

        #if BM_TRUNK_MUSCLES
        AnyMuscleModel ITR2R8 = {
            AnyFolder& MuscleParameters = ....Data.unscaled.ModelParameters.Muscles.ErectorSpinae.ITR2R8;
            AnyIntVar MuscleElemNo = 1; ///< The number of this element of the muscle
            AnyIntVar MuscleElemAmount = MuscleParameters.MuscleElemAmount; ///< The total amount of elements for this muscle
            F0 ??= ...DefaultMusPar.PCSAfactor*PCSA; ///< Maximum force output at optimum fiber length
            Lf0 ??= MuscleParameters.OptimalFiberlength / cos(pi/180*MuscleParameters.Pennationangle); //< Optimal fiber length corrected by pennation angle
            AnyVar PCSA ??= 1e4*...StrengthScaleSpine*MuscleParameters.MuscleVolumeSIScaled/(Lf0); ///< PCSA (cm2) of the individual element is total volumen divided by the sum of muscle element fiber lengths.
            Vol0 = (1e-4*PCSA) * Lf0; // New calculation of the vol for the specific muscle branch
        };
        #endif

        #if BM_TRUNK_MUSCLES
        AnyMuscleModel ITR3R9 = {
            AnyFolder& MuscleParameters = ....Data.unscaled.ModelParameters.Muscles.ErectorSpinae.ITR3R9;
            AnyIntVar MuscleElemNo = 1; ///< The number of this element of the muscle
            AnyIntVar MuscleElemAmount = MuscleParameters.MuscleElemAmount; ///< The total amount of elements for this muscle
            F0 ??= ...DefaultMusPar.PCSAfactor*PCSA; ///< Maximum force output at optimum fiber length
            Lf0 ??= MuscleParameters.OptimalFiberlength / cos(pi/180*MuscleParameters.Pennationangle); //< Optimal fiber length corrected by pennation angle
            AnyVar PCSA ??= 1e4*...StrengthScaleSpine*MuscleParameters.MuscleVolumeSIScaled/(Lf0); ///< PCSA (cm2) of the individual element is total volumen divided by the sum of muscle element fiber lengths.
            Vol0 = (1e-4*PCSA) * Lf0; // New calculation of the vol for the specific muscle branch
        };
        #endif

        #if BM_TRUNK_MUSCLES
        AnyMuscleModel ITR4R10 = {
            AnyFolder& MuscleParameters = ....Data.unscaled.ModelParameters.Muscles.ErectorSpinae.ITR4R10;
            AnyIntVar MuscleElemNo = 1; ///< The number of this element of the muscle
            AnyIntVar MuscleElemAmount = MuscleParameters.MuscleElemAmount; ///< The total amount of elements for this muscle
            F0 ??= ...DefaultMusPar.PCSAfactor*PCSA; ///< Maximum force output at optimum fiber length
            Lf0 ??= MuscleParameters.OptimalFiberlength / cos(pi/180*MuscleParameters.Pennationangle); //< Optimal fiber length corrected by pennation angle
            AnyVar PCSA ??= 1e4*...StrengthScaleSpine*MuscleParameters.MuscleVolumeSIScaled/(Lf0); ///< PCSA (cm2) of the individual element is total volumen divided by the sum of muscle element fiber lengths.
            Vol0 = (1e-4*PCSA) * Lf0; // New calculation of the vol for the specific muscle branch
        };
        #endif

        #if BM_TRUNK_MUSCLES
        AnyMuscleModel ITR5T11 = {
            AnyFolder& MuscleParameters = ....Data.unscaled.ModelParameters.Muscles.ErectorSpinae.ITR5T11;
            AnyIntVar MuscleElemNo = 1; ///< The number of this element of the muscle
            AnyIntVar MuscleElemAmount = MuscleParameters.MuscleElemAmount; ///< The total amount of elements for this muscle
            F0 ??= ...DefaultMusPar.PCSAfactor*PCSA; ///< Maximum force output at optimum fiber length
            Lf0 ??= MuscleParameters.OptimalFiberlength / cos(pi/180*MuscleParameters.Pennationangle); //< Optimal fiber length corrected by pennation angle
            AnyVar PCSA ??= 1e4*...StrengthScaleSpine*MuscleParameters.MuscleVolumeSIScaled/(Lf0); ///< PCSA (cm2) of the individual element is total volumen divided by the sum of muscle element fiber lengths.
            Vol0 = (1e-4*PCSA) * Lf0; // New calculation of the vol for the specific muscle branch
        };
        #endif

        #if BM_TRUNK_MUSCLES
        AnyMuscleModel ITR6T12 = {
            AnyFolder& MuscleParameters = ....Data.unscaled.ModelParameters.Muscles.ErectorSpinae.ITR6T12;
            AnyIntVar MuscleElemNo = 1; ///< The number of this element of the muscle
            AnyIntVar MuscleElemAmount = MuscleParameters.MuscleElemAmount; ///< The total amount of elements for this muscle
            F0 ??= ...DefaultMusPar.PCSAfactor*PCSA; ///< Maximum force output at optimum fiber length
            Lf0 ??= MuscleParameters.OptimalFiberlength / cos(pi/180*MuscleParameters.Pennationangle); //< Optimal fiber length corrected by pennation angle
            AnyVar PCSA ??= 1e4*...StrengthScaleSpine*MuscleParameters.MuscleVolumeSIScaled/(Lf0); ///< PCSA (cm2) of the individual element is total volumen divided by the sum of muscle element fiber lengths.
            Vol0 = (1e-4*PCSA) * Lf0; // New calculation of the vol for the specific muscle branch
        };
        #endif

        #if BM_TRUNK_MUSCLES
        AnyMuscleModel ICptR3C4 = {
            AnyFolder& MuscleParameters = ....Data.unscaled.ModelParameters.Muscles.ErectorSpinae.ICptR3C4;
            AnyIntVar MuscleElemNo = 1; ///< The number of this element of the muscle
            AnyIntVar MuscleElemAmount = MuscleParameters.MuscleElemAmount; ///< The total amount of elements for this muscle
            F0 ??= ...DefaultMusPar.PCSAfactor*PCSA; ///< Maximum force output at optimum fiber length
            Lf0 ??= MuscleParameters.OptimalFiberlength / cos(pi/180*MuscleParameters.Pennationangle); //< Optimal fiber length corrected by pennation angle
            AnyVar PCSA ??= 1e4*...StrengthScaleSpine*MuscleParameters.MuscleVolumeSIScaled/(Lf0); ///< PCSA (cm2) of the individual element is total volumen divided by the sum of muscle element fiber lengths.
            Vol0 = (1e-4*PCSA) * Lf0; // New calculation of the vol for the specific muscle branch
        };
        #endif

        #if BM_TRUNK_MUSCLES
        AnyMuscleModel ICptR4C5 = {
            AnyFolder& MuscleParameters = ....Data.unscaled.ModelParameters.Muscles.ErectorSpinae.ICptR4C5;
            AnyIntVar MuscleElemNo = 1; ///< The number of this element of the muscle
            AnyIntVar MuscleElemAmount = MuscleParameters.MuscleElemAmount; ///< The total amount of elements for this muscle
            F0 ??= ...DefaultMusPar.PCSAfactor*PCSA; ///< Maximum force output at optimum fiber length
            Lf0 ??= MuscleParameters.OptimalFiberlength / cos(pi/180*MuscleParameters.Pennationangle); //< Optimal fiber length corrected by pennation angle
            AnyVar PCSA ??= 1e4*...StrengthScaleSpine*MuscleParameters.MuscleVolumeSIScaled/(Lf0); ///< PCSA (cm2) of the individual element is total volumen divided by the sum of muscle element fiber lengths.
            Vol0 = (1e-4*PCSA) * Lf0; // New calculation of the vol for the specific muscle branch
        };
        #endif

        #if BM_TRUNK_MUSCLES
        AnyMuscleModel ICptR5C6 = {
            AnyFolder& MuscleParameters = ....Data.unscaled.ModelParameters.Muscles.ErectorSpinae.ICptR5C6;
            AnyIntVar MuscleElemNo = 1; ///< The number of this element of the muscle
            AnyIntVar MuscleElemAmount = MuscleParameters.MuscleElemAmount; ///< The total amount of elements for this muscle
            F0 ??= ...DefaultMusPar.PCSAfactor*PCSA; ///< Maximum force output at optimum fiber length
            Lf0 ??= MuscleParameters.OptimalFiberlength / cos(pi/180*MuscleParameters.Pennationangle); //< Optimal fiber length corrected by pennation angle
            AnyVar PCSA ??= 1e4*...StrengthScaleSpine*MuscleParameters.MuscleVolumeSIScaled/(Lf0); ///< PCSA (cm2) of the individual element is total volumen divided by the sum of muscle element fiber lengths.
            Vol0 = (1e-4*PCSA) * Lf0; // New calculation of the vol for the specific muscle branch
        };
        #endif

        #if BM_TRUNK_MUSCLES
        AnyMuscleModel ICptR6C4 = {
            AnyFolder& MuscleParameters = ....Data.unscaled.ModelParameters.Muscles.ErectorSpinae.ICptR6C4;
            AnyIntVar MuscleElemNo = 1; ///< The number of this element of the muscle
            AnyIntVar MuscleElemAmount = MuscleParameters.MuscleElemAmount; ///< The total amount of elements for this muscle
            F0 ??= ...DefaultMusPar.PCSAfactor*PCSA; ///< Maximum force output at optimum fiber length
            Lf0 ??= MuscleParameters.OptimalFiberlength / cos(pi/180*MuscleParameters.Pennationangle); //< Optimal fiber length corrected by pennation angle
            AnyVar PCSA ??= 1e4*...StrengthScaleSpine*MuscleParameters.MuscleVolumeSIScaled/(Lf0); ///< PCSA (cm2) of the individual element is total volumen divided by the sum of muscle element fiber lengths.
            Vol0 = (1e-4*PCSA) * Lf0; // New calculation of the vol for the specific muscle branch
        };
        #endif

    };

    AnyFolder PsoasMajor = {

        #if BM_TRUNK_MUSCLES  | BM_LEG_MUSCLES_LEFT  |  BM_LEG_MUSCLES_RIGHT
        AnyMuscleModel PMT12I_TM = {
            AnyFolder& MuscleParameters = ....Data.unscaled.ModelParameters.Muscles.PsoasMajor.PMT12I_TM;
            AnyIntVar MuscleElemNo = 1; ///< The number of this element of the muscle
            AnyIntVar MuscleElemAmount = MuscleParameters.MuscleElemAmount; ///< The total amount of elements for this muscle
            F0 ??= ...DefaultMusPar.PCSAfactor*PCSA; ///< Maximum force output at optimum fiber length
            Lf0 ??= MuscleParameters.OptimalFiberlength / cos(pi/180*MuscleParameters.Pennationangle); //< Optimal fiber length corrected by pennation angle
            AnyVar PCSA ??= 1e4*...StrengthScaleSpine*MuscleParameters.MuscleVolumeSIScaled/(Lf0); ///< PCSA (cm2) of the individual element is total volumen divided by the sum of muscle element fiber lengths.
            Vol0 = (1e-4*PCSA) * Lf0; // New calculation of the vol for the specific muscle branch
        };
        #endif

        #if BM_TRUNK_MUSCLES  | BM_LEG_MUSCLES_LEFT  |  BM_LEG_MUSCLES_RIGHT
        AnyMuscleModel PML1I_TM = {
            AnyFolder& MuscleParameters = ....Data.unscaled.ModelParameters.Muscles.PsoasMajor.PML1I_TM;
            AnyIntVar MuscleElemNo = 1; ///< The number of this element of the muscle
            AnyIntVar MuscleElemAmount = MuscleParameters.MuscleElemAmount; ///< The total amount of elements for this muscle
            F0 ??= ...DefaultMusPar.PCSAfactor*PCSA; ///< Maximum force output at optimum fiber length
            Lf0 ??= MuscleParameters.OptimalFiberlength / cos(pi/180*MuscleParameters.Pennationangle); //< Optimal fiber length corrected by pennation angle
            AnyVar PCSA ??= 1e4*...StrengthScaleSpine*MuscleParameters.MuscleVolumeSIScaled/(Lf0); ///< PCSA (cm2) of the individual element is total volumen divided by the sum of muscle element fiber lengths.
            Vol0 = (1e-4*PCSA) * Lf0; // New calculation of the vol for the specific muscle branch
        };
        #endif

        #if BM_TRUNK_MUSCLES  | BM_LEG_MUSCLES_LEFT  |  BM_LEG_MUSCLES_RIGHT
        AnyMuscleModel PML1T_TM = {
            AnyFolder& MuscleParameters = ....Data.unscaled.ModelParameters.Muscles.PsoasMajor.PML1T_TM;
            AnyIntVar MuscleElemNo = 1; ///< The number of this element of the muscle
            AnyIntVar MuscleElemAmount = MuscleParameters.MuscleElemAmount; ///< The total amount of elements for this muscle
            F0 ??= ...DefaultMusPar.PCSAfactor*PCSA; ///< Maximum force output at optimum fiber length
            Lf0 ??= MuscleParameters.OptimalFiberlength / cos(pi/180*MuscleParameters.Pennationangle); //< Optimal fiber length corrected by pennation angle
            AnyVar PCSA ??= 1e4*...StrengthScaleSpine*MuscleParameters.MuscleVolumeSIScaled/(Lf0); ///< PCSA (cm2) of the individual element is total volumen divided by the sum of muscle element fiber lengths.
            Vol0 = (1e-4*PCSA) * Lf0; // New calculation of the vol for the specific muscle branch
        };
        #endif

        #if BM_TRUNK_MUSCLES  | BM_LEG_MUSCLES_LEFT  |  BM_LEG_MUSCLES_RIGHT
        AnyMuscleModel PML2I_TM = {
            AnyFolder& MuscleParameters = ....Data.unscaled.ModelParameters.Muscles.PsoasMajor.PML2I_TM;
            AnyIntVar MuscleElemNo = 1; ///< The number of this element of the muscle
            AnyIntVar MuscleElemAmount = MuscleParameters.MuscleElemAmount; ///< The total amount of elements for this muscle
            F0 ??= ...DefaultMusPar.PCSAfactor*PCSA; ///< Maximum force output at optimum fiber length
            Lf0 ??= MuscleParameters.OptimalFiberlength / cos(pi/180*MuscleParameters.Pennationangle); //< Optimal fiber length corrected by pennation angle
            AnyVar PCSA ??= 1e4*...StrengthScaleSpine*MuscleParameters.MuscleVolumeSIScaled/(Lf0); ///< PCSA (cm2) of the individual element is total volumen divided by the sum of muscle element fiber lengths.
            Vol0 = (1e-4*PCSA) * Lf0; // New calculation of the vol for the specific muscle branch
        };
        #endif

        #if BM_TRUNK_MUSCLES  | BM_LEG_MUSCLES_LEFT  |  BM_LEG_MUSCLES_RIGHT
        AnyMuscleModel PML2T_TM = {
            AnyFolder& MuscleParameters = ....Data.unscaled.ModelParameters.Muscles.PsoasMajor.PML2T_TM;
            AnyIntVar MuscleElemNo = 1; ///< The number of this element of the muscle
            AnyIntVar MuscleElemAmount = MuscleParameters.MuscleElemAmount; ///< The total amount of elements for this muscle
            F0 ??= ...DefaultMusPar.PCSAfactor*PCSA; ///< Maximum force output at optimum fiber length
            Lf0 ??= MuscleParameters.OptimalFiberlength / cos(pi/180*MuscleParameters.Pennationangle); //< Optimal fiber length corrected by pennation angle
            AnyVar PCSA ??= 1e4*...StrengthScaleSpine*MuscleParameters.MuscleVolumeSIScaled/(Lf0); ///< PCSA (cm2) of the individual element is total volumen divided by the sum of muscle element fiber lengths.
            Vol0 = (1e-4*PCSA) * Lf0; // New calculation of the vol for the specific muscle branch
        };
        #endif

        #if BM_TRUNK_MUSCLES  | BM_LEG_MUSCLES_LEFT  |  BM_LEG_MUSCLES_RIGHT
        AnyMuscleModel PML3I_TM = {
            AnyFolder& MuscleParameters = ....Data.unscaled.ModelParameters.Muscles.PsoasMajor.PML3I_TM;
            AnyIntVar MuscleElemNo = 1; ///< The number of this element of the muscle
            AnyIntVar MuscleElemAmount = MuscleParameters.MuscleElemAmount; ///< The total amount of elements for this muscle
            F0 ??= ...DefaultMusPar.PCSAfactor*PCSA; ///< Maximum force output at optimum fiber length
            Lf0 ??= MuscleParameters.OptimalFiberlength / cos(pi/180*MuscleParameters.Pennationangle); //< Optimal fiber length corrected by pennation angle
            AnyVar PCSA ??= 1e4*...StrengthScaleSpine*MuscleParameters.MuscleVolumeSIScaled/(Lf0); ///< PCSA (cm2) of the individual element is total volumen divided by the sum of muscle element fiber lengths.
            Vol0 = (1e-4*PCSA) * Lf0; // New calculation of the vol for the specific muscle branch
        };
        #endif

        #if BM_TRUNK_MUSCLES  | BM_LEG_MUSCLES_LEFT  |  BM_LEG_MUSCLES_RIGHT
        AnyMuscleModel PML3T_TM = {
            AnyFolder& MuscleParameters = ....Data.unscaled.ModelParameters.Muscles.PsoasMajor.PML3T_TM;
            AnyIntVar MuscleElemNo = 1; ///< The number of this element of the muscle
            AnyIntVar MuscleElemAmount = MuscleParameters.MuscleElemAmount; ///< The total amount of elements for this muscle
            F0 ??= ...DefaultMusPar.PCSAfactor*PCSA; ///< Maximum force output at optimum fiber length
            Lf0 ??= MuscleParameters.OptimalFiberlength / cos(pi/180*MuscleParameters.Pennationangle); //< Optimal fiber length corrected by pennation angle
            AnyVar PCSA ??= 1e4*...StrengthScaleSpine*MuscleParameters.MuscleVolumeSIScaled/(Lf0); ///< PCSA (cm2) of the individual element is total volumen divided by the sum of muscle element fiber lengths.
            Vol0 = (1e-4*PCSA) * Lf0; // New calculation of the vol for the specific muscle branch
        };
        #endif

        #if BM_TRUNK_MUSCLES  | BM_LEG_MUSCLES_LEFT  |  BM_LEG_MUSCLES_RIGHT
        AnyMuscleModel PML4I_TM = {
            AnyFolder& MuscleParameters = ....Data.unscaled.ModelParameters.Muscles.PsoasMajor.PML4I_TM;
            AnyIntVar MuscleElemNo = 1; ///< The number of this element of the muscle
            AnyIntVar MuscleElemAmount = MuscleParameters.MuscleElemAmount; ///< The total amount of elements for this muscle
            F0 ??= ...DefaultMusPar.PCSAfactor*PCSA; ///< Maximum force output at optimum fiber length
            Lf0 ??= MuscleParameters.OptimalFiberlength / cos(pi/180*MuscleParameters.Pennationangle); //< Optimal fiber length corrected by pennation angle
            AnyVar PCSA ??= 1e4*...StrengthScaleSpine*MuscleParameters.MuscleVolumeSIScaled/(Lf0); ///< PCSA (cm2) of the individual element is total volumen divided by the sum of muscle element fiber lengths.
            Vol0 = (1e-4*PCSA) * Lf0; // New calculation of the vol for the specific muscle branch
        };
        #endif

        #if BM_TRUNK_MUSCLES  | BM_LEG_MUSCLES_LEFT  |  BM_LEG_MUSCLES_RIGHT
        AnyMuscleModel PML4T_TM = {
            AnyFolder& MuscleParameters = ....Data.unscaled.ModelParameters.Muscles.PsoasMajor.PML4T_TM;
            AnyIntVar MuscleElemNo = 1; ///< The number of this element of the muscle
            AnyIntVar MuscleElemAmount = MuscleParameters.MuscleElemAmount; ///< The total amount of elements for this muscle
            F0 ??= ...DefaultMusPar.PCSAfactor*PCSA; ///< Maximum force output at optimum fiber length
            Lf0 ??= MuscleParameters.OptimalFiberlength / cos(pi/180*MuscleParameters.Pennationangle); //< Optimal fiber length corrected by pennation angle
            AnyVar PCSA ??= 1e4*...StrengthScaleSpine*MuscleParameters.MuscleVolumeSIScaled/(Lf0); ///< PCSA (cm2) of the individual element is total volumen divided by the sum of muscle element fiber lengths.
            Vol0 = (1e-4*PCSA) * Lf0; // New calculation of the vol for the specific muscle branch
        };
        #endif

        #if BM_TRUNK_MUSCLES  | BM_LEG_MUSCLES_LEFT  |  BM_LEG_MUSCLES_RIGHT
        AnyMuscleModel PML5_TM = {
            AnyFolder& MuscleParameters = ....Data.unscaled.ModelParameters.Muscles.PsoasMajor.PML5_TM;
            AnyIntVar MuscleElemNo = 1; ///< The number of this element of the muscle
            AnyIntVar MuscleElemAmount = MuscleParameters.MuscleElemAmount; ///< The total amount of elements for this muscle
            F0 ??= ...DefaultMusPar.PCSAfactor*PCSA; ///< Maximum force output at optimum fiber length
            Lf0 ??= MuscleParameters.OptimalFiberlength / cos(pi/180*MuscleParameters.Pennationangle); //< Optimal fiber length corrected by pennation angle
            AnyVar PCSA ??= 1e4*...StrengthScaleSpine*MuscleParameters.MuscleVolumeSIScaled/(Lf0); ///< PCSA (cm2) of the individual element is total volumen divided by the sum of muscle element fiber lengths.
            Vol0 = (1e-4*PCSA) * Lf0; // New calculation of the vol for the specific muscle branch
        };
        #endif

        #if BM_TRUNK_MUSCLES  | BM_LEG_MUSCLES_LEFT  |  BM_LEG_MUSCLES_RIGHT
        AnyMuscleModel PML5T_TM = {
            AnyFolder& MuscleParameters = ....Data.unscaled.ModelParameters.Muscles.PsoasMajor.PML5T_TM;
            AnyIntVar MuscleElemNo = 1; ///< The number of this element of the muscle
            AnyIntVar MuscleElemAmount = MuscleParameters.MuscleElemAmount; ///< The total amount of elements for this muscle
            F0 ??= ...DefaultMusPar.PCSAfactor*PCSA; ///< Maximum force output at optimum fiber length
            Lf0 ??= MuscleParameters.OptimalFiberlength / cos(pi/180*MuscleParameters.Pennationangle); //< Optimal fiber length corrected by pennation angle
            AnyVar PCSA ??= 1e4*...StrengthScaleSpine*MuscleParameters.MuscleVolumeSIScaled/(Lf0); ///< PCSA (cm2) of the individual element is total volumen divided by the sum of muscle element fiber lengths.
            Vol0 = (1e-4*PCSA) * Lf0; // New calculation of the vol for the specific muscle branch
        };
        #endif

    };
    AnyFolder QuadratusLumborum = {

        #if BM_TRUNK_MUSCLES
        AnyMuscleModel QL_1 = {
            AnyFolder& MuscleParameters = ....Data.unscaled.ModelParameters.Muscles.QuadratusLumborum.QL_1;
            AnyIntVar MuscleElemNo = 1; ///< The number of this element of the muscle
            AnyIntVar MuscleElemAmount = MuscleParameters.MuscleElemAmount; ///< The total amount of elements for this muscle
            F0 ??= ...DefaultMusPar.PCSAfactor*PCSA; ///< Maximum force output at optimum fiber length
            Lf0 ??= MuscleParameters.OptimalFiberlength / cos(pi/180*MuscleParameters.Pennationangle); //< Optimal fiber length corrected by pennation angle
            AnyVar PCSA ??= 1e4*...StrengthScaleSpine*MuscleParameters.MuscleVolumeSIScaled/(Lf0); ///< PCSA (cm2) of the individual element is total volumen divided by the sum of muscle element fiber lengths.
            Vol0 = (1e-4*PCSA) * Lf0; // New calculation of the vol for the specific muscle branch
        };
        #endif

        #if BM_TRUNK_MUSCLES
        AnyMuscleModel QL_2 = {
            AnyFolder& MuscleParameters = ....Data.unscaled.ModelParameters.Muscles.QuadratusLumborum.QL_2;
            AnyIntVar MuscleElemNo = 1; ///< The number of this element of the muscle
            AnyIntVar MuscleElemAmount = MuscleParameters.MuscleElemAmount; ///< The total amount of elements for this muscle
            F0 ??= ...DefaultMusPar.PCSAfactor*PCSA; ///< Maximum force output at optimum fiber length
            Lf0 ??= MuscleParameters.OptimalFiberlength / cos(pi/180*MuscleParameters.Pennationangle); //< Optimal fiber length corrected by pennation angle
            AnyVar PCSA ??= 1e4*...StrengthScaleSpine*MuscleParameters.MuscleVolumeSIScaled/(Lf0); ///< PCSA (cm2) of the individual element is total volumen divided by the sum of muscle element fiber lengths.
            Vol0 = (1e-4*PCSA) * Lf0; // New calculation of the vol for the specific muscle branch
        };
        #endif

        #if BM_TRUNK_MUSCLES
        AnyMuscleModel QL_3 = {
            AnyFolder& MuscleParameters = ....Data.unscaled.ModelParameters.Muscles.QuadratusLumborum.QL_3;
            AnyIntVar MuscleElemNo = 1; ///< The number of this element of the muscle
            AnyIntVar MuscleElemAmount = MuscleParameters.MuscleElemAmount; ///< The total amount of elements for this muscle
            F0 ??= ...DefaultMusPar.PCSAfactor*PCSA; ///< Maximum force output at optimum fiber length
            Lf0 ??= MuscleParameters.OptimalFiberlength / cos(pi/180*MuscleParameters.Pennationangle); //< Optimal fiber length corrected by pennation angle
            AnyVar PCSA ??= 1e4*...StrengthScaleSpine*MuscleParameters.MuscleVolumeSIScaled/(Lf0); ///< PCSA (cm2) of the individual element is total volumen divided by the sum of muscle element fiber lengths.
            Vol0 = (1e-4*PCSA) * Lf0; // New calculation of the vol for the specific muscle branch
        };
        #endif

        #if BM_TRUNK_MUSCLES
        AnyMuscleModel QL_4 = {
            AnyFolder& MuscleParameters = ....Data.unscaled.ModelParameters.Muscles.QuadratusLumborum.QL_4;
            AnyIntVar MuscleElemNo = 1; ///< The number of this element of the muscle
            AnyIntVar MuscleElemAmount = MuscleParameters.MuscleElemAmount; ///< The total amount of elements for this muscle
            F0 ??= ...DefaultMusPar.PCSAfactor*PCSA; ///< Maximum force output at optimum fiber length
            Lf0 ??= MuscleParameters.OptimalFiberlength / cos(pi/180*MuscleParameters.Pennationangle); //< Optimal fiber length corrected by pennation angle
            AnyVar PCSA ??= 1e4*...StrengthScaleSpine*MuscleParameters.MuscleVolumeSIScaled/(Lf0); ///< PCSA (cm2) of the individual element is total volumen divided by the sum of muscle element fiber lengths.
            Vol0 = (1e-4*PCSA) * Lf0; // New calculation of the vol for the specific muscle branch
        };
        #endif

        #if BM_TRUNK_MUSCLES
        AnyMuscleModel QL_5 = {
            AnyFolder& MuscleParameters = ....Data.unscaled.ModelParameters.Muscles.QuadratusLumborum.QL_5;
            AnyIntVar MuscleElemNo = 1; ///< The number of this element of the muscle
            AnyIntVar MuscleElemAmount = MuscleParameters.MuscleElemAmount; ///< The total amount of elements for this muscle
            F0 ??= ...DefaultMusPar.PCSAfactor*PCSA; ///< Maximum force output at optimum fiber length
            Lf0 ??= MuscleParameters.OptimalFiberlength / cos(pi/180*MuscleParameters.Pennationangle); //< Optimal fiber length corrected by pennation angle
            AnyVar PCSA ??= 1e4*...StrengthScaleSpine*MuscleParameters.MuscleVolumeSIScaled/(Lf0); ///< PCSA (cm2) of the individual element is total volumen divided by the sum of muscle element fiber lengths.
            Vol0 = (1e-4*PCSA) * Lf0; // New calculation of the vol for the specific muscle branch
        };
        #endif

        #if BM_TRUNK_MUSCLES
        AnyMuscleModel QL_6 = {
            AnyFolder& MuscleParameters = ....Data.unscaled.ModelParameters.Muscles.QuadratusLumborum.QL_6;
            AnyIntVar MuscleElemNo = 1; ///< The number of this element of the muscle
            AnyIntVar MuscleElemAmount = MuscleParameters.MuscleElemAmount; ///< The total amount of elements for this muscle
            F0 ??= ...DefaultMusPar.PCSAfactor*PCSA; ///< Maximum force output at optimum fiber length
            Lf0 ??= MuscleParameters.OptimalFiberlength / cos(pi/180*MuscleParameters.Pennationangle); //< Optimal fiber length corrected by pennation angle
            AnyVar PCSA ??= 1e4*...StrengthScaleSpine*MuscleParameters.MuscleVolumeSIScaled/(Lf0); ///< PCSA (cm2) of the individual element is total volumen divided by the sum of muscle element fiber lengths.
            Vol0 = (1e-4*PCSA) * Lf0; // New calculation of the vol for the specific muscle branch
        };
        #endif

        #if BM_TRUNK_MUSCLES
        AnyMuscleModel QL_7 = {
            AnyFolder& MuscleParameters = ....Data.unscaled.ModelParameters.Muscles.QuadratusLumborum.QL_7;
            AnyIntVar MuscleElemNo = 1; ///< The number of this element of the muscle
            AnyIntVar MuscleElemAmount = MuscleParameters.MuscleElemAmount; ///< The total amount of elements for this muscle
            F0 ??= ...DefaultMusPar.PCSAfactor*PCSA; ///< Maximum force output at optimum fiber length
            Lf0 ??= MuscleParameters.OptimalFiberlength / cos(pi/180*MuscleParameters.Pennationangle); //< Optimal fiber length corrected by pennation angle
            AnyVar PCSA ??= 1e4*...StrengthScaleSpine*MuscleParameters.MuscleVolumeSIScaled/(Lf0); ///< PCSA (cm2) of the individual element is total volumen divided by the sum of muscle element fiber lengths.
            Vol0 = (1e-4*PCSA) * Lf0; // New calculation of the vol for the specific muscle branch
        };
        #endif

        #if BM_TRUNK_MUSCLES
        AnyMuscleModel QL_8 = {
            AnyFolder& MuscleParameters = ....Data.unscaled.ModelParameters.Muscles.QuadratusLumborum.QL_8;
            AnyIntVar MuscleElemNo = 1; ///< The number of this element of the muscle
            AnyIntVar MuscleElemAmount = MuscleParameters.MuscleElemAmount; ///< The total amount of elements for this muscle
            F0 ??= ...DefaultMusPar.PCSAfactor*PCSA; ///< Maximum force output at optimum fiber length
            Lf0 ??= MuscleParameters.OptimalFiberlength / cos(pi/180*MuscleParameters.Pennationangle); //< Optimal fiber length corrected by pennation angle
            AnyVar PCSA ??= 1e4*...StrengthScaleSpine*MuscleParameters.MuscleVolumeSIScaled/(Lf0); ///< PCSA (cm2) of the individual element is total volumen divided by the sum of muscle element fiber lengths.
            Vol0 = (1e-4*PCSA) * Lf0; // New calculation of the vol for the specific muscle branch
        };
        #endif

        #if BM_TRUNK_MUSCLES
        AnyMuscleModel QL_9 = {
            AnyFolder& MuscleParameters = ....Data.unscaled.ModelParameters.Muscles.QuadratusLumborum.QL_9;
            AnyIntVar MuscleElemNo = 1; ///< The number of this element of the muscle
            AnyIntVar MuscleElemAmount = MuscleParameters.MuscleElemAmount; ///< The total amount of elements for this muscle
            F0 ??= ...DefaultMusPar.PCSAfactor*PCSA; ///< Maximum force output at optimum fiber length
            Lf0 ??= MuscleParameters.OptimalFiberlength / cos(pi/180*MuscleParameters.Pennationangle); //< Optimal fiber length corrected by pennation angle
            AnyVar PCSA ??= 1e4*...StrengthScaleSpine*MuscleParameters.MuscleVolumeSIScaled/(Lf0); ///< PCSA (cm2) of the individual element is total volumen divided by the sum of muscle element fiber lengths.
            Vol0 = (1e-4*PCSA) * Lf0; // New calculation of the vol for the specific muscle branch
        };
        #endif

        #if BM_TRUNK_MUSCLES
        AnyMuscleModel QL_10 = {
            AnyFolder& MuscleParameters = ....Data.unscaled.ModelParameters.Muscles.QuadratusLumborum.QL_10;
            AnyIntVar MuscleElemNo = 1; ///< The number of this element of the muscle
            AnyIntVar MuscleElemAmount = MuscleParameters.MuscleElemAmount; ///< The total amount of elements for this muscle
            F0 ??= ...DefaultMusPar.PCSAfactor*PCSA; ///< Maximum force output at optimum fiber length
            Lf0 ??= MuscleParameters.OptimalFiberlength / cos(pi/180*MuscleParameters.Pennationangle); //< Optimal fiber length corrected by pennation angle
            AnyVar PCSA ??= 1e4*...StrengthScaleSpine*MuscleParameters.MuscleVolumeSIScaled/(Lf0); ///< PCSA (cm2) of the individual element is total volumen divided by the sum of muscle element fiber lengths.
            Vol0 = (1e-4*PCSA) * Lf0; // New calculation of the vol for the specific muscle branch
        };
        #endif

        #if BM_TRUNK_MUSCLES
        AnyMuscleModel QL_11 = {
            AnyFolder& MuscleParameters = ....Data.unscaled.ModelParameters.Muscles.QuadratusLumborum.QL_11;
            AnyIntVar MuscleElemNo = 1; ///< The number of this element of the muscle
            AnyIntVar MuscleElemAmount = MuscleParameters.MuscleElemAmount; ///< The total amount of elements for this muscle
            F0 ??= ...DefaultMusPar.PCSAfactor*PCSA; ///< Maximum force output at optimum fiber length
            Lf0 ??= MuscleParameters.OptimalFiberlength / cos(pi/180*MuscleParameters.Pennationangle); //< Optimal fiber length corrected by pennation angle
            AnyVar PCSA ??= 1e4*...StrengthScaleSpine*MuscleParameters.MuscleVolumeSIScaled/(Lf0); ///< PCSA (cm2) of the individual element is total volumen divided by the sum of muscle element fiber lengths.
            Vol0 = (1e-4*PCSA) * Lf0; // New calculation of the vol for the specific muscle branch
        };
        #endif

        #if BM_TRUNK_MUSCLES
        AnyMuscleModel QL_12 = {
            AnyFolder& MuscleParameters = ....Data.unscaled.ModelParameters.Muscles.QuadratusLumborum.QL_12;
            AnyIntVar MuscleElemNo = 1; ///< The number of this element of the muscle
            AnyIntVar MuscleElemAmount = MuscleParameters.MuscleElemAmount; ///< The total amount of elements for this muscle
            F0 ??= ...DefaultMusPar.PCSAfactor*PCSA; ///< Maximum force output at optimum fiber length
            Lf0 ??= MuscleParameters.OptimalFiberlength / cos(pi/180*MuscleParameters.Pennationangle); //< Optimal fiber length corrected by pennation angle
            AnyVar PCSA ??= 1e4*...StrengthScaleSpine*MuscleParameters.MuscleVolumeSIScaled/(Lf0); ///< PCSA (cm2) of the individual element is total volumen divided by the sum of muscle element fiber lengths.
            Vol0 = (1e-4*PCSA) * Lf0; // New calculation of the vol for the specific muscle branch
        };
        #endif

        #if BM_TRUNK_MUSCLES
        AnyMuscleModel QL_13 = {
            AnyFolder& MuscleParameters = ....Data.unscaled.ModelParameters.Muscles.QuadratusLumborum.QL_13;
            AnyIntVar MuscleElemNo = 1; ///< The number of this element of the muscle
            AnyIntVar MuscleElemAmount = MuscleParameters.MuscleElemAmount; ///< The total amount of elements for this muscle
            F0 ??= ...DefaultMusPar.PCSAfactor*PCSA; ///< Maximum force output at optimum fiber length
            Lf0 ??= MuscleParameters.OptimalFiberlength / cos(pi/180*MuscleParameters.Pennationangle); //< Optimal fiber length corrected by pennation angle
            AnyVar PCSA ??= 1e4*...StrengthScaleSpine*MuscleParameters.MuscleVolumeSIScaled/(Lf0); ///< PCSA (cm2) of the individual element is total volumen divided by the sum of muscle element fiber lengths.
            Vol0 = (1e-4*PCSA) * Lf0; // New calculation of the vol for the specific muscle branch
        };
        #endif

        #if BM_TRUNK_MUSCLES
        AnyMuscleModel QL_14 = {
            AnyFolder& MuscleParameters = ....Data.unscaled.ModelParameters.Muscles.QuadratusLumborum.QL_14;
            AnyIntVar MuscleElemNo = 1; ///< The number of this element of the muscle
            AnyIntVar MuscleElemAmount = MuscleParameters.MuscleElemAmount; ///< The total amount of elements for this muscle
            F0 ??= ...DefaultMusPar.PCSAfactor*PCSA; ///< Maximum force output at optimum fiber length
            Lf0 ??= MuscleParameters.OptimalFiberlength / cos(pi/180*MuscleParameters.Pennationangle); //< Optimal fiber length corrected by pennation angle
            AnyVar PCSA ??= 1e4*...StrengthScaleSpine*MuscleParameters.MuscleVolumeSIScaled/(Lf0); ///< PCSA (cm2) of the individual element is total volumen divided by the sum of muscle element fiber lengths.
            Vol0 = (1e-4*PCSA) * Lf0; // New calculation of the vol for the specific muscle branch
        };
        #endif

        #if BM_TRUNK_MUSCLES
        AnyMuscleModel QL_15 = {
            AnyFolder& MuscleParameters = ....Data.unscaled.ModelParameters.Muscles.QuadratusLumborum.QL_15;
            AnyIntVar MuscleElemNo = 1; ///< The number of this element of the muscle
            AnyIntVar MuscleElemAmount = MuscleParameters.MuscleElemAmount; ///< The total amount of elements for this muscle
            F0 ??= ...DefaultMusPar.PCSAfactor*PCSA; ///< Maximum force output at optimum fiber length
            Lf0 ??= MuscleParameters.OptimalFiberlength / cos(pi/180*MuscleParameters.Pennationangle); //< Optimal fiber length corrected by pennation angle
            AnyVar PCSA ??= 1e4*...StrengthScaleSpine*MuscleParameters.MuscleVolumeSIScaled/(Lf0); ///< PCSA (cm2) of the individual element is total volumen divided by the sum of muscle element fiber lengths.
            Vol0 = (1e-4*PCSA) * Lf0; // New calculation of the vol for the specific muscle branch
        };
        #endif

        #if BM_TRUNK_MUSCLES
        AnyMuscleModel QL_16 = {
            AnyFolder& MuscleParameters = ....Data.unscaled.ModelParameters.Muscles.QuadratusLumborum.QL_16;
            AnyIntVar MuscleElemNo = 1; ///< The number of this element of the muscle
            AnyIntVar MuscleElemAmount = MuscleParameters.MuscleElemAmount; ///< The total amount of elements for this muscle
            F0 ??= ...DefaultMusPar.PCSAfactor*PCSA; ///< Maximum force output at optimum fiber length
            Lf0 ??= MuscleParameters.OptimalFiberlength / cos(pi/180*MuscleParameters.Pennationangle); //< Optimal fiber length corrected by pennation angle
            AnyVar PCSA ??= 1e4*...StrengthScaleSpine*MuscleParameters.MuscleVolumeSIScaled/(Lf0); ///< PCSA (cm2) of the individual element is total volumen divided by the sum of muscle element fiber lengths.
            Vol0 = (1e-4*PCSA) * Lf0; // New calculation of the vol for the specific muscle branch
        };
        #endif

        #if BM_TRUNK_MUSCLES
        AnyMuscleModel QL_17 = {
            AnyFolder& MuscleParameters = ....Data.unscaled.ModelParameters.Muscles.QuadratusLumborum.QL_17;
            AnyIntVar MuscleElemNo = 1; ///< The number of this element of the muscle
            AnyIntVar MuscleElemAmount = MuscleParameters.MuscleElemAmount; ///< The total amount of elements for this muscle
            F0 ??= ...DefaultMusPar.PCSAfactor*PCSA; ///< Maximum force output at optimum fiber length
            Lf0 ??= MuscleParameters.OptimalFiberlength / cos(pi/180*MuscleParameters.Pennationangle); //< Optimal fiber length corrected by pennation angle
            AnyVar PCSA ??= 1e4*...StrengthScaleSpine*MuscleParameters.MuscleVolumeSIScaled/(Lf0); ///< PCSA (cm2) of the individual element is total volumen divided by the sum of muscle element fiber lengths.
            Vol0 = (1e-4*PCSA) * Lf0; // New calculation of the vol for the specific muscle branch
        };
        #endif

        #if BM_TRUNK_MUSCLES
        AnyMuscleModel QL_18 = {
            AnyFolder& MuscleParameters = ....Data.unscaled.ModelParameters.Muscles.QuadratusLumborum.QL_18;
            AnyIntVar MuscleElemNo = 1; ///< The number of this element of the muscle
            AnyIntVar MuscleElemAmount = MuscleParameters.MuscleElemAmount; ///< The total amount of elements for this muscle
            F0 ??= ...DefaultMusPar.PCSAfactor*PCSA; ///< Maximum force output at optimum fiber length
            Lf0 ??= MuscleParameters.OptimalFiberlength / cos(pi/180*MuscleParameters.Pennationangle); //< Optimal fiber length corrected by pennation angle
            AnyVar PCSA ??= 1e4*...StrengthScaleSpine*MuscleParameters.MuscleVolumeSIScaled/(Lf0); ///< PCSA (cm2) of the individual element is total volumen divided by the sum of muscle element fiber lengths.
            Vol0 = (1e-4*PCSA) * Lf0; // New calculation of the vol for the specific muscle branch
        };
        #endif

        #if BM_TRUNK_MUSCLES
        AnyMuscleModel QL_19 = {
            AnyFolder& MuscleParameters = ....Data.unscaled.ModelParameters.Muscles.QuadratusLumborum.QL_19;
            AnyIntVar MuscleElemNo = 1; ///< The number of this element of the muscle
            AnyIntVar MuscleElemAmount = MuscleParameters.MuscleElemAmount; ///< The total amount of elements for this muscle
            F0 ??= ...DefaultMusPar.PCSAfactor*PCSA; ///< Maximum force output at optimum fiber length
            Lf0 ??= MuscleParameters.OptimalFiberlength / cos(pi/180*MuscleParameters.Pennationangle); //< Optimal fiber length corrected by pennation angle
            AnyVar PCSA ??= 1e4*...StrengthScaleSpine*MuscleParameters.MuscleVolumeSIScaled/(Lf0); ///< PCSA (cm2) of the individual element is total volumen divided by the sum of muscle element fiber lengths.
            Vol0 = (1e-4*PCSA) * Lf0; // New calculation of the vol for the specific muscle branch
        };
        #endif

        #if BM_TRUNK_MUSCLES
        AnyMuscleModel QL_20 = {
            AnyFolder& MuscleParameters = ....Data.unscaled.ModelParameters.Muscles.QuadratusLumborum.QL_20;
            AnyIntVar MuscleElemNo = 1; ///< The number of this element of the muscle
            AnyIntVar MuscleElemAmount = MuscleParameters.MuscleElemAmount; ///< The total amount of elements for this muscle
            F0 ??= ...DefaultMusPar.PCSAfactor*PCSA; ///< Maximum force output at optimum fiber length
            Lf0 ??= MuscleParameters.OptimalFiberlength / cos(pi/180*MuscleParameters.Pennationangle); //< Optimal fiber length corrected by pennation angle
            AnyVar PCSA ??= 1e4*...StrengthScaleSpine*MuscleParameters.MuscleVolumeSIScaled/(Lf0); ///< PCSA (cm2) of the individual element is total volumen divided by the sum of muscle element fiber lengths.
            Vol0 = (1e-4*PCSA) * Lf0; // New calculation of the vol for the specific muscle branch
        };
        #endif

        #if BM_TRUNK_MUSCLES
        AnyMuscleModel QL_21 = {
            AnyFolder& MuscleParameters = ....Data.unscaled.ModelParameters.Muscles.QuadratusLumborum.QL_21;
            AnyIntVar MuscleElemNo = 1; ///< The number of this element of the muscle
            AnyIntVar MuscleElemAmount = MuscleParameters.MuscleElemAmount; ///< The total amount of elements for this muscle
            F0 ??= ...DefaultMusPar.PCSAfactor*PCSA; ///< Maximum force output at optimum fiber length
            Lf0 ??= MuscleParameters.OptimalFiberlength / cos(pi/180*MuscleParameters.Pennationangle); //< Optimal fiber length corrected by pennation angle
            AnyVar PCSA ??= 1e4*...StrengthScaleSpine*MuscleParameters.MuscleVolumeSIScaled/(Lf0); ///< PCSA (cm2) of the individual element is total volumen divided by the sum of muscle element fiber lengths.
            Vol0 = (1e-4*PCSA) * Lf0; // New calculation of the vol for the specific muscle branch
        };
        #endif

        #if BM_TRUNK_MUSCLES
        AnyMuscleModel QL_22 = {
            AnyFolder& MuscleParameters = ....Data.unscaled.ModelParameters.Muscles.QuadratusLumborum.QL_22;
            AnyIntVar MuscleElemNo = 1; ///< The number of this element of the muscle
            AnyIntVar MuscleElemAmount = MuscleParameters.MuscleElemAmount; ///< The total amount of elements for this muscle
            F0 ??= ...DefaultMusPar.PCSAfactor*PCSA; ///< Maximum force output at optimum fiber length
            Lf0 ??= MuscleParameters.OptimalFiberlength / cos(pi/180*MuscleParameters.Pennationangle); //< Optimal fiber length corrected by pennation angle
            AnyVar PCSA ??= 1e4*...StrengthScaleSpine*MuscleParameters.MuscleVolumeSIScaled/(Lf0); ///< PCSA (cm2) of the individual element is total volumen divided by the sum of muscle element fiber lengths.
            Vol0 = (1e-4*PCSA) * Lf0; // New calculation of the vol for the specific muscle branch
        };
        #endif

        #if BM_TRUNK_MUSCLES
        AnyMuscleModel QL_23 = {
            AnyFolder& MuscleParameters = ....Data.unscaled.ModelParameters.Muscles.QuadratusLumborum.QL_23;
            AnyIntVar MuscleElemNo = 1; ///< The number of this element of the muscle
            AnyIntVar MuscleElemAmount = MuscleParameters.MuscleElemAmount; ///< The total amount of elements for this muscle
            F0 ??= ...DefaultMusPar.PCSAfactor*PCSA; ///< Maximum force output at optimum fiber length
            Lf0 ??= MuscleParameters.OptimalFiberlength / cos(pi/180*MuscleParameters.Pennationangle); //< Optimal fiber length corrected by pennation angle
            AnyVar PCSA ??= 1e4*...StrengthScaleSpine*MuscleParameters.MuscleVolumeSIScaled/(Lf0); ///< PCSA (cm2) of the individual element is total volumen divided by the sum of muscle element fiber lengths.
            Vol0 = (1e-4*PCSA) * Lf0; // New calculation of the vol for the specific muscle branch
        };
        #endif

        #if BM_TRUNK_MUSCLES
        AnyMuscleModel QL_24 = {
            AnyFolder& MuscleParameters = ....Data.unscaled.ModelParameters.Muscles.QuadratusLumborum.QL_24;
            AnyIntVar MuscleElemNo = 1; ///< The number of this element of the muscle
            AnyIntVar MuscleElemAmount = MuscleParameters.MuscleElemAmount; ///< The total amount of elements for this muscle
            F0 ??= ...DefaultMusPar.PCSAfactor*PCSA; ///< Maximum force output at optimum fiber length
            Lf0 ??= MuscleParameters.OptimalFiberlength / cos(pi/180*MuscleParameters.Pennationangle); //< Optimal fiber length corrected by pennation angle
            AnyVar PCSA ??= 1e4*...StrengthScaleSpine*MuscleParameters.MuscleVolumeSIScaled/(Lf0); ///< PCSA (cm2) of the individual element is total volumen divided by the sum of muscle element fiber lengths.
            Vol0 = (1e-4*PCSA) * Lf0; // New calculation of the vol for the specific muscle branch
        };
        #endif

        #if BM_TRUNK_MUSCLES
        AnyMuscleModel QL_25 = {
            AnyFolder& MuscleParameters = ....Data.unscaled.ModelParameters.Muscles.QuadratusLumborum.QL_25;
            AnyIntVar MuscleElemNo = 1; ///< The number of this element of the muscle
            AnyIntVar MuscleElemAmount = MuscleParameters.MuscleElemAmount; ///< The total amount of elements for this muscle
            F0 ??= ...DefaultMusPar.PCSAfactor*PCSA; ///< Maximum force output at optimum fiber length
            Lf0 ??= MuscleParameters.OptimalFiberlength / cos(pi/180*MuscleParameters.Pennationangle); //< Optimal fiber length corrected by pennation angle
            AnyVar PCSA ??= 1e4*...StrengthScaleSpine*MuscleParameters.MuscleVolumeSIScaled/(Lf0); ///< PCSA (cm2) of the individual element is total volumen divided by the sum of muscle element fiber lengths.
            Vol0 = (1e-4*PCSA) * Lf0; // New calculation of the vol for the specific muscle branch
        };
        #endif

        #if BM_TRUNK_MUSCLES
        AnyMuscleModel QL_26 = {
            AnyFolder& MuscleParameters = ....Data.unscaled.ModelParameters.Muscles.QuadratusLumborum.QL_26;
            AnyIntVar MuscleElemNo = 1; ///< The number of this element of the muscle
            AnyIntVar MuscleElemAmount = MuscleParameters.MuscleElemAmount; ///< The total amount of elements for this muscle
            F0 ??= ...DefaultMusPar.PCSAfactor*PCSA; ///< Maximum force output at optimum fiber length
            Lf0 ??= MuscleParameters.OptimalFiberlength / cos(pi/180*MuscleParameters.Pennationangle); //< Optimal fiber length corrected by pennation angle
            AnyVar PCSA ??= 1e4*...StrengthScaleSpine*MuscleParameters.MuscleVolumeSIScaled/(Lf0); ///< PCSA (cm2) of the individual element is total volumen divided by the sum of muscle element fiber lengths.
            Vol0 = (1e-4*PCSA) * Lf0; // New calculation of the vol for the specific muscle branch
        };
        #endif

        #if BM_TRUNK_MUSCLES
        AnyMuscleModel QL_27 = {
            AnyFolder& MuscleParameters = ....Data.unscaled.ModelParameters.Muscles.QuadratusLumborum.QL_27;
            AnyIntVar MuscleElemNo = 1; ///< The number of this element of the muscle
            AnyIntVar MuscleElemAmount = MuscleParameters.MuscleElemAmount; ///< The total amount of elements for this muscle
            F0 ??= ...DefaultMusPar.PCSAfactor*PCSA; ///< Maximum force output at optimum fiber length
            Lf0 ??= MuscleParameters.OptimalFiberlength / cos(pi/180*MuscleParameters.Pennationangle); //< Optimal fiber length corrected by pennation angle
            AnyVar PCSA ??= 1e4*...StrengthScaleSpine*MuscleParameters.MuscleVolumeSIScaled/(Lf0); ///< PCSA (cm2) of the individual element is total volumen divided by the sum of muscle element fiber lengths.
            Vol0 = (1e-4*PCSA) * Lf0; // New calculation of the vol for the specific muscle branch
        };
        #endif

        #if BM_TRUNK_MUSCLES
        AnyMuscleModel QL_28 = {
            AnyFolder& MuscleParameters = ....Data.unscaled.ModelParameters.Muscles.QuadratusLumborum.QL_28;
            AnyIntVar MuscleElemNo = 1; ///< The number of this element of the muscle
            AnyIntVar MuscleElemAmount = MuscleParameters.MuscleElemAmount; ///< The total amount of elements for this muscle
            F0 ??= ...DefaultMusPar.PCSAfactor*PCSA; ///< Maximum force output at optimum fiber length
            Lf0 ??= MuscleParameters.OptimalFiberlength / cos(pi/180*MuscleParameters.Pennationangle); //< Optimal fiber length corrected by pennation angle
            AnyVar PCSA ??= 1e4*...StrengthScaleSpine*MuscleParameters.MuscleVolumeSIScaled/(Lf0); ///< PCSA (cm2) of the individual element is total volumen divided by the sum of muscle element fiber lengths.
            Vol0 = (1e-4*PCSA) * Lf0; // New calculation of the vol for the specific muscle branch
        };
        #endif

    };

    AnyFolder RectusAbdominis = {

        #if BM_TRUNK_MUSCLES
        AnyMuscleModel RA_1 = {
            AnyFolder& MuscleParameters = ....Data.unscaled.ModelParameters.Muscles.RectusAbdominis.RA_1;
            AnyIntVar MuscleElemNo = 1; ///< The number of this element of the muscle
            AnyIntVar MuscleElemAmount = MuscleParameters.MuscleElemAmount; ///< The total amount of elements for this muscle
            F0 ??= ...DefaultMusPar.PCSAfactor*PCSA; ///< Maximum force output at optimum fiber length
            Lf0 ??= MuscleParameters.OptimalFiberlength / cos(pi/180*MuscleParameters.Pennationangle); //< Optimal fiber length corrected by pennation angle
            AnyVar PCSA ??= 1e4*...StrengthScaleSpine*MuscleParameters.MuscleVolumeSIScaled/(Lf0); ///< PCSA (cm2) of the individual element is total volumen divided by the sum of muscle element fiber lengths.
            Vol0 = (1e-4*PCSA) * Lf0; // New calculation of the vol for the specific muscle branch
        };
        #endif

        #if BM_TRUNK_MUSCLES
        AnyMuscleModel RA_2 = {
            AnyFolder& MuscleParameters = ....Data.unscaled.ModelParameters.Muscles.RectusAbdominis.RA_2;
            AnyIntVar MuscleElemNo = 1; ///< The number of this element of the muscle
            AnyIntVar MuscleElemAmount = MuscleParameters.MuscleElemAmount; ///< The total amount of elements for this muscle
            F0 ??= ...DefaultMusPar.PCSAfactor*PCSA; ///< Maximum force output at optimum fiber length
            Lf0 ??= MuscleParameters.OptimalFiberlength / cos(pi/180*MuscleParameters.Pennationangle); //< Optimal fiber length corrected by pennation angle
            AnyVar PCSA ??= 1e4*...StrengthScaleSpine*MuscleParameters.MuscleVolumeSIScaled/(Lf0); ///< PCSA (cm2) of the individual element is total volumen divided by the sum of muscle element fiber lengths.
            Vol0 = (1e-4*PCSA) * Lf0; // New calculation of the vol for the specific muscle branch
        };
        #endif

    };

    AnyFolder ObliquusInternus = {

        #if BM_TRUNK_MUSCLES & BM_TRUNK_CAVITY_MODEL == _CAVITY_MODEL_BUCKLE_
        AnyMuscleModel OIC_1 = {
            AnyFolder& MuscleParameters = ....Data.unscaled.ModelParameters.Muscles.ObliquusInternus.OIC_1;
            AnyIntVar MuscleElemNo = 1; ///< The number of this element of the muscle
            AnyIntVar MuscleElemAmount = MuscleParameters.MuscleElemAmount; ///< The total amount of elements for this muscle
            F0 ??= ...DefaultMusPar.PCSAfactor*PCSA; ///< Maximum force output at optimum fiber length
            Lf0 ??= MuscleParameters.OptimalFiberlength / cos(pi/180*MuscleParameters.Pennationangle); //< Optimal fiber length corrected by pennation angle
            AnyVar PCSA ??= 1e4*...StrengthScaleSpine*MuscleParameters.MuscleVolumeSIScaled/(Lf0); ///< PCSA (cm2) of the individual element is total volumen divided by the sum of muscle element fiber lengths.
            Vol0 = (1e-4*PCSA) * Lf0; // New calculation of the vol for the specific muscle branch
        };
        #endif

        #if BM_TRUNK_MUSCLES & BM_TRUNK_CAVITY_MODEL == _CAVITY_MODEL_BUCKLE_
        AnyMuscleModel OIC_2 = {
            AnyFolder& MuscleParameters = ....Data.unscaled.ModelParameters.Muscles.ObliquusInternus.OIC_2;
            AnyIntVar MuscleElemNo = 1; ///< The number of this element of the muscle
            AnyIntVar MuscleElemAmount = MuscleParameters.MuscleElemAmount; ///< The total amount of elements for this muscle
            F0 ??= ...DefaultMusPar.PCSAfactor*PCSA; ///< Maximum force output at optimum fiber length
            Lf0 ??= MuscleParameters.OptimalFiberlength / cos(pi/180*MuscleParameters.Pennationangle); //< Optimal fiber length corrected by pennation angle
            AnyVar PCSA ??= 1e4*...StrengthScaleSpine*MuscleParameters.MuscleVolumeSIScaled/(Lf0); ///< PCSA (cm2) of the individual element is total volumen divided by the sum of muscle element fiber lengths.
            Vol0 = (1e-4*PCSA) * Lf0; // New calculation of the vol for the specific muscle branch
        };
        #endif

        #if BM_TRUNK_MUSCLES & BM_TRUNK_CAVITY_MODEL == _CAVITY_MODEL_BUCKLE_
        AnyMuscleModel OIC_3 = {
            AnyFolder& MuscleParameters = ....Data.unscaled.ModelParameters.Muscles.ObliquusInternus.OIC_3;
            AnyIntVar MuscleElemNo = 1; ///< The number of this element of the muscle
            AnyIntVar MuscleElemAmount = MuscleParameters.MuscleElemAmount; ///< The total amount of elements for this muscle
            F0 ??= ...DefaultMusPar.PCSAfactor*PCSA; ///< Maximum force output at optimum fiber length
            Lf0 ??= MuscleParameters.OptimalFiberlength / cos(pi/180*MuscleParameters.Pennationangle); //< Optimal fiber length corrected by pennation angle
            AnyVar PCSA ??= 1e4*...StrengthScaleSpine*MuscleParameters.MuscleVolumeSIScaled/(Lf0); ///< PCSA (cm2) of the individual element is total volumen divided by the sum of muscle element fiber lengths.
            Vol0 = (1e-4*PCSA) * Lf0; // New calculation of the vol for the specific muscle branch
        };
        #endif

        #if BM_TRUNK_MUSCLES & BM_TRUNK_CAVITY_MODEL == _CAVITY_MODEL_BUCKLE_
        AnyMuscleModel OIC_4 = {
            AnyFolder& MuscleParameters = ....Data.unscaled.ModelParameters.Muscles.ObliquusInternus.OIC_4;
            AnyIntVar MuscleElemNo = 1; ///< The number of this element of the muscle
            AnyIntVar MuscleElemAmount = MuscleParameters.MuscleElemAmount; ///< The total amount of elements for this muscle
            F0 ??= ...DefaultMusPar.PCSAfactor*PCSA; ///< Maximum force output at optimum fiber length
            Lf0 ??= MuscleParameters.OptimalFiberlength / cos(pi/180*MuscleParameters.Pennationangle); //< Optimal fiber length corrected by pennation angle
            AnyVar PCSA ??= 1e4*...StrengthScaleSpine*MuscleParameters.MuscleVolumeSIScaled/(Lf0); ///< PCSA (cm2) of the individual element is total volumen divided by the sum of muscle element fiber lengths.
            Vol0 = (1e-4*PCSA) * Lf0; // New calculation of the vol for the specific muscle branch
        };
        #endif

        #if BM_TRUNK_MUSCLES & BM_TRUNK_CAVITY_MODEL == _CAVITY_MODEL_BUCKLE_
        AnyMuscleModel OIC_5 = {
            AnyFolder& MuscleParameters = ....Data.unscaled.ModelParameters.Muscles.ObliquusInternus.OIC_5;
            AnyIntVar MuscleElemNo = 1; ///< The number of this element of the muscle
            AnyIntVar MuscleElemAmount = MuscleParameters.MuscleElemAmount; ///< The total amount of elements for this muscle
            F0 ??= ...DefaultMusPar.PCSAfactor*PCSA; ///< Maximum force output at optimum fiber length
            Lf0 ??= MuscleParameters.OptimalFiberlength / cos(pi/180*MuscleParameters.Pennationangle); //< Optimal fiber length corrected by pennation angle
            AnyVar PCSA ??= 1e4*...StrengthScaleSpine*MuscleParameters.MuscleVolumeSIScaled/(Lf0); ///< PCSA (cm2) of the individual element is total volumen divided by the sum of muscle element fiber lengths.
            Vol0 = (1e-4*PCSA) * Lf0; // New calculation of the vol for the specific muscle branch
        };
        #endif

        #if BM_TRUNK_MUSCLES & BM_TRUNK_CAVITY_MODEL == _CAVITY_MODEL_BUCKLE_
        AnyMuscleModel OIC_6 = {
            AnyFolder& MuscleParameters = ....Data.unscaled.ModelParameters.Muscles.ObliquusInternus.OIC_6;
            AnyIntVar MuscleElemNo = 1; ///< The number of this element of the muscle
            AnyIntVar MuscleElemAmount = MuscleParameters.MuscleElemAmount; ///< The total amount of elements for this muscle
            F0 ??= ...DefaultMusPar.PCSAfactor*PCSA; ///< Maximum force output at optimum fiber length
            Lf0 ??= MuscleParameters.OptimalFiberlength / cos(pi/180*MuscleParameters.Pennationangle); //< Optimal fiber length corrected by pennation angle
            AnyVar PCSA ??= 1e4*...StrengthScaleSpine*MuscleParameters.MuscleVolumeSIScaled/(Lf0); ///< PCSA (cm2) of the individual element is total volumen divided by the sum of muscle element fiber lengths.
            Vol0 = (1e-4*PCSA) * Lf0; // New calculation of the vol for the specific muscle branch
        };
        #endif

        #if BM_TRUNK_MUSCLES & BM_TRUNK_CAVITY_MODEL == _CAVITY_MODEL_BUCKLE_
        AnyMuscleModel OIC_7 = {
            AnyFolder& MuscleParameters = ....Data.unscaled.ModelParameters.Muscles.ObliquusInternus.OIC_7;
            AnyIntVar MuscleElemNo = 1; ///< The number of this element of the muscle
            AnyIntVar MuscleElemAmount = MuscleParameters.MuscleElemAmount; ///< The total amount of elements for this muscle
            F0 ??= ...DefaultMusPar.PCSAfactor*PCSA; ///< Maximum force output at optimum fiber length
            Lf0 ??= MuscleParameters.OptimalFiberlength / cos(pi/180*MuscleParameters.Pennationangle); //< Optimal fiber length corrected by pennation angle
            AnyVar PCSA ??= 1e4*...StrengthScaleSpine*MuscleParameters.MuscleVolumeSIScaled/(Lf0); ///< PCSA (cm2) of the individual element is total volumen divided by the sum of muscle element fiber lengths.
            Vol0 = (1e-4*PCSA) * Lf0; // New calculation of the vol for the specific muscle branch
        };
        #endif

        #if BM_TRUNK_MUSCLES & BM_TRUNK_CAVITY_MODEL == _CAVITY_MODEL_BUCKLE_
        AnyMuscleModel OIC_8 = {
            AnyFolder& MuscleParameters = ....Data.unscaled.ModelParameters.Muscles.ObliquusInternus.OIC_8;
            AnyIntVar MuscleElemNo = 1; ///< The number of this element of the muscle
            AnyIntVar MuscleElemAmount = MuscleParameters.MuscleElemAmount; ///< The total amount of elements for this muscle
            F0 ??= ...DefaultMusPar.PCSAfactor*PCSA; ///< Maximum force output at optimum fiber length
            Lf0 ??= MuscleParameters.OptimalFiberlength / cos(pi/180*MuscleParameters.Pennationangle); //< Optimal fiber length corrected by pennation angle
            AnyVar PCSA ??= 1e4*...StrengthScaleSpine*MuscleParameters.MuscleVolumeSIScaled/(Lf0); ///< PCSA (cm2) of the individual element is total volumen divided by the sum of muscle element fiber lengths.
            Vol0 = (1e-4*PCSA) * Lf0; // New calculation of the vol for the specific muscle branch
        };
        #endif

        #if BM_TRUNK_MUSCLES & BM_TRUNK_CAVITY_MODEL == _CAVITY_MODEL_BUCKLE_
        AnyMuscleModel OIC_9 = {
            AnyFolder& MuscleParameters = ....Data.unscaled.ModelParameters.Muscles.ObliquusInternus.OIC_9;
            AnyIntVar MuscleElemNo = 1; ///< The number of this element of the muscle
            AnyIntVar MuscleElemAmount = MuscleParameters.MuscleElemAmount; ///< The total amount of elements for this muscle
            F0 ??= ...DefaultMusPar.PCSAfactor*PCSA; ///< Maximum force output at optimum fiber length
            Lf0 ??= MuscleParameters.OptimalFiberlength / cos(pi/180*MuscleParameters.Pennationangle); //< Optimal fiber length corrected by pennation angle
            AnyVar PCSA ??= 1e4*...StrengthScaleSpine*MuscleParameters.MuscleVolumeSIScaled/(Lf0); ///< PCSA (cm2) of the individual element is total volumen divided by the sum of muscle element fiber lengths.
            Vol0 = (1e-4*PCSA) * Lf0; // New calculation of the vol for the specific muscle branch
        };
        #endif

        #if BM_TRUNK_MUSCLES & BM_TRUNK_CAVITY_MODEL == _CAVITY_MODEL_BUCKLE_
        AnyMuscleModel OIC_10 = {
            AnyFolder& MuscleParameters = ....Data.unscaled.ModelParameters.Muscles.ObliquusInternus.OIC_10;
            AnyIntVar MuscleElemNo = 1; ///< The number of this element of the muscle
            AnyIntVar MuscleElemAmount = MuscleParameters.MuscleElemAmount; ///< The total amount of elements for this muscle
            F0 ??= ...DefaultMusPar.PCSAfactor*PCSA; ///< Maximum force output at optimum fiber length
            Lf0 ??= MuscleParameters.OptimalFiberlength / cos(pi/180*MuscleParameters.Pennationangle); //< Optimal fiber length corrected by pennation angle
            AnyVar PCSA ??= 1e4*...StrengthScaleSpine*MuscleParameters.MuscleVolumeSIScaled/(Lf0); ///< PCSA (cm2) of the individual element is total volumen divided by the sum of muscle element fiber lengths.
            Vol0 = (1e-4*PCSA) * Lf0; // New calculation of the vol for the specific muscle branch
        };
        #endif

        #if BM_TRUNK_MUSCLES & BM_TRUNK_CAVITY_MODEL == _CAVITY_MODEL_VOLUME_
        AnyMuscleModel OIC_1 = {
            AnyFolder& MuscleParameters = ....Data.unscaled.ModelParameters.Muscles.ObliquusInternus.OIC_1;
            AnyIntVar MuscleElemNo = 1; ///< The number of this element of the muscle
            AnyIntVar MuscleElemAmount = MuscleParameters.MuscleElemAmount; ///< The total amount of elements for this muscle
            F0 ??= ...DefaultMusPar.PCSAfactor*PCSA; ///< Maximum force output at optimum fiber length
            Lf0 ??= MuscleParameters.OptimalFiberlength / cos(pi/180*MuscleParameters.Pennationangle); //< Optimal fiber length corrected by pennation angle
            AnyVar PCSA ??= 1e4*...StrengthScaleSpine*MuscleParameters.MuscleVolumeSIScaled/(Lf0); ///< PCSA (cm2) of the individual element is total volumen divided by the sum of muscle element fiber lengths.
            Vol0 = (1e-4*PCSA) * Lf0; // New calculation of the vol for the specific muscle branch
        };
        #endif

        #if BM_TRUNK_MUSCLES & BM_TRUNK_CAVITY_MODEL == _CAVITY_MODEL_VOLUME_
        AnyMuscleModel OIC_2 = {
            AnyFolder& MuscleParameters = ....Data.unscaled.ModelParameters.Muscles.ObliquusInternus.OIC_2;
            AnyIntVar MuscleElemNo = 1; ///< The number of this element of the muscle
            AnyIntVar MuscleElemAmount = MuscleParameters.MuscleElemAmount; ///< The total amount of elements for this muscle
            F0 ??= ...DefaultMusPar.PCSAfactor*PCSA; ///< Maximum force output at optimum fiber length
            Lf0 ??= MuscleParameters.OptimalFiberlength / cos(pi/180*MuscleParameters.Pennationangle); //< Optimal fiber length corrected by pennation angle
            AnyVar PCSA ??= 1e4*...StrengthScaleSpine*MuscleParameters.MuscleVolumeSIScaled/(Lf0); ///< PCSA (cm2) of the individual element is total volumen divided by the sum of muscle element fiber lengths.
            Vol0 = (1e-4*PCSA) * Lf0; // New calculation of the vol for the specific muscle branch
        };
        #endif

        #if BM_TRUNK_MUSCLES & BM_TRUNK_CAVITY_MODEL == _CAVITY_MODEL_VOLUME_
        AnyMuscleModel OIC_3 = {
            AnyFolder& MuscleParameters = ....Data.unscaled.ModelParameters.Muscles.ObliquusInternus.OIC_3;
            AnyIntVar MuscleElemNo = 1; ///< The number of this element of the muscle
            AnyIntVar MuscleElemAmount = MuscleParameters.MuscleElemAmount; ///< The total amount of elements for this muscle
            F0 ??= ...DefaultMusPar.PCSAfactor*PCSA; ///< Maximum force output at optimum fiber length
            Lf0 ??= MuscleParameters.OptimalFiberlength / cos(pi/180*MuscleParameters.Pennationangle); //< Optimal fiber length corrected by pennation angle
            AnyVar PCSA ??= 1e4*...StrengthScaleSpine*MuscleParameters.MuscleVolumeSIScaled/(Lf0); ///< PCSA (cm2) of the individual element is total volumen divided by the sum of muscle element fiber lengths.
            Vol0 = (1e-4*PCSA) * Lf0; // New calculation of the vol for the specific muscle branch
        };
        #endif

        #if BM_TRUNK_MUSCLES & BM_TRUNK_CAVITY_MODEL == _CAVITY_MODEL_VOLUME_
        AnyMuscleModel OIC_4 = {
            AnyFolder& MuscleParameters = ....Data.unscaled.ModelParameters.Muscles.ObliquusInternus.OIC_4;
            AnyIntVar MuscleElemNo = 1; ///< The number of this element of the muscle
            AnyIntVar MuscleElemAmount = MuscleParameters.MuscleElemAmount; ///< The total amount of elements for this muscle
            F0 ??= ...DefaultMusPar.PCSAfactor*PCSA; ///< Maximum force output at optimum fiber length
            Lf0 ??= MuscleParameters.OptimalFiberlength / cos(pi/180*MuscleParameters.Pennationangle); //< Optimal fiber length corrected by pennation angle
            AnyVar PCSA ??= 1e4*...StrengthScaleSpine*MuscleParameters.MuscleVolumeSIScaled/(Lf0); ///< PCSA (cm2) of the individual element is total volumen divided by the sum of muscle element fiber lengths.
            Vol0 = (1e-4*PCSA) * Lf0; // New calculation of the vol for the specific muscle branch
        };
        #endif

        #if BM_TRUNK_MUSCLES & BM_TRUNK_CAVITY_MODEL == _CAVITY_MODEL_VOLUME_
        AnyMuscleModel OIC_5 = {
            AnyFolder& MuscleParameters = ....Data.unscaled.ModelParameters.Muscles.ObliquusInternus.OIC_5;
            AnyIntVar MuscleElemNo = 1; ///< The number of this element of the muscle
            AnyIntVar MuscleElemAmount = MuscleParameters.MuscleElemAmount; ///< The total amount of elements for this muscle
            F0 ??= ...DefaultMusPar.PCSAfactor*PCSA; ///< Maximum force output at optimum fiber length
            Lf0 ??= MuscleParameters.OptimalFiberlength / cos(pi/180*MuscleParameters.Pennationangle); //< Optimal fiber length corrected by pennation angle
            AnyVar PCSA ??= 1e4*...StrengthScaleSpine*MuscleParameters.MuscleVolumeSIScaled/(Lf0); ///< PCSA (cm2) of the individual element is total volumen divided by the sum of muscle element fiber lengths.
            Vol0 = (1e-4*PCSA) * Lf0; // New calculation of the vol for the specific muscle branch
        };
        #endif

        #if BM_TRUNK_MUSCLES & BM_TRUNK_CAVITY_MODEL == _CAVITY_MODEL_VOLUME_
        AnyMuscleModel OIC_6 = {
            AnyFolder& MuscleParameters = ....Data.unscaled.ModelParameters.Muscles.ObliquusInternus.OIC_6;
            AnyIntVar MuscleElemNo = 1; ///< The number of this element of the muscle
            AnyIntVar MuscleElemAmount = MuscleParameters.MuscleElemAmount; ///< The total amount of elements for this muscle
            F0 ??= ...DefaultMusPar.PCSAfactor*PCSA; ///< Maximum force output at optimum fiber length
            Lf0 ??= MuscleParameters.OptimalFiberlength / cos(pi/180*MuscleParameters.Pennationangle); //< Optimal fiber length corrected by pennation angle
            AnyVar PCSA ??= 1e4*...StrengthScaleSpine*MuscleParameters.MuscleVolumeSIScaled/(Lf0); ///< PCSA (cm2) of the individual element is total volumen divided by the sum of muscle element fiber lengths.
            Vol0 = (1e-4*PCSA) * Lf0; // New calculation of the vol for the specific muscle branch
        };
        #endif

        #if BM_TRUNK_MUSCLES & BM_TRUNK_CAVITY_MODEL == _CAVITY_MODEL_VOLUME_
        AnyMuscleModel OIC_7 = {
            AnyFolder& MuscleParameters = ....Data.unscaled.ModelParameters.Muscles.ObliquusInternus.OIC_7;
            AnyIntVar MuscleElemNo = 1; ///< The number of this element of the muscle
            AnyIntVar MuscleElemAmount = MuscleParameters.MuscleElemAmount; ///< The total amount of elements for this muscle
            F0 ??= ...DefaultMusPar.PCSAfactor*PCSA; ///< Maximum force output at optimum fiber length
            Lf0 ??= MuscleParameters.OptimalFiberlength / cos(pi/180*MuscleParameters.Pennationangle); //< Optimal fiber length corrected by pennation angle
            AnyVar PCSA ??= 1e4*...StrengthScaleSpine*MuscleParameters.MuscleVolumeSIScaled/(Lf0); ///< PCSA (cm2) of the individual element is total volumen divided by the sum of muscle element fiber lengths.
            Vol0 = (1e-4*PCSA) * Lf0; // New calculation of the vol for the specific muscle branch
        };
        #endif

        #if BM_TRUNK_MUSCLES & BM_TRUNK_CAVITY_MODEL == _CAVITY_MODEL_VOLUME_
        AnyMuscleModel OIC_8 = {
            AnyFolder& MuscleParameters = ....Data.unscaled.ModelParameters.Muscles.ObliquusInternus.OIC_8;
            AnyIntVar MuscleElemNo = 1; ///< The number of this element of the muscle
            AnyIntVar MuscleElemAmount = MuscleParameters.MuscleElemAmount; ///< The total amount of elements for this muscle
            F0 ??= ...DefaultMusPar.PCSAfactor*PCSA; ///< Maximum force output at optimum fiber length
            Lf0 ??= MuscleParameters.OptimalFiberlength / cos(pi/180*MuscleParameters.Pennationangle); //< Optimal fiber length corrected by pennation angle
            AnyVar PCSA ??= 1e4*...StrengthScaleSpine*MuscleParameters.MuscleVolumeSIScaled/(Lf0); ///< PCSA (cm2) of the individual element is total volumen divided by the sum of muscle element fiber lengths.
            Vol0 = (1e-4*PCSA) * Lf0; // New calculation of the vol for the specific muscle branch
        };
        #endif

        #if BM_TRUNK_MUSCLES & BM_TRUNK_CAVITY_MODEL == _CAVITY_MODEL_VOLUME_
        AnyMuscleModel OIC_9 = {
            AnyFolder& MuscleParameters = ....Data.unscaled.ModelParameters.Muscles.ObliquusInternus.OIC_9;
            AnyIntVar MuscleElemNo = 1; ///< The number of this element of the muscle
            AnyIntVar MuscleElemAmount = MuscleParameters.MuscleElemAmount; ///< The total amount of elements for this muscle
            F0 ??= ...DefaultMusPar.PCSAfactor*PCSA; ///< Maximum force output at optimum fiber length
            Lf0 ??= MuscleParameters.OptimalFiberlength / cos(pi/180*MuscleParameters.Pennationangle); //< Optimal fiber length corrected by pennation angle
            AnyVar PCSA ??= 1e4*...StrengthScaleSpine*MuscleParameters.MuscleVolumeSIScaled/(Lf0); ///< PCSA (cm2) of the individual element is total volumen divided by the sum of muscle element fiber lengths.
            Vol0 = (1e-4*PCSA) * Lf0; // New calculation of the vol for the specific muscle branch
        };
        #endif

        #if BM_TRUNK_MUSCLES & BM_TRUNK_CAVITY_MODEL == _CAVITY_MODEL_VOLUME_
        AnyMuscleModel OIC_10 = {
            AnyFolder& MuscleParameters = ....Data.unscaled.ModelParameters.Muscles.ObliquusInternus.OIC_10;
            AnyIntVar MuscleElemNo = 1; ///< The number of this element of the muscle
            AnyIntVar MuscleElemAmount = MuscleParameters.MuscleElemAmount; ///< The total amount of elements for this muscle
            F0 ??= ...DefaultMusPar.PCSAfactor*PCSA; ///< Maximum force output at optimum fiber length
            Lf0 ??= MuscleParameters.OptimalFiberlength / cos(pi/180*MuscleParameters.Pennationangle); //< Optimal fiber length corrected by pennation angle
            AnyVar PCSA ??= 1e4*...StrengthScaleSpine*MuscleParameters.MuscleVolumeSIScaled/(Lf0); ///< PCSA (cm2) of the individual element is total volumen divided by the sum of muscle element fiber lengths.
            Vol0 = (1e-4*PCSA) * Lf0; // New calculation of the vol for the specific muscle branch
        };
        #endif

        #if BM_TRUNK_MUSCLES & BM_TRUNK_CAVITY_MODEL == _CAVITY_MODEL_VOLUME_
        AnyMuscleModel OIC_11 = {
            AnyFolder& MuscleParameters = ....Data.unscaled.ModelParameters.Muscles.ObliquusInternus.OIC_11;
            AnyIntVar MuscleElemNo = 1; ///< The number of this element of the muscle
            AnyIntVar MuscleElemAmount = MuscleParameters.MuscleElemAmount; ///< The total amount of elements for this muscle
            F0 ??= ...DefaultMusPar.PCSAfactor*PCSA; ///< Maximum force output at optimum fiber length
            Lf0 ??= MuscleParameters.OptimalFiberlength / cos(pi/180*MuscleParameters.Pennationangle); //< Optimal fiber length corrected by pennation angle
            AnyVar PCSA ??= 1e4*...StrengthScaleSpine*MuscleParameters.MuscleVolumeSIScaled/(Lf0); ///< PCSA (cm2) of the individual element is total volumen divided by the sum of muscle element fiber lengths.
            Vol0 = (1e-4*PCSA) * Lf0; // New calculation of the vol for the specific muscle branch
        };
        #endif

        #if BM_TRUNK_MUSCLES & BM_TRUNK_CAVITY_MODEL == _CAVITY_MODEL_VOLUME_
        AnyMuscleModel OIC_12 = {
            AnyFolder& MuscleParameters = ....Data.unscaled.ModelParameters.Muscles.ObliquusInternus.OIC_12;
            AnyIntVar MuscleElemNo = 1; ///< The number of this element of the muscle
            AnyIntVar MuscleElemAmount = MuscleParameters.MuscleElemAmount; ///< The total amount of elements for this muscle
            F0 ??= ...DefaultMusPar.PCSAfactor*PCSA; ///< Maximum force output at optimum fiber length
            Lf0 ??= MuscleParameters.OptimalFiberlength / cos(pi/180*MuscleParameters.Pennationangle); //< Optimal fiber length corrected by pennation angle
            AnyVar PCSA ??= 1e4*...StrengthScaleSpine*MuscleParameters.MuscleVolumeSIScaled/(Lf0); ///< PCSA (cm2) of the individual element is total volumen divided by the sum of muscle element fiber lengths.
            Vol0 = (1e-4*PCSA) * Lf0; // New calculation of the vol for the specific muscle branch
        };
        #endif

        #if BM_TRUNK_MUSCLES & BM_TRUNK_CAVITY_MODEL == _CAVITY_MODEL_VOLUME_
        AnyMuscleModel OIC_13 = {
            AnyFolder& MuscleParameters = ....Data.unscaled.ModelParameters.Muscles.ObliquusInternus.OIC_13;
            AnyIntVar MuscleElemNo = 1; ///< The number of this element of the muscle
            AnyIntVar MuscleElemAmount = MuscleParameters.MuscleElemAmount; ///< The total amount of elements for this muscle
            F0 ??= ...DefaultMusPar.PCSAfactor*PCSA; ///< Maximum force output at optimum fiber length
            Lf0 ??= MuscleParameters.OptimalFiberlength / cos(pi/180*MuscleParameters.Pennationangle); //< Optimal fiber length corrected by pennation angle
            AnyVar PCSA ??= 1e4*...StrengthScaleSpine*MuscleParameters.MuscleVolumeSIScaled/(Lf0); ///< PCSA (cm2) of the individual element is total volumen divided by the sum of muscle element fiber lengths.
            Vol0 = (1e-4*PCSA) * Lf0; // New calculation of the vol for the specific muscle branch
        };
        #endif

        #if BM_TRUNK_MUSCLES & BM_TRUNK_CAVITY_MODEL == _CAVITY_MODEL_VOLUME_
        AnyMuscleModel OIC_14 = {
            AnyFolder& MuscleParameters = ....Data.unscaled.ModelParameters.Muscles.ObliquusInternus.OIC_14;
            AnyIntVar MuscleElemNo = 1; ///< The number of this element of the muscle
            AnyIntVar MuscleElemAmount = MuscleParameters.MuscleElemAmount; ///< The total amount of elements for this muscle
            F0 ??= ...DefaultMusPar.PCSAfactor*PCSA; ///< Maximum force output at optimum fiber length
            Lf0 ??= MuscleParameters.OptimalFiberlength / cos(pi/180*MuscleParameters.Pennationangle); //< Optimal fiber length corrected by pennation angle
            AnyVar PCSA ??= 1e4*...StrengthScaleSpine*MuscleParameters.MuscleVolumeSIScaled/(Lf0); ///< PCSA (cm2) of the individual element is total volumen divided by the sum of muscle element fiber lengths.
            Vol0 = (1e-4*PCSA) * Lf0; // New calculation of the vol for the specific muscle branch
        };
        #endif

    };

    AnyFolder ObliquusExternus = {

        #if BM_TRUNK_MUSCLES & BM_TRUNK_CAVITY_MODEL == _CAVITY_MODEL_BUCKLE_
        AnyMuscleModel OEC_1 = {
            AnyFolder& MuscleParameters = ....Data.unscaled.ModelParameters.Muscles.ObliquusExternus.OEC_1;
            AnyIntVar MuscleElemNo = 1; ///< The number of this element of the muscle
            AnyIntVar MuscleElemAmount = MuscleParameters.MuscleElemAmount; ///< The total amount of elements for this muscle
            F0 ??= ...DefaultMusPar.PCSAfactor*PCSA; ///< Maximum force output at optimum fiber length
            Lf0 ??= MuscleParameters.OptimalFiberlength / cos(pi/180*MuscleParameters.Pennationangle); //< Optimal fiber length corrected by pennation angle
            AnyVar PCSA ??= 1e4*...StrengthScaleSpine*MuscleParameters.MuscleVolumeSIScaled/(Lf0); ///< PCSA (cm2) of the individual element is total volumen divided by the sum of muscle element fiber lengths.
            Vol0 = (1e-4*PCSA) * Lf0; // New calculation of the vol for the specific muscle branch
        };
        #endif

        #if BM_TRUNK_MUSCLES & BM_TRUNK_CAVITY_MODEL == _CAVITY_MODEL_BUCKLE_
        AnyMuscleModel OEC_2 = {
            AnyFolder& MuscleParameters = ....Data.unscaled.ModelParameters.Muscles.ObliquusExternus.OEC_2;
            AnyIntVar MuscleElemNo = 1; ///< The number of this element of the muscle
            AnyIntVar MuscleElemAmount = MuscleParameters.MuscleElemAmount; ///< The total amount of elements for this muscle
            F0 ??= ...DefaultMusPar.PCSAfactor*PCSA; ///< Maximum force output at optimum fiber length
            Lf0 ??= MuscleParameters.OptimalFiberlength / cos(pi/180*MuscleParameters.Pennationangle); //< Optimal fiber length corrected by pennation angle
            AnyVar PCSA ??= 1e4*...StrengthScaleSpine*MuscleParameters.MuscleVolumeSIScaled/(Lf0); ///< PCSA (cm2) of the individual element is total volumen divided by the sum of muscle element fiber lengths.
            Vol0 = (1e-4*PCSA) * Lf0; // New calculation of the vol for the specific muscle branch
        };
        #endif

        #if BM_TRUNK_MUSCLES & BM_TRUNK_CAVITY_MODEL == _CAVITY_MODEL_BUCKLE_
        AnyMuscleModel OEC_3 = {
            AnyFolder& MuscleParameters = ....Data.unscaled.ModelParameters.Muscles.ObliquusExternus.OEC_3;
            AnyIntVar MuscleElemNo = 1; ///< The number of this element of the muscle
            AnyIntVar MuscleElemAmount = MuscleParameters.MuscleElemAmount; ///< The total amount of elements for this muscle
            F0 ??= ...DefaultMusPar.PCSAfactor*PCSA; ///< Maximum force output at optimum fiber length
            Lf0 ??= MuscleParameters.OptimalFiberlength / cos(pi/180*MuscleParameters.Pennationangle); //< Optimal fiber length corrected by pennation angle
            AnyVar PCSA ??= 1e4*...StrengthScaleSpine*MuscleParameters.MuscleVolumeSIScaled/(Lf0); ///< PCSA (cm2) of the individual element is total volumen divided by the sum of muscle element fiber lengths.
            Vol0 = (1e-4*PCSA) * Lf0; // New calculation of the vol for the specific muscle branch
        };
        #endif

        #if BM_TRUNK_MUSCLES & BM_TRUNK_CAVITY_MODEL == _CAVITY_MODEL_BUCKLE_
        AnyMuscleModel OEC_4 = {
            AnyFolder& MuscleParameters = ....Data.unscaled.ModelParameters.Muscles.ObliquusExternus.OEC_4;
            AnyIntVar MuscleElemNo = 1; ///< The number of this element of the muscle
            AnyIntVar MuscleElemAmount = MuscleParameters.MuscleElemAmount; ///< The total amount of elements for this muscle
            F0 ??= ...DefaultMusPar.PCSAfactor*PCSA; ///< Maximum force output at optimum fiber length
            Lf0 ??= MuscleParameters.OptimalFiberlength / cos(pi/180*MuscleParameters.Pennationangle); //< Optimal fiber length corrected by pennation angle
            AnyVar PCSA ??= 1e4*...StrengthScaleSpine*MuscleParameters.MuscleVolumeSIScaled/(Lf0); ///< PCSA (cm2) of the individual element is total volumen divided by the sum of muscle element fiber lengths.
            Vol0 = (1e-4*PCSA) * Lf0; // New calculation of the vol for the specific muscle branch
        };
        #endif

        #if BM_TRUNK_MUSCLES & BM_TRUNK_CAVITY_MODEL == _CAVITY_MODEL_BUCKLE_
        AnyMuscleModel OEC_5 = {
            AnyFolder& MuscleParameters = ....Data.unscaled.ModelParameters.Muscles.ObliquusExternus.OEC_5;
            AnyIntVar MuscleElemNo = 1; ///< The number of this element of the muscle
            AnyIntVar MuscleElemAmount = MuscleParameters.MuscleElemAmount; ///< The total amount of elements for this muscle
            F0 ??= ...DefaultMusPar.PCSAfactor*PCSA; ///< Maximum force output at optimum fiber length
            Lf0 ??= MuscleParameters.OptimalFiberlength / cos(pi/180*MuscleParameters.Pennationangle); //< Optimal fiber length corrected by pennation angle
            AnyVar PCSA ??= 1e4*...StrengthScaleSpine*MuscleParameters.MuscleVolumeSIScaled/(Lf0); ///< PCSA (cm2) of the individual element is total volumen divided by the sum of muscle element fiber lengths.
            Vol0 = (1e-4*PCSA) * Lf0; // New calculation of the vol for the specific muscle branch
        };
        #endif

        #if BM_TRUNK_MUSCLES & BM_TRUNK_CAVITY_MODEL == _CAVITY_MODEL_BUCKLE_
        AnyMuscleModel OEC_6 = {
            AnyFolder& MuscleParameters = ....Data.unscaled.ModelParameters.Muscles.ObliquusExternus.OEC_6;
            AnyIntVar MuscleElemNo = 1; ///< The number of this element of the muscle
            AnyIntVar MuscleElemAmount = MuscleParameters.MuscleElemAmount; ///< The total amount of elements for this muscle
            F0 ??= ...DefaultMusPar.PCSAfactor*PCSA; ///< Maximum force output at optimum fiber length
            Lf0 ??= MuscleParameters.OptimalFiberlength / cos(pi/180*MuscleParameters.Pennationangle); //< Optimal fiber length corrected by pennation angle
            AnyVar PCSA ??= 1e4*...StrengthScaleSpine*MuscleParameters.MuscleVolumeSIScaled/(Lf0); ///< PCSA (cm2) of the individual element is total volumen divided by the sum of muscle element fiber lengths.
            Vol0 = (1e-4*PCSA) * Lf0; // New calculation of the vol for the specific muscle branch
        };
        #endif

        #if BM_TRUNK_MUSCLES & BM_TRUNK_CAVITY_MODEL == _CAVITY_MODEL_BUCKLE_
        AnyMuscleModel OEC_7 = {
            AnyFolder& MuscleParameters = ....Data.unscaled.ModelParameters.Muscles.ObliquusExternus.OEC_7;
            AnyIntVar MuscleElemNo = 1; ///< The number of this element of the muscle
            AnyIntVar MuscleElemAmount = MuscleParameters.MuscleElemAmount; ///< The total amount of elements for this muscle
            F0 ??= ...DefaultMusPar.PCSAfactor*PCSA; ///< Maximum force output at optimum fiber length
            Lf0 ??= MuscleParameters.OptimalFiberlength / cos(pi/180*MuscleParameters.Pennationangle); //< Optimal fiber length corrected by pennation angle
            AnyVar PCSA ??= 1e4*...StrengthScaleSpine*MuscleParameters.MuscleVolumeSIScaled/(Lf0); ///< PCSA (cm2) of the individual element is total volumen divided by the sum of muscle element fiber lengths.
            Vol0 = (1e-4*PCSA) * Lf0; // New calculation of the vol for the specific muscle branch
        };
        #endif

        #if BM_TRUNK_MUSCLES & BM_TRUNK_CAVITY_MODEL == _CAVITY_MODEL_BUCKLE_
        AnyMuscleModel OEC_8 = {
            AnyFolder& MuscleParameters = ....Data.unscaled.ModelParameters.Muscles.ObliquusExternus.OEC_8;
            AnyIntVar MuscleElemNo = 1; ///< The number of this element of the muscle
            AnyIntVar MuscleElemAmount = MuscleParameters.MuscleElemAmount; ///< The total amount of elements for this muscle
            F0 ??= ...DefaultMusPar.PCSAfactor*PCSA; ///< Maximum force output at optimum fiber length
            Lf0 ??= MuscleParameters.OptimalFiberlength / cos(pi/180*MuscleParameters.Pennationangle); //< Optimal fiber length corrected by pennation angle
            AnyVar PCSA ??= 1e4*...StrengthScaleSpine*MuscleParameters.MuscleVolumeSIScaled/(Lf0); ///< PCSA (cm2) of the individual element is total volumen divided by the sum of muscle element fiber lengths.
            Vol0 = (1e-4*PCSA) * Lf0; // New calculation of the vol for the specific muscle branch
        };
        #endif

        #if BM_TRUNK_MUSCLES & BM_TRUNK_CAVITY_MODEL == _CAVITY_MODEL_VOLUME_
        AnyMuscleModel OEC_1 = {
            AnyFolder& MuscleParameters = ....Data.unscaled.ModelParameters.Muscles.ObliquusExternus.OEC_1;
            AnyIntVar MuscleElemNo = 1; ///< The number of this element of the muscle
            AnyIntVar MuscleElemAmount = MuscleParameters.MuscleElemAmount; ///< The total amount of elements for this muscle
            F0 ??= ...DefaultMusPar.PCSAfactor*PCSA; ///< Maximum force output at optimum fiber length
            Lf0 ??= MuscleParameters.OptimalFiberlength / cos(pi/180*MuscleParameters.Pennationangle); //< Optimal fiber length corrected by pennation angle
            AnyVar PCSA ??= 1e4*...StrengthScaleSpine*MuscleParameters.MuscleVolumeSIScaled/(Lf0); ///< PCSA (cm2) of the individual element is total volumen divided by the sum of muscle element fiber lengths.
            Vol0 = (1e-4*PCSA) * Lf0; // New calculation of the vol for the specific muscle branch
        };
        #endif

        #if BM_TRUNK_MUSCLES & BM_TRUNK_CAVITY_MODEL == _CAVITY_MODEL_VOLUME_
        AnyMuscleModel OEC_2 = {
            AnyFolder& MuscleParameters = ....Data.unscaled.ModelParameters.Muscles.ObliquusExternus.OEC_2;
            AnyIntVar MuscleElemNo = 1; ///< The number of this element of the muscle
            AnyIntVar MuscleElemAmount = MuscleParameters.MuscleElemAmount; ///< The total amount of elements for this muscle
            F0 ??= ...DefaultMusPar.PCSAfactor*PCSA; ///< Maximum force output at optimum fiber length
            Lf0 ??= MuscleParameters.OptimalFiberlength / cos(pi/180*MuscleParameters.Pennationangle); //< Optimal fiber length corrected by pennation angle
            AnyVar PCSA ??= 1e4*...StrengthScaleSpine*MuscleParameters.MuscleVolumeSIScaled/(Lf0); ///< PCSA (cm2) of the individual element is total volumen divided by the sum of muscle element fiber lengths.
            Vol0 = (1e-4*PCSA) * Lf0; // New calculation of the vol for the specific muscle branch
        };
        #endif

        #if BM_TRUNK_MUSCLES & BM_TRUNK_CAVITY_MODEL == _CAVITY_MODEL_VOLUME_
        AnyMuscleModel OEC_3 = {
            AnyFolder& MuscleParameters = ....Data.unscaled.ModelParameters.Muscles.ObliquusExternus.OEC_3;
            AnyIntVar MuscleElemNo = 1; ///< The number of this element of the muscle
            AnyIntVar MuscleElemAmount = MuscleParameters.MuscleElemAmount; ///< The total amount of elements for this muscle
            F0 ??= ...DefaultMusPar.PCSAfactor*PCSA; ///< Maximum force output at optimum fiber length
            Lf0 ??= MuscleParameters.OptimalFiberlength / cos(pi/180*MuscleParameters.Pennationangle); //< Optimal fiber length corrected by pennation angle
            AnyVar PCSA ??= 1e4*...StrengthScaleSpine*MuscleParameters.MuscleVolumeSIScaled/(Lf0); ///< PCSA (cm2) of the individual element is total volumen divided by the sum of muscle element fiber lengths.
            Vol0 = (1e-4*PCSA) * Lf0; // New calculation of the vol for the specific muscle branch
        };
        #endif

        #if BM_TRUNK_MUSCLES & BM_TRUNK_CAVITY_MODEL == _CAVITY_MODEL_VOLUME_
        AnyMuscleModel OEC_4 = {
            AnyFolder& MuscleParameters = ....Data.unscaled.ModelParameters.Muscles.ObliquusExternus.OEC_4;
            AnyIntVar MuscleElemNo = 1; ///< The number of this element of the muscle
            AnyIntVar MuscleElemAmount = MuscleParameters.MuscleElemAmount; ///< The total amount of elements for this muscle
            F0 ??= ...DefaultMusPar.PCSAfactor*PCSA; ///< Maximum force output at optimum fiber length
            Lf0 ??= MuscleParameters.OptimalFiberlength / cos(pi/180*MuscleParameters.Pennationangle); //< Optimal fiber length corrected by pennation angle
            AnyVar PCSA ??= 1e4*...StrengthScaleSpine*MuscleParameters.MuscleVolumeSIScaled/(Lf0); ///< PCSA (cm2) of the individual element is total volumen divided by the sum of muscle element fiber lengths.
            Vol0 = (1e-4*PCSA) * Lf0; // New calculation of the vol for the specific muscle branch
        };
        #endif

        #if BM_TRUNK_MUSCLES & BM_TRUNK_CAVITY_MODEL == _CAVITY_MODEL_VOLUME_
        AnyMuscleModel OEC_5 = {
            AnyFolder& MuscleParameters = ....Data.unscaled.ModelParameters.Muscles.ObliquusExternus.OEC_5;
            AnyIntVar MuscleElemNo = 1; ///< The number of this element of the muscle
            AnyIntVar MuscleElemAmount = MuscleParameters.MuscleElemAmount; ///< The total amount of elements for this muscle
            F0 ??= ...DefaultMusPar.PCSAfactor*PCSA; ///< Maximum force output at optimum fiber length
            Lf0 ??= MuscleParameters.OptimalFiberlength / cos(pi/180*MuscleParameters.Pennationangle); //< Optimal fiber length corrected by pennation angle
            AnyVar PCSA ??= 1e4*...StrengthScaleSpine*MuscleParameters.MuscleVolumeSIScaled/(Lf0); ///< PCSA (cm2) of the individual element is total volumen divided by the sum of muscle element fiber lengths.
            Vol0 = (1e-4*PCSA) * Lf0; // New calculation of the vol for the specific muscle branch
        };
        #endif

        #if BM_TRUNK_MUSCLES & BM_TRUNK_CAVITY_MODEL == _CAVITY_MODEL_VOLUME_
        AnyMuscleModel OEC_6 = {
            AnyFolder& MuscleParameters = ....Data.unscaled.ModelParameters.Muscles.ObliquusExternus.OEC_6;
            AnyIntVar MuscleElemNo = 1; ///< The number of this element of the muscle
            AnyIntVar MuscleElemAmount = MuscleParameters.MuscleElemAmount; ///< The total amount of elements for this muscle
            F0 ??= ...DefaultMusPar.PCSAfactor*PCSA; ///< Maximum force output at optimum fiber length
            Lf0 ??= MuscleParameters.OptimalFiberlength / cos(pi/180*MuscleParameters.Pennationangle); //< Optimal fiber length corrected by pennation angle
            AnyVar PCSA ??= 1e4*...StrengthScaleSpine*MuscleParameters.MuscleVolumeSIScaled/(Lf0); ///< PCSA (cm2) of the individual element is total volumen divided by the sum of muscle element fiber lengths.
            Vol0 = (1e-4*PCSA) * Lf0; // New calculation of the vol for the specific muscle branch
        };
        #endif

        #if BM_TRUNK_MUSCLES & BM_TRUNK_CAVITY_MODEL == _CAVITY_MODEL_VOLUME_
        AnyMuscleModel OEC_7 = {
            AnyFolder& MuscleParameters = ....Data.unscaled.ModelParameters.Muscles.ObliquusExternus.OEC_7;
            AnyIntVar MuscleElemNo = 1; ///< The number of this element of the muscle
            AnyIntVar MuscleElemAmount = MuscleParameters.MuscleElemAmount; ///< The total amount of elements for this muscle
            F0 ??= ...DefaultMusPar.PCSAfactor*PCSA; ///< Maximum force output at optimum fiber length
            Lf0 ??= MuscleParameters.OptimalFiberlength / cos(pi/180*MuscleParameters.Pennationangle); //< Optimal fiber length corrected by pennation angle
            AnyVar PCSA ??= 1e4*...StrengthScaleSpine*MuscleParameters.MuscleVolumeSIScaled/(Lf0); ///< PCSA (cm2) of the individual element is total volumen divided by the sum of muscle element fiber lengths.
            Vol0 = (1e-4*PCSA) * Lf0; // New calculation of the vol for the specific muscle branch
        };
        #endif

        #if BM_TRUNK_MUSCLES & BM_TRUNK_CAVITY_MODEL == _CAVITY_MODEL_VOLUME_
        AnyMuscleModel OEC_8 = {
            AnyFolder& MuscleParameters = ....Data.unscaled.ModelParameters.Muscles.ObliquusExternus.OEC_8;
            AnyIntVar MuscleElemNo = 1; ///< The number of this element of the muscle
            AnyIntVar MuscleElemAmount = MuscleParameters.MuscleElemAmount; ///< The total amount of elements for this muscle
            F0 ??= ...DefaultMusPar.PCSAfactor*PCSA; ///< Maximum force output at optimum fiber length
            Lf0 ??= MuscleParameters.OptimalFiberlength / cos(pi/180*MuscleParameters.Pennationangle); //< Optimal fiber length corrected by pennation angle
            AnyVar PCSA ??= 1e4*...StrengthScaleSpine*MuscleParameters.MuscleVolumeSIScaled/(Lf0); ///< PCSA (cm2) of the individual element is total volumen divided by the sum of muscle element fiber lengths.
            Vol0 = (1e-4*PCSA) * Lf0; // New calculation of the vol for the specific muscle branch
        };
        #endif

        #if BM_TRUNK_MUSCLES & BM_TRUNK_CAVITY_MODEL == _CAVITY_MODEL_VOLUME_
        AnyMuscleModel OEC_9 = {
            AnyFolder& MuscleParameters = ....Data.unscaled.ModelParameters.Muscles.ObliquusExternus.OEC_9;
            AnyIntVar MuscleElemNo = 1; ///< The number of this element of the muscle
            AnyIntVar MuscleElemAmount = MuscleParameters.MuscleElemAmount; ///< The total amount of elements for this muscle
            F0 ??= ...DefaultMusPar.PCSAfactor*PCSA; ///< Maximum force output at optimum fiber length
            Lf0 ??= MuscleParameters.OptimalFiberlength / cos(pi/180*MuscleParameters.Pennationangle); //< Optimal fiber length corrected by pennation angle
            AnyVar PCSA ??= 1e4*...StrengthScaleSpine*MuscleParameters.MuscleVolumeSIScaled/(Lf0); ///< PCSA (cm2) of the individual element is total volumen divided by the sum of muscle element fiber lengths.
            Vol0 = (1e-4*PCSA) * Lf0; // New calculation of the vol for the specific muscle branch
        };
        #endif

        #if BM_TRUNK_MUSCLES & BM_TRUNK_CAVITY_MODEL == _CAVITY_MODEL_VOLUME_
        AnyMuscleModel OEC_10 = {
            AnyFolder& MuscleParameters = ....Data.unscaled.ModelParameters.Muscles.ObliquusExternus.OEC_10;
            AnyIntVar MuscleElemNo = 1; ///< The number of this element of the muscle
            AnyIntVar MuscleElemAmount = MuscleParameters.MuscleElemAmount; ///< The total amount of elements for this muscle
            F0 ??= ...DefaultMusPar.PCSAfactor*PCSA; ///< Maximum force output at optimum fiber length
            Lf0 ??= MuscleParameters.OptimalFiberlength / cos(pi/180*MuscleParameters.Pennationangle); //< Optimal fiber length corrected by pennation angle
            AnyVar PCSA ??= 1e4*...StrengthScaleSpine*MuscleParameters.MuscleVolumeSIScaled/(Lf0); ///< PCSA (cm2) of the individual element is total volumen divided by the sum of muscle element fiber lengths.
            Vol0 = (1e-4*PCSA) * Lf0; // New calculation of the vol for the specific muscle branch
        };
        #endif

        #if BM_TRUNK_MUSCLES & BM_TRUNK_CAVITY_MODEL == _CAVITY_MODEL_VOLUME_
        AnyMuscleModel OEC_11 = {
            AnyFolder& MuscleParameters = ....Data.unscaled.ModelParameters.Muscles.ObliquusExternus.OEC_11;
            AnyIntVar MuscleElemNo = 1; ///< The number of this element of the muscle
            AnyIntVar MuscleElemAmount = MuscleParameters.MuscleElemAmount; ///< The total amount of elements for this muscle
            F0 ??= ...DefaultMusPar.PCSAfactor*PCSA; ///< Maximum force output at optimum fiber length
            Lf0 ??= MuscleParameters.OptimalFiberlength / cos(pi/180*MuscleParameters.Pennationangle); //< Optimal fiber length corrected by pennation angle
            AnyVar PCSA ??= 1e4*...StrengthScaleSpine*MuscleParameters.MuscleVolumeSIScaled/(Lf0); ///< PCSA (cm2) of the individual element is total volumen divided by the sum of muscle element fiber lengths.
            Vol0 = (1e-4*PCSA) * Lf0; // New calculation of the vol for the specific muscle branch
        };
        #endif

        #if BM_TRUNK_MUSCLES & BM_TRUNK_CAVITY_MODEL == _CAVITY_MODEL_VOLUME_
        AnyMuscleModel OEC_12 = {
            AnyFolder& MuscleParameters = ....Data.unscaled.ModelParameters.Muscles.ObliquusExternus.OEC_12;
            AnyIntVar MuscleElemNo = 1; ///< The number of this element of the muscle
            AnyIntVar MuscleElemAmount = MuscleParameters.MuscleElemAmount; ///< The total amount of elements for this muscle
            F0 ??= ...DefaultMusPar.PCSAfactor*PCSA; ///< Maximum force output at optimum fiber length
            Lf0 ??= MuscleParameters.OptimalFiberlength / cos(pi/180*MuscleParameters.Pennationangle); //< Optimal fiber length corrected by pennation angle
            AnyVar PCSA ??= 1e4*...StrengthScaleSpine*MuscleParameters.MuscleVolumeSIScaled/(Lf0); ///< PCSA (cm2) of the individual element is total volumen divided by the sum of muscle element fiber lengths.
            Vol0 = (1e-4*PCSA) * Lf0; // New calculation of the vol for the specific muscle branch
        };
        #endif

    };

    AnyFolder Transversus = {

        #if BM_TRUNK_MUSCLES & BM_TRUNK_CAVITY_MODEL == _CAVITY_MODEL_VOLUME_
        AnyMuscleModel Transversus_1 = {
            AnyFolder& MuscleParameters = ....Data.unscaled.ModelParameters.Muscles.Transversus.Transversus_1;
            AnyIntVar MuscleElemNo = 1; ///< The number of this element of the muscle
            AnyIntVar MuscleElemAmount = MuscleParameters.MuscleElemAmount; ///< The total amount of elements for this muscle
            F0 ??= ...DefaultMusPar.PCSAfactor*PCSA; ///< Maximum force output at optimum fiber length
            Lf0 ??= MuscleParameters.OptimalFiberlength / cos(pi/180*MuscleParameters.Pennationangle); //< Optimal fiber length corrected by pennation angle
            AnyVar PCSA ??= 1e4*...StrengthScaleSpine*MuscleParameters.MuscleVolumeSIScaled/(Lf0); ///< PCSA (cm2) of the individual element is total volumen divided by the sum of muscle element fiber lengths.
            Vol0 = (1e-4*PCSA) * Lf0; // New calculation of the vol for the specific muscle branch
        };
        #endif

        #if BM_TRUNK_MUSCLES & BM_TRUNK_CAVITY_MODEL == _CAVITY_MODEL_VOLUME_
        AnyMuscleModel Transversus_2 = {
            AnyFolder& MuscleParameters = ....Data.unscaled.ModelParameters.Muscles.Transversus.Transversus_2;
            AnyIntVar MuscleElemNo = 1; ///< The number of this element of the muscle
            AnyIntVar MuscleElemAmount = MuscleParameters.MuscleElemAmount; ///< The total amount of elements for this muscle
            F0 ??= ...DefaultMusPar.PCSAfactor*PCSA; ///< Maximum force output at optimum fiber length
            Lf0 ??= MuscleParameters.OptimalFiberlength / cos(pi/180*MuscleParameters.Pennationangle); //< Optimal fiber length corrected by pennation angle
            AnyVar PCSA ??= 1e4*...StrengthScaleSpine*MuscleParameters.MuscleVolumeSIScaled/(Lf0); ///< PCSA (cm2) of the individual element is total volumen divided by the sum of muscle element fiber lengths.
            Vol0 = (1e-4*PCSA) * Lf0; // New calculation of the vol for the specific muscle branch
        };
        #endif

        #if BM_TRUNK_MUSCLES & BM_TRUNK_CAVITY_MODEL == _CAVITY_MODEL_VOLUME_
        AnyMuscleModel Transversus_3 = {
            AnyFolder& MuscleParameters = ....Data.unscaled.ModelParameters.Muscles.Transversus.Transversus_3;
            AnyIntVar MuscleElemNo = 1; ///< The number of this element of the muscle
            AnyIntVar MuscleElemAmount = MuscleParameters.MuscleElemAmount; ///< The total amount of elements for this muscle
            F0 ??= ...DefaultMusPar.PCSAfactor*PCSA; ///< Maximum force output at optimum fiber length
            Lf0 ??= MuscleParameters.OptimalFiberlength / cos(pi/180*MuscleParameters.Pennationangle); //< Optimal fiber length corrected by pennation angle
            AnyVar PCSA ??= 1e4*...StrengthScaleSpine*MuscleParameters.MuscleVolumeSIScaled/(Lf0); ///< PCSA (cm2) of the individual element is total volumen divided by the sum of muscle element fiber lengths.
            Vol0 = (1e-4*PCSA) * Lf0; // New calculation of the vol for the specific muscle branch
        };
        #endif

        #if BM_TRUNK_MUSCLES & BM_TRUNK_CAVITY_MODEL == _CAVITY_MODEL_VOLUME_
        AnyMuscleModel Transversus_4 = {
            AnyFolder& MuscleParameters = ....Data.unscaled.ModelParameters.Muscles.Transversus.Transversus_4;
            AnyIntVar MuscleElemNo = 1; ///< The number of this element of the muscle
            AnyIntVar MuscleElemAmount = MuscleParameters.MuscleElemAmount; ///< The total amount of elements for this muscle
            F0 ??= ...DefaultMusPar.PCSAfactor*PCSA; ///< Maximum force output at optimum fiber length
            Lf0 ??= MuscleParameters.OptimalFiberlength / cos(pi/180*MuscleParameters.Pennationangle); //< Optimal fiber length corrected by pennation angle
            AnyVar PCSA ??= 1e4*...StrengthScaleSpine*MuscleParameters.MuscleVolumeSIScaled/(Lf0); ///< PCSA (cm2) of the individual element is total volumen divided by the sum of muscle element fiber lengths.
            Vol0 = (1e-4*PCSA) * Lf0; // New calculation of the vol for the specific muscle branch
        };
        #endif

        #if BM_TRUNK_MUSCLES & BM_TRUNK_CAVITY_MODEL == _CAVITY_MODEL_VOLUME_
        AnyMuscleModel Transversus_5 = {
            AnyFolder& MuscleParameters = ....Data.unscaled.ModelParameters.Muscles.Transversus.Transversus_5;
            AnyIntVar MuscleElemNo = 1; ///< The number of this element of the muscle
            AnyIntVar MuscleElemAmount = MuscleParameters.MuscleElemAmount; ///< The total amount of elements for this muscle
            F0 ??= ...DefaultMusPar.PCSAfactor*PCSA; ///< Maximum force output at optimum fiber length
            Lf0 ??= MuscleParameters.OptimalFiberlength / cos(pi/180*MuscleParameters.Pennationangle); //< Optimal fiber length corrected by pennation angle
            AnyVar PCSA ??= 1e4*...StrengthScaleSpine*MuscleParameters.MuscleVolumeSIScaled/(Lf0); ///< PCSA (cm2) of the individual element is total volumen divided by the sum of muscle element fiber lengths.
            Vol0 = (1e-4*PCSA) * Lf0; // New calculation of the vol for the specific muscle branch
        };
        #endif

    };
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