/**^
This folder implements the simple muscle models for the trunk model.
Anatomical muscles are in many cases split into
several branches (elements). Strength parameters are split between the branches,
typically by uniform split.
*/

AnyFolder DefaultMusPar = {
  AnyVar PCSAfactor ??= ....StrengthParameters.SpecificMuscleTensionSpine; // = PCSAfactor in N/cm^2 , the PCSA itself is given in cm^2 so F0 is in Newton`s.
};

AnyVar StrengthScaleSpine = ...Scaling.StrengthScaling.Spine.StrengthScale;

#include "ExtraMuscleModels.any"


AnyFolder Transversus = {

    #if BM_TRUNK_MUSCLES
    AnyMuscleModel Transversus_1 = {
        AnyFolder& MuscleParameters = ...ModelParameters.Muscles.Transversus;
        AnyIntVar MuscleElemNo = 1; ///< The number of this element of the muscle
        AnyIntVar MuscleElemAmount = MuscleParameters.MuscleElemAmount; ///< The total amount of elements for this muscle
        F0 ??= ..DefaultMusPar.PCSAfactor*PCSA; ///< Maximum force output at optimum fiber length
        Lf0 ??= MuscleParameters.OptimalFiberlength / cos(pi/180*MuscleParameters.Pennationangle); //< Optimal fiber length corrected by pennation angle
        AnyVar PCSA = 1.04; //< PCSA (cm2) of the individual element is total volumen divided by the sum of muscle element fiber lengths.
        AnyVar PCSA_new ??= 1e4*..StrengthScaleSpine*MuscleParameters.MuscleVolumeSIScaled/(.Transversus_1.Lf0 +.Transversus_2.Lf0 +.Transversus_3.Lf0 +.Transversus_4.Lf0 +.Transversus_5.Lf0 ); ///< PCSA (cm2) of the individual element is total volumen divided by the sum of muscle element fiber lengths.
        Vol0 = PCSA * Lf0; // New calculation of the vol for the specific muscle branch
    };

    AnyMuscleModel Transversus_2 = {
        AnyFolder& MuscleParameters = ...ModelParameters.Muscles.Transversus;
        AnyIntVar MuscleElemNo = 2; ///< The number of this element of the muscle
        AnyIntVar MuscleElemAmount = MuscleParameters.MuscleElemAmount; ///< The total amount of elements for this muscle
        F0 ??= ..DefaultMusPar.PCSAfactor*PCSA; ///< Maximum force output at optimum fiber length
        Lf0 ??= MuscleParameters.OptimalFiberlength / cos(pi/180*MuscleParameters.Pennationangle); //< Optimal fiber length corrected by pennation angle
        AnyVar PCSA = 1.04; //< PCSA (cm2) of the individual element is total volumen divided by the sum of muscle element fiber lengths.
        AnyVar PCSA_new ??= 1e4*..StrengthScaleSpine*MuscleParameters.MuscleVolumeSIScaled/(.Transversus_1.Lf0 +.Transversus_2.Lf0 +.Transversus_3.Lf0 +.Transversus_4.Lf0 +.Transversus_5.Lf0 ); ///< PCSA (cm2) of the individual element is total volumen divided by the sum of muscle element fiber lengths.
        Vol0 = PCSA * Lf0; // New calculation of the vol for the specific muscle branch
    };

    AnyMuscleModel Transversus_3 = {
        AnyFolder& MuscleParameters = ...ModelParameters.Muscles.Transversus;
        AnyIntVar MuscleElemNo = 3; ///< The number of this element of the muscle
        AnyIntVar MuscleElemAmount = MuscleParameters.MuscleElemAmount; ///< The total amount of elements for this muscle
        F0 ??= ..DefaultMusPar.PCSAfactor*PCSA; ///< Maximum force output at optimum fiber length
        Lf0 ??= MuscleParameters.OptimalFiberlength / cos(pi/180*MuscleParameters.Pennationangle); //< Optimal fiber length corrected by pennation angle
        AnyVar PCSA = 1.04; //< PCSA (cm2) of the individual element is total volumen divided by the sum of muscle element fiber lengths.
        AnyVar PCSA_new ??= 1e4*..StrengthScaleSpine*MuscleParameters.MuscleVolumeSIScaled/(.Transversus_1.Lf0 +.Transversus_2.Lf0 +.Transversus_3.Lf0 +.Transversus_4.Lf0 +.Transversus_5.Lf0 ); ///< PCSA (cm2) of the individual element is total volumen divided by the sum of muscle element fiber lengths.
        Vol0 = PCSA * Lf0; // New calculation of the vol for the specific muscle branch
    };

    AnyMuscleModel Transversus_4 = {
        AnyFolder& MuscleParameters = ...ModelParameters.Muscles.Transversus;
        AnyIntVar MuscleElemNo = 4; ///< The number of this element of the muscle
        AnyIntVar MuscleElemAmount = MuscleParameters.MuscleElemAmount; ///< The total amount of elements for this muscle
        F0 ??= ..DefaultMusPar.PCSAfactor*PCSA; ///< Maximum force output at optimum fiber length
        Lf0 ??= MuscleParameters.OptimalFiberlength / cos(pi/180*MuscleParameters.Pennationangle); //< Optimal fiber length corrected by pennation angle
        AnyVar PCSA = 1.04; //< PCSA (cm2) of the individual element is total volumen divided by the sum of muscle element fiber lengths.
        AnyVar PCSA_new ??= 1e4*..StrengthScaleSpine*MuscleParameters.MuscleVolumeSIScaled/(.Transversus_1.Lf0 +.Transversus_2.Lf0 +.Transversus_3.Lf0 +.Transversus_4.Lf0 +.Transversus_5.Lf0 ); ///< PCSA (cm2) of the individual element is total volumen divided by the sum of muscle element fiber lengths.
        Vol0 = PCSA * Lf0; // New calculation of the vol for the specific muscle branch
    };

    AnyMuscleModel Transversus_5 = {
        AnyFolder& MuscleParameters = ...ModelParameters.Muscles.Transversus;
        AnyIntVar MuscleElemNo = 5; ///< The number of this element of the muscle
        AnyIntVar MuscleElemAmount = MuscleParameters.MuscleElemAmount; ///< The total amount of elements for this muscle
        F0 ??= ..DefaultMusPar.PCSAfactor*PCSA; ///< Maximum force output at optimum fiber length
        Lf0 ??= MuscleParameters.OptimalFiberlength / cos(pi/180*MuscleParameters.Pennationangle); //< Optimal fiber length corrected by pennation angle
        AnyVar PCSA = 1.04; //< PCSA (cm2) of the individual element is total volumen divided by the sum of muscle element fiber lengths.
        AnyVar PCSA_new ??= 1e4*..StrengthScaleSpine*MuscleParameters.MuscleVolumeSIScaled/(.Transversus_1.Lf0 +.Transversus_2.Lf0 +.Transversus_3.Lf0 +.Transversus_4.Lf0 +.Transversus_5.Lf0 ); ///< PCSA (cm2) of the individual element is total volumen divided by the sum of muscle element fiber lengths.
        Vol0 = PCSA * Lf0; // New calculation of the vol for the specific muscle branch
    };
    #endif

};

AnyFolder Spinalis = {

    #if BM_TRUNK_MUSCLES
    AnyMuscleModel SPT11T6 = {
        AnyFolder& MuscleParameters = ...ModelParameters.Muscles.SPT11T6;
        AnyIntVar MuscleElemNo = 1; ///< The number of this element of the muscle
        AnyIntVar MuscleElemAmount = MuscleParameters.MuscleElemAmount; ///< The total amount of elements for this muscle
        F0 ??= ..DefaultMusPar.PCSAfactor*PCSA; ///< Maximum force output at optimum fiber length
        Lf0 ??= MuscleParameters.OptimalFiberlength / cos(pi/180*MuscleParameters.Pennationangle); //< Optimal fiber length corrected by pennation angle
        AnyVar PCSA = 0.25; //< PCSA (cm2) of the individual element is total volumen divided by the sum of muscle element fiber lengths.
        AnyVar PCSA_new ??= 1e4*..StrengthScaleSpine*MuscleParameters.MuscleVolumeSIScaled/(Lf0); ///< PCSA (cm2) of the individual element is total volumen divided by the sum of muscle element fiber lengths.
        Vol0 = PCSA * Lf0; // New calculation of the vol for the specific muscle branch
    };
    #endif

    #if BM_TRUNK_MUSCLES
    AnyMuscleModel SPT12T5 = {
        AnyFolder& MuscleParameters = ...ModelParameters.Muscles.SPT12T5;
        AnyIntVar MuscleElemNo = 1; ///< The number of this element of the muscle
        AnyIntVar MuscleElemAmount = MuscleParameters.MuscleElemAmount; ///< The total amount of elements for this muscle
        F0 ??= ..DefaultMusPar.PCSAfactor*PCSA; ///< Maximum force output at optimum fiber length
        Lf0 ??= MuscleParameters.OptimalFiberlength / cos(pi/180*MuscleParameters.Pennationangle); //< Optimal fiber length corrected by pennation angle
        AnyVar PCSA = 0.25; //< PCSA (cm2) of the individual element is total volumen divided by the sum of muscle element fiber lengths.
        AnyVar PCSA_new ??= 1e4*..StrengthScaleSpine*MuscleParameters.MuscleVolumeSIScaled/(Lf0); ///< PCSA (cm2) of the individual element is total volumen divided by the sum of muscle element fiber lengths.
        Vol0 = PCSA * Lf0; // New calculation of the vol for the specific muscle branch
    };
    #endif

    #if BM_TRUNK_MUSCLES
    AnyMuscleModel SPT12T4 = {
        AnyFolder& MuscleParameters = ...ModelParameters.Muscles.SPT12T4;
        AnyIntVar MuscleElemNo = 1; ///< The number of this element of the muscle
        AnyIntVar MuscleElemAmount = MuscleParameters.MuscleElemAmount; ///< The total amount of elements for this muscle
        F0 ??= ..DefaultMusPar.PCSAfactor*PCSA; ///< Maximum force output at optimum fiber length
        Lf0 ??= MuscleParameters.OptimalFiberlength / cos(pi/180*MuscleParameters.Pennationangle); //< Optimal fiber length corrected by pennation angle
        AnyVar PCSA = 0.25; //< PCSA (cm2) of the individual element is total volumen divided by the sum of muscle element fiber lengths.
        AnyVar PCSA_new ??= 1e4*..StrengthScaleSpine*MuscleParameters.MuscleVolumeSIScaled/(Lf0); ///< PCSA (cm2) of the individual element is total volumen divided by the sum of muscle element fiber lengths.
        Vol0 = PCSA * Lf0; // New calculation of the vol for the specific muscle branch
    };
    #endif

    #if BM_TRUNK_MUSCLES
    AnyMuscleModel SPL1T3 = {
        AnyFolder& MuscleParameters = ...ModelParameters.Muscles.SPL1T3;
        AnyIntVar MuscleElemNo = 1; ///< The number of this element of the muscle
        AnyIntVar MuscleElemAmount = MuscleParameters.MuscleElemAmount; ///< The total amount of elements for this muscle
        F0 ??= ..DefaultMusPar.PCSAfactor*PCSA; ///< Maximum force output at optimum fiber length
        Lf0 ??= MuscleParameters.OptimalFiberlength / cos(pi/180*MuscleParameters.Pennationangle); //< Optimal fiber length corrected by pennation angle
        AnyVar PCSA = 0.25; //< PCSA (cm2) of the individual element is total volumen divided by the sum of muscle element fiber lengths.
        AnyVar PCSA_new ??= 1e4*..StrengthScaleSpine*MuscleParameters.MuscleVolumeSIScaled/(Lf0); ///< PCSA (cm2) of the individual element is total volumen divided by the sum of muscle element fiber lengths.
        Vol0 = PCSA * Lf0; // New calculation of the vol for the specific muscle branch
    };
    #endif

    #if BM_TRUNK_MUSCLES
    AnyMuscleModel SPL1T2 = {
        AnyFolder& MuscleParameters = ...ModelParameters.Muscles.SPL1T2;
        AnyIntVar MuscleElemNo = 1; ///< The number of this element of the muscle
        AnyIntVar MuscleElemAmount = MuscleParameters.MuscleElemAmount; ///< The total amount of elements for this muscle
        F0 ??= ..DefaultMusPar.PCSAfactor*PCSA; ///< Maximum force output at optimum fiber length
        Lf0 ??= MuscleParameters.OptimalFiberlength / cos(pi/180*MuscleParameters.Pennationangle); //< Optimal fiber length corrected by pennation angle
        AnyVar PCSA = 0.25; //< PCSA (cm2) of the individual element is total volumen divided by the sum of muscle element fiber lengths.
        AnyVar PCSA_new ??= 1e4*..StrengthScaleSpine*MuscleParameters.MuscleVolumeSIScaled/(Lf0); ///< PCSA (cm2) of the individual element is total volumen divided by the sum of muscle element fiber lengths.
        Vol0 = PCSA * Lf0; // New calculation of the vol for the specific muscle branch
    };
    #endif

    #if BM_TRUNK_MUSCLES
    AnyMuscleModel SPL2T1 = {
        AnyFolder& MuscleParameters = ...ModelParameters.Muscles.SPL2T1;
        AnyIntVar MuscleElemNo = 1; ///< The number of this element of the muscle
        AnyIntVar MuscleElemAmount = MuscleParameters.MuscleElemAmount; ///< The total amount of elements for this muscle
        F0 ??= ..DefaultMusPar.PCSAfactor*PCSA; ///< Maximum force output at optimum fiber length
        Lf0 ??= MuscleParameters.OptimalFiberlength / cos(pi/180*MuscleParameters.Pennationangle); //< Optimal fiber length corrected by pennation angle
        AnyVar PCSA = 0.25; //< PCSA (cm2) of the individual element is total volumen divided by the sum of muscle element fiber lengths.
        AnyVar PCSA_new ??= 1e4*..StrengthScaleSpine*MuscleParameters.MuscleVolumeSIScaled/(Lf0); ///< PCSA (cm2) of the individual element is total volumen divided by the sum of muscle element fiber lengths.
        Vol0 = PCSA * Lf0; // New calculation of the vol for the specific muscle branch
    };
    #endif

};

AnyFolder Left = {

    AnyFolder Multifidi = {

        #if BM_TRUNK_MUSCLES
        AnyMuscleModel MFdL1L3 = {
            AnyFolder& MuscleParameters = ....ModelParameters.Muscles.MFdL1L3;
            AnyIntVar MuscleElemNo = 1; ///< The number of this element of the muscle
            AnyIntVar MuscleElemAmount = MuscleParameters.MuscleElemAmount; ///< The total amount of elements for this muscle
            F0 ??= ...DefaultMusPar.PCSAfactor*PCSA; ///< Maximum force output at optimum fiber length
            Lf0 ??= MuscleParameters.OptimalFiberlength / cos(pi/180*MuscleParameters.Pennationangle); //< Optimal fiber length corrected by pennation angle
            AnyVar PCSA = 0.38; //< PCSA (cm2) of the individual element is total volumen divided by the sum of muscle element fiber lengths.
            AnyVar PCSA_new ??= 1e4*...StrengthScaleSpine*MuscleParameters.MuscleVolumeSIScaled/(Lf0); ///< PCSA (cm2) of the individual element is total volumen divided by the sum of muscle element fiber lengths.
            Vol0 = PCSA * Lf0; // New calculation of the vol for the specific muscle branch
        };
        #endif

        #if BM_TRUNK_MUSCLES
        AnyMuscleModel MFdL2L4 = {
            AnyFolder& MuscleParameters = ....ModelParameters.Muscles.MFdL2L4;
            AnyIntVar MuscleElemNo = 1; ///< The number of this element of the muscle
            AnyIntVar MuscleElemAmount = MuscleParameters.MuscleElemAmount; ///< The total amount of elements for this muscle
            F0 ??= ...DefaultMusPar.PCSAfactor*PCSA; ///< Maximum force output at optimum fiber length
            Lf0 ??= MuscleParameters.OptimalFiberlength / cos(pi/180*MuscleParameters.Pennationangle); //< Optimal fiber length corrected by pennation angle
            AnyVar PCSA = 0.38; //< PCSA (cm2) of the individual element is total volumen divided by the sum of muscle element fiber lengths.
            AnyVar PCSA_new ??= 1e4*...StrengthScaleSpine*MuscleParameters.MuscleVolumeSIScaled/(Lf0); ///< PCSA (cm2) of the individual element is total volumen divided by the sum of muscle element fiber lengths.
            Vol0 = PCSA * Lf0; // New calculation of the vol for the specific muscle branch
        };
        #endif

        #if BM_TRUNK_MUSCLES
        AnyMuscleModel MFdL3L5 = {
            AnyFolder& MuscleParameters = ....ModelParameters.Muscles.MFdL3L5;
            AnyIntVar MuscleElemNo = 1; ///< The number of this element of the muscle
            AnyIntVar MuscleElemAmount = MuscleParameters.MuscleElemAmount; ///< The total amount of elements for this muscle
            F0 ??= ...DefaultMusPar.PCSAfactor*PCSA; ///< Maximum force output at optimum fiber length
            Lf0 ??= MuscleParameters.OptimalFiberlength / cos(pi/180*MuscleParameters.Pennationangle); //< Optimal fiber length corrected by pennation angle
            AnyVar PCSA = 0.38; //< PCSA (cm2) of the individual element is total volumen divided by the sum of muscle element fiber lengths.
            AnyVar PCSA_new ??= 1e4*...StrengthScaleSpine*MuscleParameters.MuscleVolumeSIScaled/(Lf0); ///< PCSA (cm2) of the individual element is total volumen divided by the sum of muscle element fiber lengths.
            Vol0 = PCSA * Lf0; // New calculation of the vol for the specific muscle branch
        };
        #endif

        #if BM_TRUNK_MUSCLES
        AnyMuscleModel MFdL4S1 = {
            AnyFolder& MuscleParameters = ....ModelParameters.Muscles.MFdL4S1;
            AnyIntVar MuscleElemNo = 1; ///< The number of this element of the muscle
            AnyIntVar MuscleElemAmount = MuscleParameters.MuscleElemAmount; ///< The total amount of elements for this muscle
            F0 ??= ...DefaultMusPar.PCSAfactor*PCSA; ///< Maximum force output at optimum fiber length
            Lf0 ??= MuscleParameters.OptimalFiberlength / cos(pi/180*MuscleParameters.Pennationangle); //< Optimal fiber length corrected by pennation angle
            AnyVar PCSA = 0.38; //< PCSA (cm2) of the individual element is total volumen divided by the sum of muscle element fiber lengths.
            AnyVar PCSA_new ??= 1e4*...StrengthScaleSpine*MuscleParameters.MuscleVolumeSIScaled/(Lf0); ///< PCSA (cm2) of the individual element is total volumen divided by the sum of muscle element fiber lengths.
            Vol0 = PCSA * Lf0; // New calculation of the vol for the specific muscle branch
        };
        #endif

        #if BM_TRUNK_MUSCLES
        AnyMuscleModel MFdL5S1 = {
            AnyFolder& MuscleParameters = ....ModelParameters.Muscles.MFdL5S1;
            AnyIntVar MuscleElemNo = 1; ///< The number of this element of the muscle
            AnyIntVar MuscleElemAmount = MuscleParameters.MuscleElemAmount; ///< The total amount of elements for this muscle
            F0 ??= ...DefaultMusPar.PCSAfactor*PCSA; ///< Maximum force output at optimum fiber length
            Lf0 ??= MuscleParameters.OptimalFiberlength / cos(pi/180*MuscleParameters.Pennationangle); //< Optimal fiber length corrected by pennation angle
            AnyVar PCSA = 0.38; //< PCSA (cm2) of the individual element is total volumen divided by the sum of muscle element fiber lengths.
            AnyVar PCSA_new ??= 1e4*...StrengthScaleSpine*MuscleParameters.MuscleVolumeSIScaled/(Lf0); ///< PCSA (cm2) of the individual element is total volumen divided by the sum of muscle element fiber lengths.
            Vol0 = PCSA * Lf0; // New calculation of the vol for the specific muscle branch
        };
        #endif

        #if BM_TRUNK_MUSCLES
        AnyMuscleModel MFmL1L4 = {
            AnyFolder& MuscleParameters = ....ModelParameters.Muscles.MFmL1L4;
            AnyIntVar MuscleElemNo = 1; ///< The number of this element of the muscle
            AnyIntVar MuscleElemAmount = MuscleParameters.MuscleElemAmount; ///< The total amount of elements for this muscle
            F0 ??= ...DefaultMusPar.PCSAfactor*PCSA; ///< Maximum force output at optimum fiber length
            Lf0 ??= MuscleParameters.OptimalFiberlength / cos(pi/180*MuscleParameters.Pennationangle); //< Optimal fiber length corrected by pennation angle
            AnyVar PCSA = 0.4; //< PCSA (cm2) of the individual element is total volumen divided by the sum of muscle element fiber lengths.
            AnyVar PCSA_new ??= 1e4*...StrengthScaleSpine*MuscleParameters.MuscleVolumeSIScaled/(Lf0); ///< PCSA (cm2) of the individual element is total volumen divided by the sum of muscle element fiber lengths.
            Vol0 = PCSA * Lf0; // New calculation of the vol for the specific muscle branch
        };
        #endif

        #if BM_TRUNK_MUSCLES
        AnyMuscleModel MFmL2L5 = {
            AnyFolder& MuscleParameters = ....ModelParameters.Muscles.MFmL2L5;
            AnyIntVar MuscleElemNo = 1; ///< The number of this element of the muscle
            AnyIntVar MuscleElemAmount = MuscleParameters.MuscleElemAmount; ///< The total amount of elements for this muscle
            F0 ??= ...DefaultMusPar.PCSAfactor*PCSA; ///< Maximum force output at optimum fiber length
            Lf0 ??= MuscleParameters.OptimalFiberlength / cos(pi/180*MuscleParameters.Pennationangle); //< Optimal fiber length corrected by pennation angle
            AnyVar PCSA = 0.39; //< PCSA (cm2) of the individual element is total volumen divided by the sum of muscle element fiber lengths.
            AnyVar PCSA_new ??= 1e4*...StrengthScaleSpine*MuscleParameters.MuscleVolumeSIScaled/(Lf0); ///< PCSA (cm2) of the individual element is total volumen divided by the sum of muscle element fiber lengths.
            Vol0 = PCSA * Lf0; // New calculation of the vol for the specific muscle branch
        };
        #endif

        #if BM_TRUNK_MUSCLES
        AnyMuscleModel MFmL3S1 = {
            AnyFolder& MuscleParameters = ....ModelParameters.Muscles.MFmL3S1;
            AnyIntVar MuscleElemNo = 1; ///< The number of this element of the muscle
            AnyIntVar MuscleElemAmount = MuscleParameters.MuscleElemAmount; ///< The total amount of elements for this muscle
            F0 ??= ...DefaultMusPar.PCSAfactor*PCSA; ///< Maximum force output at optimum fiber length
            Lf0 ??= MuscleParameters.OptimalFiberlength / cos(pi/180*MuscleParameters.Pennationangle); //< Optimal fiber length corrected by pennation angle
            AnyVar PCSA = 0.54; //< PCSA (cm2) of the individual element is total volumen divided by the sum of muscle element fiber lengths.
            AnyVar PCSA_new ??= 1e4*...StrengthScaleSpine*MuscleParameters.MuscleVolumeSIScaled/(Lf0); ///< PCSA (cm2) of the individual element is total volumen divided by the sum of muscle element fiber lengths.
            Vol0 = PCSA * Lf0; // New calculation of the vol for the specific muscle branch
        };
        #endif

        #if BM_TRUNK_MUSCLES
        AnyMuscleModel MFmL4Sacrum = {
            AnyFolder& MuscleParameters = ....ModelParameters.Muscles.MFmL4Sacrum;
            AnyIntVar MuscleElemNo = 1; ///< The number of this element of the muscle
            AnyIntVar MuscleElemAmount = MuscleParameters.MuscleElemAmount; ///< The total amount of elements for this muscle
            F0 ??= ...DefaultMusPar.PCSAfactor*PCSA; ///< Maximum force output at optimum fiber length
            Lf0 ??= MuscleParameters.OptimalFiberlength / cos(pi/180*MuscleParameters.Pennationangle); //< Optimal fiber length corrected by pennation angle
            AnyVar PCSA = 1.86; //< PCSA (cm2) of the individual element is total volumen divided by the sum of muscle element fiber lengths.
            AnyVar PCSA_new ??= 1e4*...StrengthScaleSpine*MuscleParameters.MuscleVolumeSIScaled/(Lf0); ///< PCSA (cm2) of the individual element is total volumen divided by the sum of muscle element fiber lengths.
            Vol0 = PCSA * Lf0; // New calculation of the vol for the specific muscle branch
        };
        #endif

        #if BM_TRUNK_MUSCLES
        AnyMuscleModel MFmL5Sacrum = {
            AnyFolder& MuscleParameters = ....ModelParameters.Muscles.MFmL5Sacrum;
            AnyIntVar MuscleElemNo = 1; ///< The number of this element of the muscle
            AnyIntVar MuscleElemAmount = MuscleParameters.MuscleElemAmount; ///< The total amount of elements for this muscle
            F0 ??= ...DefaultMusPar.PCSAfactor*PCSA; ///< Maximum force output at optimum fiber length
            Lf0 ??= MuscleParameters.OptimalFiberlength / cos(pi/180*MuscleParameters.Pennationangle); //< Optimal fiber length corrected by pennation angle
            AnyVar PCSA = 0.9; //< PCSA (cm2) of the individual element is total volumen divided by the sum of muscle element fiber lengths.
            AnyVar PCSA_new ??= 1e4*...StrengthScaleSpine*MuscleParameters.MuscleVolumeSIScaled/(Lf0); ///< PCSA (cm2) of the individual element is total volumen divided by the sum of muscle element fiber lengths.
            Vol0 = PCSA * Lf0; // New calculation of the vol for the specific muscle branch
        };
        #endif

        #if BM_TRUNK_MUSCLES
        AnyMuscleModel MFtsL1L5 = {
            AnyFolder& MuscleParameters = ....ModelParameters.Muscles.MFtsL1L5;
            AnyIntVar MuscleElemNo = 1; ///< The number of this element of the muscle
            AnyIntVar MuscleElemAmount = MuscleParameters.MuscleElemAmount; ///< The total amount of elements for this muscle
            F0 ??= ...DefaultMusPar.PCSAfactor*PCSA; ///< Maximum force output at optimum fiber length
            Lf0 ??= MuscleParameters.OptimalFiberlength / cos(pi/180*MuscleParameters.Pennationangle); //< Optimal fiber length corrected by pennation angle
            AnyVar PCSA = 0.42; //< PCSA (cm2) of the individual element is total volumen divided by the sum of muscle element fiber lengths.
            AnyVar PCSA_new ??= 1e4*...StrengthScaleSpine*MuscleParameters.MuscleVolumeSIScaled/(Lf0); ///< PCSA (cm2) of the individual element is total volumen divided by the sum of muscle element fiber lengths.
            Vol0 = PCSA * Lf0; // New calculation of the vol for the specific muscle branch
        };
        #endif

        #if BM_TRUNK_MUSCLES
        AnyMuscleModel MFtsL1S1 = {
            AnyFolder& MuscleParameters = ....ModelParameters.Muscles.MFtsL1S1;
            AnyIntVar MuscleElemNo = 1; ///< The number of this element of the muscle
            AnyIntVar MuscleElemAmount = MuscleParameters.MuscleElemAmount; ///< The total amount of elements for this muscle
            F0 ??= ...DefaultMusPar.PCSAfactor*PCSA; ///< Maximum force output at optimum fiber length
            Lf0 ??= MuscleParameters.OptimalFiberlength / cos(pi/180*MuscleParameters.Pennationangle); //< Optimal fiber length corrected by pennation angle
            AnyVar PCSA = 0.36; //< PCSA (cm2) of the individual element is total volumen divided by the sum of muscle element fiber lengths.
            AnyVar PCSA_new ??= 1e4*...StrengthScaleSpine*MuscleParameters.MuscleVolumeSIScaled/(Lf0); ///< PCSA (cm2) of the individual element is total volumen divided by the sum of muscle element fiber lengths.
            Vol0 = PCSA * Lf0; // New calculation of the vol for the specific muscle branch
        };
        #endif

        #if BM_TRUNK_MUSCLES
        AnyMuscleModel MFtsL2L5 = {
            AnyFolder& MuscleParameters = ....ModelParameters.Muscles.MFtsL2L5;
            AnyIntVar MuscleElemNo = 1; ///< The number of this element of the muscle
            AnyIntVar MuscleElemAmount = MuscleParameters.MuscleElemAmount; ///< The total amount of elements for this muscle
            F0 ??= ...DefaultMusPar.PCSAfactor*PCSA; ///< Maximum force output at optimum fiber length
            Lf0 ??= MuscleParameters.OptimalFiberlength / cos(pi/180*MuscleParameters.Pennationangle); //< Optimal fiber length corrected by pennation angle
            AnyVar PCSA = 0.39; //< PCSA (cm2) of the individual element is total volumen divided by the sum of muscle element fiber lengths.
            AnyVar PCSA_new ??= 1e4*...StrengthScaleSpine*MuscleParameters.MuscleVolumeSIScaled/(Lf0); ///< PCSA (cm2) of the individual element is total volumen divided by the sum of muscle element fiber lengths.
            Vol0 = PCSA * Lf0; // New calculation of the vol for the specific muscle branch
        };
        #endif

        #if BM_TRUNK_MUSCLES
        AnyMuscleModel MFtsL2S1 = {
            AnyFolder& MuscleParameters = ....ModelParameters.Muscles.MFtsL2S1;
            AnyIntVar MuscleElemNo = 1; ///< The number of this element of the muscle
            AnyIntVar MuscleElemAmount = MuscleParameters.MuscleElemAmount; ///< The total amount of elements for this muscle
            F0 ??= ...DefaultMusPar.PCSAfactor*PCSA; ///< Maximum force output at optimum fiber length
            Lf0 ??= MuscleParameters.OptimalFiberlength / cos(pi/180*MuscleParameters.Pennationangle); //< Optimal fiber length corrected by pennation angle
            AnyVar PCSA = 0.99; //< PCSA (cm2) of the individual element is total volumen divided by the sum of muscle element fiber lengths.
            AnyVar PCSA_new ??= 1e4*...StrengthScaleSpine*MuscleParameters.MuscleVolumeSIScaled/(Lf0); ///< PCSA (cm2) of the individual element is total volumen divided by the sum of muscle element fiber lengths.
            Vol0 = PCSA * Lf0; // New calculation of the vol for the specific muscle branch
        };
        #endif

        #if BM_TRUNK_MUSCLES
        AnyMuscleModel MFtsL3Ligament = {
            AnyFolder& MuscleParameters = ....ModelParameters.Muscles.MFtsL3Ligament;
            AnyIntVar MuscleElemNo = 1; ///< The number of this element of the muscle
            AnyIntVar MuscleElemAmount = MuscleParameters.MuscleElemAmount; ///< The total amount of elements for this muscle
            F0 ??= ...DefaultMusPar.PCSAfactor*PCSA; ///< Maximum force output at optimum fiber length
            Lf0 ??= MuscleParameters.OptimalFiberlength / cos(pi/180*MuscleParameters.Pennationangle); //< Optimal fiber length corrected by pennation angle
            AnyVar PCSA = 1.57; //< PCSA (cm2) of the individual element is total volumen divided by the sum of muscle element fiber lengths.
            AnyVar PCSA_new ??= 1e4*...StrengthScaleSpine*MuscleParameters.MuscleVolumeSIScaled/(Lf0); ///< PCSA (cm2) of the individual element is total volumen divided by the sum of muscle element fiber lengths.
            Vol0 = PCSA * Lf0; // New calculation of the vol for the specific muscle branch
        };
        #endif

        #if BM_TRUNK_MUSCLES
        AnyMuscleModel MFtsL4Sacrum = {
            AnyFolder& MuscleParameters = ....ModelParameters.Muscles.MFtsL4Sacrum;
            AnyIntVar MuscleElemNo = 1; ///< The number of this element of the muscle
            AnyIntVar MuscleElemAmount = MuscleParameters.MuscleElemAmount; ///< The total amount of elements for this muscle
            F0 ??= ...DefaultMusPar.PCSAfactor*PCSA; ///< Maximum force output at optimum fiber length
            Lf0 ??= MuscleParameters.OptimalFiberlength / cos(pi/180*MuscleParameters.Pennationangle); //< Optimal fiber length corrected by pennation angle
            AnyVar PCSA = 1.86; //< PCSA (cm2) of the individual element is total volumen divided by the sum of muscle element fiber lengths.
            AnyVar PCSA_new ??= 1e4*...StrengthScaleSpine*MuscleParameters.MuscleVolumeSIScaled/(Lf0); ///< PCSA (cm2) of the individual element is total volumen divided by the sum of muscle element fiber lengths.
            Vol0 = PCSA * Lf0; // New calculation of the vol for the specific muscle branch
        };
        #endif

        #if BM_TRUNK_MUSCLES
        AnyMuscleModel MFtsL5Sacrum = {
            AnyFolder& MuscleParameters = ....ModelParameters.Muscles.MFtsL5Sacrum;
            AnyIntVar MuscleElemNo = 1; ///< The number of this element of the muscle
            AnyIntVar MuscleElemAmount = MuscleParameters.MuscleElemAmount; ///< The total amount of elements for this muscle
            F0 ??= ...DefaultMusPar.PCSAfactor*PCSA; ///< Maximum force output at optimum fiber length
            Lf0 ??= MuscleParameters.OptimalFiberlength / cos(pi/180*MuscleParameters.Pennationangle); //< Optimal fiber length corrected by pennation angle
            AnyVar PCSA = 0.9; //< PCSA (cm2) of the individual element is total volumen divided by the sum of muscle element fiber lengths.
            AnyVar PCSA_new ??= 1e4*...StrengthScaleSpine*MuscleParameters.MuscleVolumeSIScaled/(Lf0); ///< PCSA (cm2) of the individual element is total volumen divided by the sum of muscle element fiber lengths.
            Vol0 = PCSA * Lf0; // New calculation of the vol for the specific muscle branch
        };
        #endif

        #if BM_TRUNK_MUSCLES
        AnyMuscleModel MFtstL1SIPS = {
            AnyFolder& MuscleParameters = ....ModelParameters.Muscles.MFtstL1SIPS;
            AnyIntVar MuscleElemNo = 1; ///< The number of this element of the muscle
            AnyIntVar MuscleElemAmount = MuscleParameters.MuscleElemAmount; ///< The total amount of elements for this muscle
            F0 ??= ...DefaultMusPar.PCSAfactor*PCSA; ///< Maximum force output at optimum fiber length
            Lf0 ??= MuscleParameters.OptimalFiberlength / cos(pi/180*MuscleParameters.Pennationangle); //< Optimal fiber length corrected by pennation angle
            AnyVar PCSA = 0.6; //< PCSA (cm2) of the individual element is total volumen divided by the sum of muscle element fiber lengths.
            AnyVar PCSA_new ??= 1e4*...StrengthScaleSpine*MuscleParameters.MuscleVolumeSIScaled/(Lf0); ///< PCSA (cm2) of the individual element is total volumen divided by the sum of muscle element fiber lengths.
            Vol0 = PCSA * Lf0; // New calculation of the vol for the specific muscle branch
        };
        #endif

        #if BM_TRUNK_MUSCLES
        AnyMuscleModel MFtstL2SIPS = {
            AnyFolder& MuscleParameters = ....ModelParameters.Muscles.MFtstL2SIPS;
            AnyIntVar MuscleElemNo = 1; ///< The number of this element of the muscle
            AnyIntVar MuscleElemAmount = MuscleParameters.MuscleElemAmount; ///< The total amount of elements for this muscle
            F0 ??= ...DefaultMusPar.PCSAfactor*PCSA; ///< Maximum force output at optimum fiber length
            Lf0 ??= MuscleParameters.OptimalFiberlength / cos(pi/180*MuscleParameters.Pennationangle); //< Optimal fiber length corrected by pennation angle
            AnyVar PCSA = 0.99; //< PCSA (cm2) of the individual element is total volumen divided by the sum of muscle element fiber lengths.
            AnyVar PCSA_new ??= 1e4*...StrengthScaleSpine*MuscleParameters.MuscleVolumeSIScaled/(Lf0); ///< PCSA (cm2) of the individual element is total volumen divided by the sum of muscle element fiber lengths.
            Vol0 = PCSA * Lf0; // New calculation of the vol for the specific muscle branch
        };
        #endif

        #if BM_TRUNK_MUSCLES
        AnyMuscleModel MFT4T1 = {
            AnyFolder& MuscleParameters = ....ModelParameters.Muscles.MFT4T1;
            AnyIntVar MuscleElemNo = 1; ///< The number of this element of the muscle
            AnyIntVar MuscleElemAmount = MuscleParameters.MuscleElemAmount; ///< The total amount of elements for this muscle
            F0 ??= ...DefaultMusPar.PCSAfactor*PCSA; ///< Maximum force output at optimum fiber length
            Lf0 ??= MuscleParameters.OptimalFiberlength / cos(pi/180*MuscleParameters.Pennationangle); //< Optimal fiber length corrected by pennation angle
            AnyVar PCSA = 0.4; //< PCSA (cm2) of the individual element is total volumen divided by the sum of muscle element fiber lengths.
            AnyVar PCSA_new ??= 1e4*...StrengthScaleSpine*MuscleParameters.MuscleVolumeSIScaled/(Lf0); ///< PCSA (cm2) of the individual element is total volumen divided by the sum of muscle element fiber lengths.
            Vol0 = PCSA * Lf0; // New calculation of the vol for the specific muscle branch
        };
        #endif

        #if BM_TRUNK_MUSCLES
        AnyMuscleModel MFT5T1 = {
            AnyFolder& MuscleParameters = ....ModelParameters.Muscles.MFT5T1;
            AnyIntVar MuscleElemNo = 1; ///< The number of this element of the muscle
            AnyIntVar MuscleElemAmount = MuscleParameters.MuscleElemAmount; ///< The total amount of elements for this muscle
            F0 ??= ...DefaultMusPar.PCSAfactor*PCSA; ///< Maximum force output at optimum fiber length
            Lf0 ??= MuscleParameters.OptimalFiberlength / cos(pi/180*MuscleParameters.Pennationangle); //< Optimal fiber length corrected by pennation angle
            AnyVar PCSA = 0.4; //< PCSA (cm2) of the individual element is total volumen divided by the sum of muscle element fiber lengths.
            AnyVar PCSA_new ??= 1e4*...StrengthScaleSpine*MuscleParameters.MuscleVolumeSIScaled/(Lf0); ///< PCSA (cm2) of the individual element is total volumen divided by the sum of muscle element fiber lengths.
            Vol0 = PCSA * Lf0; // New calculation of the vol for the specific muscle branch
        };
        #endif

        #if BM_TRUNK_MUSCLES
        AnyMuscleModel MFT5T2 = {
            AnyFolder& MuscleParameters = ....ModelParameters.Muscles.MFT5T2;
            AnyIntVar MuscleElemNo = 1; ///< The number of this element of the muscle
            AnyIntVar MuscleElemAmount = MuscleParameters.MuscleElemAmount; ///< The total amount of elements for this muscle
            F0 ??= ...DefaultMusPar.PCSAfactor*PCSA; ///< Maximum force output at optimum fiber length
            Lf0 ??= MuscleParameters.OptimalFiberlength / cos(pi/180*MuscleParameters.Pennationangle); //< Optimal fiber length corrected by pennation angle
            AnyVar PCSA = 0.4; //< PCSA (cm2) of the individual element is total volumen divided by the sum of muscle element fiber lengths.
            AnyVar PCSA_new ??= 1e4*...StrengthScaleSpine*MuscleParameters.MuscleVolumeSIScaled/(Lf0); ///< PCSA (cm2) of the individual element is total volumen divided by the sum of muscle element fiber lengths.
            Vol0 = PCSA * Lf0; // New calculation of the vol for the specific muscle branch
        };
        #endif

        #if BM_TRUNK_MUSCLES
        AnyMuscleModel MFT6T1 = {
            AnyFolder& MuscleParameters = ....ModelParameters.Muscles.MFT6T1;
            AnyIntVar MuscleElemNo = 1; ///< The number of this element of the muscle
            AnyIntVar MuscleElemAmount = MuscleParameters.MuscleElemAmount; ///< The total amount of elements for this muscle
            F0 ??= ...DefaultMusPar.PCSAfactor*PCSA; ///< Maximum force output at optimum fiber length
            Lf0 ??= MuscleParameters.OptimalFiberlength / cos(pi/180*MuscleParameters.Pennationangle); //< Optimal fiber length corrected by pennation angle
            AnyVar PCSA = 0.4; //< PCSA (cm2) of the individual element is total volumen divided by the sum of muscle element fiber lengths.
            AnyVar PCSA_new ??= 1e4*...StrengthScaleSpine*MuscleParameters.MuscleVolumeSIScaled/(Lf0); ///< PCSA (cm2) of the individual element is total volumen divided by the sum of muscle element fiber lengths.
            Vol0 = PCSA * Lf0; // New calculation of the vol for the specific muscle branch
        };
        #endif

        #if BM_TRUNK_MUSCLES
        AnyMuscleModel MFT6T2 = {
            AnyFolder& MuscleParameters = ....ModelParameters.Muscles.MFT6T2;
            AnyIntVar MuscleElemNo = 1; ///< The number of this element of the muscle
            AnyIntVar MuscleElemAmount = MuscleParameters.MuscleElemAmount; ///< The total amount of elements for this muscle
            F0 ??= ...DefaultMusPar.PCSAfactor*PCSA; ///< Maximum force output at optimum fiber length
            Lf0 ??= MuscleParameters.OptimalFiberlength / cos(pi/180*MuscleParameters.Pennationangle); //< Optimal fiber length corrected by pennation angle
            AnyVar PCSA = 0.4; //< PCSA (cm2) of the individual element is total volumen divided by the sum of muscle element fiber lengths.
            AnyVar PCSA_new ??= 1e4*...StrengthScaleSpine*MuscleParameters.MuscleVolumeSIScaled/(Lf0); ///< PCSA (cm2) of the individual element is total volumen divided by the sum of muscle element fiber lengths.
            Vol0 = PCSA * Lf0; // New calculation of the vol for the specific muscle branch
        };
        #endif

        #if BM_TRUNK_MUSCLES
        AnyMuscleModel MFT6T3 = {
            AnyFolder& MuscleParameters = ....ModelParameters.Muscles.MFT6T3;
            AnyIntVar MuscleElemNo = 1; ///< The number of this element of the muscle
            AnyIntVar MuscleElemAmount = MuscleParameters.MuscleElemAmount; ///< The total amount of elements for this muscle
            F0 ??= ...DefaultMusPar.PCSAfactor*PCSA; ///< Maximum force output at optimum fiber length
            Lf0 ??= MuscleParameters.OptimalFiberlength / cos(pi/180*MuscleParameters.Pennationangle); //< Optimal fiber length corrected by pennation angle
            AnyVar PCSA = 0.4; //< PCSA (cm2) of the individual element is total volumen divided by the sum of muscle element fiber lengths.
            AnyVar PCSA_new ??= 1e4*...StrengthScaleSpine*MuscleParameters.MuscleVolumeSIScaled/(Lf0); ///< PCSA (cm2) of the individual element is total volumen divided by the sum of muscle element fiber lengths.
            Vol0 = PCSA * Lf0; // New calculation of the vol for the specific muscle branch
        };
        #endif

        #if BM_TRUNK_MUSCLES
        AnyMuscleModel MFT7T2 = {
            AnyFolder& MuscleParameters = ....ModelParameters.Muscles.MFT7T2;
            AnyIntVar MuscleElemNo = 1; ///< The number of this element of the muscle
            AnyIntVar MuscleElemAmount = MuscleParameters.MuscleElemAmount; ///< The total amount of elements for this muscle
            F0 ??= ...DefaultMusPar.PCSAfactor*PCSA; ///< Maximum force output at optimum fiber length
            Lf0 ??= MuscleParameters.OptimalFiberlength / cos(pi/180*MuscleParameters.Pennationangle); //< Optimal fiber length corrected by pennation angle
            AnyVar PCSA = 0.4; //< PCSA (cm2) of the individual element is total volumen divided by the sum of muscle element fiber lengths.
            AnyVar PCSA_new ??= 1e4*...StrengthScaleSpine*MuscleParameters.MuscleVolumeSIScaled/(Lf0); ///< PCSA (cm2) of the individual element is total volumen divided by the sum of muscle element fiber lengths.
            Vol0 = PCSA * Lf0; // New calculation of the vol for the specific muscle branch
        };
        #endif

        #if BM_TRUNK_MUSCLES
        AnyMuscleModel MFT7T3 = {
            AnyFolder& MuscleParameters = ....ModelParameters.Muscles.MFT7T3;
            AnyIntVar MuscleElemNo = 1; ///< The number of this element of the muscle
            AnyIntVar MuscleElemAmount = MuscleParameters.MuscleElemAmount; ///< The total amount of elements for this muscle
            F0 ??= ...DefaultMusPar.PCSAfactor*PCSA; ///< Maximum force output at optimum fiber length
            Lf0 ??= MuscleParameters.OptimalFiberlength / cos(pi/180*MuscleParameters.Pennationangle); //< Optimal fiber length corrected by pennation angle
            AnyVar PCSA = 0.4; //< PCSA (cm2) of the individual element is total volumen divided by the sum of muscle element fiber lengths.
            AnyVar PCSA_new ??= 1e4*...StrengthScaleSpine*MuscleParameters.MuscleVolumeSIScaled/(Lf0); ///< PCSA (cm2) of the individual element is total volumen divided by the sum of muscle element fiber lengths.
            Vol0 = PCSA * Lf0; // New calculation of the vol for the specific muscle branch
        };
        #endif

        #if BM_TRUNK_MUSCLES
        AnyMuscleModel MFT7T4 = {
            AnyFolder& MuscleParameters = ....ModelParameters.Muscles.MFT7T4;
            AnyIntVar MuscleElemNo = 1; ///< The number of this element of the muscle
            AnyIntVar MuscleElemAmount = MuscleParameters.MuscleElemAmount; ///< The total amount of elements for this muscle
            F0 ??= ...DefaultMusPar.PCSAfactor*PCSA; ///< Maximum force output at optimum fiber length
            Lf0 ??= MuscleParameters.OptimalFiberlength / cos(pi/180*MuscleParameters.Pennationangle); //< Optimal fiber length corrected by pennation angle
            AnyVar PCSA = 0.4; //< PCSA (cm2) of the individual element is total volumen divided by the sum of muscle element fiber lengths.
            AnyVar PCSA_new ??= 1e4*...StrengthScaleSpine*MuscleParameters.MuscleVolumeSIScaled/(Lf0); ///< PCSA (cm2) of the individual element is total volumen divided by the sum of muscle element fiber lengths.
            Vol0 = PCSA * Lf0; // New calculation of the vol for the specific muscle branch
        };
        #endif

        #if BM_TRUNK_MUSCLES
        AnyMuscleModel MFT8T3 = {
            AnyFolder& MuscleParameters = ....ModelParameters.Muscles.MFT8T3;
            AnyIntVar MuscleElemNo = 1; ///< The number of this element of the muscle
            AnyIntVar MuscleElemAmount = MuscleParameters.MuscleElemAmount; ///< The total amount of elements for this muscle
            F0 ??= ...DefaultMusPar.PCSAfactor*PCSA; ///< Maximum force output at optimum fiber length
            Lf0 ??= MuscleParameters.OptimalFiberlength / cos(pi/180*MuscleParameters.Pennationangle); //< Optimal fiber length corrected by pennation angle
            AnyVar PCSA = 0.4; //< PCSA (cm2) of the individual element is total volumen divided by the sum of muscle element fiber lengths.
            AnyVar PCSA_new ??= 1e4*...StrengthScaleSpine*MuscleParameters.MuscleVolumeSIScaled/(Lf0); ///< PCSA (cm2) of the individual element is total volumen divided by the sum of muscle element fiber lengths.
            Vol0 = PCSA * Lf0; // New calculation of the vol for the specific muscle branch
        };
        #endif

        #if BM_TRUNK_MUSCLES
        AnyMuscleModel MFT8T4 = {
            AnyFolder& MuscleParameters = ....ModelParameters.Muscles.MFT8T4;
            AnyIntVar MuscleElemNo = 1; ///< The number of this element of the muscle
            AnyIntVar MuscleElemAmount = MuscleParameters.MuscleElemAmount; ///< The total amount of elements for this muscle
            F0 ??= ...DefaultMusPar.PCSAfactor*PCSA; ///< Maximum force output at optimum fiber length
            Lf0 ??= MuscleParameters.OptimalFiberlength / cos(pi/180*MuscleParameters.Pennationangle); //< Optimal fiber length corrected by pennation angle
            AnyVar PCSA = 0.4; //< PCSA (cm2) of the individual element is total volumen divided by the sum of muscle element fiber lengths.
            AnyVar PCSA_new ??= 1e4*...StrengthScaleSpine*MuscleParameters.MuscleVolumeSIScaled/(Lf0); ///< PCSA (cm2) of the individual element is total volumen divided by the sum of muscle element fiber lengths.
            Vol0 = PCSA * Lf0; // New calculation of the vol for the specific muscle branch
        };
        #endif

        #if BM_TRUNK_MUSCLES
        AnyMuscleModel MFT8T5 = {
            AnyFolder& MuscleParameters = ....ModelParameters.Muscles.MFT8T5;
            AnyIntVar MuscleElemNo = 1; ///< The number of this element of the muscle
            AnyIntVar MuscleElemAmount = MuscleParameters.MuscleElemAmount; ///< The total amount of elements for this muscle
            F0 ??= ...DefaultMusPar.PCSAfactor*PCSA; ///< Maximum force output at optimum fiber length
            Lf0 ??= MuscleParameters.OptimalFiberlength / cos(pi/180*MuscleParameters.Pennationangle); //< Optimal fiber length corrected by pennation angle
            AnyVar PCSA = 0.4; //< PCSA (cm2) of the individual element is total volumen divided by the sum of muscle element fiber lengths.
            AnyVar PCSA_new ??= 1e4*...StrengthScaleSpine*MuscleParameters.MuscleVolumeSIScaled/(Lf0); ///< PCSA (cm2) of the individual element is total volumen divided by the sum of muscle element fiber lengths.
            Vol0 = PCSA * Lf0; // New calculation of the vol for the specific muscle branch
        };
        #endif

        #if BM_TRUNK_MUSCLES
        AnyMuscleModel MFT9T4 = {
            AnyFolder& MuscleParameters = ....ModelParameters.Muscles.MFT9T4;
            AnyIntVar MuscleElemNo = 1; ///< The number of this element of the muscle
            AnyIntVar MuscleElemAmount = MuscleParameters.MuscleElemAmount; ///< The total amount of elements for this muscle
            F0 ??= ...DefaultMusPar.PCSAfactor*PCSA; ///< Maximum force output at optimum fiber length
            Lf0 ??= MuscleParameters.OptimalFiberlength / cos(pi/180*MuscleParameters.Pennationangle); //< Optimal fiber length corrected by pennation angle
            AnyVar PCSA = 0.4; //< PCSA (cm2) of the individual element is total volumen divided by the sum of muscle element fiber lengths.
            AnyVar PCSA_new ??= 1e4*...StrengthScaleSpine*MuscleParameters.MuscleVolumeSIScaled/(Lf0); ///< PCSA (cm2) of the individual element is total volumen divided by the sum of muscle element fiber lengths.
            Vol0 = PCSA * Lf0; // New calculation of the vol for the specific muscle branch
        };
        #endif

        #if BM_TRUNK_MUSCLES
        AnyMuscleModel MFT9T5 = {
            AnyFolder& MuscleParameters = ....ModelParameters.Muscles.MFT9T5;
            AnyIntVar MuscleElemNo = 1; ///< The number of this element of the muscle
            AnyIntVar MuscleElemAmount = MuscleParameters.MuscleElemAmount; ///< The total amount of elements for this muscle
            F0 ??= ...DefaultMusPar.PCSAfactor*PCSA; ///< Maximum force output at optimum fiber length
            Lf0 ??= MuscleParameters.OptimalFiberlength / cos(pi/180*MuscleParameters.Pennationangle); //< Optimal fiber length corrected by pennation angle
            AnyVar PCSA = 0.4; //< PCSA (cm2) of the individual element is total volumen divided by the sum of muscle element fiber lengths.
            AnyVar PCSA_new ??= 1e4*...StrengthScaleSpine*MuscleParameters.MuscleVolumeSIScaled/(Lf0); ///< PCSA (cm2) of the individual element is total volumen divided by the sum of muscle element fiber lengths.
            Vol0 = PCSA * Lf0; // New calculation of the vol for the specific muscle branch
        };
        #endif

        #if BM_TRUNK_MUSCLES
        AnyMuscleModel MFT9T6 = {
            AnyFolder& MuscleParameters = ....ModelParameters.Muscles.MFT9T6;
            AnyIntVar MuscleElemNo = 1; ///< The number of this element of the muscle
            AnyIntVar MuscleElemAmount = MuscleParameters.MuscleElemAmount; ///< The total amount of elements for this muscle
            F0 ??= ...DefaultMusPar.PCSAfactor*PCSA; ///< Maximum force output at optimum fiber length
            Lf0 ??= MuscleParameters.OptimalFiberlength / cos(pi/180*MuscleParameters.Pennationangle); //< Optimal fiber length corrected by pennation angle
            AnyVar PCSA = 0.4; //< PCSA (cm2) of the individual element is total volumen divided by the sum of muscle element fiber lengths.
            AnyVar PCSA_new ??= 1e4*...StrengthScaleSpine*MuscleParameters.MuscleVolumeSIScaled/(Lf0); ///< PCSA (cm2) of the individual element is total volumen divided by the sum of muscle element fiber lengths.
            Vol0 = PCSA * Lf0; // New calculation of the vol for the specific muscle branch
        };
        #endif

        #if BM_TRUNK_MUSCLES
        AnyMuscleModel MFT10T5 = {
            AnyFolder& MuscleParameters = ....ModelParameters.Muscles.MFT10T5;
            AnyIntVar MuscleElemNo = 1; ///< The number of this element of the muscle
            AnyIntVar MuscleElemAmount = MuscleParameters.MuscleElemAmount; ///< The total amount of elements for this muscle
            F0 ??= ...DefaultMusPar.PCSAfactor*PCSA; ///< Maximum force output at optimum fiber length
            Lf0 ??= MuscleParameters.OptimalFiberlength / cos(pi/180*MuscleParameters.Pennationangle); //< Optimal fiber length corrected by pennation angle
            AnyVar PCSA = 0.4; //< PCSA (cm2) of the individual element is total volumen divided by the sum of muscle element fiber lengths.
            AnyVar PCSA_new ??= 1e4*...StrengthScaleSpine*MuscleParameters.MuscleVolumeSIScaled/(Lf0); ///< PCSA (cm2) of the individual element is total volumen divided by the sum of muscle element fiber lengths.
            Vol0 = PCSA * Lf0; // New calculation of the vol for the specific muscle branch
        };
        #endif

        #if BM_TRUNK_MUSCLES
        AnyMuscleModel MFT10T6 = {
            AnyFolder& MuscleParameters = ....ModelParameters.Muscles.MFT10T6;
            AnyIntVar MuscleElemNo = 1; ///< The number of this element of the muscle
            AnyIntVar MuscleElemAmount = MuscleParameters.MuscleElemAmount; ///< The total amount of elements for this muscle
            F0 ??= ...DefaultMusPar.PCSAfactor*PCSA; ///< Maximum force output at optimum fiber length
            Lf0 ??= MuscleParameters.OptimalFiberlength / cos(pi/180*MuscleParameters.Pennationangle); //< Optimal fiber length corrected by pennation angle
            AnyVar PCSA = 0.4; //< PCSA (cm2) of the individual element is total volumen divided by the sum of muscle element fiber lengths.
            AnyVar PCSA_new ??= 1e4*...StrengthScaleSpine*MuscleParameters.MuscleVolumeSIScaled/(Lf0); ///< PCSA (cm2) of the individual element is total volumen divided by the sum of muscle element fiber lengths.
            Vol0 = PCSA * Lf0; // New calculation of the vol for the specific muscle branch
        };
        #endif

        #if BM_TRUNK_MUSCLES
        AnyMuscleModel MFT10T7 = {
            AnyFolder& MuscleParameters = ....ModelParameters.Muscles.MFT10T7;
            AnyIntVar MuscleElemNo = 1; ///< The number of this element of the muscle
            AnyIntVar MuscleElemAmount = MuscleParameters.MuscleElemAmount; ///< The total amount of elements for this muscle
            F0 ??= ...DefaultMusPar.PCSAfactor*PCSA; ///< Maximum force output at optimum fiber length
            Lf0 ??= MuscleParameters.OptimalFiberlength / cos(pi/180*MuscleParameters.Pennationangle); //< Optimal fiber length corrected by pennation angle
            AnyVar PCSA = 0.4; //< PCSA (cm2) of the individual element is total volumen divided by the sum of muscle element fiber lengths.
            AnyVar PCSA_new ??= 1e4*...StrengthScaleSpine*MuscleParameters.MuscleVolumeSIScaled/(Lf0); ///< PCSA (cm2) of the individual element is total volumen divided by the sum of muscle element fiber lengths.
            Vol0 = PCSA * Lf0; // New calculation of the vol for the specific muscle branch
        };
        #endif

        #if BM_TRUNK_MUSCLES
        AnyMuscleModel MFT11T6 = {
            AnyFolder& MuscleParameters = ....ModelParameters.Muscles.MFT11T6;
            AnyIntVar MuscleElemNo = 1; ///< The number of this element of the muscle
            AnyIntVar MuscleElemAmount = MuscleParameters.MuscleElemAmount; ///< The total amount of elements for this muscle
            F0 ??= ...DefaultMusPar.PCSAfactor*PCSA; ///< Maximum force output at optimum fiber length
            Lf0 ??= MuscleParameters.OptimalFiberlength / cos(pi/180*MuscleParameters.Pennationangle); //< Optimal fiber length corrected by pennation angle
            AnyVar PCSA = 0.4; //< PCSA (cm2) of the individual element is total volumen divided by the sum of muscle element fiber lengths.
            AnyVar PCSA_new ??= 1e4*...StrengthScaleSpine*MuscleParameters.MuscleVolumeSIScaled/(Lf0); ///< PCSA (cm2) of the individual element is total volumen divided by the sum of muscle element fiber lengths.
            Vol0 = PCSA * Lf0; // New calculation of the vol for the specific muscle branch
        };
        #endif

        #if BM_TRUNK_MUSCLES
        AnyMuscleModel MFT11T7 = {
            AnyFolder& MuscleParameters = ....ModelParameters.Muscles.MFT11T7;
            AnyIntVar MuscleElemNo = 1; ///< The number of this element of the muscle
            AnyIntVar MuscleElemAmount = MuscleParameters.MuscleElemAmount; ///< The total amount of elements for this muscle
            F0 ??= ...DefaultMusPar.PCSAfactor*PCSA; ///< Maximum force output at optimum fiber length
            Lf0 ??= MuscleParameters.OptimalFiberlength / cos(pi/180*MuscleParameters.Pennationangle); //< Optimal fiber length corrected by pennation angle
            AnyVar PCSA = 0.4; //< PCSA (cm2) of the individual element is total volumen divided by the sum of muscle element fiber lengths.
            AnyVar PCSA_new ??= 1e4*...StrengthScaleSpine*MuscleParameters.MuscleVolumeSIScaled/(Lf0); ///< PCSA (cm2) of the individual element is total volumen divided by the sum of muscle element fiber lengths.
            Vol0 = PCSA * Lf0; // New calculation of the vol for the specific muscle branch
        };
        #endif

        #if BM_TRUNK_MUSCLES
        AnyMuscleModel MFT11T8 = {
            AnyFolder& MuscleParameters = ....ModelParameters.Muscles.MFT11T8;
            AnyIntVar MuscleElemNo = 1; ///< The number of this element of the muscle
            AnyIntVar MuscleElemAmount = MuscleParameters.MuscleElemAmount; ///< The total amount of elements for this muscle
            F0 ??= ...DefaultMusPar.PCSAfactor*PCSA; ///< Maximum force output at optimum fiber length
            Lf0 ??= MuscleParameters.OptimalFiberlength / cos(pi/180*MuscleParameters.Pennationangle); //< Optimal fiber length corrected by pennation angle
            AnyVar PCSA = 0.4; //< PCSA (cm2) of the individual element is total volumen divided by the sum of muscle element fiber lengths.
            AnyVar PCSA_new ??= 1e4*...StrengthScaleSpine*MuscleParameters.MuscleVolumeSIScaled/(Lf0); ///< PCSA (cm2) of the individual element is total volumen divided by the sum of muscle element fiber lengths.
            Vol0 = PCSA * Lf0; // New calculation of the vol for the specific muscle branch
        };
        #endif

        #if BM_TRUNK_MUSCLES
        AnyMuscleModel MFT12T7 = {
            AnyFolder& MuscleParameters = ....ModelParameters.Muscles.MFT12T7;
            AnyIntVar MuscleElemNo = 1; ///< The number of this element of the muscle
            AnyIntVar MuscleElemAmount = MuscleParameters.MuscleElemAmount; ///< The total amount of elements for this muscle
            F0 ??= ...DefaultMusPar.PCSAfactor*PCSA; ///< Maximum force output at optimum fiber length
            Lf0 ??= MuscleParameters.OptimalFiberlength / cos(pi/180*MuscleParameters.Pennationangle); //< Optimal fiber length corrected by pennation angle
            AnyVar PCSA = 0.4; //< PCSA (cm2) of the individual element is total volumen divided by the sum of muscle element fiber lengths.
            AnyVar PCSA_new ??= 1e4*...StrengthScaleSpine*MuscleParameters.MuscleVolumeSIScaled/(Lf0); ///< PCSA (cm2) of the individual element is total volumen divided by the sum of muscle element fiber lengths.
            Vol0 = PCSA * Lf0; // New calculation of the vol for the specific muscle branch
        };
        #endif

        #if BM_TRUNK_MUSCLES
        AnyMuscleModel MFT12T8 = {
            AnyFolder& MuscleParameters = ....ModelParameters.Muscles.MFT12T8;
            AnyIntVar MuscleElemNo = 1; ///< The number of this element of the muscle
            AnyIntVar MuscleElemAmount = MuscleParameters.MuscleElemAmount; ///< The total amount of elements for this muscle
            F0 ??= ...DefaultMusPar.PCSAfactor*PCSA; ///< Maximum force output at optimum fiber length
            Lf0 ??= MuscleParameters.OptimalFiberlength / cos(pi/180*MuscleParameters.Pennationangle); //< Optimal fiber length corrected by pennation angle
            AnyVar PCSA = 0.4; //< PCSA (cm2) of the individual element is total volumen divided by the sum of muscle element fiber lengths.
            AnyVar PCSA_new ??= 1e4*...StrengthScaleSpine*MuscleParameters.MuscleVolumeSIScaled/(Lf0); ///< PCSA (cm2) of the individual element is total volumen divided by the sum of muscle element fiber lengths.
            Vol0 = PCSA * Lf0; // New calculation of the vol for the specific muscle branch
        };
        #endif

        #if BM_TRUNK_MUSCLES
        AnyMuscleModel MFT12T9 = {
            AnyFolder& MuscleParameters = ....ModelParameters.Muscles.MFT12T9;
            AnyIntVar MuscleElemNo = 1; ///< The number of this element of the muscle
            AnyIntVar MuscleElemAmount = MuscleParameters.MuscleElemAmount; ///< The total amount of elements for this muscle
            F0 ??= ...DefaultMusPar.PCSAfactor*PCSA; ///< Maximum force output at optimum fiber length
            Lf0 ??= MuscleParameters.OptimalFiberlength / cos(pi/180*MuscleParameters.Pennationangle); //< Optimal fiber length corrected by pennation angle
            AnyVar PCSA = 0.4; //< PCSA (cm2) of the individual element is total volumen divided by the sum of muscle element fiber lengths.
            AnyVar PCSA_new ??= 1e4*...StrengthScaleSpine*MuscleParameters.MuscleVolumeSIScaled/(Lf0); ///< PCSA (cm2) of the individual element is total volumen divided by the sum of muscle element fiber lengths.
            Vol0 = PCSA * Lf0; // New calculation of the vol for the specific muscle branch
        };
        #endif

        #if BM_TRUNK_MUSCLES
        AnyMuscleModel MFL1T8 = {
            AnyFolder& MuscleParameters = ....ModelParameters.Muscles.MFL1T8;
            AnyIntVar MuscleElemNo = 1; ///< The number of this element of the muscle
            AnyIntVar MuscleElemAmount = MuscleParameters.MuscleElemAmount; ///< The total amount of elements for this muscle
            F0 ??= ...DefaultMusPar.PCSAfactor*PCSA; ///< Maximum force output at optimum fiber length
            Lf0 ??= MuscleParameters.OptimalFiberlength / cos(pi/180*MuscleParameters.Pennationangle); //< Optimal fiber length corrected by pennation angle
            AnyVar PCSA = 1.15; //< PCSA (cm2) of the individual element is total volumen divided by the sum of muscle element fiber lengths.
            AnyVar PCSA_new ??= 1e4*...StrengthScaleSpine*MuscleParameters.MuscleVolumeSIScaled/(Lf0); ///< PCSA (cm2) of the individual element is total volumen divided by the sum of muscle element fiber lengths.
            Vol0 = PCSA * Lf0; // New calculation of the vol for the specific muscle branch
        };
        #endif

        #if BM_TRUNK_MUSCLES
        AnyMuscleModel MFL1T9 = {
            AnyFolder& MuscleParameters = ....ModelParameters.Muscles.MFL1T9;
            AnyIntVar MuscleElemNo = 1; ///< The number of this element of the muscle
            AnyIntVar MuscleElemAmount = MuscleParameters.MuscleElemAmount; ///< The total amount of elements for this muscle
            F0 ??= ...DefaultMusPar.PCSAfactor*PCSA; ///< Maximum force output at optimum fiber length
            Lf0 ??= MuscleParameters.OptimalFiberlength / cos(pi/180*MuscleParameters.Pennationangle); //< Optimal fiber length corrected by pennation angle
            AnyVar PCSA = 1.15; //< PCSA (cm2) of the individual element is total volumen divided by the sum of muscle element fiber lengths.
            AnyVar PCSA_new ??= 1e4*...StrengthScaleSpine*MuscleParameters.MuscleVolumeSIScaled/(Lf0); ///< PCSA (cm2) of the individual element is total volumen divided by the sum of muscle element fiber lengths.
            Vol0 = PCSA * Lf0; // New calculation of the vol for the specific muscle branch
        };
        #endif

        #if BM_TRUNK_MUSCLES
        AnyMuscleModel MFL1T10 = {
            AnyFolder& MuscleParameters = ....ModelParameters.Muscles.MFL1T10;
            AnyIntVar MuscleElemNo = 1; ///< The number of this element of the muscle
            AnyIntVar MuscleElemAmount = MuscleParameters.MuscleElemAmount; ///< The total amount of elements for this muscle
            F0 ??= ...DefaultMusPar.PCSAfactor*PCSA; ///< Maximum force output at optimum fiber length
            Lf0 ??= MuscleParameters.OptimalFiberlength / cos(pi/180*MuscleParameters.Pennationangle); //< Optimal fiber length corrected by pennation angle
            AnyVar PCSA = 1.15; //< PCSA (cm2) of the individual element is total volumen divided by the sum of muscle element fiber lengths.
            AnyVar PCSA_new ??= 1e4*...StrengthScaleSpine*MuscleParameters.MuscleVolumeSIScaled/(Lf0); ///< PCSA (cm2) of the individual element is total volumen divided by the sum of muscle element fiber lengths.
            Vol0 = PCSA * Lf0; // New calculation of the vol for the specific muscle branch
        };
        #endif

        #if BM_TRUNK_MUSCLES
        AnyMuscleModel MFL2T9 = {
            AnyFolder& MuscleParameters = ....ModelParameters.Muscles.MFL2T9;
            AnyIntVar MuscleElemNo = 1; ///< The number of this element of the muscle
            AnyIntVar MuscleElemAmount = MuscleParameters.MuscleElemAmount; ///< The total amount of elements for this muscle
            F0 ??= ...DefaultMusPar.PCSAfactor*PCSA; ///< Maximum force output at optimum fiber length
            Lf0 ??= MuscleParameters.OptimalFiberlength / cos(pi/180*MuscleParameters.Pennationangle); //< Optimal fiber length corrected by pennation angle
            AnyVar PCSA = 1.15; //< PCSA (cm2) of the individual element is total volumen divided by the sum of muscle element fiber lengths.
            AnyVar PCSA_new ??= 1e4*...StrengthScaleSpine*MuscleParameters.MuscleVolumeSIScaled/(Lf0); ///< PCSA (cm2) of the individual element is total volumen divided by the sum of muscle element fiber lengths.
            Vol0 = PCSA * Lf0; // New calculation of the vol for the specific muscle branch
        };
        #endif

        #if BM_TRUNK_MUSCLES
        AnyMuscleModel MFL2T10 = {
            AnyFolder& MuscleParameters = ....ModelParameters.Muscles.MFL2T10;
            AnyIntVar MuscleElemNo = 1; ///< The number of this element of the muscle
            AnyIntVar MuscleElemAmount = MuscleParameters.MuscleElemAmount; ///< The total amount of elements for this muscle
            F0 ??= ...DefaultMusPar.PCSAfactor*PCSA; ///< Maximum force output at optimum fiber length
            Lf0 ??= MuscleParameters.OptimalFiberlength / cos(pi/180*MuscleParameters.Pennationangle); //< Optimal fiber length corrected by pennation angle
            AnyVar PCSA = 1.15; //< PCSA (cm2) of the individual element is total volumen divided by the sum of muscle element fiber lengths.
            AnyVar PCSA_new ??= 1e4*...StrengthScaleSpine*MuscleParameters.MuscleVolumeSIScaled/(Lf0); ///< PCSA (cm2) of the individual element is total volumen divided by the sum of muscle element fiber lengths.
            Vol0 = PCSA * Lf0; // New calculation of the vol for the specific muscle branch
        };
        #endif

        #if BM_TRUNK_MUSCLES
        AnyMuscleModel MFL2T11 = {
            AnyFolder& MuscleParameters = ....ModelParameters.Muscles.MFL2T11;
            AnyIntVar MuscleElemNo = 1; ///< The number of this element of the muscle
            AnyIntVar MuscleElemAmount = MuscleParameters.MuscleElemAmount; ///< The total amount of elements for this muscle
            F0 ??= ...DefaultMusPar.PCSAfactor*PCSA; ///< Maximum force output at optimum fiber length
            Lf0 ??= MuscleParameters.OptimalFiberlength / cos(pi/180*MuscleParameters.Pennationangle); //< Optimal fiber length corrected by pennation angle
            AnyVar PCSA = 1.15; //< PCSA (cm2) of the individual element is total volumen divided by the sum of muscle element fiber lengths.
            AnyVar PCSA_new ??= 1e4*...StrengthScaleSpine*MuscleParameters.MuscleVolumeSIScaled/(Lf0); ///< PCSA (cm2) of the individual element is total volumen divided by the sum of muscle element fiber lengths.
            Vol0 = PCSA * Lf0; // New calculation of the vol for the specific muscle branch
        };
        #endif

        #if BM_TRUNK_MUSCLES
        AnyMuscleModel MFL3T10 = {
            AnyFolder& MuscleParameters = ....ModelParameters.Muscles.MFL3T10;
            AnyIntVar MuscleElemNo = 1; ///< The number of this element of the muscle
            AnyIntVar MuscleElemAmount = MuscleParameters.MuscleElemAmount; ///< The total amount of elements for this muscle
            F0 ??= ...DefaultMusPar.PCSAfactor*PCSA; ///< Maximum force output at optimum fiber length
            Lf0 ??= MuscleParameters.OptimalFiberlength / cos(pi/180*MuscleParameters.Pennationangle); //< Optimal fiber length corrected by pennation angle
            AnyVar PCSA = 1.15; //< PCSA (cm2) of the individual element is total volumen divided by the sum of muscle element fiber lengths.
            AnyVar PCSA_new ??= 1e4*...StrengthScaleSpine*MuscleParameters.MuscleVolumeSIScaled/(Lf0); ///< PCSA (cm2) of the individual element is total volumen divided by the sum of muscle element fiber lengths.
            Vol0 = PCSA * Lf0; // New calculation of the vol for the specific muscle branch
        };
        #endif

        #if BM_TRUNK_MUSCLES
        AnyMuscleModel MFL3T11 = {
            AnyFolder& MuscleParameters = ....ModelParameters.Muscles.MFL3T11;
            AnyIntVar MuscleElemNo = 1; ///< The number of this element of the muscle
            AnyIntVar MuscleElemAmount = MuscleParameters.MuscleElemAmount; ///< The total amount of elements for this muscle
            F0 ??= ...DefaultMusPar.PCSAfactor*PCSA; ///< Maximum force output at optimum fiber length
            Lf0 ??= MuscleParameters.OptimalFiberlength / cos(pi/180*MuscleParameters.Pennationangle); //< Optimal fiber length corrected by pennation angle
            AnyVar PCSA = 1.15; //< PCSA (cm2) of the individual element is total volumen divided by the sum of muscle element fiber lengths.
            AnyVar PCSA_new ??= 1e4*...StrengthScaleSpine*MuscleParameters.MuscleVolumeSIScaled/(Lf0); ///< PCSA (cm2) of the individual element is total volumen divided by the sum of muscle element fiber lengths.
            Vol0 = PCSA * Lf0; // New calculation of the vol for the specific muscle branch
        };
        #endif

        #if BM_TRUNK_MUSCLES
        AnyMuscleModel MFL3T12 = {
            AnyFolder& MuscleParameters = ....ModelParameters.Muscles.MFL3T12;
            AnyIntVar MuscleElemNo = 1; ///< The number of this element of the muscle
            AnyIntVar MuscleElemAmount = MuscleParameters.MuscleElemAmount; ///< The total amount of elements for this muscle
            F0 ??= ...DefaultMusPar.PCSAfactor*PCSA; ///< Maximum force output at optimum fiber length
            Lf0 ??= MuscleParameters.OptimalFiberlength / cos(pi/180*MuscleParameters.Pennationangle); //< Optimal fiber length corrected by pennation angle
            AnyVar PCSA = 1.15; //< PCSA (cm2) of the individual element is total volumen divided by the sum of muscle element fiber lengths.
            AnyVar PCSA_new ??= 1e4*...StrengthScaleSpine*MuscleParameters.MuscleVolumeSIScaled/(Lf0); ///< PCSA (cm2) of the individual element is total volumen divided by the sum of muscle element fiber lengths.
            Vol0 = PCSA * Lf0; // New calculation of the vol for the specific muscle branch
        };
        #endif

        #if BM_TRUNK_MUSCLES
        AnyMuscleModel MFL4T11 = {
            AnyFolder& MuscleParameters = ....ModelParameters.Muscles.MFL4T11;
            AnyIntVar MuscleElemNo = 1; ///< The number of this element of the muscle
            AnyIntVar MuscleElemAmount = MuscleParameters.MuscleElemAmount; ///< The total amount of elements for this muscle
            F0 ??= ...DefaultMusPar.PCSAfactor*PCSA; ///< Maximum force output at optimum fiber length
            Lf0 ??= MuscleParameters.OptimalFiberlength / cos(pi/180*MuscleParameters.Pennationangle); //< Optimal fiber length corrected by pennation angle
            AnyVar PCSA = 1.15; //< PCSA (cm2) of the individual element is total volumen divided by the sum of muscle element fiber lengths.
            AnyVar PCSA_new ??= 1e4*...StrengthScaleSpine*MuscleParameters.MuscleVolumeSIScaled/(Lf0); ///< PCSA (cm2) of the individual element is total volumen divided by the sum of muscle element fiber lengths.
            Vol0 = PCSA * Lf0; // New calculation of the vol for the specific muscle branch
        };
        #endif

        #if BM_TRUNK_MUSCLES
        AnyMuscleModel MFL4T12 = {
            AnyFolder& MuscleParameters = ....ModelParameters.Muscles.MFL4T12;
            AnyIntVar MuscleElemNo = 1; ///< The number of this element of the muscle
            AnyIntVar MuscleElemAmount = MuscleParameters.MuscleElemAmount; ///< The total amount of elements for this muscle
            F0 ??= ...DefaultMusPar.PCSAfactor*PCSA; ///< Maximum force output at optimum fiber length
            Lf0 ??= MuscleParameters.OptimalFiberlength / cos(pi/180*MuscleParameters.Pennationangle); //< Optimal fiber length corrected by pennation angle
            AnyVar PCSA = 1.15; //< PCSA (cm2) of the individual element is total volumen divided by the sum of muscle element fiber lengths.
            AnyVar PCSA_new ??= 1e4*...StrengthScaleSpine*MuscleParameters.MuscleVolumeSIScaled/(Lf0); ///< PCSA (cm2) of the individual element is total volumen divided by the sum of muscle element fiber lengths.
            Vol0 = PCSA * Lf0; // New calculation of the vol for the specific muscle branch
        };
        #endif

        #if BM_TRUNK_MUSCLES
        AnyMuscleModel MFL5T12 = {
            AnyFolder& MuscleParameters = ....ModelParameters.Muscles.MFL5T12;
            AnyIntVar MuscleElemNo = 1; ///< The number of this element of the muscle
            AnyIntVar MuscleElemAmount = MuscleParameters.MuscleElemAmount; ///< The total amount of elements for this muscle
            F0 ??= ...DefaultMusPar.PCSAfactor*PCSA; ///< Maximum force output at optimum fiber length
            Lf0 ??= MuscleParameters.OptimalFiberlength / cos(pi/180*MuscleParameters.Pennationangle); //< Optimal fiber length corrected by pennation angle
            AnyVar PCSA = 1.15; //< PCSA (cm2) of the individual element is total volumen divided by the sum of muscle element fiber lengths.
            AnyVar PCSA_new ??= 1e4*...StrengthScaleSpine*MuscleParameters.MuscleVolumeSIScaled/(Lf0); ///< PCSA (cm2) of the individual element is total volumen divided by the sum of muscle element fiber lengths.
            Vol0 = PCSA * Lf0; // New calculation of the vol for the specific muscle branch
        };
        #endif

        #if BM_TRUNK_MUSCLES
        AnyMuscleModel MultifidusCervicisC5C2 = {
            AnyFolder& MuscleParameters = ....ModelParameters.Muscles.MultifidusCervicisC5C2;
            AnyIntVar MuscleElemNo = 1; ///< The number of this element of the muscle
            AnyIntVar MuscleElemAmount = MuscleParameters.MuscleElemAmount; ///< The total amount of elements for this muscle
            F0 ??= ...DefaultMusPar.PCSAfactor*PCSA; ///< Maximum force output at optimum fiber length
            Lf0 ??= MuscleParameters.OptimalFiberlength / cos(pi/180*MuscleParameters.Pennationangle); //< Optimal fiber length corrected by pennation angle
            AnyVar PCSA = 0.15; //< PCSA (cm2) of the individual element is total volumen divided by the sum of muscle element fiber lengths.
            AnyVar PCSA_new ??= 1e4*...StrengthScaleSpine*MuscleParameters.MuscleVolumeSIScaled/(Lf0); ///< PCSA (cm2) of the individual element is total volumen divided by the sum of muscle element fiber lengths.
            Vol0 = PCSA * Lf0; // New calculation of the vol for the specific muscle branch
        };
        #endif

        #if BM_TRUNK_MUSCLES
        AnyMuscleModel MultifidusCervicisC6C2 = {
            AnyFolder& MuscleParameters = ....ModelParameters.Muscles.MultifidusCervicisC6C2;
            AnyIntVar MuscleElemNo = 1; ///< The number of this element of the muscle
            AnyIntVar MuscleElemAmount = MuscleParameters.MuscleElemAmount; ///< The total amount of elements for this muscle
            F0 ??= ...DefaultMusPar.PCSAfactor*PCSA; ///< Maximum force output at optimum fiber length
            Lf0 ??= MuscleParameters.OptimalFiberlength / cos(pi/180*MuscleParameters.Pennationangle); //< Optimal fiber length corrected by pennation angle
            AnyVar PCSA = 0.15; //< PCSA (cm2) of the individual element is total volumen divided by the sum of muscle element fiber lengths.
            AnyVar PCSA_new ??= 1e4*...StrengthScaleSpine*MuscleParameters.MuscleVolumeSIScaled/(Lf0); ///< PCSA (cm2) of the individual element is total volumen divided by the sum of muscle element fiber lengths.
            Vol0 = PCSA * Lf0; // New calculation of the vol for the specific muscle branch
        };
        #endif

        #if BM_TRUNK_MUSCLES
        AnyMuscleModel MultifidusCervicisC6C3 = {
            AnyFolder& MuscleParameters = ....ModelParameters.Muscles.MultifidusCervicisC6C3;
            AnyIntVar MuscleElemNo = 1; ///< The number of this element of the muscle
            AnyIntVar MuscleElemAmount = MuscleParameters.MuscleElemAmount; ///< The total amount of elements for this muscle
            F0 ??= ...DefaultMusPar.PCSAfactor*PCSA; ///< Maximum force output at optimum fiber length
            Lf0 ??= MuscleParameters.OptimalFiberlength / cos(pi/180*MuscleParameters.Pennationangle); //< Optimal fiber length corrected by pennation angle
            AnyVar PCSA = 0.15; //< PCSA (cm2) of the individual element is total volumen divided by the sum of muscle element fiber lengths.
            AnyVar PCSA_new ??= 1e4*...StrengthScaleSpine*MuscleParameters.MuscleVolumeSIScaled/(Lf0); ///< PCSA (cm2) of the individual element is total volumen divided by the sum of muscle element fiber lengths.
            Vol0 = PCSA * Lf0; // New calculation of the vol for the specific muscle branch
        };
        #endif

        #if BM_TRUNK_MUSCLES
        AnyMuscleModel MultifidusCervicisC7C3 = {
            AnyFolder& MuscleParameters = ....ModelParameters.Muscles.MultifidusCervicisC7C3;
            AnyIntVar MuscleElemNo = 1; ///< The number of this element of the muscle
            AnyIntVar MuscleElemAmount = MuscleParameters.MuscleElemAmount; ///< The total amount of elements for this muscle
            F0 ??= ...DefaultMusPar.PCSAfactor*PCSA; ///< Maximum force output at optimum fiber length
            Lf0 ??= MuscleParameters.OptimalFiberlength / cos(pi/180*MuscleParameters.Pennationangle); //< Optimal fiber length corrected by pennation angle
            AnyVar PCSA = 0.15; //< PCSA (cm2) of the individual element is total volumen divided by the sum of muscle element fiber lengths.
            AnyVar PCSA_new ??= 1e4*...StrengthScaleSpine*MuscleParameters.MuscleVolumeSIScaled/(Lf0); ///< PCSA (cm2) of the individual element is total volumen divided by the sum of muscle element fiber lengths.
            Vol0 = PCSA * Lf0; // New calculation of the vol for the specific muscle branch
        };
        #endif

        #if BM_TRUNK_MUSCLES
        AnyMuscleModel MultifidusCervicisC7C4 = {
            AnyFolder& MuscleParameters = ....ModelParameters.Muscles.MultifidusCervicisC7C4;
            AnyIntVar MuscleElemNo = 1; ///< The number of this element of the muscle
            AnyIntVar MuscleElemAmount = MuscleParameters.MuscleElemAmount; ///< The total amount of elements for this muscle
            F0 ??= ...DefaultMusPar.PCSAfactor*PCSA; ///< Maximum force output at optimum fiber length
            Lf0 ??= MuscleParameters.OptimalFiberlength / cos(pi/180*MuscleParameters.Pennationangle); //< Optimal fiber length corrected by pennation angle
            AnyVar PCSA = 0.15; //< PCSA (cm2) of the individual element is total volumen divided by the sum of muscle element fiber lengths.
            AnyVar PCSA_new ??= 1e4*...StrengthScaleSpine*MuscleParameters.MuscleVolumeSIScaled/(Lf0); ///< PCSA (cm2) of the individual element is total volumen divided by the sum of muscle element fiber lengths.
            Vol0 = PCSA * Lf0; // New calculation of the vol for the specific muscle branch
        };
        #endif

        #if BM_TRUNK_MUSCLES
        AnyMuscleModel MultifidusCervicisT1C4 = {
            AnyFolder& MuscleParameters = ....ModelParameters.Muscles.MultifidusCervicisT1C4;
            AnyIntVar MuscleElemNo = 1; ///< The number of this element of the muscle
            AnyIntVar MuscleElemAmount = MuscleParameters.MuscleElemAmount; ///< The total amount of elements for this muscle
            F0 ??= ...DefaultMusPar.PCSAfactor*PCSA; ///< Maximum force output at optimum fiber length
            Lf0 ??= MuscleParameters.OptimalFiberlength / cos(pi/180*MuscleParameters.Pennationangle); //< Optimal fiber length corrected by pennation angle
            AnyVar PCSA = 0.15; //< PCSA (cm2) of the individual element is total volumen divided by the sum of muscle element fiber lengths.
            AnyVar PCSA_new ??= 1e4*...StrengthScaleSpine*MuscleParameters.MuscleVolumeSIScaled/(Lf0); ///< PCSA (cm2) of the individual element is total volumen divided by the sum of muscle element fiber lengths.
            Vol0 = PCSA * Lf0; // New calculation of the vol for the specific muscle branch
        };
        #endif

        #if BM_TRUNK_MUSCLES
        AnyMuscleModel MultifidusCervicisT1C5 = {
            AnyFolder& MuscleParameters = ....ModelParameters.Muscles.MultifidusCervicisT1C5;
            AnyIntVar MuscleElemNo = 1; ///< The number of this element of the muscle
            AnyIntVar MuscleElemAmount = MuscleParameters.MuscleElemAmount; ///< The total amount of elements for this muscle
            F0 ??= ...DefaultMusPar.PCSAfactor*PCSA; ///< Maximum force output at optimum fiber length
            Lf0 ??= MuscleParameters.OptimalFiberlength / cos(pi/180*MuscleParameters.Pennationangle); //< Optimal fiber length corrected by pennation angle
            AnyVar PCSA = 0.2; //< PCSA (cm2) of the individual element is total volumen divided by the sum of muscle element fiber lengths.
            AnyVar PCSA_new ??= 1e4*...StrengthScaleSpine*MuscleParameters.MuscleVolumeSIScaled/(Lf0); ///< PCSA (cm2) of the individual element is total volumen divided by the sum of muscle element fiber lengths.
            Vol0 = PCSA * Lf0; // New calculation of the vol for the specific muscle branch
        };
        #endif

        #if BM_TRUNK_MUSCLES
        AnyMuscleModel MultifidusCervicisT2C5 = {
            AnyFolder& MuscleParameters = ....ModelParameters.Muscles.MultifidusCervicisT2C5;
            AnyIntVar MuscleElemNo = 1; ///< The number of this element of the muscle
            AnyIntVar MuscleElemAmount = MuscleParameters.MuscleElemAmount; ///< The total amount of elements for this muscle
            F0 ??= ...DefaultMusPar.PCSAfactor*PCSA; ///< Maximum force output at optimum fiber length
            Lf0 ??= MuscleParameters.OptimalFiberlength / cos(pi/180*MuscleParameters.Pennationangle); //< Optimal fiber length corrected by pennation angle
            AnyVar PCSA = 0.2; //< PCSA (cm2) of the individual element is total volumen divided by the sum of muscle element fiber lengths.
            AnyVar PCSA_new ??= 1e4*...StrengthScaleSpine*MuscleParameters.MuscleVolumeSIScaled/(Lf0); ///< PCSA (cm2) of the individual element is total volumen divided by the sum of muscle element fiber lengths.
            Vol0 = PCSA * Lf0; // New calculation of the vol for the specific muscle branch
        };
        #endif

        #if BM_TRUNK_MUSCLES
        AnyMuscleModel MultifidusCervicisT2C6 = {
            AnyFolder& MuscleParameters = ....ModelParameters.Muscles.MultifidusCervicisT2C6;
            AnyIntVar MuscleElemNo = 1; ///< The number of this element of the muscle
            AnyIntVar MuscleElemAmount = MuscleParameters.MuscleElemAmount; ///< The total amount of elements for this muscle
            F0 ??= ...DefaultMusPar.PCSAfactor*PCSA; ///< Maximum force output at optimum fiber length
            Lf0 ??= MuscleParameters.OptimalFiberlength / cos(pi/180*MuscleParameters.Pennationangle); //< Optimal fiber length corrected by pennation angle
            AnyVar PCSA = 0.4; //< PCSA (cm2) of the individual element is total volumen divided by the sum of muscle element fiber lengths.
            AnyVar PCSA_new ??= 1e4*...StrengthScaleSpine*MuscleParameters.MuscleVolumeSIScaled/(Lf0); ///< PCSA (cm2) of the individual element is total volumen divided by the sum of muscle element fiber lengths.
            Vol0 = PCSA * Lf0; // New calculation of the vol for the specific muscle branch
        };
        #endif

        #if BM_TRUNK_MUSCLES
        AnyMuscleModel MultifidusCervicisT3C6 = {
            AnyFolder& MuscleParameters = ....ModelParameters.Muscles.MultifidusCervicisT3C6;
            AnyIntVar MuscleElemNo = 1; ///< The number of this element of the muscle
            AnyIntVar MuscleElemAmount = MuscleParameters.MuscleElemAmount; ///< The total amount of elements for this muscle
            F0 ??= ...DefaultMusPar.PCSAfactor*PCSA; ///< Maximum force output at optimum fiber length
            Lf0 ??= MuscleParameters.OptimalFiberlength / cos(pi/180*MuscleParameters.Pennationangle); //< Optimal fiber length corrected by pennation angle
            AnyVar PCSA = 0.4; //< PCSA (cm2) of the individual element is total volumen divided by the sum of muscle element fiber lengths.
            AnyVar PCSA_new ??= 1e4*...StrengthScaleSpine*MuscleParameters.MuscleVolumeSIScaled/(Lf0); ///< PCSA (cm2) of the individual element is total volumen divided by the sum of muscle element fiber lengths.
            Vol0 = PCSA * Lf0; // New calculation of the vol for the specific muscle branch
        };
        #endif

        #if BM_TRUNK_MUSCLES
        AnyMuscleModel MultifidusCervicisT3C7 = {
            AnyFolder& MuscleParameters = ....ModelParameters.Muscles.MultifidusCervicisT3C7;
            AnyIntVar MuscleElemNo = 1; ///< The number of this element of the muscle
            AnyIntVar MuscleElemAmount = MuscleParameters.MuscleElemAmount; ///< The total amount of elements for this muscle
            F0 ??= ...DefaultMusPar.PCSAfactor*PCSA; ///< Maximum force output at optimum fiber length
            Lf0 ??= MuscleParameters.OptimalFiberlength / cos(pi/180*MuscleParameters.Pennationangle); //< Optimal fiber length corrected by pennation angle
            AnyVar PCSA = 1.1; //< PCSA (cm2) of the individual element is total volumen divided by the sum of muscle element fiber lengths.
            AnyVar PCSA_new ??= 1e4*...StrengthScaleSpine*MuscleParameters.MuscleVolumeSIScaled/(Lf0); ///< PCSA (cm2) of the individual element is total volumen divided by the sum of muscle element fiber lengths.
            Vol0 = PCSA * Lf0; // New calculation of the vol for the specific muscle branch
        };
        #endif

        #if BM_TRUNK_MUSCLES
        AnyMuscleModel MultifidusCervicisT4C7 = {
            AnyFolder& MuscleParameters = ....ModelParameters.Muscles.MultifidusCervicisT4C7;
            AnyIntVar MuscleElemNo = 1; ///< The number of this element of the muscle
            AnyIntVar MuscleElemAmount = MuscleParameters.MuscleElemAmount; ///< The total amount of elements for this muscle
            F0 ??= ...DefaultMusPar.PCSAfactor*PCSA; ///< Maximum force output at optimum fiber length
            Lf0 ??= MuscleParameters.OptimalFiberlength / cos(pi/180*MuscleParameters.Pennationangle); //< Optimal fiber length corrected by pennation angle
            AnyVar PCSA = 1.3; //< PCSA (cm2) of the individual element is total volumen divided by the sum of muscle element fiber lengths.
            AnyVar PCSA_new ??= 1e4*...StrengthScaleSpine*MuscleParameters.MuscleVolumeSIScaled/(Lf0); ///< PCSA (cm2) of the individual element is total volumen divided by the sum of muscle element fiber lengths.
            Vol0 = PCSA * Lf0; // New calculation of the vol for the specific muscle branch
        };
        #endif

    };
    AnyFolder ErectorSpinae = {

        #if BM_TRUNK_MUSCLES
        AnyMuscleModel ILplL1CI = {
            AnyFolder& MuscleParameters = ....ModelParameters.Muscles.ILplL1CI;
            AnyIntVar MuscleElemNo = 1; ///< The number of this element of the muscle
            AnyIntVar MuscleElemAmount = MuscleParameters.MuscleElemAmount; ///< The total amount of elements for this muscle
            F0 ??= ...DefaultMusPar.PCSAfactor*PCSA; ///< Maximum force output at optimum fiber length
            Lf0 ??= MuscleParameters.OptimalFiberlength / cos(pi/180*MuscleParameters.Pennationangle); //< Optimal fiber length corrected by pennation angle
            AnyVar PCSA = 1.08; //< PCSA (cm2) of the individual element is total volumen divided by the sum of muscle element fiber lengths.
            AnyVar PCSA_new ??= 1e4*...StrengthScaleSpine*MuscleParameters.MuscleVolumeSIScaled/(Lf0); ///< PCSA (cm2) of the individual element is total volumen divided by the sum of muscle element fiber lengths.
            Vol0 = PCSA * Lf0; // New calculation of the vol for the specific muscle branch
        };
        #endif

        #if BM_TRUNK_MUSCLES
        AnyMuscleModel ILplL2CI = {
            AnyFolder& MuscleParameters = ....ModelParameters.Muscles.ILplL2CI;
            AnyIntVar MuscleElemNo = 1; ///< The number of this element of the muscle
            AnyIntVar MuscleElemAmount = MuscleParameters.MuscleElemAmount; ///< The total amount of elements for this muscle
            F0 ??= ...DefaultMusPar.PCSAfactor*PCSA; ///< Maximum force output at optimum fiber length
            Lf0 ??= MuscleParameters.OptimalFiberlength / cos(pi/180*MuscleParameters.Pennationangle); //< Optimal fiber length corrected by pennation angle
            AnyVar PCSA = 1.54; //< PCSA (cm2) of the individual element is total volumen divided by the sum of muscle element fiber lengths.
            AnyVar PCSA_new ??= 1e4*...StrengthScaleSpine*MuscleParameters.MuscleVolumeSIScaled/(Lf0); ///< PCSA (cm2) of the individual element is total volumen divided by the sum of muscle element fiber lengths.
            Vol0 = PCSA * Lf0; // New calculation of the vol for the specific muscle branch
        };
        #endif

        #if BM_TRUNK_MUSCLES
        AnyMuscleModel ILplL3CI = {
            AnyFolder& MuscleParameters = ....ModelParameters.Muscles.ILplL3CI;
            AnyIntVar MuscleElemNo = 1; ///< The number of this element of the muscle
            AnyIntVar MuscleElemAmount = MuscleParameters.MuscleElemAmount; ///< The total amount of elements for this muscle
            F0 ??= ...DefaultMusPar.PCSAfactor*PCSA; ///< Maximum force output at optimum fiber length
            Lf0 ??= MuscleParameters.OptimalFiberlength / cos(pi/180*MuscleParameters.Pennationangle); //< Optimal fiber length corrected by pennation angle
            AnyVar PCSA = 1.82; //< PCSA (cm2) of the individual element is total volumen divided by the sum of muscle element fiber lengths.
            AnyVar PCSA_new ??= 1e4*...StrengthScaleSpine*MuscleParameters.MuscleVolumeSIScaled/(Lf0); ///< PCSA (cm2) of the individual element is total volumen divided by the sum of muscle element fiber lengths.
            Vol0 = PCSA * Lf0; // New calculation of the vol for the specific muscle branch
        };
        #endif

        #if BM_TRUNK_MUSCLES
        AnyMuscleModel ILplL4CI = {
            AnyFolder& MuscleParameters = ....ModelParameters.Muscles.ILplL4CI;
            AnyIntVar MuscleElemNo = 1; ///< The number of this element of the muscle
            AnyIntVar MuscleElemAmount = MuscleParameters.MuscleElemAmount; ///< The total amount of elements for this muscle
            F0 ??= ...DefaultMusPar.PCSAfactor*PCSA; ///< Maximum force output at optimum fiber length
            Lf0 ??= MuscleParameters.OptimalFiberlength / cos(pi/180*MuscleParameters.Pennationangle); //< Optimal fiber length corrected by pennation angle
            AnyVar PCSA = 1.89; //< PCSA (cm2) of the individual element is total volumen divided by the sum of muscle element fiber lengths.
            AnyVar PCSA_new ??= 1e4*...StrengthScaleSpine*MuscleParameters.MuscleVolumeSIScaled/(Lf0); ///< PCSA (cm2) of the individual element is total volumen divided by the sum of muscle element fiber lengths.
            Vol0 = PCSA * Lf0; // New calculation of the vol for the specific muscle branch
        };
        #endif

        #if BM_TRUNK_MUSCLES
        AnyMuscleModel LTplL1SIPS = {
            AnyFolder& MuscleParameters = ....ModelParameters.Muscles.LTplL1SIPS;
            AnyIntVar MuscleElemNo = 1; ///< The number of this element of the muscle
            AnyIntVar MuscleElemAmount = MuscleParameters.MuscleElemAmount; ///< The total amount of elements for this muscle
            F0 ??= ...DefaultMusPar.PCSAfactor*PCSA; ///< Maximum force output at optimum fiber length
            Lf0 ??= MuscleParameters.OptimalFiberlength / cos(pi/180*MuscleParameters.Pennationangle); //< Optimal fiber length corrected by pennation angle
            AnyVar PCSA = 0.79; //< PCSA (cm2) of the individual element is total volumen divided by the sum of muscle element fiber lengths.
            AnyVar PCSA_new ??= 1e4*...StrengthScaleSpine*MuscleParameters.MuscleVolumeSIScaled/(Lf0); ///< PCSA (cm2) of the individual element is total volumen divided by the sum of muscle element fiber lengths.
            Vol0 = PCSA * Lf0; // New calculation of the vol for the specific muscle branch
        };
        #endif

        #if BM_TRUNK_MUSCLES
        AnyMuscleModel LTplL2SIPS = {
            AnyFolder& MuscleParameters = ....ModelParameters.Muscles.LTplL2SIPS;
            AnyIntVar MuscleElemNo = 1; ///< The number of this element of the muscle
            AnyIntVar MuscleElemAmount = MuscleParameters.MuscleElemAmount; ///< The total amount of elements for this muscle
            F0 ??= ...DefaultMusPar.PCSAfactor*PCSA; ///< Maximum force output at optimum fiber length
            Lf0 ??= MuscleParameters.OptimalFiberlength / cos(pi/180*MuscleParameters.Pennationangle); //< Optimal fiber length corrected by pennation angle
            AnyVar PCSA = 0.91; //< PCSA (cm2) of the individual element is total volumen divided by the sum of muscle element fiber lengths.
            AnyVar PCSA_new ??= 1e4*...StrengthScaleSpine*MuscleParameters.MuscleVolumeSIScaled/(Lf0); ///< PCSA (cm2) of the individual element is total volumen divided by the sum of muscle element fiber lengths.
            Vol0 = PCSA * Lf0; // New calculation of the vol for the specific muscle branch
        };
        #endif

        #if BM_TRUNK_MUSCLES
        AnyMuscleModel LTplL3SIPS = {
            AnyFolder& MuscleParameters = ....ModelParameters.Muscles.LTplL3SIPS;
            AnyIntVar MuscleElemNo = 1; ///< The number of this element of the muscle
            AnyIntVar MuscleElemAmount = MuscleParameters.MuscleElemAmount; ///< The total amount of elements for this muscle
            F0 ??= ...DefaultMusPar.PCSAfactor*PCSA; ///< Maximum force output at optimum fiber length
            Lf0 ??= MuscleParameters.OptimalFiberlength / cos(pi/180*MuscleParameters.Pennationangle); //< Optimal fiber length corrected by pennation angle
            AnyVar PCSA = 1.03; //< PCSA (cm2) of the individual element is total volumen divided by the sum of muscle element fiber lengths.
            AnyVar PCSA_new ??= 1e4*...StrengthScaleSpine*MuscleParameters.MuscleVolumeSIScaled/(Lf0); ///< PCSA (cm2) of the individual element is total volumen divided by the sum of muscle element fiber lengths.
            Vol0 = PCSA * Lf0; // New calculation of the vol for the specific muscle branch
        };
        #endif

        #if BM_TRUNK_MUSCLES
        AnyMuscleModel LTplL4SIPS = {
            AnyFolder& MuscleParameters = ....ModelParameters.Muscles.LTplL4SIPS;
            AnyIntVar MuscleElemNo = 1; ///< The number of this element of the muscle
            AnyIntVar MuscleElemAmount = MuscleParameters.MuscleElemAmount; ///< The total amount of elements for this muscle
            F0 ??= ...DefaultMusPar.PCSAfactor*PCSA; ///< Maximum force output at optimum fiber length
            Lf0 ??= MuscleParameters.OptimalFiberlength / cos(pi/180*MuscleParameters.Pennationangle); //< Optimal fiber length corrected by pennation angle
            AnyVar PCSA = 1.1; //< PCSA (cm2) of the individual element is total volumen divided by the sum of muscle element fiber lengths.
            AnyVar PCSA_new ??= 1e4*...StrengthScaleSpine*MuscleParameters.MuscleVolumeSIScaled/(Lf0); ///< PCSA (cm2) of the individual element is total volumen divided by the sum of muscle element fiber lengths.
            Vol0 = PCSA * Lf0; // New calculation of the vol for the specific muscle branch
        };
        #endif

        #if BM_TRUNK_MUSCLES
        AnyMuscleModel LTplL5Ilium = {
            AnyFolder& MuscleParameters = ....ModelParameters.Muscles.LTplL5Ilium;
            AnyIntVar MuscleElemNo = 1; ///< The number of this element of the muscle
            AnyIntVar MuscleElemAmount = MuscleParameters.MuscleElemAmount; ///< The total amount of elements for this muscle
            F0 ??= ...DefaultMusPar.PCSAfactor*PCSA; ///< Maximum force output at optimum fiber length
            Lf0 ??= MuscleParameters.OptimalFiberlength / cos(pi/180*MuscleParameters.Pennationangle); //< Optimal fiber length corrected by pennation angle
            AnyVar PCSA = 1.16; //< PCSA (cm2) of the individual element is total volumen divided by the sum of muscle element fiber lengths.
            AnyVar PCSA_new ??= 1e4*...StrengthScaleSpine*MuscleParameters.MuscleVolumeSIScaled/(Lf0); ///< PCSA (cm2) of the individual element is total volumen divided by the sum of muscle element fiber lengths.
            Vol0 = PCSA * Lf0; // New calculation of the vol for the specific muscle branch
        };
        #endif

        #if BM_TRUNK_MUSCLES
        AnyMuscleModel ILptC5SIPS = {
            AnyFolder& MuscleParameters = ....ModelParameters.Muscles.ILptC5SIPS;
            AnyIntVar MuscleElemNo = 1; ///< The number of this element of the muscle
            AnyIntVar MuscleElemAmount = MuscleParameters.MuscleElemAmount; ///< The total amount of elements for this muscle
            F0 ??= ...DefaultMusPar.PCSAfactor*PCSA; ///< Maximum force output at optimum fiber length
            Lf0 ??= MuscleParameters.OptimalFiberlength / cos(pi/180*MuscleParameters.Pennationangle); //< Optimal fiber length corrected by pennation angle
            AnyVar PCSA = 0.23; //< PCSA (cm2) of the individual element is total volumen divided by the sum of muscle element fiber lengths.
            AnyVar PCSA_new ??= 1e4*...StrengthScaleSpine*MuscleParameters.MuscleVolumeSIScaled/(Lf0); ///< PCSA (cm2) of the individual element is total volumen divided by the sum of muscle element fiber lengths.
            Vol0 = PCSA * Lf0; // New calculation of the vol for the specific muscle branch
        };
        #endif

        #if BM_TRUNK_MUSCLES
        AnyMuscleModel ILptC6SIPS = {
            AnyFolder& MuscleParameters = ....ModelParameters.Muscles.ILptC6SIPS;
            AnyIntVar MuscleElemNo = 1; ///< The number of this element of the muscle
            AnyIntVar MuscleElemAmount = MuscleParameters.MuscleElemAmount; ///< The total amount of elements for this muscle
            F0 ??= ...DefaultMusPar.PCSAfactor*PCSA; ///< Maximum force output at optimum fiber length
            Lf0 ??= MuscleParameters.OptimalFiberlength / cos(pi/180*MuscleParameters.Pennationangle); //< Optimal fiber length corrected by pennation angle
            AnyVar PCSA = 0.32; //< PCSA (cm2) of the individual element is total volumen divided by the sum of muscle element fiber lengths.
            AnyVar PCSA_new ??= 1e4*...StrengthScaleSpine*MuscleParameters.MuscleVolumeSIScaled/(Lf0); ///< PCSA (cm2) of the individual element is total volumen divided by the sum of muscle element fiber lengths.
            Vol0 = PCSA * Lf0; // New calculation of the vol for the specific muscle branch
        };
        #endif

        #if BM_TRUNK_MUSCLES
        AnyMuscleModel ILptC7CI = {
            AnyFolder& MuscleParameters = ....ModelParameters.Muscles.ILptC7CI;
            AnyIntVar MuscleElemNo = 1; ///< The number of this element of the muscle
            AnyIntVar MuscleElemAmount = MuscleParameters.MuscleElemAmount; ///< The total amount of elements for this muscle
            F0 ??= ...DefaultMusPar.PCSAfactor*PCSA; ///< Maximum force output at optimum fiber length
            Lf0 ??= MuscleParameters.OptimalFiberlength / cos(pi/180*MuscleParameters.Pennationangle); //< Optimal fiber length corrected by pennation angle
            AnyVar PCSA = 0.39; //< PCSA (cm2) of the individual element is total volumen divided by the sum of muscle element fiber lengths.
            AnyVar PCSA_new ??= 1e4*...StrengthScaleSpine*MuscleParameters.MuscleVolumeSIScaled/(Lf0); ///< PCSA (cm2) of the individual element is total volumen divided by the sum of muscle element fiber lengths.
            Vol0 = PCSA * Lf0; // New calculation of the vol for the specific muscle branch
        };
        #endif

        #if BM_TRUNK_MUSCLES
        AnyMuscleModel ILptC8CI = {
            AnyFolder& MuscleParameters = ....ModelParameters.Muscles.ILptC8CI;
            AnyIntVar MuscleElemNo = 1; ///< The number of this element of the muscle
            AnyIntVar MuscleElemAmount = MuscleParameters.MuscleElemAmount; ///< The total amount of elements for this muscle
            F0 ??= ...DefaultMusPar.PCSAfactor*PCSA; ///< Maximum force output at optimum fiber length
            Lf0 ??= MuscleParameters.OptimalFiberlength / cos(pi/180*MuscleParameters.Pennationangle); //< Optimal fiber length corrected by pennation angle
            AnyVar PCSA = 0.34; //< PCSA (cm2) of the individual element is total volumen divided by the sum of muscle element fiber lengths.
            AnyVar PCSA_new ??= 1e4*...StrengthScaleSpine*MuscleParameters.MuscleVolumeSIScaled/(Lf0); ///< PCSA (cm2) of the individual element is total volumen divided by the sum of muscle element fiber lengths.
            Vol0 = PCSA * Lf0; // New calculation of the vol for the specific muscle branch
        };
        #endif

        #if BM_TRUNK_MUSCLES
        AnyMuscleModel ILptC9CI = {
            AnyFolder& MuscleParameters = ....ModelParameters.Muscles.ILptC9CI;
            AnyIntVar MuscleElemNo = 1; ///< The number of this element of the muscle
            AnyIntVar MuscleElemAmount = MuscleParameters.MuscleElemAmount; ///< The total amount of elements for this muscle
            F0 ??= ...DefaultMusPar.PCSAfactor*PCSA; ///< Maximum force output at optimum fiber length
            Lf0 ??= MuscleParameters.OptimalFiberlength / cos(pi/180*MuscleParameters.Pennationangle); //< Optimal fiber length corrected by pennation angle
            AnyVar PCSA = 0.5; //< PCSA (cm2) of the individual element is total volumen divided by the sum of muscle element fiber lengths.
            AnyVar PCSA_new ??= 1e4*...StrengthScaleSpine*MuscleParameters.MuscleVolumeSIScaled/(Lf0); ///< PCSA (cm2) of the individual element is total volumen divided by the sum of muscle element fiber lengths.
            Vol0 = PCSA * Lf0; // New calculation of the vol for the specific muscle branch
        };
        #endif

        #if BM_TRUNK_MUSCLES
        AnyMuscleModel ILptC10CI = {
            AnyFolder& MuscleParameters = ....ModelParameters.Muscles.ILptC10CI;
            AnyIntVar MuscleElemNo = 1; ///< The number of this element of the muscle
            AnyIntVar MuscleElemAmount = MuscleParameters.MuscleElemAmount; ///< The total amount of elements for this muscle
            F0 ??= ...DefaultMusPar.PCSAfactor*PCSA; ///< Maximum force output at optimum fiber length
            Lf0 ??= MuscleParameters.OptimalFiberlength / cos(pi/180*MuscleParameters.Pennationangle); //< Optimal fiber length corrected by pennation angle
            AnyVar PCSA = 1; //< PCSA (cm2) of the individual element is total volumen divided by the sum of muscle element fiber lengths.
            AnyVar PCSA_new ??= 1e4*...StrengthScaleSpine*MuscleParameters.MuscleVolumeSIScaled/(Lf0); ///< PCSA (cm2) of the individual element is total volumen divided by the sum of muscle element fiber lengths.
            Vol0 = PCSA * Lf0; // New calculation of the vol for the specific muscle branch
        };
        #endif

        #if BM_TRUNK_MUSCLES
        AnyMuscleModel ILptC11CI = {
            AnyFolder& MuscleParameters = ....ModelParameters.Muscles.ILptC11CI;
            AnyIntVar MuscleElemNo = 1; ///< The number of this element of the muscle
            AnyIntVar MuscleElemAmount = MuscleParameters.MuscleElemAmount; ///< The total amount of elements for this muscle
            F0 ??= ...DefaultMusPar.PCSAfactor*PCSA; ///< Maximum force output at optimum fiber length
            Lf0 ??= MuscleParameters.OptimalFiberlength / cos(pi/180*MuscleParameters.Pennationangle); //< Optimal fiber length corrected by pennation angle
            AnyVar PCSA = 1.23; //< PCSA (cm2) of the individual element is total volumen divided by the sum of muscle element fiber lengths.
            AnyVar PCSA_new ??= 1e4*...StrengthScaleSpine*MuscleParameters.MuscleVolumeSIScaled/(Lf0); ///< PCSA (cm2) of the individual element is total volumen divided by the sum of muscle element fiber lengths.
            Vol0 = PCSA * Lf0; // New calculation of the vol for the specific muscle branch
        };
        #endif

        #if BM_TRUNK_MUSCLES
        AnyMuscleModel ILptC12CI = {
            AnyFolder& MuscleParameters = ....ModelParameters.Muscles.ILptC12CI;
            AnyIntVar MuscleElemNo = 1; ///< The number of this element of the muscle
            AnyIntVar MuscleElemAmount = MuscleParameters.MuscleElemAmount; ///< The total amount of elements for this muscle
            F0 ??= ...DefaultMusPar.PCSAfactor*PCSA; ///< Maximum force output at optimum fiber length
            Lf0 ??= MuscleParameters.OptimalFiberlength / cos(pi/180*MuscleParameters.Pennationangle); //< Optimal fiber length corrected by pennation angle
            AnyVar PCSA = 1.47; //< PCSA (cm2) of the individual element is total volumen divided by the sum of muscle element fiber lengths.
            AnyVar PCSA_new ??= 1e4*...StrengthScaleSpine*MuscleParameters.MuscleVolumeSIScaled/(Lf0); ///< PCSA (cm2) of the individual element is total volumen divided by the sum of muscle element fiber lengths.
            Vol0 = PCSA * Lf0; // New calculation of the vol for the specific muscle branch
        };
        #endif

        #if BM_TRUNK_MUSCLES
        AnyMuscleModel LTptT1L1 = {
            AnyFolder& MuscleParameters = ....ModelParameters.Muscles.LTptT1L1;
            AnyIntVar MuscleElemNo = 1; ///< The number of this element of the muscle
            AnyIntVar MuscleElemAmount = MuscleParameters.MuscleElemAmount; ///< The total amount of elements for this muscle
            F0 ??= ...DefaultMusPar.PCSAfactor*PCSA; ///< Maximum force output at optimum fiber length
            Lf0 ??= MuscleParameters.OptimalFiberlength / cos(pi/180*MuscleParameters.Pennationangle); //< Optimal fiber length corrected by pennation angle
            AnyVar PCSA = 0.29; //< PCSA (cm2) of the individual element is total volumen divided by the sum of muscle element fiber lengths.
            AnyVar PCSA_new ??= 1e4*...StrengthScaleSpine*MuscleParameters.MuscleVolumeSIScaled/(Lf0); ///< PCSA (cm2) of the individual element is total volumen divided by the sum of muscle element fiber lengths.
            Vol0 = PCSA * Lf0; // New calculation of the vol for the specific muscle branch
        };
        #endif

        #if BM_TRUNK_MUSCLES
        AnyMuscleModel LTptT2L2 = {
            AnyFolder& MuscleParameters = ....ModelParameters.Muscles.LTptT2L2;
            AnyIntVar MuscleElemNo = 1; ///< The number of this element of the muscle
            AnyIntVar MuscleElemAmount = MuscleParameters.MuscleElemAmount; ///< The total amount of elements for this muscle
            F0 ??= ...DefaultMusPar.PCSAfactor*PCSA; ///< Maximum force output at optimum fiber length
            Lf0 ??= MuscleParameters.OptimalFiberlength / cos(pi/180*MuscleParameters.Pennationangle); //< Optimal fiber length corrected by pennation angle
            AnyVar PCSA = 0.57; //< PCSA (cm2) of the individual element is total volumen divided by the sum of muscle element fiber lengths.
            AnyVar PCSA_new ??= 1e4*...StrengthScaleSpine*MuscleParameters.MuscleVolumeSIScaled/(Lf0); ///< PCSA (cm2) of the individual element is total volumen divided by the sum of muscle element fiber lengths.
            Vol0 = PCSA * Lf0; // New calculation of the vol for the specific muscle branch
        };
        #endif

        #if BM_TRUNK_MUSCLES
        AnyMuscleModel LTptT3L3 = {
            AnyFolder& MuscleParameters = ....ModelParameters.Muscles.LTptT3L3;
            AnyIntVar MuscleElemNo = 1; ///< The number of this element of the muscle
            AnyIntVar MuscleElemAmount = MuscleParameters.MuscleElemAmount; ///< The total amount of elements for this muscle
            F0 ??= ...DefaultMusPar.PCSAfactor*PCSA; ///< Maximum force output at optimum fiber length
            Lf0 ??= MuscleParameters.OptimalFiberlength / cos(pi/180*MuscleParameters.Pennationangle); //< Optimal fiber length corrected by pennation angle
            AnyVar PCSA = 0.28; //< PCSA (cm2) of the individual element is total volumen divided by the sum of muscle element fiber lengths.
            AnyVar PCSA_new ??= 1e4*...StrengthScaleSpine*MuscleParameters.MuscleVolumeSIScaled/(Lf0); ///< PCSA (cm2) of the individual element is total volumen divided by the sum of muscle element fiber lengths.
            Vol0 = PCSA * Lf0; // New calculation of the vol for the specific muscle branch
        };
        #endif

        #if BM_TRUNK_MUSCLES
        AnyMuscleModel LTptT4L4 = {
            AnyFolder& MuscleParameters = ....ModelParameters.Muscles.LTptT4L4;
            AnyIntVar MuscleElemNo = 1; ///< The number of this element of the muscle
            AnyIntVar MuscleElemAmount = MuscleParameters.MuscleElemAmount; ///< The total amount of elements for this muscle
            F0 ??= ...DefaultMusPar.PCSAfactor*PCSA; ///< Maximum force output at optimum fiber length
            Lf0 ??= MuscleParameters.OptimalFiberlength / cos(pi/180*MuscleParameters.Pennationangle); //< Optimal fiber length corrected by pennation angle
            AnyVar PCSA = 0.225; //< PCSA (cm2) of the individual element is total volumen divided by the sum of muscle element fiber lengths.
            AnyVar PCSA_new ??= 1e4*...StrengthScaleSpine*MuscleParameters.MuscleVolumeSIScaled/(Lf0); ///< PCSA (cm2) of the individual element is total volumen divided by the sum of muscle element fiber lengths.
            Vol0 = PCSA * Lf0; // New calculation of the vol for the specific muscle branch
        };
        #endif

        #if BM_TRUNK_MUSCLES
        AnyMuscleModel LTptT5L5 = {
            AnyFolder& MuscleParameters = ....ModelParameters.Muscles.LTptT5L5;
            AnyIntVar MuscleElemNo = 1; ///< The number of this element of the muscle
            AnyIntVar MuscleElemAmount = MuscleParameters.MuscleElemAmount; ///< The total amount of elements for this muscle
            F0 ??= ...DefaultMusPar.PCSAfactor*PCSA; ///< Maximum force output at optimum fiber length
            Lf0 ??= MuscleParameters.OptimalFiberlength / cos(pi/180*MuscleParameters.Pennationangle); //< Optimal fiber length corrected by pennation angle
            AnyVar PCSA = 0.22; //< PCSA (cm2) of the individual element is total volumen divided by the sum of muscle element fiber lengths.
            AnyVar PCSA_new ??= 1e4*...StrengthScaleSpine*MuscleParameters.MuscleVolumeSIScaled/(Lf0); ///< PCSA (cm2) of the individual element is total volumen divided by the sum of muscle element fiber lengths.
            Vol0 = PCSA * Lf0; // New calculation of the vol for the specific muscle branch
        };
        #endif

        #if BM_TRUNK_MUSCLES
        AnyMuscleModel LTptT6S1 = {
            AnyFolder& MuscleParameters = ....ModelParameters.Muscles.LTptT6S1;
            AnyIntVar MuscleElemNo = 1; ///< The number of this element of the muscle
            AnyIntVar MuscleElemAmount = MuscleParameters.MuscleElemAmount; ///< The total amount of elements for this muscle
            F0 ??= ...DefaultMusPar.PCSAfactor*PCSA; ///< Maximum force output at optimum fiber length
            Lf0 ??= MuscleParameters.OptimalFiberlength / cos(pi/180*MuscleParameters.Pennationangle); //< Optimal fiber length corrected by pennation angle
            AnyVar PCSA = 0.32; //< PCSA (cm2) of the individual element is total volumen divided by the sum of muscle element fiber lengths.
            AnyVar PCSA_new ??= 1e4*...StrengthScaleSpine*MuscleParameters.MuscleVolumeSIScaled/(Lf0); ///< PCSA (cm2) of the individual element is total volumen divided by the sum of muscle element fiber lengths.
            Vol0 = PCSA * Lf0; // New calculation of the vol for the specific muscle branch
        };
        #endif

        #if BM_TRUNK_MUSCLES
        AnyMuscleModel LTptT7S2 = {
            AnyFolder& MuscleParameters = ....ModelParameters.Muscles.LTptT7S2;
            AnyIntVar MuscleElemNo = 1; ///< The number of this element of the muscle
            AnyIntVar MuscleElemAmount = MuscleParameters.MuscleElemAmount; ///< The total amount of elements for this muscle
            F0 ??= ...DefaultMusPar.PCSAfactor*PCSA; ///< Maximum force output at optimum fiber length
            Lf0 ??= MuscleParameters.OptimalFiberlength / cos(pi/180*MuscleParameters.Pennationangle); //< Optimal fiber length corrected by pennation angle
            AnyVar PCSA = 0.39; //< PCSA (cm2) of the individual element is total volumen divided by the sum of muscle element fiber lengths.
            AnyVar PCSA_new ??= 1e4*...StrengthScaleSpine*MuscleParameters.MuscleVolumeSIScaled/(Lf0); ///< PCSA (cm2) of the individual element is total volumen divided by the sum of muscle element fiber lengths.
            Vol0 = PCSA * Lf0; // New calculation of the vol for the specific muscle branch
        };
        #endif

        #if BM_TRUNK_MUSCLES
        AnyMuscleModel LTptT8S3 = {
            AnyFolder& MuscleParameters = ....ModelParameters.Muscles.LTptT8S3;
            AnyIntVar MuscleElemNo = 1; ///< The number of this element of the muscle
            AnyIntVar MuscleElemAmount = MuscleParameters.MuscleElemAmount; ///< The total amount of elements for this muscle
            F0 ??= ...DefaultMusPar.PCSAfactor*PCSA; ///< Maximum force output at optimum fiber length
            Lf0 ??= MuscleParameters.OptimalFiberlength / cos(pi/180*MuscleParameters.Pennationangle); //< Optimal fiber length corrected by pennation angle
            AnyVar PCSA = 0.625; //< PCSA (cm2) of the individual element is total volumen divided by the sum of muscle element fiber lengths.
            AnyVar PCSA_new ??= 1e4*...StrengthScaleSpine*MuscleParameters.MuscleVolumeSIScaled/(Lf0); ///< PCSA (cm2) of the individual element is total volumen divided by the sum of muscle element fiber lengths.
            Vol0 = PCSA * Lf0; // New calculation of the vol for the specific muscle branch
        };
        #endif

        #if BM_TRUNK_MUSCLES
        AnyMuscleModel LTptT9S4 = {
            AnyFolder& MuscleParameters = ....ModelParameters.Muscles.LTptT9S4;
            AnyIntVar MuscleElemNo = 1; ///< The number of this element of the muscle
            AnyIntVar MuscleElemAmount = MuscleParameters.MuscleElemAmount; ///< The total amount of elements for this muscle
            F0 ??= ...DefaultMusPar.PCSAfactor*PCSA; ///< Maximum force output at optimum fiber length
            Lf0 ??= MuscleParameters.OptimalFiberlength / cos(pi/180*MuscleParameters.Pennationangle); //< Optimal fiber length corrected by pennation angle
            AnyVar PCSA = 0.73; //< PCSA (cm2) of the individual element is total volumen divided by the sum of muscle element fiber lengths.
            AnyVar PCSA_new ??= 1e4*...StrengthScaleSpine*MuscleParameters.MuscleVolumeSIScaled/(Lf0); ///< PCSA (cm2) of the individual element is total volumen divided by the sum of muscle element fiber lengths.
            Vol0 = PCSA * Lf0; // New calculation of the vol for the specific muscle branch
        };
        #endif

        #if BM_TRUNK_MUSCLES
        AnyMuscleModel LTptT10Sacrum = {
            AnyFolder& MuscleParameters = ....ModelParameters.Muscles.LTptT10Sacrum;
            AnyIntVar MuscleElemNo = 1; ///< The number of this element of the muscle
            AnyIntVar MuscleElemAmount = MuscleParameters.MuscleElemAmount; ///< The total amount of elements for this muscle
            F0 ??= ...DefaultMusPar.PCSAfactor*PCSA; ///< Maximum force output at optimum fiber length
            Lf0 ??= MuscleParameters.OptimalFiberlength / cos(pi/180*MuscleParameters.Pennationangle); //< Optimal fiber length corrected by pennation angle
            AnyVar PCSA = 0.8; //< PCSA (cm2) of the individual element is total volumen divided by the sum of muscle element fiber lengths.
            AnyVar PCSA_new ??= 1e4*...StrengthScaleSpine*MuscleParameters.MuscleVolumeSIScaled/(Lf0); ///< PCSA (cm2) of the individual element is total volumen divided by the sum of muscle element fiber lengths.
            Vol0 = PCSA * Lf0; // New calculation of the vol for the specific muscle branch
        };
        #endif

        #if BM_TRUNK_MUSCLES
        AnyMuscleModel LTptC3L3 = {
            AnyFolder& MuscleParameters = ....ModelParameters.Muscles.LTptC3L3;
            AnyIntVar MuscleElemNo = 1; ///< The number of this element of the muscle
            AnyIntVar MuscleElemAmount = MuscleParameters.MuscleElemAmount; ///< The total amount of elements for this muscle
            F0 ??= ...DefaultMusPar.PCSAfactor*PCSA; ///< Maximum force output at optimum fiber length
            Lf0 ??= MuscleParameters.OptimalFiberlength / cos(pi/180*MuscleParameters.Pennationangle); //< Optimal fiber length corrected by pennation angle
            AnyVar PCSA = 0.28; //< PCSA (cm2) of the individual element is total volumen divided by the sum of muscle element fiber lengths.
            AnyVar PCSA_new ??= 1e4*...StrengthScaleSpine*MuscleParameters.MuscleVolumeSIScaled/(Lf0); ///< PCSA (cm2) of the individual element is total volumen divided by the sum of muscle element fiber lengths.
            Vol0 = PCSA * Lf0; // New calculation of the vol for the specific muscle branch
        };
        #endif

        #if BM_TRUNK_MUSCLES
        AnyMuscleModel LTptC4L4 = {
            AnyFolder& MuscleParameters = ....ModelParameters.Muscles.LTptC4L4;
            AnyIntVar MuscleElemNo = 1; ///< The number of this element of the muscle
            AnyIntVar MuscleElemAmount = MuscleParameters.MuscleElemAmount; ///< The total amount of elements for this muscle
            F0 ??= ...DefaultMusPar.PCSAfactor*PCSA; ///< Maximum force output at optimum fiber length
            Lf0 ??= MuscleParameters.OptimalFiberlength / cos(pi/180*MuscleParameters.Pennationangle); //< Optimal fiber length corrected by pennation angle
            AnyVar PCSA = 0.225; //< PCSA (cm2) of the individual element is total volumen divided by the sum of muscle element fiber lengths.
            AnyVar PCSA_new ??= 1e4*...StrengthScaleSpine*MuscleParameters.MuscleVolumeSIScaled/(Lf0); ///< PCSA (cm2) of the individual element is total volumen divided by the sum of muscle element fiber lengths.
            Vol0 = PCSA * Lf0; // New calculation of the vol for the specific muscle branch
        };
        #endif

        #if BM_TRUNK_MUSCLES
        AnyMuscleModel LTptC5L5 = {
            AnyFolder& MuscleParameters = ....ModelParameters.Muscles.LTptC5L5;
            AnyIntVar MuscleElemNo = 1; ///< The number of this element of the muscle
            AnyIntVar MuscleElemAmount = MuscleParameters.MuscleElemAmount; ///< The total amount of elements for this muscle
            F0 ??= ...DefaultMusPar.PCSAfactor*PCSA; ///< Maximum force output at optimum fiber length
            Lf0 ??= MuscleParameters.OptimalFiberlength / cos(pi/180*MuscleParameters.Pennationangle); //< Optimal fiber length corrected by pennation angle
            AnyVar PCSA = 0.22; //< PCSA (cm2) of the individual element is total volumen divided by the sum of muscle element fiber lengths.
            AnyVar PCSA_new ??= 1e4*...StrengthScaleSpine*MuscleParameters.MuscleVolumeSIScaled/(Lf0); ///< PCSA (cm2) of the individual element is total volumen divided by the sum of muscle element fiber lengths.
            Vol0 = PCSA * Lf0; // New calculation of the vol for the specific muscle branch
        };
        #endif

        #if BM_TRUNK_MUSCLES
        AnyMuscleModel LTptC6S1 = {
            AnyFolder& MuscleParameters = ....ModelParameters.Muscles.LTptC6S1;
            AnyIntVar MuscleElemNo = 1; ///< The number of this element of the muscle
            AnyIntVar MuscleElemAmount = MuscleParameters.MuscleElemAmount; ///< The total amount of elements for this muscle
            F0 ??= ...DefaultMusPar.PCSAfactor*PCSA; ///< Maximum force output at optimum fiber length
            Lf0 ??= MuscleParameters.OptimalFiberlength / cos(pi/180*MuscleParameters.Pennationangle); //< Optimal fiber length corrected by pennation angle
            AnyVar PCSA = 0.32; //< PCSA (cm2) of the individual element is total volumen divided by the sum of muscle element fiber lengths.
            AnyVar PCSA_new ??= 1e4*...StrengthScaleSpine*MuscleParameters.MuscleVolumeSIScaled/(Lf0); ///< PCSA (cm2) of the individual element is total volumen divided by the sum of muscle element fiber lengths.
            Vol0 = PCSA * Lf0; // New calculation of the vol for the specific muscle branch
        };
        #endif

        #if BM_TRUNK_MUSCLES
        AnyMuscleModel LTptC7S2 = {
            AnyFolder& MuscleParameters = ....ModelParameters.Muscles.LTptC7S2;
            AnyIntVar MuscleElemNo = 1; ///< The number of this element of the muscle
            AnyIntVar MuscleElemAmount = MuscleParameters.MuscleElemAmount; ///< The total amount of elements for this muscle
            F0 ??= ...DefaultMusPar.PCSAfactor*PCSA; ///< Maximum force output at optimum fiber length
            Lf0 ??= MuscleParameters.OptimalFiberlength / cos(pi/180*MuscleParameters.Pennationangle); //< Optimal fiber length corrected by pennation angle
            AnyVar PCSA = 0.39; //< PCSA (cm2) of the individual element is total volumen divided by the sum of muscle element fiber lengths.
            AnyVar PCSA_new ??= 1e4*...StrengthScaleSpine*MuscleParameters.MuscleVolumeSIScaled/(Lf0); ///< PCSA (cm2) of the individual element is total volumen divided by the sum of muscle element fiber lengths.
            Vol0 = PCSA * Lf0; // New calculation of the vol for the specific muscle branch
        };
        #endif

        #if BM_TRUNK_MUSCLES
        AnyMuscleModel LTptC8S3 = {
            AnyFolder& MuscleParameters = ....ModelParameters.Muscles.LTptC8S3;
            AnyIntVar MuscleElemNo = 1; ///< The number of this element of the muscle
            AnyIntVar MuscleElemAmount = MuscleParameters.MuscleElemAmount; ///< The total amount of elements for this muscle
            F0 ??= ...DefaultMusPar.PCSAfactor*PCSA; ///< Maximum force output at optimum fiber length
            Lf0 ??= MuscleParameters.OptimalFiberlength / cos(pi/180*MuscleParameters.Pennationangle); //< Optimal fiber length corrected by pennation angle
            AnyVar PCSA = 0.625; //< PCSA (cm2) of the individual element is total volumen divided by the sum of muscle element fiber lengths.
            AnyVar PCSA_new ??= 1e4*...StrengthScaleSpine*MuscleParameters.MuscleVolumeSIScaled/(Lf0); ///< PCSA (cm2) of the individual element is total volumen divided by the sum of muscle element fiber lengths.
            Vol0 = PCSA * Lf0; // New calculation of the vol for the specific muscle branch
        };
        #endif

        #if BM_TRUNK_MUSCLES
        AnyMuscleModel LTptC9S4 = {
            AnyFolder& MuscleParameters = ....ModelParameters.Muscles.LTptC9S4;
            AnyIntVar MuscleElemNo = 1; ///< The number of this element of the muscle
            AnyIntVar MuscleElemAmount = MuscleParameters.MuscleElemAmount; ///< The total amount of elements for this muscle
            F0 ??= ...DefaultMusPar.PCSAfactor*PCSA; ///< Maximum force output at optimum fiber length
            Lf0 ??= MuscleParameters.OptimalFiberlength / cos(pi/180*MuscleParameters.Pennationangle); //< Optimal fiber length corrected by pennation angle
            AnyVar PCSA = 0.73; //< PCSA (cm2) of the individual element is total volumen divided by the sum of muscle element fiber lengths.
            AnyVar PCSA_new ??= 1e4*...StrengthScaleSpine*MuscleParameters.MuscleVolumeSIScaled/(Lf0); ///< PCSA (cm2) of the individual element is total volumen divided by the sum of muscle element fiber lengths.
            Vol0 = PCSA * Lf0; // New calculation of the vol for the specific muscle branch
        };
        #endif

        #if BM_TRUNK_MUSCLES
        AnyMuscleModel LTptC10Sacrum = {
            AnyFolder& MuscleParameters = ....ModelParameters.Muscles.LTptC10Sacrum;
            AnyIntVar MuscleElemNo = 1; ///< The number of this element of the muscle
            AnyIntVar MuscleElemAmount = MuscleParameters.MuscleElemAmount; ///< The total amount of elements for this muscle
            F0 ??= ...DefaultMusPar.PCSAfactor*PCSA; ///< Maximum force output at optimum fiber length
            Lf0 ??= MuscleParameters.OptimalFiberlength / cos(pi/180*MuscleParameters.Pennationangle); //< Optimal fiber length corrected by pennation angle
            AnyVar PCSA = 0.8; //< PCSA (cm2) of the individual element is total volumen divided by the sum of muscle element fiber lengths.
            AnyVar PCSA_new ??= 1e4*...StrengthScaleSpine*MuscleParameters.MuscleVolumeSIScaled/(Lf0); ///< PCSA (cm2) of the individual element is total volumen divided by the sum of muscle element fiber lengths.
            Vol0 = PCSA * Lf0; // New calculation of the vol for the specific muscle branch
        };
        #endif

        #if BM_TRUNK_MUSCLES
        AnyMuscleModel LTptT11Sacrum = {
            AnyFolder& MuscleParameters = ....ModelParameters.Muscles.LTptT11Sacrum;
            AnyIntVar MuscleElemNo = 1; ///< The number of this element of the muscle
            AnyIntVar MuscleElemAmount = MuscleParameters.MuscleElemAmount; ///< The total amount of elements for this muscle
            F0 ??= ...DefaultMusPar.PCSAfactor*PCSA; ///< Maximum force output at optimum fiber length
            Lf0 ??= MuscleParameters.OptimalFiberlength / cos(pi/180*MuscleParameters.Pennationangle); //< Optimal fiber length corrected by pennation angle
            AnyVar PCSA = 1.67; //< PCSA (cm2) of the individual element is total volumen divided by the sum of muscle element fiber lengths.
            AnyVar PCSA_new ??= 1e4*...StrengthScaleSpine*MuscleParameters.MuscleVolumeSIScaled/(Lf0); ///< PCSA (cm2) of the individual element is total volumen divided by the sum of muscle element fiber lengths.
            Vol0 = PCSA * Lf0; // New calculation of the vol for the specific muscle branch
        };
        #endif

        #if BM_TRUNK_MUSCLES
        AnyMuscleModel LTptT12Sacrum = {
            AnyFolder& MuscleParameters = ....ModelParameters.Muscles.LTptT12Sacrum;
            AnyIntVar MuscleElemNo = 1; ///< The number of this element of the muscle
            AnyIntVar MuscleElemAmount = MuscleParameters.MuscleElemAmount; ///< The total amount of elements for this muscle
            F0 ??= ...DefaultMusPar.PCSAfactor*PCSA; ///< Maximum force output at optimum fiber length
            Lf0 ??= MuscleParameters.OptimalFiberlength / cos(pi/180*MuscleParameters.Pennationangle); //< Optimal fiber length corrected by pennation angle
            AnyVar PCSA = 1.38; //< PCSA (cm2) of the individual element is total volumen divided by the sum of muscle element fiber lengths.
            AnyVar PCSA_new ??= 1e4*...StrengthScaleSpine*MuscleParameters.MuscleVolumeSIScaled/(Lf0); ///< PCSA (cm2) of the individual element is total volumen divided by the sum of muscle element fiber lengths.
            Vol0 = PCSA * Lf0; // New calculation of the vol for the specific muscle branch
        };
        #endif

        #if BM_TRUNK_MUSCLES
        AnyMuscleModel ITC7R7 = {
            AnyFolder& MuscleParameters = ....ModelParameters.Muscles.ITC7R7;
            AnyIntVar MuscleElemNo = 1; ///< The number of this element of the muscle
            AnyIntVar MuscleElemAmount = MuscleParameters.MuscleElemAmount; ///< The total amount of elements for this muscle
            F0 ??= ...DefaultMusPar.PCSAfactor*PCSA; ///< Maximum force output at optimum fiber length
            Lf0 ??= MuscleParameters.OptimalFiberlength / cos(pi/180*MuscleParameters.Pennationangle); //< Optimal fiber length corrected by pennation angle
            AnyVar PCSA = 0.23; //< PCSA (cm2) of the individual element is total volumen divided by the sum of muscle element fiber lengths.
            AnyVar PCSA_new ??= 1e4*...StrengthScaleSpine*MuscleParameters.MuscleVolumeSIScaled/(Lf0); ///< PCSA (cm2) of the individual element is total volumen divided by the sum of muscle element fiber lengths.
            Vol0 = PCSA * Lf0; // New calculation of the vol for the specific muscle branch
        };
        #endif

        #if BM_TRUNK_MUSCLES
        AnyMuscleModel ITR1R7 = {
            AnyFolder& MuscleParameters = ....ModelParameters.Muscles.ITR1R7;
            AnyIntVar MuscleElemNo = 1; ///< The number of this element of the muscle
            AnyIntVar MuscleElemAmount = MuscleParameters.MuscleElemAmount; ///< The total amount of elements for this muscle
            F0 ??= ...DefaultMusPar.PCSAfactor*PCSA; ///< Maximum force output at optimum fiber length
            Lf0 ??= MuscleParameters.OptimalFiberlength / cos(pi/180*MuscleParameters.Pennationangle); //< Optimal fiber length corrected by pennation angle
            AnyVar PCSA = 0.23; //< PCSA (cm2) of the individual element is total volumen divided by the sum of muscle element fiber lengths.
            AnyVar PCSA_new ??= 1e4*...StrengthScaleSpine*MuscleParameters.MuscleVolumeSIScaled/(Lf0); ///< PCSA (cm2) of the individual element is total volumen divided by the sum of muscle element fiber lengths.
            Vol0 = PCSA * Lf0; // New calculation of the vol for the specific muscle branch
        };
        #endif

        #if BM_TRUNK_MUSCLES
        AnyMuscleModel ITR2R8 = {
            AnyFolder& MuscleParameters = ....ModelParameters.Muscles.ITR2R8;
            AnyIntVar MuscleElemNo = 1; ///< The number of this element of the muscle
            AnyIntVar MuscleElemAmount = MuscleParameters.MuscleElemAmount; ///< The total amount of elements for this muscle
            F0 ??= ...DefaultMusPar.PCSAfactor*PCSA; ///< Maximum force output at optimum fiber length
            Lf0 ??= MuscleParameters.OptimalFiberlength / cos(pi/180*MuscleParameters.Pennationangle); //< Optimal fiber length corrected by pennation angle
            AnyVar PCSA = 0.23; //< PCSA (cm2) of the individual element is total volumen divided by the sum of muscle element fiber lengths.
            AnyVar PCSA_new ??= 1e4*...StrengthScaleSpine*MuscleParameters.MuscleVolumeSIScaled/(Lf0); ///< PCSA (cm2) of the individual element is total volumen divided by the sum of muscle element fiber lengths.
            Vol0 = PCSA * Lf0; // New calculation of the vol for the specific muscle branch
        };
        #endif

        #if BM_TRUNK_MUSCLES
        AnyMuscleModel ITR3R9 = {
            AnyFolder& MuscleParameters = ....ModelParameters.Muscles.ITR3R9;
            AnyIntVar MuscleElemNo = 1; ///< The number of this element of the muscle
            AnyIntVar MuscleElemAmount = MuscleParameters.MuscleElemAmount; ///< The total amount of elements for this muscle
            F0 ??= ...DefaultMusPar.PCSAfactor*PCSA; ///< Maximum force output at optimum fiber length
            Lf0 ??= MuscleParameters.OptimalFiberlength / cos(pi/180*MuscleParameters.Pennationangle); //< Optimal fiber length corrected by pennation angle
            AnyVar PCSA = 0.23; //< PCSA (cm2) of the individual element is total volumen divided by the sum of muscle element fiber lengths.
            AnyVar PCSA_new ??= 1e4*...StrengthScaleSpine*MuscleParameters.MuscleVolumeSIScaled/(Lf0); ///< PCSA (cm2) of the individual element is total volumen divided by the sum of muscle element fiber lengths.
            Vol0 = PCSA * Lf0; // New calculation of the vol for the specific muscle branch
        };
        #endif

        #if BM_TRUNK_MUSCLES
        AnyMuscleModel ITR4R10 = {
            AnyFolder& MuscleParameters = ....ModelParameters.Muscles.ITR4R10;
            AnyIntVar MuscleElemNo = 1; ///< The number of this element of the muscle
            AnyIntVar MuscleElemAmount = MuscleParameters.MuscleElemAmount; ///< The total amount of elements for this muscle
            F0 ??= ...DefaultMusPar.PCSAfactor*PCSA; ///< Maximum force output at optimum fiber length
            Lf0 ??= MuscleParameters.OptimalFiberlength / cos(pi/180*MuscleParameters.Pennationangle); //< Optimal fiber length corrected by pennation angle
            AnyVar PCSA = 0.23; //< PCSA (cm2) of the individual element is total volumen divided by the sum of muscle element fiber lengths.
            AnyVar PCSA_new ??= 1e4*...StrengthScaleSpine*MuscleParameters.MuscleVolumeSIScaled/(Lf0); ///< PCSA (cm2) of the individual element is total volumen divided by the sum of muscle element fiber lengths.
            Vol0 = PCSA * Lf0; // New calculation of the vol for the specific muscle branch
        };
        #endif

        #if BM_TRUNK_MUSCLES
        AnyMuscleModel ITR5T11 = {
            AnyFolder& MuscleParameters = ....ModelParameters.Muscles.ITR5T11;
            AnyIntVar MuscleElemNo = 1; ///< The number of this element of the muscle
            AnyIntVar MuscleElemAmount = MuscleParameters.MuscleElemAmount; ///< The total amount of elements for this muscle
            F0 ??= ...DefaultMusPar.PCSAfactor*PCSA; ///< Maximum force output at optimum fiber length
            Lf0 ??= MuscleParameters.OptimalFiberlength / cos(pi/180*MuscleParameters.Pennationangle); //< Optimal fiber length corrected by pennation angle
            AnyVar PCSA = 0.23; //< PCSA (cm2) of the individual element is total volumen divided by the sum of muscle element fiber lengths.
            AnyVar PCSA_new ??= 1e4*...StrengthScaleSpine*MuscleParameters.MuscleVolumeSIScaled/(Lf0); ///< PCSA (cm2) of the individual element is total volumen divided by the sum of muscle element fiber lengths.
            Vol0 = PCSA * Lf0; // New calculation of the vol for the specific muscle branch
        };
        #endif

        #if BM_TRUNK_MUSCLES
        AnyMuscleModel ITR6T12 = {
            AnyFolder& MuscleParameters = ....ModelParameters.Muscles.ITR6T12;
            AnyIntVar MuscleElemNo = 1; ///< The number of this element of the muscle
            AnyIntVar MuscleElemAmount = MuscleParameters.MuscleElemAmount; ///< The total amount of elements for this muscle
            F0 ??= ...DefaultMusPar.PCSAfactor*PCSA; ///< Maximum force output at optimum fiber length
            Lf0 ??= MuscleParameters.OptimalFiberlength / cos(pi/180*MuscleParameters.Pennationangle); //< Optimal fiber length corrected by pennation angle
            AnyVar PCSA = 0.23; //< PCSA (cm2) of the individual element is total volumen divided by the sum of muscle element fiber lengths.
            AnyVar PCSA_new ??= 1e4*...StrengthScaleSpine*MuscleParameters.MuscleVolumeSIScaled/(Lf0); ///< PCSA (cm2) of the individual element is total volumen divided by the sum of muscle element fiber lengths.
            Vol0 = PCSA * Lf0; // New calculation of the vol for the specific muscle branch
        };
        #endif

    };

    AnyFolder PsoasMajor = {

        #if BM_TRUNK_MUSCLES  | BM_LEG_MUSCLES_LEFT  |  BM_LEG_MUSCLES_RIGHT
        AnyMuscleModel PMT12I_TM = {
            AnyFolder& MuscleParameters = ....ModelParameters.Muscles.PMT12I_TM;
            AnyIntVar MuscleElemNo = 1; ///< The number of this element of the muscle
            AnyIntVar MuscleElemAmount = MuscleParameters.MuscleElemAmount; ///< The total amount of elements for this muscle
            F0 ??= ...DefaultMusPar.PCSAfactor*PCSA; ///< Maximum force output at optimum fiber length
            Lf0 ??= MuscleParameters.OptimalFiberlength / cos(pi/180*MuscleParameters.Pennationangle); //< Optimal fiber length corrected by pennation angle
            AnyVar PCSA = 2.11; //< PCSA (cm2) of the individual element is total volumen divided by the sum of muscle element fiber lengths.
            AnyVar PCSA_new ??= 1e4*...StrengthScaleSpine*MuscleParameters.MuscleVolumeSIScaled/(Lf0); ///< PCSA (cm2) of the individual element is total volumen divided by the sum of muscle element fiber lengths.
            Vol0 = PCSA * Lf0; // New calculation of the vol for the specific muscle branch
        };
        #endif

        #if BM_TRUNK_MUSCLES  | BM_LEG_MUSCLES_LEFT  |  BM_LEG_MUSCLES_RIGHT
        AnyMuscleModel PML1I_TM = {
            AnyFolder& MuscleParameters = ....ModelParameters.Muscles.PML1I_TM;
            AnyIntVar MuscleElemNo = 1; ///< The number of this element of the muscle
            AnyIntVar MuscleElemAmount = MuscleParameters.MuscleElemAmount; ///< The total amount of elements for this muscle
            F0 ??= ...DefaultMusPar.PCSAfactor*PCSA; ///< Maximum force output at optimum fiber length
            Lf0 ??= MuscleParameters.OptimalFiberlength / cos(pi/180*MuscleParameters.Pennationangle); //< Optimal fiber length corrected by pennation angle
            AnyVar PCSA = 2.11; //< PCSA (cm2) of the individual element is total volumen divided by the sum of muscle element fiber lengths.
            AnyVar PCSA_new ??= 1e4*...StrengthScaleSpine*MuscleParameters.MuscleVolumeSIScaled/(Lf0); ///< PCSA (cm2) of the individual element is total volumen divided by the sum of muscle element fiber lengths.
            Vol0 = PCSA * Lf0; // New calculation of the vol for the specific muscle branch
        };
        #endif

        #if BM_TRUNK_MUSCLES  | BM_LEG_MUSCLES_LEFT  |  BM_LEG_MUSCLES_RIGHT
        AnyMuscleModel PML1T_TM = {
            AnyFolder& MuscleParameters = ....ModelParameters.Muscles.PML1T_TM;
            AnyIntVar MuscleElemNo = 1; ///< The number of this element of the muscle
            AnyIntVar MuscleElemAmount = MuscleParameters.MuscleElemAmount; ///< The total amount of elements for this muscle
            F0 ??= ...DefaultMusPar.PCSAfactor*PCSA; ///< Maximum force output at optimum fiber length
            Lf0 ??= MuscleParameters.OptimalFiberlength / cos(pi/180*MuscleParameters.Pennationangle); //< Optimal fiber length corrected by pennation angle
            AnyVar PCSA = 0.61; //< PCSA (cm2) of the individual element is total volumen divided by the sum of muscle element fiber lengths.
            AnyVar PCSA_new ??= 1e4*...StrengthScaleSpine*MuscleParameters.MuscleVolumeSIScaled/(Lf0); ///< PCSA (cm2) of the individual element is total volumen divided by the sum of muscle element fiber lengths.
            Vol0 = PCSA * Lf0; // New calculation of the vol for the specific muscle branch
        };
        #endif

        #if BM_TRUNK_MUSCLES  | BM_LEG_MUSCLES_LEFT  |  BM_LEG_MUSCLES_RIGHT
        AnyMuscleModel PML2I_TM = {
            AnyFolder& MuscleParameters = ....ModelParameters.Muscles.PML2I_TM;
            AnyIntVar MuscleElemNo = 1; ///< The number of this element of the muscle
            AnyIntVar MuscleElemAmount = MuscleParameters.MuscleElemAmount; ///< The total amount of elements for this muscle
            F0 ??= ...DefaultMusPar.PCSAfactor*PCSA; ///< Maximum force output at optimum fiber length
            Lf0 ??= MuscleParameters.OptimalFiberlength / cos(pi/180*MuscleParameters.Pennationangle); //< Optimal fiber length corrected by pennation angle
            AnyVar PCSA = 1.61; //< PCSA (cm2) of the individual element is total volumen divided by the sum of muscle element fiber lengths.
            AnyVar PCSA_new ??= 1e4*...StrengthScaleSpine*MuscleParameters.MuscleVolumeSIScaled/(Lf0); ///< PCSA (cm2) of the individual element is total volumen divided by the sum of muscle element fiber lengths.
            Vol0 = PCSA * Lf0; // New calculation of the vol for the specific muscle branch
        };
        #endif

        #if BM_TRUNK_MUSCLES  | BM_LEG_MUSCLES_LEFT  |  BM_LEG_MUSCLES_RIGHT
        AnyMuscleModel PML2T_TM = {
            AnyFolder& MuscleParameters = ....ModelParameters.Muscles.PML2T_TM;
            AnyIntVar MuscleElemNo = 1; ///< The number of this element of the muscle
            AnyIntVar MuscleElemAmount = MuscleParameters.MuscleElemAmount; ///< The total amount of elements for this muscle
            F0 ??= ...DefaultMusPar.PCSAfactor*PCSA; ///< Maximum force output at optimum fiber length
            Lf0 ??= MuscleParameters.OptimalFiberlength / cos(pi/180*MuscleParameters.Pennationangle); //< Optimal fiber length corrected by pennation angle
            AnyVar PCSA = 1.01; //< PCSA (cm2) of the individual element is total volumen divided by the sum of muscle element fiber lengths.
            AnyVar PCSA_new ??= 1e4*...StrengthScaleSpine*MuscleParameters.MuscleVolumeSIScaled/(Lf0); ///< PCSA (cm2) of the individual element is total volumen divided by the sum of muscle element fiber lengths.
            Vol0 = PCSA * Lf0; // New calculation of the vol for the specific muscle branch
        };
        #endif

        #if BM_TRUNK_MUSCLES  | BM_LEG_MUSCLES_LEFT  |  BM_LEG_MUSCLES_RIGHT
        AnyMuscleModel PML3I_TM = {
            AnyFolder& MuscleParameters = ....ModelParameters.Muscles.PML3I_TM;
            AnyIntVar MuscleElemNo = 1; ///< The number of this element of the muscle
            AnyIntVar MuscleElemAmount = MuscleParameters.MuscleElemAmount; ///< The total amount of elements for this muscle
            F0 ??= ...DefaultMusPar.PCSAfactor*PCSA; ///< Maximum force output at optimum fiber length
            Lf0 ??= MuscleParameters.OptimalFiberlength / cos(pi/180*MuscleParameters.Pennationangle); //< Optimal fiber length corrected by pennation angle
            AnyVar PCSA = 1.91; //< PCSA (cm2) of the individual element is total volumen divided by the sum of muscle element fiber lengths.
            AnyVar PCSA_new ??= 1e4*...StrengthScaleSpine*MuscleParameters.MuscleVolumeSIScaled/(Lf0); ///< PCSA (cm2) of the individual element is total volumen divided by the sum of muscle element fiber lengths.
            Vol0 = PCSA * Lf0; // New calculation of the vol for the specific muscle branch
        };
        #endif

        #if BM_TRUNK_MUSCLES  | BM_LEG_MUSCLES_LEFT  |  BM_LEG_MUSCLES_RIGHT
        AnyMuscleModel PML3T_TM = {
            AnyFolder& MuscleParameters = ....ModelParameters.Muscles.PML3T_TM;
            AnyIntVar MuscleElemNo = 1; ///< The number of this element of the muscle
            AnyIntVar MuscleElemAmount = MuscleParameters.MuscleElemAmount; ///< The total amount of elements for this muscle
            F0 ??= ...DefaultMusPar.PCSAfactor*PCSA; ///< Maximum force output at optimum fiber length
            Lf0 ??= MuscleParameters.OptimalFiberlength / cos(pi/180*MuscleParameters.Pennationangle); //< Optimal fiber length corrected by pennation angle
            AnyVar PCSA = 1.73; //< PCSA (cm2) of the individual element is total volumen divided by the sum of muscle element fiber lengths.
            AnyVar PCSA_new ??= 1e4*...StrengthScaleSpine*MuscleParameters.MuscleVolumeSIScaled/(Lf0); ///< PCSA (cm2) of the individual element is total volumen divided by the sum of muscle element fiber lengths.
            Vol0 = PCSA * Lf0; // New calculation of the vol for the specific muscle branch
        };
        #endif

        #if BM_TRUNK_MUSCLES  | BM_LEG_MUSCLES_LEFT  |  BM_LEG_MUSCLES_RIGHT
        AnyMuscleModel PML4I_TM = {
            AnyFolder& MuscleParameters = ....ModelParameters.Muscles.PML4I_TM;
            AnyIntVar MuscleElemNo = 1; ///< The number of this element of the muscle
            AnyIntVar MuscleElemAmount = MuscleParameters.MuscleElemAmount; ///< The total amount of elements for this muscle
            F0 ??= ...DefaultMusPar.PCSAfactor*PCSA; ///< Maximum force output at optimum fiber length
            Lf0 ??= MuscleParameters.OptimalFiberlength / cos(pi/180*MuscleParameters.Pennationangle); //< Optimal fiber length corrected by pennation angle
            AnyVar PCSA = 1.19; //< PCSA (cm2) of the individual element is total volumen divided by the sum of muscle element fiber lengths.
            AnyVar PCSA_new ??= 1e4*...StrengthScaleSpine*MuscleParameters.MuscleVolumeSIScaled/(Lf0); ///< PCSA (cm2) of the individual element is total volumen divided by the sum of muscle element fiber lengths.
            Vol0 = PCSA * Lf0; // New calculation of the vol for the specific muscle branch
        };
        #endif

        #if BM_TRUNK_MUSCLES  | BM_LEG_MUSCLES_LEFT  |  BM_LEG_MUSCLES_RIGHT
        AnyMuscleModel PML4T_TM = {
            AnyFolder& MuscleParameters = ....ModelParameters.Muscles.PML4T_TM;
            AnyIntVar MuscleElemNo = 1; ///< The number of this element of the muscle
            AnyIntVar MuscleElemAmount = MuscleParameters.MuscleElemAmount; ///< The total amount of elements for this muscle
            F0 ??= ...DefaultMusPar.PCSAfactor*PCSA; ///< Maximum force output at optimum fiber length
            Lf0 ??= MuscleParameters.OptimalFiberlength / cos(pi/180*MuscleParameters.Pennationangle); //< Optimal fiber length corrected by pennation angle
            AnyVar PCSA = 1.2; //< PCSA (cm2) of the individual element is total volumen divided by the sum of muscle element fiber lengths.
            AnyVar PCSA_new ??= 1e4*...StrengthScaleSpine*MuscleParameters.MuscleVolumeSIScaled/(Lf0); ///< PCSA (cm2) of the individual element is total volumen divided by the sum of muscle element fiber lengths.
            Vol0 = PCSA * Lf0; // New calculation of the vol for the specific muscle branch
        };
        #endif

        #if BM_TRUNK_MUSCLES  | BM_LEG_MUSCLES_LEFT  |  BM_LEG_MUSCLES_RIGHT
        AnyMuscleModel PML5_TM = {
            AnyFolder& MuscleParameters = ....ModelParameters.Muscles.PML5_TM;
            AnyIntVar MuscleElemNo = 1; ///< The number of this element of the muscle
            AnyIntVar MuscleElemAmount = MuscleParameters.MuscleElemAmount; ///< The total amount of elements for this muscle
            F0 ??= ...DefaultMusPar.PCSAfactor*PCSA; ///< Maximum force output at optimum fiber length
            Lf0 ??= MuscleParameters.OptimalFiberlength / cos(pi/180*MuscleParameters.Pennationangle); //< Optimal fiber length corrected by pennation angle
            AnyVar PCSA = 0.79; //< PCSA (cm2) of the individual element is total volumen divided by the sum of muscle element fiber lengths.
            AnyVar PCSA_new ??= 1e4*...StrengthScaleSpine*MuscleParameters.MuscleVolumeSIScaled/(Lf0); ///< PCSA (cm2) of the individual element is total volumen divided by the sum of muscle element fiber lengths.
            Vol0 = PCSA * Lf0; // New calculation of the vol for the specific muscle branch
        };
        #endif

        #if BM_TRUNK_MUSCLES  | BM_LEG_MUSCLES_LEFT  |  BM_LEG_MUSCLES_RIGHT
        AnyMuscleModel PML5T_TM = {
            AnyFolder& MuscleParameters = ....ModelParameters.Muscles.PML5T_TM;
            AnyIntVar MuscleElemNo = 1; ///< The number of this element of the muscle
            AnyIntVar MuscleElemAmount = MuscleParameters.MuscleElemAmount; ///< The total amount of elements for this muscle
            F0 ??= ...DefaultMusPar.PCSAfactor*PCSA; ///< Maximum force output at optimum fiber length
            Lf0 ??= MuscleParameters.OptimalFiberlength / cos(pi/180*MuscleParameters.Pennationangle); //< Optimal fiber length corrected by pennation angle
            AnyVar PCSA = 0.36; //< PCSA (cm2) of the individual element is total volumen divided by the sum of muscle element fiber lengths.
            AnyVar PCSA_new ??= 1e4*...StrengthScaleSpine*MuscleParameters.MuscleVolumeSIScaled/(Lf0); ///< PCSA (cm2) of the individual element is total volumen divided by the sum of muscle element fiber lengths.
            Vol0 = PCSA * Lf0; // New calculation of the vol for the specific muscle branch
        };
        #endif

    };

    AnyFolder QuadratusLumborum = {

        #if BM_TRUNK_MUSCLES
        AnyMuscleModel QL_1 = {
            AnyFolder& MuscleParameters = ....ModelParameters.Muscles.QL;
            AnyIntVar MuscleElemNo = 1; ///< The number of this element of the muscle
            AnyIntVar MuscleElemAmount = MuscleParameters.MuscleElemAmount; ///< The total amount of elements for this muscle
            F0 ??= ...DefaultMusPar.PCSAfactor*PCSA; ///< Maximum force output at optimum fiber length
            Lf0 ??= MuscleParameters.OptimalFiberlength / cos(pi/180*MuscleParameters.Pennationangle); //< Optimal fiber length corrected by pennation angle
            AnyVar PCSA = 0.1575; //< PCSA (cm2) of the individual element is total volumen divided by the sum of muscle element fiber lengths.
            AnyVar PCSA_new ??= 1e4*...StrengthScaleSpine*MuscleParameters.MuscleVolumeSIScaled/(.QL_1.Lf0 +.QL_2.Lf0 +.QL_3.Lf0 +.QL_4.Lf0 +.QL_5.Lf0 +.QL_6.Lf0 +.QL_7.Lf0 +.QL_8.Lf0 +.QL_9.Lf0 +.QL_10.Lf0 +.QL_11.Lf0 +.QL_12.Lf0 +.QL_13.Lf0 +.QL_14.Lf0 +.QL_15.Lf0 +.QL_16.Lf0 +.QL_17.Lf0 +.QL_18.Lf0 +.QL_19.Lf0 +.QL_20.Lf0 +.QL_21.Lf0 +.QL_22.Lf0 +.QL_23.Lf0 +.QL_24.Lf0 +.QL_25.Lf0 +.QL_26.Lf0 +.QL_27.Lf0 +.QL_28.Lf0 ); ///< PCSA (cm2) of the individual element is total volumen divided by the sum of muscle element fiber lengths.
            Vol0 = PCSA * Lf0; // New calculation of the vol for the specific muscle branch
        };

        AnyMuscleModel QL_2 = {
            AnyFolder& MuscleParameters = ....ModelParameters.Muscles.QL;
            AnyIntVar MuscleElemNo = 2; ///< The number of this element of the muscle
            AnyIntVar MuscleElemAmount = MuscleParameters.MuscleElemAmount; ///< The total amount of elements for this muscle
            F0 ??= ...DefaultMusPar.PCSAfactor*PCSA; ///< Maximum force output at optimum fiber length
            Lf0 ??= MuscleParameters.OptimalFiberlength / cos(pi/180*MuscleParameters.Pennationangle); //< Optimal fiber length corrected by pennation angle
            AnyVar PCSA = 0.1575; //< PCSA (cm2) of the individual element is total volumen divided by the sum of muscle element fiber lengths.
            AnyVar PCSA_new ??= 1e4*...StrengthScaleSpine*MuscleParameters.MuscleVolumeSIScaled/(.QL_1.Lf0 +.QL_2.Lf0 +.QL_3.Lf0 +.QL_4.Lf0 +.QL_5.Lf0 +.QL_6.Lf0 +.QL_7.Lf0 +.QL_8.Lf0 +.QL_9.Lf0 +.QL_10.Lf0 +.QL_11.Lf0 +.QL_12.Lf0 +.QL_13.Lf0 +.QL_14.Lf0 +.QL_15.Lf0 +.QL_16.Lf0 +.QL_17.Lf0 +.QL_18.Lf0 +.QL_19.Lf0 +.QL_20.Lf0 +.QL_21.Lf0 +.QL_22.Lf0 +.QL_23.Lf0 +.QL_24.Lf0 +.QL_25.Lf0 +.QL_26.Lf0 +.QL_27.Lf0 +.QL_28.Lf0 ); ///< PCSA (cm2) of the individual element is total volumen divided by the sum of muscle element fiber lengths.
            Vol0 = PCSA * Lf0; // New calculation of the vol for the specific muscle branch
        };

        AnyMuscleModel QL_3 = {
            AnyFolder& MuscleParameters = ....ModelParameters.Muscles.QL;
            AnyIntVar MuscleElemNo = 3; ///< The number of this element of the muscle
            AnyIntVar MuscleElemAmount = MuscleParameters.MuscleElemAmount; ///< The total amount of elements for this muscle
            F0 ??= ...DefaultMusPar.PCSAfactor*PCSA; ///< Maximum force output at optimum fiber length
            Lf0 ??= MuscleParameters.OptimalFiberlength / cos(pi/180*MuscleParameters.Pennationangle); //< Optimal fiber length corrected by pennation angle
            AnyVar PCSA = 0.1575; //< PCSA (cm2) of the individual element is total volumen divided by the sum of muscle element fiber lengths.
            AnyVar PCSA_new ??= 1e4*...StrengthScaleSpine*MuscleParameters.MuscleVolumeSIScaled/(.QL_1.Lf0 +.QL_2.Lf0 +.QL_3.Lf0 +.QL_4.Lf0 +.QL_5.Lf0 +.QL_6.Lf0 +.QL_7.Lf0 +.QL_8.Lf0 +.QL_9.Lf0 +.QL_10.Lf0 +.QL_11.Lf0 +.QL_12.Lf0 +.QL_13.Lf0 +.QL_14.Lf0 +.QL_15.Lf0 +.QL_16.Lf0 +.QL_17.Lf0 +.QL_18.Lf0 +.QL_19.Lf0 +.QL_20.Lf0 +.QL_21.Lf0 +.QL_22.Lf0 +.QL_23.Lf0 +.QL_24.Lf0 +.QL_25.Lf0 +.QL_26.Lf0 +.QL_27.Lf0 +.QL_28.Lf0 ); ///< PCSA (cm2) of the individual element is total volumen divided by the sum of muscle element fiber lengths.
            Vol0 = PCSA * Lf0; // New calculation of the vol for the specific muscle branch
        };

        AnyMuscleModel QL_4 = {
            AnyFolder& MuscleParameters = ....ModelParameters.Muscles.QL;
            AnyIntVar MuscleElemNo = 4; ///< The number of this element of the muscle
            AnyIntVar MuscleElemAmount = MuscleParameters.MuscleElemAmount; ///< The total amount of elements for this muscle
            F0 ??= ...DefaultMusPar.PCSAfactor*PCSA; ///< Maximum force output at optimum fiber length
            Lf0 ??= MuscleParameters.OptimalFiberlength / cos(pi/180*MuscleParameters.Pennationangle); //< Optimal fiber length corrected by pennation angle
            AnyVar PCSA = 0.1575; //< PCSA (cm2) of the individual element is total volumen divided by the sum of muscle element fiber lengths.
            AnyVar PCSA_new ??= 1e4*...StrengthScaleSpine*MuscleParameters.MuscleVolumeSIScaled/(.QL_1.Lf0 +.QL_2.Lf0 +.QL_3.Lf0 +.QL_4.Lf0 +.QL_5.Lf0 +.QL_6.Lf0 +.QL_7.Lf0 +.QL_8.Lf0 +.QL_9.Lf0 +.QL_10.Lf0 +.QL_11.Lf0 +.QL_12.Lf0 +.QL_13.Lf0 +.QL_14.Lf0 +.QL_15.Lf0 +.QL_16.Lf0 +.QL_17.Lf0 +.QL_18.Lf0 +.QL_19.Lf0 +.QL_20.Lf0 +.QL_21.Lf0 +.QL_22.Lf0 +.QL_23.Lf0 +.QL_24.Lf0 +.QL_25.Lf0 +.QL_26.Lf0 +.QL_27.Lf0 +.QL_28.Lf0 ); ///< PCSA (cm2) of the individual element is total volumen divided by the sum of muscle element fiber lengths.
            Vol0 = PCSA * Lf0; // New calculation of the vol for the specific muscle branch
        };

        AnyMuscleModel QL_5 = {
            AnyFolder& MuscleParameters = ....ModelParameters.Muscles.QL;
            AnyIntVar MuscleElemNo = 5; ///< The number of this element of the muscle
            AnyIntVar MuscleElemAmount = MuscleParameters.MuscleElemAmount; ///< The total amount of elements for this muscle
            F0 ??= ...DefaultMusPar.PCSAfactor*PCSA; ///< Maximum force output at optimum fiber length
            Lf0 ??= MuscleParameters.OptimalFiberlength / cos(pi/180*MuscleParameters.Pennationangle); //< Optimal fiber length corrected by pennation angle
            AnyVar PCSA = 0.1575; //< PCSA (cm2) of the individual element is total volumen divided by the sum of muscle element fiber lengths.
            AnyVar PCSA_new ??= 1e4*...StrengthScaleSpine*MuscleParameters.MuscleVolumeSIScaled/(.QL_1.Lf0 +.QL_2.Lf0 +.QL_3.Lf0 +.QL_4.Lf0 +.QL_5.Lf0 +.QL_6.Lf0 +.QL_7.Lf0 +.QL_8.Lf0 +.QL_9.Lf0 +.QL_10.Lf0 +.QL_11.Lf0 +.QL_12.Lf0 +.QL_13.Lf0 +.QL_14.Lf0 +.QL_15.Lf0 +.QL_16.Lf0 +.QL_17.Lf0 +.QL_18.Lf0 +.QL_19.Lf0 +.QL_20.Lf0 +.QL_21.Lf0 +.QL_22.Lf0 +.QL_23.Lf0 +.QL_24.Lf0 +.QL_25.Lf0 +.QL_26.Lf0 +.QL_27.Lf0 +.QL_28.Lf0 ); ///< PCSA (cm2) of the individual element is total volumen divided by the sum of muscle element fiber lengths.
            Vol0 = PCSA * Lf0; // New calculation of the vol for the specific muscle branch
        };

        AnyMuscleModel QL_6 = {
            AnyFolder& MuscleParameters = ....ModelParameters.Muscles.QL;
            AnyIntVar MuscleElemNo = 6; ///< The number of this element of the muscle
            AnyIntVar MuscleElemAmount = MuscleParameters.MuscleElemAmount; ///< The total amount of elements for this muscle
            F0 ??= ...DefaultMusPar.PCSAfactor*PCSA; ///< Maximum force output at optimum fiber length
            Lf0 ??= MuscleParameters.OptimalFiberlength / cos(pi/180*MuscleParameters.Pennationangle); //< Optimal fiber length corrected by pennation angle
            AnyVar PCSA = 0.1575; //< PCSA (cm2) of the individual element is total volumen divided by the sum of muscle element fiber lengths.
            AnyVar PCSA_new ??= 1e4*...StrengthScaleSpine*MuscleParameters.MuscleVolumeSIScaled/(.QL_1.Lf0 +.QL_2.Lf0 +.QL_3.Lf0 +.QL_4.Lf0 +.QL_5.Lf0 +.QL_6.Lf0 +.QL_7.Lf0 +.QL_8.Lf0 +.QL_9.Lf0 +.QL_10.Lf0 +.QL_11.Lf0 +.QL_12.Lf0 +.QL_13.Lf0 +.QL_14.Lf0 +.QL_15.Lf0 +.QL_16.Lf0 +.QL_17.Lf0 +.QL_18.Lf0 +.QL_19.Lf0 +.QL_20.Lf0 +.QL_21.Lf0 +.QL_22.Lf0 +.QL_23.Lf0 +.QL_24.Lf0 +.QL_25.Lf0 +.QL_26.Lf0 +.QL_27.Lf0 +.QL_28.Lf0 ); ///< PCSA (cm2) of the individual element is total volumen divided by the sum of muscle element fiber lengths.
            Vol0 = PCSA * Lf0; // New calculation of the vol for the specific muscle branch
        };

        AnyMuscleModel QL_7 = {
            AnyFolder& MuscleParameters = ....ModelParameters.Muscles.QL;
            AnyIntVar MuscleElemNo = 7; ///< The number of this element of the muscle
            AnyIntVar MuscleElemAmount = MuscleParameters.MuscleElemAmount; ///< The total amount of elements for this muscle
            F0 ??= ...DefaultMusPar.PCSAfactor*PCSA; ///< Maximum force output at optimum fiber length
            Lf0 ??= MuscleParameters.OptimalFiberlength / cos(pi/180*MuscleParameters.Pennationangle); //< Optimal fiber length corrected by pennation angle
            AnyVar PCSA = 0.1575; //< PCSA (cm2) of the individual element is total volumen divided by the sum of muscle element fiber lengths.
            AnyVar PCSA_new ??= 1e4*...StrengthScaleSpine*MuscleParameters.MuscleVolumeSIScaled/(.QL_1.Lf0 +.QL_2.Lf0 +.QL_3.Lf0 +.QL_4.Lf0 +.QL_5.Lf0 +.QL_6.Lf0 +.QL_7.Lf0 +.QL_8.Lf0 +.QL_9.Lf0 +.QL_10.Lf0 +.QL_11.Lf0 +.QL_12.Lf0 +.QL_13.Lf0 +.QL_14.Lf0 +.QL_15.Lf0 +.QL_16.Lf0 +.QL_17.Lf0 +.QL_18.Lf0 +.QL_19.Lf0 +.QL_20.Lf0 +.QL_21.Lf0 +.QL_22.Lf0 +.QL_23.Lf0 +.QL_24.Lf0 +.QL_25.Lf0 +.QL_26.Lf0 +.QL_27.Lf0 +.QL_28.Lf0 ); ///< PCSA (cm2) of the individual element is total volumen divided by the sum of muscle element fiber lengths.
            Vol0 = PCSA * Lf0; // New calculation of the vol for the specific muscle branch
        };

        AnyMuscleModel QL_8 = {
            AnyFolder& MuscleParameters = ....ModelParameters.Muscles.QL;
            AnyIntVar MuscleElemNo = 8; ///< The number of this element of the muscle
            AnyIntVar MuscleElemAmount = MuscleParameters.MuscleElemAmount; ///< The total amount of elements for this muscle
            F0 ??= ...DefaultMusPar.PCSAfactor*PCSA; ///< Maximum force output at optimum fiber length
            Lf0 ??= MuscleParameters.OptimalFiberlength / cos(pi/180*MuscleParameters.Pennationangle); //< Optimal fiber length corrected by pennation angle
            AnyVar PCSA = 0.1575; //< PCSA (cm2) of the individual element is total volumen divided by the sum of muscle element fiber lengths.
            AnyVar PCSA_new ??= 1e4*...StrengthScaleSpine*MuscleParameters.MuscleVolumeSIScaled/(.QL_1.Lf0 +.QL_2.Lf0 +.QL_3.Lf0 +.QL_4.Lf0 +.QL_5.Lf0 +.QL_6.Lf0 +.QL_7.Lf0 +.QL_8.Lf0 +.QL_9.Lf0 +.QL_10.Lf0 +.QL_11.Lf0 +.QL_12.Lf0 +.QL_13.Lf0 +.QL_14.Lf0 +.QL_15.Lf0 +.QL_16.Lf0 +.QL_17.Lf0 +.QL_18.Lf0 +.QL_19.Lf0 +.QL_20.Lf0 +.QL_21.Lf0 +.QL_22.Lf0 +.QL_23.Lf0 +.QL_24.Lf0 +.QL_25.Lf0 +.QL_26.Lf0 +.QL_27.Lf0 +.QL_28.Lf0 ); ///< PCSA (cm2) of the individual element is total volumen divided by the sum of muscle element fiber lengths.
            Vol0 = PCSA * Lf0; // New calculation of the vol for the specific muscle branch
        };

        AnyMuscleModel QL_9 = {
            AnyFolder& MuscleParameters = ....ModelParameters.Muscles.QL;
            AnyIntVar MuscleElemNo = 9; ///< The number of this element of the muscle
            AnyIntVar MuscleElemAmount = MuscleParameters.MuscleElemAmount; ///< The total amount of elements for this muscle
            F0 ??= ...DefaultMusPar.PCSAfactor*PCSA; ///< Maximum force output at optimum fiber length
            Lf0 ??= MuscleParameters.OptimalFiberlength / cos(pi/180*MuscleParameters.Pennationangle); //< Optimal fiber length corrected by pennation angle
            AnyVar PCSA = 0.1575; //< PCSA (cm2) of the individual element is total volumen divided by the sum of muscle element fiber lengths.
            AnyVar PCSA_new ??= 1e4*...StrengthScaleSpine*MuscleParameters.MuscleVolumeSIScaled/(.QL_1.Lf0 +.QL_2.Lf0 +.QL_3.Lf0 +.QL_4.Lf0 +.QL_5.Lf0 +.QL_6.Lf0 +.QL_7.Lf0 +.QL_8.Lf0 +.QL_9.Lf0 +.QL_10.Lf0 +.QL_11.Lf0 +.QL_12.Lf0 +.QL_13.Lf0 +.QL_14.Lf0 +.QL_15.Lf0 +.QL_16.Lf0 +.QL_17.Lf0 +.QL_18.Lf0 +.QL_19.Lf0 +.QL_20.Lf0 +.QL_21.Lf0 +.QL_22.Lf0 +.QL_23.Lf0 +.QL_24.Lf0 +.QL_25.Lf0 +.QL_26.Lf0 +.QL_27.Lf0 +.QL_28.Lf0 ); ///< PCSA (cm2) of the individual element is total volumen divided by the sum of muscle element fiber lengths.
            Vol0 = PCSA * Lf0; // New calculation of the vol for the specific muscle branch
        };

        AnyMuscleModel QL_10 = {
            AnyFolder& MuscleParameters = ....ModelParameters.Muscles.QL;
            AnyIntVar MuscleElemNo = 10; ///< The number of this element of the muscle
            AnyIntVar MuscleElemAmount = MuscleParameters.MuscleElemAmount; ///< The total amount of elements for this muscle
            F0 ??= ...DefaultMusPar.PCSAfactor*PCSA; ///< Maximum force output at optimum fiber length
            Lf0 ??= MuscleParameters.OptimalFiberlength / cos(pi/180*MuscleParameters.Pennationangle); //< Optimal fiber length corrected by pennation angle
            AnyVar PCSA = 0.1575; //< PCSA (cm2) of the individual element is total volumen divided by the sum of muscle element fiber lengths.
            AnyVar PCSA_new ??= 1e4*...StrengthScaleSpine*MuscleParameters.MuscleVolumeSIScaled/(.QL_1.Lf0 +.QL_2.Lf0 +.QL_3.Lf0 +.QL_4.Lf0 +.QL_5.Lf0 +.QL_6.Lf0 +.QL_7.Lf0 +.QL_8.Lf0 +.QL_9.Lf0 +.QL_10.Lf0 +.QL_11.Lf0 +.QL_12.Lf0 +.QL_13.Lf0 +.QL_14.Lf0 +.QL_15.Lf0 +.QL_16.Lf0 +.QL_17.Lf0 +.QL_18.Lf0 +.QL_19.Lf0 +.QL_20.Lf0 +.QL_21.Lf0 +.QL_22.Lf0 +.QL_23.Lf0 +.QL_24.Lf0 +.QL_25.Lf0 +.QL_26.Lf0 +.QL_27.Lf0 +.QL_28.Lf0 ); ///< PCSA (cm2) of the individual element is total volumen divided by the sum of muscle element fiber lengths.
            Vol0 = PCSA * Lf0; // New calculation of the vol for the specific muscle branch
        };

        AnyMuscleModel QL_11 = {
            AnyFolder& MuscleParameters = ....ModelParameters.Muscles.QL;
            AnyIntVar MuscleElemNo = 11; ///< The number of this element of the muscle
            AnyIntVar MuscleElemAmount = MuscleParameters.MuscleElemAmount; ///< The total amount of elements for this muscle
            F0 ??= ...DefaultMusPar.PCSAfactor*PCSA; ///< Maximum force output at optimum fiber length
            Lf0 ??= MuscleParameters.OptimalFiberlength / cos(pi/180*MuscleParameters.Pennationangle); //< Optimal fiber length corrected by pennation angle
            AnyVar PCSA = 0.1575; //< PCSA (cm2) of the individual element is total volumen divided by the sum of muscle element fiber lengths.
            AnyVar PCSA_new ??= 1e4*...StrengthScaleSpine*MuscleParameters.MuscleVolumeSIScaled/(.QL_1.Lf0 +.QL_2.Lf0 +.QL_3.Lf0 +.QL_4.Lf0 +.QL_5.Lf0 +.QL_6.Lf0 +.QL_7.Lf0 +.QL_8.Lf0 +.QL_9.Lf0 +.QL_10.Lf0 +.QL_11.Lf0 +.QL_12.Lf0 +.QL_13.Lf0 +.QL_14.Lf0 +.QL_15.Lf0 +.QL_16.Lf0 +.QL_17.Lf0 +.QL_18.Lf0 +.QL_19.Lf0 +.QL_20.Lf0 +.QL_21.Lf0 +.QL_22.Lf0 +.QL_23.Lf0 +.QL_24.Lf0 +.QL_25.Lf0 +.QL_26.Lf0 +.QL_27.Lf0 +.QL_28.Lf0 ); ///< PCSA (cm2) of the individual element is total volumen divided by the sum of muscle element fiber lengths.
            Vol0 = PCSA * Lf0; // New calculation of the vol for the specific muscle branch
        };

        AnyMuscleModel QL_12 = {
            AnyFolder& MuscleParameters = ....ModelParameters.Muscles.QL;
            AnyIntVar MuscleElemNo = 12; ///< The number of this element of the muscle
            AnyIntVar MuscleElemAmount = MuscleParameters.MuscleElemAmount; ///< The total amount of elements for this muscle
            F0 ??= ...DefaultMusPar.PCSAfactor*PCSA; ///< Maximum force output at optimum fiber length
            Lf0 ??= MuscleParameters.OptimalFiberlength / cos(pi/180*MuscleParameters.Pennationangle); //< Optimal fiber length corrected by pennation angle
            AnyVar PCSA = 0.1575; //< PCSA (cm2) of the individual element is total volumen divided by the sum of muscle element fiber lengths.
            AnyVar PCSA_new ??= 1e4*...StrengthScaleSpine*MuscleParameters.MuscleVolumeSIScaled/(.QL_1.Lf0 +.QL_2.Lf0 +.QL_3.Lf0 +.QL_4.Lf0 +.QL_5.Lf0 +.QL_6.Lf0 +.QL_7.Lf0 +.QL_8.Lf0 +.QL_9.Lf0 +.QL_10.Lf0 +.QL_11.Lf0 +.QL_12.Lf0 +.QL_13.Lf0 +.QL_14.Lf0 +.QL_15.Lf0 +.QL_16.Lf0 +.QL_17.Lf0 +.QL_18.Lf0 +.QL_19.Lf0 +.QL_20.Lf0 +.QL_21.Lf0 +.QL_22.Lf0 +.QL_23.Lf0 +.QL_24.Lf0 +.QL_25.Lf0 +.QL_26.Lf0 +.QL_27.Lf0 +.QL_28.Lf0 ); ///< PCSA (cm2) of the individual element is total volumen divided by the sum of muscle element fiber lengths.
            Vol0 = PCSA * Lf0; // New calculation of the vol for the specific muscle branch
        };

        AnyMuscleModel QL_13 = {
            AnyFolder& MuscleParameters = ....ModelParameters.Muscles.QL;
            AnyIntVar MuscleElemNo = 13; ///< The number of this element of the muscle
            AnyIntVar MuscleElemAmount = MuscleParameters.MuscleElemAmount; ///< The total amount of elements for this muscle
            F0 ??= ...DefaultMusPar.PCSAfactor*PCSA; ///< Maximum force output at optimum fiber length
            Lf0 ??= MuscleParameters.OptimalFiberlength / cos(pi/180*MuscleParameters.Pennationangle); //< Optimal fiber length corrected by pennation angle
            AnyVar PCSA = 0.1575; //< PCSA (cm2) of the individual element is total volumen divided by the sum of muscle element fiber lengths.
            AnyVar PCSA_new ??= 1e4*...StrengthScaleSpine*MuscleParameters.MuscleVolumeSIScaled/(.QL_1.Lf0 +.QL_2.Lf0 +.QL_3.Lf0 +.QL_4.Lf0 +.QL_5.Lf0 +.QL_6.Lf0 +.QL_7.Lf0 +.QL_8.Lf0 +.QL_9.Lf0 +.QL_10.Lf0 +.QL_11.Lf0 +.QL_12.Lf0 +.QL_13.Lf0 +.QL_14.Lf0 +.QL_15.Lf0 +.QL_16.Lf0 +.QL_17.Lf0 +.QL_18.Lf0 +.QL_19.Lf0 +.QL_20.Lf0 +.QL_21.Lf0 +.QL_22.Lf0 +.QL_23.Lf0 +.QL_24.Lf0 +.QL_25.Lf0 +.QL_26.Lf0 +.QL_27.Lf0 +.QL_28.Lf0 ); ///< PCSA (cm2) of the individual element is total volumen divided by the sum of muscle element fiber lengths.
            Vol0 = PCSA * Lf0; // New calculation of the vol for the specific muscle branch
        };

        AnyMuscleModel QL_14 = {
            AnyFolder& MuscleParameters = ....ModelParameters.Muscles.QL;
            AnyIntVar MuscleElemNo = 14; ///< The number of this element of the muscle
            AnyIntVar MuscleElemAmount = MuscleParameters.MuscleElemAmount; ///< The total amount of elements for this muscle
            F0 ??= ...DefaultMusPar.PCSAfactor*PCSA; ///< Maximum force output at optimum fiber length
            Lf0 ??= MuscleParameters.OptimalFiberlength / cos(pi/180*MuscleParameters.Pennationangle); //< Optimal fiber length corrected by pennation angle
            AnyVar PCSA = 0.1575; //< PCSA (cm2) of the individual element is total volumen divided by the sum of muscle element fiber lengths.
            AnyVar PCSA_new ??= 1e4*...StrengthScaleSpine*MuscleParameters.MuscleVolumeSIScaled/(.QL_1.Lf0 +.QL_2.Lf0 +.QL_3.Lf0 +.QL_4.Lf0 +.QL_5.Lf0 +.QL_6.Lf0 +.QL_7.Lf0 +.QL_8.Lf0 +.QL_9.Lf0 +.QL_10.Lf0 +.QL_11.Lf0 +.QL_12.Lf0 +.QL_13.Lf0 +.QL_14.Lf0 +.QL_15.Lf0 +.QL_16.Lf0 +.QL_17.Lf0 +.QL_18.Lf0 +.QL_19.Lf0 +.QL_20.Lf0 +.QL_21.Lf0 +.QL_22.Lf0 +.QL_23.Lf0 +.QL_24.Lf0 +.QL_25.Lf0 +.QL_26.Lf0 +.QL_27.Lf0 +.QL_28.Lf0 ); ///< PCSA (cm2) of the individual element is total volumen divided by the sum of muscle element fiber lengths.
            Vol0 = PCSA * Lf0; // New calculation of the vol for the specific muscle branch
        };

        AnyMuscleModel QL_15 = {
            AnyFolder& MuscleParameters = ....ModelParameters.Muscles.QL;
            AnyIntVar MuscleElemNo = 15; ///< The number of this element of the muscle
            AnyIntVar MuscleElemAmount = MuscleParameters.MuscleElemAmount; ///< The total amount of elements for this muscle
            F0 ??= ...DefaultMusPar.PCSAfactor*PCSA; ///< Maximum force output at optimum fiber length
            Lf0 ??= MuscleParameters.OptimalFiberlength / cos(pi/180*MuscleParameters.Pennationangle); //< Optimal fiber length corrected by pennation angle
            AnyVar PCSA = 0.1575; //< PCSA (cm2) of the individual element is total volumen divided by the sum of muscle element fiber lengths.
            AnyVar PCSA_new ??= 1e4*...StrengthScaleSpine*MuscleParameters.MuscleVolumeSIScaled/(.QL_1.Lf0 +.QL_2.Lf0 +.QL_3.Lf0 +.QL_4.Lf0 +.QL_5.Lf0 +.QL_6.Lf0 +.QL_7.Lf0 +.QL_8.Lf0 +.QL_9.Lf0 +.QL_10.Lf0 +.QL_11.Lf0 +.QL_12.Lf0 +.QL_13.Lf0 +.QL_14.Lf0 +.QL_15.Lf0 +.QL_16.Lf0 +.QL_17.Lf0 +.QL_18.Lf0 +.QL_19.Lf0 +.QL_20.Lf0 +.QL_21.Lf0 +.QL_22.Lf0 +.QL_23.Lf0 +.QL_24.Lf0 +.QL_25.Lf0 +.QL_26.Lf0 +.QL_27.Lf0 +.QL_28.Lf0 ); ///< PCSA (cm2) of the individual element is total volumen divided by the sum of muscle element fiber lengths.
            Vol0 = PCSA * Lf0; // New calculation of the vol for the specific muscle branch
        };

        AnyMuscleModel QL_16 = {
            AnyFolder& MuscleParameters = ....ModelParameters.Muscles.QL;
            AnyIntVar MuscleElemNo = 16; ///< The number of this element of the muscle
            AnyIntVar MuscleElemAmount = MuscleParameters.MuscleElemAmount; ///< The total amount of elements for this muscle
            F0 ??= ...DefaultMusPar.PCSAfactor*PCSA; ///< Maximum force output at optimum fiber length
            Lf0 ??= MuscleParameters.OptimalFiberlength / cos(pi/180*MuscleParameters.Pennationangle); //< Optimal fiber length corrected by pennation angle
            AnyVar PCSA = 0.1575; //< PCSA (cm2) of the individual element is total volumen divided by the sum of muscle element fiber lengths.
            AnyVar PCSA_new ??= 1e4*...StrengthScaleSpine*MuscleParameters.MuscleVolumeSIScaled/(.QL_1.Lf0 +.QL_2.Lf0 +.QL_3.Lf0 +.QL_4.Lf0 +.QL_5.Lf0 +.QL_6.Lf0 +.QL_7.Lf0 +.QL_8.Lf0 +.QL_9.Lf0 +.QL_10.Lf0 +.QL_11.Lf0 +.QL_12.Lf0 +.QL_13.Lf0 +.QL_14.Lf0 +.QL_15.Lf0 +.QL_16.Lf0 +.QL_17.Lf0 +.QL_18.Lf0 +.QL_19.Lf0 +.QL_20.Lf0 +.QL_21.Lf0 +.QL_22.Lf0 +.QL_23.Lf0 +.QL_24.Lf0 +.QL_25.Lf0 +.QL_26.Lf0 +.QL_27.Lf0 +.QL_28.Lf0 ); ///< PCSA (cm2) of the individual element is total volumen divided by the sum of muscle element fiber lengths.
            Vol0 = PCSA * Lf0; // New calculation of the vol for the specific muscle branch
        };

        AnyMuscleModel QL_17 = {
            AnyFolder& MuscleParameters = ....ModelParameters.Muscles.QL;
            AnyIntVar MuscleElemNo = 17; ///< The number of this element of the muscle
            AnyIntVar MuscleElemAmount = MuscleParameters.MuscleElemAmount; ///< The total amount of elements for this muscle
            F0 ??= ...DefaultMusPar.PCSAfactor*PCSA; ///< Maximum force output at optimum fiber length
            Lf0 ??= MuscleParameters.OptimalFiberlength / cos(pi/180*MuscleParameters.Pennationangle); //< Optimal fiber length corrected by pennation angle
            AnyVar PCSA = 0.1575; //< PCSA (cm2) of the individual element is total volumen divided by the sum of muscle element fiber lengths.
            AnyVar PCSA_new ??= 1e4*...StrengthScaleSpine*MuscleParameters.MuscleVolumeSIScaled/(.QL_1.Lf0 +.QL_2.Lf0 +.QL_3.Lf0 +.QL_4.Lf0 +.QL_5.Lf0 +.QL_6.Lf0 +.QL_7.Lf0 +.QL_8.Lf0 +.QL_9.Lf0 +.QL_10.Lf0 +.QL_11.Lf0 +.QL_12.Lf0 +.QL_13.Lf0 +.QL_14.Lf0 +.QL_15.Lf0 +.QL_16.Lf0 +.QL_17.Lf0 +.QL_18.Lf0 +.QL_19.Lf0 +.QL_20.Lf0 +.QL_21.Lf0 +.QL_22.Lf0 +.QL_23.Lf0 +.QL_24.Lf0 +.QL_25.Lf0 +.QL_26.Lf0 +.QL_27.Lf0 +.QL_28.Lf0 ); ///< PCSA (cm2) of the individual element is total volumen divided by the sum of muscle element fiber lengths.
            Vol0 = PCSA * Lf0; // New calculation of the vol for the specific muscle branch
        };

        AnyMuscleModel QL_18 = {
            AnyFolder& MuscleParameters = ....ModelParameters.Muscles.QL;
            AnyIntVar MuscleElemNo = 18; ///< The number of this element of the muscle
            AnyIntVar MuscleElemAmount = MuscleParameters.MuscleElemAmount; ///< The total amount of elements for this muscle
            F0 ??= ...DefaultMusPar.PCSAfactor*PCSA; ///< Maximum force output at optimum fiber length
            Lf0 ??= MuscleParameters.OptimalFiberlength / cos(pi/180*MuscleParameters.Pennationangle); //< Optimal fiber length corrected by pennation angle
            AnyVar PCSA = 0.1575; //< PCSA (cm2) of the individual element is total volumen divided by the sum of muscle element fiber lengths.
            AnyVar PCSA_new ??= 1e4*...StrengthScaleSpine*MuscleParameters.MuscleVolumeSIScaled/(.QL_1.Lf0 +.QL_2.Lf0 +.QL_3.Lf0 +.QL_4.Lf0 +.QL_5.Lf0 +.QL_6.Lf0 +.QL_7.Lf0 +.QL_8.Lf0 +.QL_9.Lf0 +.QL_10.Lf0 +.QL_11.Lf0 +.QL_12.Lf0 +.QL_13.Lf0 +.QL_14.Lf0 +.QL_15.Lf0 +.QL_16.Lf0 +.QL_17.Lf0 +.QL_18.Lf0 +.QL_19.Lf0 +.QL_20.Lf0 +.QL_21.Lf0 +.QL_22.Lf0 +.QL_23.Lf0 +.QL_24.Lf0 +.QL_25.Lf0 +.QL_26.Lf0 +.QL_27.Lf0 +.QL_28.Lf0 ); ///< PCSA (cm2) of the individual element is total volumen divided by the sum of muscle element fiber lengths.
            Vol0 = PCSA * Lf0; // New calculation of the vol for the specific muscle branch
        };

        AnyMuscleModel QL_19 = {
            AnyFolder& MuscleParameters = ....ModelParameters.Muscles.QL;
            AnyIntVar MuscleElemNo = 19; ///< The number of this element of the muscle
            AnyIntVar MuscleElemAmount = MuscleParameters.MuscleElemAmount; ///< The total amount of elements for this muscle
            F0 ??= ...DefaultMusPar.PCSAfactor*PCSA; ///< Maximum force output at optimum fiber length
            Lf0 ??= MuscleParameters.OptimalFiberlength / cos(pi/180*MuscleParameters.Pennationangle); //< Optimal fiber length corrected by pennation angle
            AnyVar PCSA = 0.1575; //< PCSA (cm2) of the individual element is total volumen divided by the sum of muscle element fiber lengths.
            AnyVar PCSA_new ??= 1e4*...StrengthScaleSpine*MuscleParameters.MuscleVolumeSIScaled/(.QL_1.Lf0 +.QL_2.Lf0 +.QL_3.Lf0 +.QL_4.Lf0 +.QL_5.Lf0 +.QL_6.Lf0 +.QL_7.Lf0 +.QL_8.Lf0 +.QL_9.Lf0 +.QL_10.Lf0 +.QL_11.Lf0 +.QL_12.Lf0 +.QL_13.Lf0 +.QL_14.Lf0 +.QL_15.Lf0 +.QL_16.Lf0 +.QL_17.Lf0 +.QL_18.Lf0 +.QL_19.Lf0 +.QL_20.Lf0 +.QL_21.Lf0 +.QL_22.Lf0 +.QL_23.Lf0 +.QL_24.Lf0 +.QL_25.Lf0 +.QL_26.Lf0 +.QL_27.Lf0 +.QL_28.Lf0 ); ///< PCSA (cm2) of the individual element is total volumen divided by the sum of muscle element fiber lengths.
            Vol0 = PCSA * Lf0; // New calculation of the vol for the specific muscle branch
        };

        AnyMuscleModel QL_20 = {
            AnyFolder& MuscleParameters = ....ModelParameters.Muscles.QL;
            AnyIntVar MuscleElemNo = 20; ///< The number of this element of the muscle
            AnyIntVar MuscleElemAmount = MuscleParameters.MuscleElemAmount; ///< The total amount of elements for this muscle
            F0 ??= ...DefaultMusPar.PCSAfactor*PCSA; ///< Maximum force output at optimum fiber length
            Lf0 ??= MuscleParameters.OptimalFiberlength / cos(pi/180*MuscleParameters.Pennationangle); //< Optimal fiber length corrected by pennation angle
            AnyVar PCSA = 0.1575; //< PCSA (cm2) of the individual element is total volumen divided by the sum of muscle element fiber lengths.
            AnyVar PCSA_new ??= 1e4*...StrengthScaleSpine*MuscleParameters.MuscleVolumeSIScaled/(.QL_1.Lf0 +.QL_2.Lf0 +.QL_3.Lf0 +.QL_4.Lf0 +.QL_5.Lf0 +.QL_6.Lf0 +.QL_7.Lf0 +.QL_8.Lf0 +.QL_9.Lf0 +.QL_10.Lf0 +.QL_11.Lf0 +.QL_12.Lf0 +.QL_13.Lf0 +.QL_14.Lf0 +.QL_15.Lf0 +.QL_16.Lf0 +.QL_17.Lf0 +.QL_18.Lf0 +.QL_19.Lf0 +.QL_20.Lf0 +.QL_21.Lf0 +.QL_22.Lf0 +.QL_23.Lf0 +.QL_24.Lf0 +.QL_25.Lf0 +.QL_26.Lf0 +.QL_27.Lf0 +.QL_28.Lf0 ); ///< PCSA (cm2) of the individual element is total volumen divided by the sum of muscle element fiber lengths.
            Vol0 = PCSA * Lf0; // New calculation of the vol for the specific muscle branch
        };

        AnyMuscleModel QL_21 = {
            AnyFolder& MuscleParameters = ....ModelParameters.Muscles.QL;
            AnyIntVar MuscleElemNo = 21; ///< The number of this element of the muscle
            AnyIntVar MuscleElemAmount = MuscleParameters.MuscleElemAmount; ///< The total amount of elements for this muscle
            F0 ??= ...DefaultMusPar.PCSAfactor*PCSA; ///< Maximum force output at optimum fiber length
            Lf0 ??= MuscleParameters.OptimalFiberlength / cos(pi/180*MuscleParameters.Pennationangle); //< Optimal fiber length corrected by pennation angle
            AnyVar PCSA = 0.1575; //< PCSA (cm2) of the individual element is total volumen divided by the sum of muscle element fiber lengths.
            AnyVar PCSA_new ??= 1e4*...StrengthScaleSpine*MuscleParameters.MuscleVolumeSIScaled/(.QL_1.Lf0 +.QL_2.Lf0 +.QL_3.Lf0 +.QL_4.Lf0 +.QL_5.Lf0 +.QL_6.Lf0 +.QL_7.Lf0 +.QL_8.Lf0 +.QL_9.Lf0 +.QL_10.Lf0 +.QL_11.Lf0 +.QL_12.Lf0 +.QL_13.Lf0 +.QL_14.Lf0 +.QL_15.Lf0 +.QL_16.Lf0 +.QL_17.Lf0 +.QL_18.Lf0 +.QL_19.Lf0 +.QL_20.Lf0 +.QL_21.Lf0 +.QL_22.Lf0 +.QL_23.Lf0 +.QL_24.Lf0 +.QL_25.Lf0 +.QL_26.Lf0 +.QL_27.Lf0 +.QL_28.Lf0 ); ///< PCSA (cm2) of the individual element is total volumen divided by the sum of muscle element fiber lengths.
            Vol0 = PCSA * Lf0; // New calculation of the vol for the specific muscle branch
        };

        AnyMuscleModel QL_22 = {
            AnyFolder& MuscleParameters = ....ModelParameters.Muscles.QL;
            AnyIntVar MuscleElemNo = 22; ///< The number of this element of the muscle
            AnyIntVar MuscleElemAmount = MuscleParameters.MuscleElemAmount; ///< The total amount of elements for this muscle
            F0 ??= ...DefaultMusPar.PCSAfactor*PCSA; ///< Maximum force output at optimum fiber length
            Lf0 ??= MuscleParameters.OptimalFiberlength / cos(pi/180*MuscleParameters.Pennationangle); //< Optimal fiber length corrected by pennation angle
            AnyVar PCSA = 0.1575; //< PCSA (cm2) of the individual element is total volumen divided by the sum of muscle element fiber lengths.
            AnyVar PCSA_new ??= 1e4*...StrengthScaleSpine*MuscleParameters.MuscleVolumeSIScaled/(.QL_1.Lf0 +.QL_2.Lf0 +.QL_3.Lf0 +.QL_4.Lf0 +.QL_5.Lf0 +.QL_6.Lf0 +.QL_7.Lf0 +.QL_8.Lf0 +.QL_9.Lf0 +.QL_10.Lf0 +.QL_11.Lf0 +.QL_12.Lf0 +.QL_13.Lf0 +.QL_14.Lf0 +.QL_15.Lf0 +.QL_16.Lf0 +.QL_17.Lf0 +.QL_18.Lf0 +.QL_19.Lf0 +.QL_20.Lf0 +.QL_21.Lf0 +.QL_22.Lf0 +.QL_23.Lf0 +.QL_24.Lf0 +.QL_25.Lf0 +.QL_26.Lf0 +.QL_27.Lf0 +.QL_28.Lf0 ); ///< PCSA (cm2) of the individual element is total volumen divided by the sum of muscle element fiber lengths.
            Vol0 = PCSA * Lf0; // New calculation of the vol for the specific muscle branch
        };

        AnyMuscleModel QL_23 = {
            AnyFolder& MuscleParameters = ....ModelParameters.Muscles.QL;
            AnyIntVar MuscleElemNo = 23; ///< The number of this element of the muscle
            AnyIntVar MuscleElemAmount = MuscleParameters.MuscleElemAmount; ///< The total amount of elements for this muscle
            F0 ??= ...DefaultMusPar.PCSAfactor*PCSA; ///< Maximum force output at optimum fiber length
            Lf0 ??= MuscleParameters.OptimalFiberlength / cos(pi/180*MuscleParameters.Pennationangle); //< Optimal fiber length corrected by pennation angle
            AnyVar PCSA = 0.1575; //< PCSA (cm2) of the individual element is total volumen divided by the sum of muscle element fiber lengths.
            AnyVar PCSA_new ??= 1e4*...StrengthScaleSpine*MuscleParameters.MuscleVolumeSIScaled/(.QL_1.Lf0 +.QL_2.Lf0 +.QL_3.Lf0 +.QL_4.Lf0 +.QL_5.Lf0 +.QL_6.Lf0 +.QL_7.Lf0 +.QL_8.Lf0 +.QL_9.Lf0 +.QL_10.Lf0 +.QL_11.Lf0 +.QL_12.Lf0 +.QL_13.Lf0 +.QL_14.Lf0 +.QL_15.Lf0 +.QL_16.Lf0 +.QL_17.Lf0 +.QL_18.Lf0 +.QL_19.Lf0 +.QL_20.Lf0 +.QL_21.Lf0 +.QL_22.Lf0 +.QL_23.Lf0 +.QL_24.Lf0 +.QL_25.Lf0 +.QL_26.Lf0 +.QL_27.Lf0 +.QL_28.Lf0 ); ///< PCSA (cm2) of the individual element is total volumen divided by the sum of muscle element fiber lengths.
            Vol0 = PCSA * Lf0; // New calculation of the vol for the specific muscle branch
        };

        AnyMuscleModel QL_24 = {
            AnyFolder& MuscleParameters = ....ModelParameters.Muscles.QL;
            AnyIntVar MuscleElemNo = 24; ///< The number of this element of the muscle
            AnyIntVar MuscleElemAmount = MuscleParameters.MuscleElemAmount; ///< The total amount of elements for this muscle
            F0 ??= ...DefaultMusPar.PCSAfactor*PCSA; ///< Maximum force output at optimum fiber length
            Lf0 ??= MuscleParameters.OptimalFiberlength / cos(pi/180*MuscleParameters.Pennationangle); //< Optimal fiber length corrected by pennation angle
            AnyVar PCSA = 0.1575; //< PCSA (cm2) of the individual element is total volumen divided by the sum of muscle element fiber lengths.
            AnyVar PCSA_new ??= 1e4*...StrengthScaleSpine*MuscleParameters.MuscleVolumeSIScaled/(.QL_1.Lf0 +.QL_2.Lf0 +.QL_3.Lf0 +.QL_4.Lf0 +.QL_5.Lf0 +.QL_6.Lf0 +.QL_7.Lf0 +.QL_8.Lf0 +.QL_9.Lf0 +.QL_10.Lf0 +.QL_11.Lf0 +.QL_12.Lf0 +.QL_13.Lf0 +.QL_14.Lf0 +.QL_15.Lf0 +.QL_16.Lf0 +.QL_17.Lf0 +.QL_18.Lf0 +.QL_19.Lf0 +.QL_20.Lf0 +.QL_21.Lf0 +.QL_22.Lf0 +.QL_23.Lf0 +.QL_24.Lf0 +.QL_25.Lf0 +.QL_26.Lf0 +.QL_27.Lf0 +.QL_28.Lf0 ); ///< PCSA (cm2) of the individual element is total volumen divided by the sum of muscle element fiber lengths.
            Vol0 = PCSA * Lf0; // New calculation of the vol for the specific muscle branch
        };

        AnyMuscleModel QL_25 = {
            AnyFolder& MuscleParameters = ....ModelParameters.Muscles.QL;
            AnyIntVar MuscleElemNo = 25; ///< The number of this element of the muscle
            AnyIntVar MuscleElemAmount = MuscleParameters.MuscleElemAmount; ///< The total amount of elements for this muscle
            F0 ??= ...DefaultMusPar.PCSAfactor*PCSA; ///< Maximum force output at optimum fiber length
            Lf0 ??= MuscleParameters.OptimalFiberlength / cos(pi/180*MuscleParameters.Pennationangle); //< Optimal fiber length corrected by pennation angle
            AnyVar PCSA = 0.1575; //< PCSA (cm2) of the individual element is total volumen divided by the sum of muscle element fiber lengths.
            AnyVar PCSA_new ??= 1e4*...StrengthScaleSpine*MuscleParameters.MuscleVolumeSIScaled/(.QL_1.Lf0 +.QL_2.Lf0 +.QL_3.Lf0 +.QL_4.Lf0 +.QL_5.Lf0 +.QL_6.Lf0 +.QL_7.Lf0 +.QL_8.Lf0 +.QL_9.Lf0 +.QL_10.Lf0 +.QL_11.Lf0 +.QL_12.Lf0 +.QL_13.Lf0 +.QL_14.Lf0 +.QL_15.Lf0 +.QL_16.Lf0 +.QL_17.Lf0 +.QL_18.Lf0 +.QL_19.Lf0 +.QL_20.Lf0 +.QL_21.Lf0 +.QL_22.Lf0 +.QL_23.Lf0 +.QL_24.Lf0 +.QL_25.Lf0 +.QL_26.Lf0 +.QL_27.Lf0 +.QL_28.Lf0 ); ///< PCSA (cm2) of the individual element is total volumen divided by the sum of muscle element fiber lengths.
            Vol0 = PCSA * Lf0; // New calculation of the vol for the specific muscle branch
        };

        AnyMuscleModel QL_26 = {
            AnyFolder& MuscleParameters = ....ModelParameters.Muscles.QL;
            AnyIntVar MuscleElemNo = 26; ///< The number of this element of the muscle
            AnyIntVar MuscleElemAmount = MuscleParameters.MuscleElemAmount; ///< The total amount of elements for this muscle
            F0 ??= ...DefaultMusPar.PCSAfactor*PCSA; ///< Maximum force output at optimum fiber length
            Lf0 ??= MuscleParameters.OptimalFiberlength / cos(pi/180*MuscleParameters.Pennationangle); //< Optimal fiber length corrected by pennation angle
            AnyVar PCSA = 0.1575; //< PCSA (cm2) of the individual element is total volumen divided by the sum of muscle element fiber lengths.
            AnyVar PCSA_new ??= 1e4*...StrengthScaleSpine*MuscleParameters.MuscleVolumeSIScaled/(.QL_1.Lf0 +.QL_2.Lf0 +.QL_3.Lf0 +.QL_4.Lf0 +.QL_5.Lf0 +.QL_6.Lf0 +.QL_7.Lf0 +.QL_8.Lf0 +.QL_9.Lf0 +.QL_10.Lf0 +.QL_11.Lf0 +.QL_12.Lf0 +.QL_13.Lf0 +.QL_14.Lf0 +.QL_15.Lf0 +.QL_16.Lf0 +.QL_17.Lf0 +.QL_18.Lf0 +.QL_19.Lf0 +.QL_20.Lf0 +.QL_21.Lf0 +.QL_22.Lf0 +.QL_23.Lf0 +.QL_24.Lf0 +.QL_25.Lf0 +.QL_26.Lf0 +.QL_27.Lf0 +.QL_28.Lf0 ); ///< PCSA (cm2) of the individual element is total volumen divided by the sum of muscle element fiber lengths.
            Vol0 = PCSA * Lf0; // New calculation of the vol for the specific muscle branch
        };

        AnyMuscleModel QL_27 = {
            AnyFolder& MuscleParameters = ....ModelParameters.Muscles.QL;
            AnyIntVar MuscleElemNo = 27; ///< The number of this element of the muscle
            AnyIntVar MuscleElemAmount = MuscleParameters.MuscleElemAmount; ///< The total amount of elements for this muscle
            F0 ??= ...DefaultMusPar.PCSAfactor*PCSA; ///< Maximum force output at optimum fiber length
            Lf0 ??= MuscleParameters.OptimalFiberlength / cos(pi/180*MuscleParameters.Pennationangle); //< Optimal fiber length corrected by pennation angle
            AnyVar PCSA = 0.1575; //< PCSA (cm2) of the individual element is total volumen divided by the sum of muscle element fiber lengths.
            AnyVar PCSA_new ??= 1e4*...StrengthScaleSpine*MuscleParameters.MuscleVolumeSIScaled/(.QL_1.Lf0 +.QL_2.Lf0 +.QL_3.Lf0 +.QL_4.Lf0 +.QL_5.Lf0 +.QL_6.Lf0 +.QL_7.Lf0 +.QL_8.Lf0 +.QL_9.Lf0 +.QL_10.Lf0 +.QL_11.Lf0 +.QL_12.Lf0 +.QL_13.Lf0 +.QL_14.Lf0 +.QL_15.Lf0 +.QL_16.Lf0 +.QL_17.Lf0 +.QL_18.Lf0 +.QL_19.Lf0 +.QL_20.Lf0 +.QL_21.Lf0 +.QL_22.Lf0 +.QL_23.Lf0 +.QL_24.Lf0 +.QL_25.Lf0 +.QL_26.Lf0 +.QL_27.Lf0 +.QL_28.Lf0 ); ///< PCSA (cm2) of the individual element is total volumen divided by the sum of muscle element fiber lengths.
            Vol0 = PCSA * Lf0; // New calculation of the vol for the specific muscle branch
        };

        AnyMuscleModel QL_28 = {
            AnyFolder& MuscleParameters = ....ModelParameters.Muscles.QL;
            AnyIntVar MuscleElemNo = 28; ///< The number of this element of the muscle
            AnyIntVar MuscleElemAmount = MuscleParameters.MuscleElemAmount; ///< The total amount of elements for this muscle
            F0 ??= ...DefaultMusPar.PCSAfactor*PCSA; ///< Maximum force output at optimum fiber length
            Lf0 ??= MuscleParameters.OptimalFiberlength / cos(pi/180*MuscleParameters.Pennationangle); //< Optimal fiber length corrected by pennation angle
            AnyVar PCSA = 0.1575; //< PCSA (cm2) of the individual element is total volumen divided by the sum of muscle element fiber lengths.
            AnyVar PCSA_new ??= 1e4*...StrengthScaleSpine*MuscleParameters.MuscleVolumeSIScaled/(.QL_1.Lf0 +.QL_2.Lf0 +.QL_3.Lf0 +.QL_4.Lf0 +.QL_5.Lf0 +.QL_6.Lf0 +.QL_7.Lf0 +.QL_8.Lf0 +.QL_9.Lf0 +.QL_10.Lf0 +.QL_11.Lf0 +.QL_12.Lf0 +.QL_13.Lf0 +.QL_14.Lf0 +.QL_15.Lf0 +.QL_16.Lf0 +.QL_17.Lf0 +.QL_18.Lf0 +.QL_19.Lf0 +.QL_20.Lf0 +.QL_21.Lf0 +.QL_22.Lf0 +.QL_23.Lf0 +.QL_24.Lf0 +.QL_25.Lf0 +.QL_26.Lf0 +.QL_27.Lf0 +.QL_28.Lf0 ); ///< PCSA (cm2) of the individual element is total volumen divided by the sum of muscle element fiber lengths.
            Vol0 = PCSA * Lf0; // New calculation of the vol for the specific muscle branch
        };
        #endif

    };
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