// Shared attributes needed for the rigid thorax
AnyFloat r0 = .r0;
AnyMatrix Axes0 = .Axes0;
AnyFunTransform3D &Scale =.Scale;
AnyFunTransform3D &GeomScale = .GeomScale;
AnyFolder &StdPar = .StdPar;
AnyRefNode &AnatomicalFrameTrunk = .AnatomicalFrameTrunk;
AnyRefNode &ScalingNode = .ScalingNode;
AnyRefNode MoCapMarkerFrameAMMR24 = {}; ///< For backwards compatability with AMMR 2.4 MoCap Marker protocols
