AnyRefNode &Via01 = layer.BaseSegPosterior.TransversusPoints.Right.nn01;
AnyRefNode &Via02 = layer.BaseSegPosterior.TransversusPoints.Right.nn02;
AnyRefNode &Via03 = layer.BaseSegPosterior.TransversusPoints.Right.nn03;
AnyRefNode &Via04 = layer.BaseSegAnterior.TransversusPoints.Right.nn01;
AnyRefNode &Via05 = layer.BaseSegAnterior.TransversusPoints.Right.nn02;
AnyRefNode &Via06 = layer.BaseSegAnterior.TransversusPoints.Right.nn03;
AnyRefNode &Via07 = layer.BaseSegAnterior.TransversusPoints.Right.nn04;
AnyRefNode &Via08 = layer.BaseSegAnterior.TransversusPoints.Right.nn05;
AnyRefNode &Via09 = layer.BaseSegAnterior.TransversusPoints.Right.nn06;

AnyRefNode &Via10 = layer.BaseSegAnterior.TransversusPoints.Left.nn06;
AnyRefNode &Via11 = layer.BaseSegAnterior.TransversusPoints.Left.nn05;
AnyRefNode &Via12 = layer.BaseSegAnterior.TransversusPoints.Left.nn04;
AnyRefNode &Via13 = layer.BaseSegAnterior.TransversusPoints.Left.nn03;
AnyRefNode &Via14 = layer.BaseSegAnterior.TransversusPoints.Left.nn02;
AnyRefNode &Via15 = layer.BaseSegAnterior.TransversusPoints.Left.nn01;
AnyRefNode &Via16 = layer.BaseSegPosterior.TransversusPoints.Left.nn03;
AnyRefNode &Via17 = layer.BaseSegPosterior.TransversusPoints.Left.nn02;
AnyRefNode &Via18 = layer.BaseSegPosterior.TransversusPoints.Left.nn01;
