//Interface for trunk


// Rotational measures used for joint nuscles

AnyKinRotational L5SacrumJntMus =
{
  Type = RotAxesAngles;
  AngVelOnOff = On;
  AnyRefFrame &SacrumNode = ...Trunk.SegmentsLumbar.SacrumSeg.SacrumL5JntNode;
  AnyRefFrame &L5Node = ...Trunk.SegmentsLumbar.L5Seg.L5SacrumJntNode;
};


AnyKinRotational L4L5JntMus =
{
  Type = RotAxesAngles;
  AngVelOnOff = On;
  AnyRefFrame &L5Node = ...Trunk.SegmentsLumbar.L5Seg.L4L5JntNode;
  AnyRefFrame &L4Node = ...Trunk.SegmentsLumbar.L4Seg.L4L5JntNode;
};


AnyKinRotational L3L4JntMus =
{
  Type = RotAxesAngles;
  AngVelOnOff = On;
  AnyRefFrame &L4Node = ...Trunk.SegmentsLumbar.L4Seg.L3L4JntNode;
  AnyRefFrame &L3Node = ...Trunk.SegmentsLumbar.L3Seg.L3L4JntNode;
};


AnyKinRotational L2L3JntMus =
{
  Type = RotAxesAngles;
  AngVelOnOff = On;
  AnyRefFrame &L3Node = ...Trunk.SegmentsLumbar.L3Seg.L2L3JntNode;
  AnyRefFrame &L2Node = ...Trunk.SegmentsLumbar.L2Seg.L2L3JntNode;
};


AnyKinRotational L1L2JntMus =
{
  Type = RotAxesAngles;
  AngVelOnOff = On;
  AnyRefFrame &L2Node = ...Trunk.SegmentsLumbar.L2Seg.L1L2JntNode;
  AnyRefFrame &L1Node = ...Trunk.SegmentsLumbar.L1Seg.L1L2JntNode;
};


AnyKinRotational T12L1JntMus =
{
  Type = RotAxesAngles;
  AngVelOnOff = On;
  AnyRefFrame &L1Node = ...Trunk.SegmentsLumbar.L1Seg.T12L1JntNode;
  AnyRefFrame &T12Node = ...Trunk.SegmentsThorax.ThoraxSeg.T12L1JntNode;
};


AnyKinRotational T1C7JntMus =
{
  Type = RotAxesAngles;
  AngVelOnOff = On;
  AnyRefFrame &T1Node = ...Trunk.SegmentsThorax.ThoraxSeg.T1C7JntNode;
  AnyRefFrame &C7Node = ...Trunk.SegmentsCervicalSpine.C7Seg.T1C7JntNode;
};


AnyKinRotational C7C6JntMus =
{
  Type = RotAxesAngles;
  AngVelOnOff = On;
  AnyRefFrame &C7Node = ...Trunk.SegmentsCervicalSpine.C7Seg.C7C6JntNode;
  AnyRefFrame &C6Node = ...Trunk.SegmentsCervicalSpine.C6Seg.C7C6JntNode;
};


AnyKinRotational C6C5JntMus =
{
  Type = RotAxesAngles;
  AngVelOnOff = On;
  AnyRefFrame &C6Node = ...Trunk.SegmentsCervicalSpine.C6Seg.C6C5JntNode;
  AnyRefFrame &C5Node = ...Trunk.SegmentsCervicalSpine.C5Seg.C6C5JntNode;
};


AnyKinRotational C5C4JntMus =
{
  Type = RotAxesAngles;
  AngVelOnOff = On;
  AnyRefFrame &C5Node = ...Trunk.SegmentsCervicalSpine.C5Seg.C5C4JntNode;
  AnyRefFrame &C4Node = ...Trunk.SegmentsCervicalSpine.C4Seg.C5C4JntNode;
};


AnyKinRotational C4C3JntMus =
{
  Type = RotAxesAngles;
  AngVelOnOff = On;
  AnyRefFrame &C4Node = ...Trunk.SegmentsCervicalSpine.C4Seg.C4C3JntNode;
  AnyRefFrame &C3Node = ...Trunk.SegmentsCervicalSpine.C3Seg.C4C3JntNode;
};


AnyKinRotational C3C2JntMus =
{
  Type = RotAxesAngles;
  AngVelOnOff = On;
  AnyRefFrame &C3Node = ...Trunk.SegmentsCervicalSpine.C3Seg.C3C2JntNode;
  AnyRefFrame &C2Node = ...Trunk.SegmentsCervicalSpine.C2Seg.C3C2JntNode;
};


AnyKinRotational C2C1JntMus =
{
  Type = RotAxesAngles;
  AngVelOnOff = On;
  AnyRefFrame &C2Node = ...Trunk.SegmentsCervicalSpine.C2Seg.C2C1JntNode;
  AnyRefFrame &C1Node = ...Trunk.SegmentsCervicalSpine.C1Seg.C2C1JntNode;
};


AnyKinRotational C1C0JntMus =
{
  Type = RotAxesAngles;
  AngVelOnOff = On;
  AnyRefFrame &C1Node = ...Trunk.SegmentsCervicalSpine.C1Seg.C1C0JntNode;
  AnyRefFrame &C0Node = ...Trunk.SegmentsThorax.SkullSeg.C1C0JntNode;
};


// End of rotational measures used for joint nuscles


AnyKinMeasureOrg PelvisPosX ={
  AnyKinLinear lin ={
    AnySeg &ref2 =....Trunk.SegmentsLumbar.PelvisSeg;
  };
  MeasureOrganizer={0};
};
AnyKinMeasureOrg PelvisPosY ={
  AnyKinLinear &ref=.PelvisPosX.lin;
  MeasureOrganizer={1};
};
AnyKinMeasureOrg PelvisPosZ ={
  AnyKinLinear &ref=.PelvisPosX.lin;
  MeasureOrganizer={2};
};


AnyKinMeasureOrg PelvisRotX ={
  AnyKinRotational rot ={
    AnySeg &ref2 =....Trunk.SegmentsLumbar.PelvisSeg;
    Type=RotAxesAngles;
  };
  MeasureOrganizer={2};
};
AnyKinMeasureOrg PelvisRotY ={
  AnyKinRotational &ref=.PelvisRotX.rot;
  MeasureOrganizer={1};
};
AnyKinMeasureOrg PelvisRotZ ={
  AnyKinRotational &ref=.PelvisRotX.rot;
  MeasureOrganizer={0};
};


AnyKinMeasureOrg  PelvisThoraxExtension={
  AnyKinRotational &ref=...Trunk.JointsLumbar.PelvisThoraxRotMeasure;
  MeasureOrganizer={2};
};

AnyKinMeasureOrg  PelvisThoraxLateralBending={
  AnyKinRotational &ref=...Trunk.JointsLumbar.PelvisThoraxRotMeasure;
  MeasureOrganizer={0};
};

AnyKinMeasureOrg  PelvisThoraxRotation={
  AnyKinRotational &ref=...Trunk.JointsLumbar.PelvisThoraxRotMeasure;
  MeasureOrganizer={1};
};


AnyKinMeasureOrg &SkullThoraxFlexion = ..Trunk.JointsCervicalSpine.Flexion.SkullThoraxFlexion;

AnyKinMeasureOrg &SkullThoraxLateralBending = ..Trunk.JointsCervicalSpine.LateralBending.SkullThoraxLateralBending;

AnyKinMeasureOrg &SkullThoraxRotation = ..Trunk.JointsCervicalSpine.Rotation.SkullThoraxRotation;

AnyJoint &NeckJoint = ..Trunk.JointsCervicalSpine.T1C7Jnt;
//AnyJoint &NeckJoint = ..Trunk.JointsLumbar.T1C7Jnt;

//Make references to contact points on the spine
AnyRefNode & Tuber_ischiadicum1RContactNode= ..Trunk.SegmentsLumbar.PelvisSeg.Tuber_ischiadicum1RContactNode;
AnyRefNode & Tuber_ischiadicum2RContactNode= ..Trunk.SegmentsLumbar.PelvisSeg.Tuber_ischiadicum2RContactNode;
AnyRefNode & Tuber_ischiadicum3RContactNode= ..Trunk.SegmentsLumbar.PelvisSeg.Tuber_ischiadicum3RContactNode;
AnyRefNode & Tuber_ischiadicum4RContactNode= ..Trunk.SegmentsLumbar.PelvisSeg.Tuber_ischiadicum4RContactNode;
AnyRefNode & Tuber_ischiadicum1LContactNode= ..Trunk.SegmentsLumbar.PelvisSeg.Tuber_ischiadicum1LContactNode;
AnyRefNode & Tuber_ischiadicum2LContactNode= ..Trunk.SegmentsLumbar.PelvisSeg.Tuber_ischiadicum2LContactNode;
AnyRefNode & Tuber_ischiadicum3LContactNode= ..Trunk.SegmentsLumbar.PelvisSeg.Tuber_ischiadicum3LContactNode;
AnyRefNode & Tuber_ischiadicum4LContactNode= ..Trunk.SegmentsLumbar.PelvisSeg.Tuber_ischiadicum4LContactNode;
AnyRefNode & SacrumContactNode = ..Trunk.SegmentsLumbar.SacrumSeg.SacrumContactNode;
