/// Definition of the cervical spine
AnyFolder SegmentsCervicalSpine = {


  AnySeg C1Seg = {

        r0= .C2Seg.C2C1JntNode.sRel*.C2Seg.Axes0'+.C2Seg.r0-C2C1JntNode.sRel*Axes0';


    AnyFunTransform3D &Scale =..ScalingTrunk.Cervical.ScaleFunction;


    AnyVar MassS = ..Scaling.MassScaling.Cervical.MassScale;

    AnyVar MassStandard = ..StandardParameters.CervicalSpine.Mass*0.135;

    Mass = MassS*MassStandard;
    Jii = {0.00022,0.00042,0.00022};

    sCoM = Scale({0.026-0.008,0.573,0.0});
      JaboutCoMOnOff = On;
    AnyRefNode C2C1JntNode = {sRel = .Scale({0.035,0.574,0.0});};

    AnyRefNode C1C0JntNode = {
      sRel = .Scale({0.025,0.596,0.0});
      AnyDrawNodes DrwNode = {
        ScaleXYZ = {0.003,0.003,0.003};
        RGB = {1, 0, 0};
      };
    };

    //Longus colli nodes
    AnyRefNode LongusColliT1C1NodeR = {sRel = .Scale({0.042,0.574,0.008});};
    AnyRefNode LongusColliT1C1NodeL = {sRel = {.LongusColliT1C1NodeR.sRel[0],.LongusColliT1C1NodeR.sRel[1],.LongusColliT1C1NodeR.sRel[2]*-1};};

    //Splenius cervicis nodes
    AnyRefNode SpleniusCervicisT3C1NodeR = {sRel = .Scale({0.019,0.573,0.039});};
    AnyRefNode SpleniusCervicisT3C1NodeL = {sRel = {.SpleniusCervicisT3C1NodeR.sRel[0],.SpleniusCervicisT3C1NodeR.sRel[1],.SpleniusCervicisT3C1NodeR.sRel[2]*-1};};

    AnyDrawSurf DrwSTL = {
      FileName = "..\Trunk\BonesSpine\C1Seg";
      RGB = {0,1,0};//...ColorRef.Segments;
      Opacity = Main.DrawSettings.BonesOpacity.C1;
      AnyFunTransform3D &Scale =.Scale;
    };
    AnyRefNode Right ={};
AnyRefNode Left ={};

  };

  AnySeg C2Seg = {

    r0= .C3Seg.C3C2JntNode.sRel*.C3Seg.Axes0'+.C3Seg.r0-C3C2JntNode.sRel*Axes0';

    AnyFunTransform3D &Scale =..ScalingTrunk.Cervical.ScaleFunction;

    AnyVar MassS = ..Scaling.MassScaling.Cervical.MassScale;

    AnyVar MassStandard = ..StandardParameters.CervicalSpine.Mass*0.153;

    Mass = MassS*MassStandard;
    Jii = {0.00025,0.00048,0.00025};

    sCoM = Scale({0.034-0.008,0.561,0.0});
      JaboutCoMOnOff = On;
    AnyRefNode C3C2JntNode = {sRel = .Scale({0.031,0.543,0.0});};

    AnyRefNode C2C1JntNode = {
      sRel = .Scale({0.035,0.574,0.0});
      AnyDrawNodes DrwNode = {
        ScaleXYZ = {0.003,0.003,0.003};
        RGB = {1, 0, 0};
      };
    };

    //Longus colli nodes
    AnyRefNode LongusColliT1C2NodeR = {sRel = .Scale({0.042,0.561,0.008});};
    AnyRefNode LongusColliT1C2NodeL = {sRel = {.LongusColliT1C2NodeR.sRel[0],.LongusColliT1C2NodeR.sRel[1],.LongusColliT1C2NodeR.sRel[2]*-1};};

    //Splenius cervicis nodes
    AnyRefNode SpleniusCervicisT3C2NodeR = {sRel = .Scale({0.022,0.558,0.026});};
    AnyRefNode SpleniusCervicisT3C2NodeL = {sRel = {.SpleniusCervicisT3C2NodeR.sRel[0],.SpleniusCervicisT3C2NodeR.sRel[1],.SpleniusCervicisT3C2NodeR.sRel[2]*-1};};

    //Semispinalis cervicis nodes
    AnyRefNode SemispinalisCervicisT1C2NodeR = {sRel = .Scale({-0.010,0.544,0.0});};
    AnyRefNode SemispinalisCervicisT1C2NodeL = {sRel = {.SemispinalisCervicisT1C2NodeR.sRel[0],.SemispinalisCervicisT1C2NodeR.sRel[1],.SemispinalisCervicisT1C2NodeR.sRel[2]*-1};};

    //Longissimus cervicis nodes
    AnyRefNode LongissimusCervicisT2C2NodeR = {sRel = .Scale({0.022,0.558,0.026});};
    AnyRefNode LongissimusCervicisT2C2NodeL = {sRel = {.LongissimusCervicisT2C2NodeR.sRel[0],.LongissimusCervicisT2C2NodeR.sRel[1],.LongissimusCervicisT2C2NodeR.sRel[2]*-1};};

    //Multifidus cervicis nodes
    AnyRefNode MultifidusCervicisC2NodeR = {sRel = .Scale({-0.010,0.544,0.0});};
    AnyRefNode MultifidusCervicisC2NodeL = {sRel = {.MultifidusCervicisC2NodeR.sRel[0],.MultifidusCervicisC2NodeR.sRel[1],.MultifidusCervicisC2NodeR.sRel[2]*-1};};

    AnyDrawSurf DrwSTL = {
      FileName = "..\Trunk\BonesSpine\C2Seg";
      RGB = ...ColorRef.Segments;
      Opacity = Main.DrawSettings.BonesOpacity.C2;
      AnyFunTransform3D &Scale =.Scale;
    };
        AnyRefNode Right ={};
AnyRefNode Left ={};
  };


  AnySeg C3Seg = {

    r0= .C4Seg.C4C3JntNode.sRel*.C4Seg.Axes0'+.C4Seg.r0-C4C3JntNode.sRel*Axes0';

    AnyFunTransform3D &Scale =..ScalingTrunk.Cervical.ScaleFunction;

    AnyVar MassS = ..Scaling.MassScaling.Cervical.MassScale;

    AnyVar MassStandard = ..StandardParameters.CervicalSpine.Mass*0.147;

    Mass = MassS*MassStandard;
    Jii = {0.00024,0.00046,0.00024};

    sCoM = Scale({0.034-0.008,0.543,0.0});
      JaboutCoMOnOff = On;
    AnyRefNode C4C3JntNode = {sRel = .Scale({0.030,0.529,0.0});};

    AnyRefNode C3C2JntNode = {
      sRel = .Scale({0.031,0.543,0.0});
      AnyDrawNodes DrwNode = {
        ScaleXYZ = {0.003,0.003,0.003};
        RGB = {1, 0, 0};
      };
    };

    //Longus colli nodes
    AnyRefNode LongusColliT1C3NodeR = {sRel = .Scale({0.043,0.542,0.008});};
    AnyRefNode LongusColliT1C3NodeL = {sRel = {.LongusColliT1C3NodeR.sRel[0],.LongusColliT1C3NodeR.sRel[1],.LongusColliT1C3NodeR.sRel[2]*-1};};

    //Longus cappitis nodes
    AnyRefNode LongusCapitisC3C0NodeR = {sRel = .Scale({0.032,0.545,0.020});};
    AnyRefNode LongusCapitisC3C0NodeL = {sRel = {.LongusCapitisC3C0NodeR.sRel[0],.LongusCapitisC3C0NodeR.sRel[1],.LongusCapitisC3C0NodeR.sRel[2]*-1};};

    //Scalenus medius nodes
    AnyRefNode ScalenusMediusT1C3NodeR = {sRel = .Scale({0.024,0.540,0.024});};
    AnyRefNode ScalenusMediusT1C3NodeL = {sRel = {.ScalenusMediusT1C3NodeR.sRel[0],.ScalenusMediusT1C3NodeR.sRel[1],.ScalenusMediusT1C3NodeR.sRel[2]*-1};};

    //Splenius cervicis nodes
    AnyRefNode SpleniusCervicisT3C3NodeR = {sRel = .Scale({0.023,0.542,0.026});};
    AnyRefNode SpleniusCervicisT3C3NodeL = {sRel = {.SpleniusCervicisT3C3NodeR.sRel[0],.SpleniusCervicisT3C3NodeR.sRel[1],.SpleniusCervicisT3C3NodeR.sRel[2]*-1};};

    //Semispinalis cervicis nodes
    AnyRefNode SemispinalisCervicisT2C3NodeR = {sRel = .Scale({-0.011,0.531,0.0});};
    AnyRefNode SemispinalisCervicisT2C3NodeL = {sRel = {.SemispinalisCervicisT2C3NodeR.sRel[0],.SemispinalisCervicisT2C3NodeR.sRel[1],.SemispinalisCervicisT2C3NodeR.sRel[2]*-1};};

    //Longissimus capitis nodes
    AnyRefNode LongissimusCapitisC3C0NodeR = {sRel = .Scale({0.023,0.542,0.026});};
    AnyRefNode LongissimusCapitisC3C0NodeL = {sRel = {.LongissimusCapitisC3C0NodeR.sRel[0],.LongissimusCapitisC3C0NodeR.sRel[1],.LongissimusCapitisC3C0NodeR.sRel[2]*-1};};

    //Longissimus cervicis nodes
    AnyRefNode LongissimusCervicisT2C3NodeR = {sRel = .Scale({0.023,0.542,0.026});};
    AnyRefNode LongissimusCervicisT2C3NodeL = {sRel = {.LongissimusCervicisT2C3NodeR.sRel[0],.LongissimusCervicisT2C3NodeR.sRel[1],.LongissimusCervicisT2C3NodeR.sRel[2]*-1};};

    //Multifidus cervicis nodes
    AnyRefNode MultifidusCervicisC3NodeR = {sRel = .Scale({-0.011,0.531,0.0});};
    AnyRefNode MultifidusCervicisC3NodeL = {sRel = {.MultifidusCervicisC3NodeR.sRel[0],.MultifidusCervicisC3NodeR.sRel[1],.MultifidusCervicisC3NodeR.sRel[2]*-1};};

    AnyDrawSurf DrwSTL = {
      FileName = "..\Trunk\BonesSpine\C3Seg";
      RGB = ...ColorRef.Segments;
      Opacity = Main.DrawSettings.BonesOpacity.C3;
      AnyFunTransform3D &Scale =.Scale;
    };
        AnyRefNode Right ={};
AnyRefNode Left ={};
  };

  AnySeg C4Seg = {

    r0= .C5Seg.C5C4JntNode.sRel*.C5Seg.Axes0'+.C5Seg.r0-C5C4JntNode.sRel*Axes0';


    AnyFunTransform3D &Scale =..ScalingTrunk.Cervical.ScaleFunction;

    AnyVar MassS = ..Scaling.MassScaling.Cervical.MassScale;

    AnyVar MassStandard = ..StandardParameters.CervicalSpine.Mass*0.141;

    Mass = MassS*MassStandard;
    Jii = {0.00023,0.00044,0.00023};

    sCoM = Scale({0.033-0.008,0.526,0.0});
      JaboutCoMOnOff = On;
    AnyRefNode C5C4JntNode = {sRel = .Scale({0.029,0.511,0.0});};

    AnyRefNode C4C3JntNode = {
      sRel = .Scale({0.030,0.529,0.0});
      AnyDrawNodes DrwNode = {
        ScaleXYZ = {0.003,0.003,0.003};
        RGB = {1, 0, 0};
      };
    };

    //Longus colli nodes
    AnyRefNode LongusColliT1C4NodeR = {sRel = .Scale({0.042,0.525,0.008});};
    AnyRefNode LongusColliT1C4NodeL = {sRel = {.LongusColliT1C4NodeR.sRel[0],.LongusColliT1C4NodeR.sRel[1],.LongusColliT1C4NodeR.sRel[2]*-1};};

    //Longus cappitis nodes
    AnyRefNode LongusCapitisC4C0NodeR = {sRel = .Scale({0.030,0.528,0.021});};
    AnyRefNode LongusCapitisC4C0NodeL = {sRel = {.LongusCapitisC4C0NodeR.sRel[0],.LongusCapitisC4C0NodeR.sRel[1],.LongusCapitisC4C0NodeR.sRel[2]*-1};};

    //Scalenus anterior nodes
    AnyRefNode ScalenusAnteriorT1C4NodeR = {sRel = .Scale({0.022,0.526,0.026});};
    AnyRefNode ScalenusAnteriorT1C4NodeL = {sRel = {.ScalenusAnteriorT1C4NodeR.sRel[0],.ScalenusAnteriorT1C4NodeR.sRel[1],.ScalenusAnteriorT1C4NodeR.sRel[2]*-1};};

    //Semispinalis capitis nodes
    AnyRefNode SemispinalisCapitisC4C0NodeR = {sRel = .Scale({0.022,0.526,0.026});};
    AnyRefNode SemispinalisCapitisC4C0NodeL = {sRel = {.SemispinalisCapitisC4C0NodeR.sRel[0],.SemispinalisCapitisC4C0NodeR.sRel[1],.SemispinalisCapitisC4C0NodeR.sRel[2]*-1};};

    //Semispinalis cervicis nodes
    AnyRefNode SemispinalisCervicisT3C4NodeR = {sRel = .Scale({-0.014,0.521,0.0});};
    AnyRefNode SemispinalisCervicisT3C4NodeL = {sRel = {.SemispinalisCervicisT3C4NodeR.sRel[0],.SemispinalisCervicisT3C4NodeR.sRel[1],.SemispinalisCervicisT3C4NodeR.sRel[2]*-1};};

    //Longissimus capitis nodes
    AnyRefNode LongissimusCapitisC4C0NodeR = {sRel = .Scale({0.022,0.526,0.026});};
    AnyRefNode LongissimusCapitisC4C0NodeL = {sRel = {.LongissimusCapitisC4C0NodeR.sRel[0],.LongissimusCapitisC4C0NodeR.sRel[1],.LongissimusCapitisC4C0NodeR.sRel[2]*-1};};

    //Longissimus cervicis nodes
    AnyRefNode LongissimusCervicisT2C4NodeR = {sRel = .Scale({0.022,0.526,0.026});};
    AnyRefNode LongissimusCervicisT2C4NodeL = {sRel = {.LongissimusCervicisT2C4NodeR.sRel[0],.LongissimusCervicisT2C4NodeR.sRel[1],.LongissimusCervicisT2C4NodeR.sRel[2]*-1};};

    //Multifidus cervicis nodes
    AnyRefNode MultifidusCervicisC4NodeR = {sRel = .Scale({-0.014,0.521,0.0});};
    AnyRefNode MultifidusCervicisC4NodeL = {sRel = {.MultifidusCervicisC4NodeR.sRel[0],.MultifidusCervicisC4NodeR.sRel[1],.MultifidusCervicisC4NodeR.sRel[2]*-1};};

    AnyDrawSurf DrwSTL = {
      FileName = "..\Trunk\BonesSpine\C4Seg";
      RGB = ...ColorRef.Segments;
      Opacity = Main.DrawSettings.BonesOpacity.C4;
      AnyFunTransform3D &Scale =.Scale;
    };
        AnyRefNode Right ={};
AnyRefNode Left ={};
  };

  AnySeg C5Seg = {

        r0= .C6Seg.C6C5JntNode.sRel*.C6Seg.Axes0'+.C6Seg.r0-C6C5JntNode.sRel*Axes0';


    AnyFunTransform3D &Scale =..ScalingTrunk.Cervical.ScaleFunction;

    AnyVar MassS = ..Scaling.MassScaling.Cervical.MassScale;

    AnyVar MassStandard = ..StandardParameters.CervicalSpine.Mass*0.141;

    Mass = MassS*MassStandard;
    Jii = {0.00023,0.00045,0.00023};

    sCoM = Scale({0.030-0.008,0.508,0.0});
      JaboutCoMOnOff = On;
    AnyRefNode C6C5JntNode = {sRel = .Scale({0.026,0.495,0.0});};

    AnyRefNode C5C4JntNode = {
      sRel = .Scale({0.029,0.511,0.0});
      AnyDrawNodes DrwNode = {
        ScaleXYZ = {0.003,0.003,0.003};
        RGB = {1, 0, 0};
      };
    };

    //Longus colli nodes
    AnyRefNode LongusColliT1C5NodeR = {sRel = .Scale({0.039,0.506,0.008});};
    AnyRefNode LongusColliT1C5NodeL = {sRel = {.LongusColliT1C5NodeR.sRel[0],.LongusColliT1C5NodeR.sRel[1],.LongusColliT1C5NodeR.sRel[2]*-1};};

    //Longus cappitis nodes
    AnyRefNode LongusCapitisC5C0NodeR = {sRel = .Scale({0.026,0.510,0.025});};
    AnyRefNode LongusCapitisC5C0NodeL = {sRel = {.LongusCapitisC5C0NodeR.sRel[0],.LongusCapitisC5C0NodeR.sRel[1],.LongusCapitisC5C0NodeR.sRel[2]*-1};};

    //Scalenus Posterior nodes
    AnyRefNode ScalenusPosteriorT1C5NodeR = {sRel = .Scale({0.020,0.510,0.028});};
    AnyRefNode ScalenusPosteriorT1C5NodeL = {sRel = {.ScalenusPosteriorT1C5NodeR.sRel[0],.ScalenusPosteriorT1C5NodeR.sRel[1],.ScalenusPosteriorT1C5NodeR.sRel[2]*-1};};

    //Semispinalis capitis nodes
    AnyRefNode SemispinalisCapitisC5C0NodeR = {sRel = .Scale({0.020,0.510,0.028});};
    AnyRefNode SemispinalisCapitisC5C0NodeL = {sRel = {.SemispinalisCapitisC5C0NodeR.sRel[0],.SemispinalisCapitisC5C0NodeR.sRel[1],.SemispinalisCapitisC5C0NodeR.sRel[2]*-1};};

    //Semispinalis cervicis nodes
    AnyRefNode SemispinalisCervicisT4C5NodeR = {sRel = .Scale({-0.022,0.511,0.0});};
    AnyRefNode SemispinalisCervicisT4C5NodeL = {sRel = {.SemispinalisCervicisT4C5NodeR.sRel[0],.SemispinalisCervicisT4C5NodeR.sRel[1],.SemispinalisCervicisT4C5NodeR.sRel[2]*-1};};

    //Longissimus capitis nodes
    AnyRefNode LongissimusCapitisC5C0NodeR = {sRel = .Scale({0.020,0.510,0.028});};
    AnyRefNode LongissimusCapitisC5C0NodeL = {sRel = {.LongissimusCapitisC5C0NodeR.sRel[0],.LongissimusCapitisC5C0NodeR.sRel[1],.LongissimusCapitisC5C0NodeR.sRel[2]*-1};};

    //Longissimus cervicis nodes
    AnyRefNode LongissimusCervicisT2C5NodeR = {sRel = .Scale({0.020,0.510,0.028});};
    AnyRefNode LongissimusCervicisT2C5NodeL = {sRel = {.LongissimusCervicisT2C5NodeR.sRel[0],.LongissimusCervicisT2C5NodeR.sRel[1],.LongissimusCervicisT2C5NodeR.sRel[2]*-1};};

    //Multifidus cervicis nodes
    AnyRefNode MultifidusCervicisC5C2NodeR = {sRel = .Scale({0.020,0.510,0.028});};
    AnyRefNode MultifidusCervicisC5C2NodeL = {sRel = {.MultifidusCervicisC5C2NodeR.sRel[0],.MultifidusCervicisC5C2NodeR.sRel[1],.MultifidusCervicisC5C2NodeR.sRel[2]*-1};};

    AnyRefNode MultifidusCervicisC5NodeR = {sRel = .Scale({-0.022,0.511,0.0});};
    AnyRefNode MultifidusCervicisC5NodeL = {sRel = {.MultifidusCervicisC5NodeR.sRel[0],.MultifidusCervicisC5NodeR.sRel[1],.MultifidusCervicisC5NodeR.sRel[2]*-1};};

    AnyDrawSurf DrwSTL = {
      FileName = "..\Trunk\BonesSpine\C5Seg";
      RGB = ...ColorRef.Segments;
      Opacity = Main.DrawSettings.BonesOpacity.C5;
      AnyFunTransform3D &Scale =.Scale;
    };
        AnyRefNode Right ={};
AnyRefNode Left ={};
  };

  AnySeg C6Seg = {


    r0= .C7Seg.C7C6JntNode.sRel*.C7Seg.Axes0'+.C7Seg.r0-C7C6JntNode.sRel*Axes0';


    AnyFunTransform3D &Scale =..ScalingTrunk.Cervical.ScaleFunction;

    AnyVar MassS = ..Scaling.MassScaling.Cervical.MassScale;

    AnyVar MassStandard = ..StandardParameters.CervicalSpine.Mass*0.147;

    Mass = MassS*MassStandard;
    Jii = {0.00024,0.00047,0.00024};

    sCoM = Scale({0.026-0.008,0.490,0.0});
      JaboutCoMOnOff = On;
    AnyRefNode C7C6JntNode = {sRel = .Scale({0.019,0.479,0.0});};

    AnyRefNode C6C5JntNode = {
      sRel = .Scale({0.026,0.495,0.0});
      AnyDrawNodes DrwNode = {
        ScaleXYZ = {0.003,0.003,0.003};
        RGB = {1, 0, 0};
      };
    };


    //Longus colli nodes
    AnyRefNode LongusColliT1C6NodeR = {sRel = .Scale({0.035,0.486,0.008});};
    AnyRefNode LongusColliT1C6NodeL = {sRel = {.LongusColliT1C6NodeR.sRel[0],.LongusColliT1C6NodeR.sRel[1],.LongusColliT1C6NodeR.sRel[2]*-1};};

    //Longus cappitis nodes
    AnyRefNode LongusCapitisC6C0NodeR = {sRel = .Scale({0.022,0.493,0.026});};
    AnyRefNode LongusCapitisC6C0NodeL = {sRel = {.LongusCapitisC6C0NodeR.sRel[0],.LongusCapitisC6C0NodeR.sRel[1],.LongusCapitisC6C0NodeR.sRel[2]*-1};};

    //Semispinalis capitis nodes
    AnyRefNode SemispinalisCapitisC6C0NodeR = {sRel = .Scale({0.018,0.498,0.032});};
    AnyRefNode SemispinalisCapitisC6C0NodeL = {sRel = {.SemispinalisCapitisC6C0NodeR.sRel[0],.SemispinalisCapitisC6C0NodeR.sRel[1],.SemispinalisCapitisC6C0NodeR.sRel[2]*-1};};

    //Semispinalis cervicis nodes
    AnyRefNode SemispinalisCervicisT5C6NodeR = {sRel = .Scale({-0.027,0.495,0.0});};
    AnyRefNode SemispinalisCervicisT5C6NodeL = {sRel = {.SemispinalisCervicisT5C6NodeR.sRel[0],.SemispinalisCervicisT5C6NodeR.sRel[1],.SemispinalisCervicisT5C6NodeR.sRel[2]*-1};};

    //Longissimus capitis nodes
    AnyRefNode LongissimusCapitisC6C0NodeR = {sRel = .Scale({0.018,0.498,0.032});};
    AnyRefNode LongissimusCapitisC6C0NodeL = {sRel = {.LongissimusCapitisC6C0NodeR.sRel[0],.LongissimusCapitisC6C0NodeR.sRel[1],.LongissimusCapitisC6C0NodeR.sRel[2]*-1};};

    //Longissimus cervicis nodes
    AnyRefNode LongissimusCervicisT2C6NodeR = {sRel = .Scale({0.018,0.498,0.032});};
    AnyRefNode LongissimusCervicisT2C6NodeL = {sRel = {.LongissimusCervicisT2C6NodeR.sRel[0],.LongissimusCervicisT2C6NodeR.sRel[1],.LongissimusCervicisT2C6NodeR.sRel[2]*-1};};

    //Multifidus cervicis nodes
    AnyRefNode MultifidusCervicisC6C2NodeR = {sRel = .Scale({0.018,0.498,0.032});};
    AnyRefNode MultifidusCervicisC6C2NodeL = {sRel = {.MultifidusCervicisC6C2NodeR.sRel[0],.MultifidusCervicisC6C2NodeR.sRel[1],.MultifidusCervicisC6C2NodeR.sRel[2]*-1};};

    AnyRefNode MultifidusCervicisC6C3NodeR = {sRel = .Scale({0.018,0.498,0.032});};
    AnyRefNode MultifidusCervicisC6C3NodeL = {sRel = {.MultifidusCervicisC6C3NodeR.sRel[0],.MultifidusCervicisC6C3NodeR.sRel[1],.MultifidusCervicisC6C3NodeR.sRel[2]*-1};};

    AnyRefNode MultifidusCervicisC6NodeR = {sRel = .Scale({-0.027,0.495,0.0});};
    AnyRefNode MultifidusCervicisC6NodeL = {sRel = {.MultifidusCervicisC6NodeR.sRel[0],.MultifidusCervicisC6NodeR.sRel[1],.MultifidusCervicisC6NodeR.sRel[2]*-1};};

    AnyDrawSurf DrwSTL = {
      FileName = "..\Trunk\BonesSpine\C6Seg";
      RGB = ...ColorRef.Segments;
      Opacity = Main.DrawSettings.BonesOpacity.C6;
      AnyFunTransform3D &Scale =.Scale;
    };
        AnyRefNode Right ={};
AnyRefNode Left ={};
  };

  AnySeg C7Seg = {

     r0= ..SegmentsThorax.ThoraxSeg.T1C7JntNode.sRel*..SegmentsThorax.ThoraxSeg.Axes0'+..SegmentsThorax.ThoraxSeg.r0-T1C7JntNode.sRel*Axes0';

    AnyFunTransform3D &Scale =..ScalingTrunk.Cervical.ScaleFunction;

    AnyVar MassS = ..Scaling.MassScaling.Cervical.MassScale;

    AnyVar MassStandard = ..StandardParameters.CervicalSpine.Mass*0.135;

    Mass = MassS*MassStandard;
    Jii = {0.00022,0.00043,0.00022};

    sCoM = Scale({0.018-0.008,0.471,0.0});
      JaboutCoMOnOff = On;
    AnyRefNode T1C7JntNode = {sRel = .Scale({0.011,0.461,0.0});};

    AnyRefNode C7C6JntNode = {
      sRel = .Scale({0.019,0.479,0.0});
      AnyDrawNodes DrwNode = {
        ScaleXYZ = {0.003,0.003,0.003};
        RGB = {1, 0, 0};
      };
    };

    //Splenius capitis nodes
    AnyRefNode SpleniusCapitisC7C0NodeR = {sRel = .Scale({-0.035,0.472,0.0});};
    AnyRefNode SpleniusCapitisC7C0NodeL = {sRel = {.SpleniusCapitisC7C0NodeR.sRel[0],.SpleniusCapitisC7C0NodeR.sRel[1],.SpleniusCapitisC7C0NodeR.sRel[2]*-1};};

    //Semispinalis capitis nodes
    AnyRefNode SemispinalisCapitisC7C0NodeR = {sRel = .Scale({-0.013,0.495,0.032});};
    AnyRefNode SemispinalisCapitisC7C0NodeL = {sRel = {.SemispinalisCapitisC7C0NodeR.sRel[0],.SemispinalisCapitisC7C0NodeR.sRel[1],.SemispinalisCapitisC7C0NodeR.sRel[2]*-1};};

    //Semispinalis cervicis nodes
    AnyRefNode SemispinalisCervicisT6C7NodeR = {sRel = .Scale({-0.033,0.470,0.0});};
    AnyRefNode SemispinalisCervicisT6C7NodeL = {sRel = {.SemispinalisCervicisT6C7NodeR.sRel[0],.SemispinalisCervicisT6C7NodeR.sRel[1],.SemispinalisCervicisT6C7NodeR.sRel[2]*-1};};

    //Longissimus capitis nodes
    AnyRefNode LongissimusCapitisC7C0NodeR = {sRel = .Scale({-0.005,0.495,0.032});};
    AnyRefNode LongissimusCapitisC7C0NodeL = {sRel = {.LongissimusCapitisC7C0NodeR.sRel[0],.LongissimusCapitisC7C0NodeR.sRel[1],.LongissimusCapitisC7C0NodeR.sRel[2]*-1};};

    //Longissimus cervicis nodes
    AnyRefNode LongissimusCervicisT2C7NodeR = {sRel = .Scale({-0.005,0.495,0.032});};
    AnyRefNode LongissimusCervicisT2C7NodeL = {sRel = {.LongissimusCervicisT2C7NodeR.sRel[0],.LongissimusCervicisT2C7NodeR.sRel[1],.LongissimusCervicisT2C7NodeR.sRel[2]*-1};};

    //Multifidus cervicis nodes
    AnyRefNode MultifidusCervicisC7C3NodeR = {sRel = .Scale({-0.005,0.495,0.032});};
    AnyRefNode MultifidusCervicisC7C3NodeL = {sRel = {.MultifidusCervicisC7C3NodeR.sRel[0],.MultifidusCervicisC7C3NodeR.sRel[1],.MultifidusCervicisC7C3NodeR.sRel[2]*-1};};

    AnyRefNode MultifidusCervicisC7C4NodeR = {sRel = .Scale({-0.005,0.495,0.032});};
    AnyRefNode MultifidusCervicisC7C4NodeL = {sRel = {.MultifidusCervicisC7C4NodeR.sRel[0],.MultifidusCervicisC7C4NodeR.sRel[1],.MultifidusCervicisC7C4NodeR.sRel[2]*-1};};

    AnyRefNode MultifidusCervicisC7NodeR = {sRel = .Scale({-0.033,0.470,0.0});};
    AnyRefNode MultifidusCervicisC7NodeL = {sRel = {.MultifidusCervicisC7NodeR.sRel[0],.MultifidusCervicisC7NodeR.sRel[1],.MultifidusCervicisC7NodeR.sRel[2]*-1};};

    AnyDrawSurf DrwSTL = {
      FileName = "..\Trunk\BonesSpine\C7Seg";
      RGB = ...ColorRef.Segments;
      Opacity = Main.DrawSettings.BonesOpacity.C7;
      AnyFunTransform3D &Scale =.Scale;
    };
        AnyRefNode Right ={};
AnyRefNode Left ={};
  };


};
