AnyFolder Scaling = {

  //Scaling parameters for muscle strength
  AnyFolder MassScaling = {

    AnyFolder Skull = { AnyVar MassScale = 1.0; };
    AnyFolder Mandible = { AnyVar MassScale = 1.0; };
  };

  AnyFolder StrengthScaling = {

    AnyVar p = (2/3); //Power
    AnyFolder Mandible = { AnyVar StrengthScale = 1.0^.p; };

  };

  AnyFolder FiberLengthScaling = {

    AnyFolder Mandible = { AnyVar FiberLengthScale = 1.0; };

  };

  AnyFolder GeometricalScaling = {

    AnyFolder Skull  = {
      AnyFunTransform3DIdentity ScaleFunction = {};
    };

    AnyFolder Mandible = {
      AnyFunTransform3DIdentity ScaleFunction = {};
    };

  };

};
