/*
This include file contains the coordinates of the muscles on the mandible.
*/

AnyRefNode SuperficialMasseterNodeR = {sRel = .Scale({19.0,-49.0,-49.0}/1000);};
AnyRefNode SuperficialMasseterNodeL = {sRel = {.SuperficialMasseterNodeR.sRel[0],-.SuperficialMasseterNodeR.sRel[1],.SuperficialMasseterNodeR.sRel[2]};};

AnyRefNode DeepAnteriorMasseterNodeR = {sRel = .Scale({19.0,-47.0,-37.0}/1000);};
AnyRefNode DeepAnteriorMasseterNodeL = {sRel = {.DeepAnteriorMasseterNodeR.sRel[0],-.DeepAnteriorMasseterNodeR.sRel[1],.DeepAnteriorMasseterNodeR.sRel[2]};};

AnyRefNode DeepPosteriorMasseterNodeR = {sRel = .Scale({8.0,-50.0,-37.0}/1000);};
AnyRefNode DeepPosteriorMasseterNodeL = {sRel = {.DeepPosteriorMasseterNodeR.sRel[0],-.DeepPosteriorMasseterNodeR.sRel[1],.DeepPosteriorMasseterNodeR.sRel[2]};};

AnyRefNode AnteriorTemporalisNodeR = {sRel = .Scale({36.0,-42.0,-6.0}/1000);};
AnyRefNode AnteriorTemporalisNodeL = {sRel = {.AnteriorTemporalisNodeR.sRel[0],-.AnteriorTemporalisNodeR.sRel[1],.AnteriorTemporalisNodeR.sRel[2]-..RamusS};};

AnyRefNode PosteriorTemporalisNodeR = {sRel = .Scale({36.0,-42.0,-6.0}/1000);};
AnyRefNode PosteriorTemporalisNodeL = {sRel = {.PosteriorTemporalisNodeR.sRel[0],-.PosteriorTemporalisNodeR.sRel[1],.PosteriorTemporalisNodeR.sRel[2]-..RamusS};};

AnyRefNode MedialPterygoidNodeR = {sRel = .Scale({17.0,-39.0,-60.0}/1000);};
AnyRefNode MedialPterygoidNodeL = {sRel = {.MedialPterygoidNodeR.sRel[0],-.MedialPterygoidNodeR.sRel[1],.MedialPterygoidNodeR.sRel[2]};};

AnyRefNode SuperiorLateralPterygoidNodeR = {sRel = .Scale({5.0,-50.0+10,-3.0}/1000);};
AnyRefNode SuperiorLateralPterygoidNodeL = {sRel = {.SuperiorLateralPterygoidNodeR.sRel[0],-.SuperiorLateralPterygoidNodeR.sRel[1],.SuperiorLateralPterygoidNodeR.sRel[2]-..RamusS};};

AnyRefNode InferiorLateralPterygoidNodeR = {sRel = .Scale({7.0,-50.0+10,-5.0}/1000);};
AnyRefNode InferiorLateralPterygoidNodeL = {sRel = {.InferiorLateralPterygoidNodeR.sRel[0],-.InferiorLateralPterygoidNodeR.sRel[1],.InferiorLateralPterygoidNodeR.sRel[2]-..RamusS};};

AnyRefNode AnteriorDigastricNodeR = {sRel = .Scale({85.0,-7.0,-84.0}/1000);};
AnyRefNode AnteriorDigastricNodeL = {sRel = {.AnteriorDigastricNodeR.sRel[0],-.AnteriorDigastricNodeR.sRel[1],.AnteriorDigastricNodeR.sRel[2]};};

AnyRefNode GeniohyoidNodeR = {sRel = .Scale({85.0,-1.6,-79.0}/1000);};
AnyRefNode GeniohyoidNodeL = {sRel = {.GeniohyoidNodeR.sRel[0],-.GeniohyoidNodeR.sRel[1],.GeniohyoidNodeR.sRel[2]};};

AnyRefNode AnteriorMylohyoidNodeR = {sRel = .Scale({75.0,-15.8,-74.6}/1000);};
AnyRefNode AnteriorMylohyoidNodeL = {sRel = {.AnteriorMylohyoidNodeR.sRel[0],-.AnteriorMylohyoidNodeR.sRel[1],.AnteriorMylohyoidNodeR.sRel[2]};};

AnyRefNode PosteriorMylohyoidNodeR = {sRel = .Scale({49.0,-29.1,-53.9}/1000);};
AnyRefNode PosteriorMylohyoidNodeL = {sRel = {.PosteriorMylohyoidNodeR.sRel[0],-.PosteriorMylohyoidNodeR.sRel[1],.PosteriorMylohyoidNodeR.sRel[2]};};
