//Include all the markers in the model
AnyFolder Markers = {


  AnyFolder Scapula1 ={
    AnyString datafile="Scapula1.txt";
    #include "MarkerMover.any"
  };


  AnyFolder Scapula2={
    AnyString datafile="Scapula2.txt";
    #include "MarkerMover.any"
  };

  AnyFolder Scapula3={
    AnyString datafile="Scapula3.txt";
    #include "MarkerMover.any"
  };


  AnyFolder ShoulderJoint={
    AnyString datafile="ShoulderJoint.txt";
    #include "MarkerMover.any"
  };


  AnyFolder Humerus3={
    AnyString datafile="Humerus3.txt";
    #include "MarkerMover.any"
  };


  AnyFolder ElbowJoint={
    AnyString datafile="ElbowJoint.txt";
    #include "MarkerMover.any"
  };


  AnyFolder WristJoint={
    AnyString datafile="WristJoint.txt";
    #include "MarkerMover.any"
  };


  AnyFolder ProxPhalanx={
    AnyString datafile="ProxPhalanx.txt";
    #include "MarkerMover.any"
  };


  AnyFolder MidPhalanx={
    AnyString datafile="MidPhalanx.txt";
    #include "MarkerMover.any"
  };


  AnyFolder DistPhalanx={
    AnyString datafile="DistPhalanx.txt";
    #include "MarkerMover.any"
  };


}; // Markers
