//-------------------------------------
//  Arm
//-------------------------------------

      AnySeg Arm = {

       // r0 ={0,0,-0.179};                     // center of mass [m]
        Jii = {0.020,0.020,0.00021};          // princ. Jxx, Jyy, Jzz in loc. REF [kg*m^2]
        Mass=1.92;                               // segment's mass  [kg]


        AnyRefNode HumerusAttachment = {
          sRel = {-0.01,0.015,0.015};
          ARel = {{0,0,-1},{-1,0,0},{0,1,0}};
          // AnyDrawRefFrame DrwNode = { RGB = {1,0,0}; };
          AnyDrawSurf Drw = {
            ScaleXYZ={1,1,1};
            FileName = "humerus_right";
            RGB = {0.78,0.78,0.40};
          };

        };

          //AnyDrawSeg DrwSeg={};                 // draws the segment

        AnyRefNode Shoulder = {                 // shoulder node
          sRel = {0,0,0.179};
          //AnyDrawRefFrame DrwNode = { RGB = {1,0,0}; };
        };
        AnyRefNode Elbow = {                 // elbow node
          sRel = {0,0,-0.179};
          //AnyDrawRefFrame DrwNode = { RGB = {1,0,0}; };
        };

        AnyRefNode Coracobrachialis = {              // muscle's attachment nodes
          sRel = {0.002,0.05,-0.0036};
        };
        AnyRefNode TricepsLaterale = {
          sRel = {-0.021,-0.02,0.079};
        };
        AnyRefNode TricepsMediale = {
          sRel = {-0.03,-0.02,0.079};
        };
        AnyRefNode Anconeus = {
          sRel = {-0.041,-0.01,-0.20};
        };
        AnyRefNode PronatorTeres = {
          sRel = {-0.03,0.021,-0.148};
        };
        AnyRefNode Brachialis = {
          sRel = {0.003,0.035,0.02};
        };
        AnyRefNode Brachioradialis = {
          sRel = {0.01,0.025,-0.09};
        };
        AnyRefNode Deltoide = {
          sRel = {0.008,0.01,0.05};
        };
        AnyRefNode Infraspinatus = {
          sRel = {0.021,-0.02,0.16};
        };
        AnyRefNode LatissimusDorsiA = {
          sRel = {-0.001,-0.01,0.11};
        };
        AnyRefNode LatissimusDorsiB = {
          sRel = {0,-0.01,0.125};
        };
        AnyRefNode LatissimusDorsiC = {
          sRel = {0,-0.01,0.14};
        };
        AnyRefNode PectoralisMaiorA = {
          sRel = {0,0.02,0.17};
        };
        AnyRefNode PectoralisMaiorB = {
          sRel = {0,0.02,0.145};
        };
        AnyRefNode PectoralisMaiorC = {
          sRel = {0,0.02,0.16};
        };
        AnyRefNode Subscapularis = {
          sRel = {0,0.02,0.145};
        };
        AnyRefNode Supraspinatus = {
          sRel = {0,0,0.21};
        };
        AnyRefNode TeresMaior = {
          sRel = {0,0.022,0.165};
        };
        AnyRefNode TeresMinor = {
          sRel = {0,-0.022,0.165};
        };
        AnyRefNode Flexorcarpiradialis = {
           sRel = { -0.035,0.022,-0.170 };
        };
        AnyRefNode Flexorcarpiulnaris = {
           sRel = { -0.035,0.022,-0.170 };
        };

        AnyRefNode Flexordigitorumsuperficialis1= {
           sRel = { -0.03,0.03,-0.18 };
        };
        AnyRefNode Palmarislongus= {
           sRel = { -0.03,0.03,-0.174 };
        };
      }; // Model.Links.Arm
