//--------------------------------------
//  Forearm
//--------------------------------------

      AnySeg Forearm = {

       // r0 ={0,0,-0.489};
        Jii = {0.0058,0.0058,0.00015};
        Mass = 1.02;


        AnyRefNode RadiusAttachment = {
          sRel = {0.01,0,0};
          //sRel = {0.02,0,0.02};
          ARel = {{0,0,1},{1,0,0},{0,1,0}};
          AnyDrawSurf Drw = {
            FileName = "radius_right";
            // ScaleXYZ = {0.001, 0.001, 0.001};
            RGB = {0.78,0.78,0.40};
          };
        };

        AnyRefNode UlnaAttachment = {
          sRel = {-0.02,0,0};
          //sRel = {-0.01,-0.02,0.02};
          ARel = {{0,0,1},{1,0,0},{0,1,0}};
          // AnyDrawRefFrame DrwNode = { RGB = {1,0,0}; };
          AnyDrawSurf Drw = {
            FileName = "ulna_right";
            RGB = {0.78,0.78,0.40};
          };
        };

        //AnyDrawSeg DrwSeg={};

        AnyRefNode Elbow = {                 // elbow node in forearm
          sRel = {0,0,0.13};
          // AnyDrawRefFrame DrwNode = { RGB = {1,0,0}; };
        };

        AnyRefNode Wrist = {
          sRel = {0,0,-0.13};
          //AnyDrawRefFrame DrwNode = { RGB = {1,0,0}; };
        };

        AnyRefNode Biceps = {              // muscle's attachment nodes
          sRel = {0.01,0.04,0.099};
        };
        AnyRefNode Triceps = {
          sRel = {0.0009,-0.006,0.128};
        };
        AnyRefNode Anconeus = {
          sRel = {0.0008,-0.02,0.007};
        };
        AnyRefNode PronatorTeres = {
          sRel = {0.02,0.02,0};
        };
        AnyRefNode Brachialis = {
          sRel = {-0.016,0.02,0.09};
        };

        AnyRefNode Brachioradialis = {
          sRel = {0.025,0.015,-0.120};
        };

        AnyRefNode Flexordigitorumsuperficialis2 = {
          sRel = {0.0045,0,0.06};
        };
        AnyRefNode Palmareposteriore = {
          sRel = {0.0035,-0.002,0.12};
        };
        AnyRefNode Cubitaleposteriore = {
          sRel = {0.0035,-0.002,0.12};
        };


      }; // Model.Links.AvamArm
