//---------------------------------------
//    Hand
//---------------------------------------

      AnySeg Hand = {

       // r0 ={0,0,-0.678};
        Jii = {0.0006,0.0008,0.0003};
        Mass = 0.5;

        AnyRefNode Palm = {
          sRel = {0,0,0};
          //sRel = {0.02,-0.02,0};
          ARel = {{0,0,1},{1,0,0},{0,1,0}};
          // AnyDrawRefFrame DrwNode = { RGB = {1,0,0}; };
          AnyDrawSurf Drw = {
            FileName = "hand_right";
            RGB = {0.78,0.78,0.40};
          };
        };

        //AnyDrawSeg DrwSeg={};

        AnyRefNode Wrist = {
          sRel = {0,0,0.06};
          // AnyDrawRefFrame DrwNode = { RGB = {1,0,0}; };
        };
        AnyRefNode FingerExtremity = {
          sRel = {0,0,-0.06};
        };

        AnyRefNode PalmarePosteriore = {
          sRel = {0.015,-0.02,0.04};
        };
        AnyRefNode CubitalePosteriore = {
          sRel = {-0.02,-0.02,0.04};
        };

        AnyRefNode Flexorcarpiradialis = {
          sRel = {0.015,0.02,-0.0009};
        };
        AnyRefNode Flexorcarpiulnaris = {
          sRel = {-0.01,0.003,-0.0008};
        };

        AnyRefNode Flexordigitorumsuperficialis1 = {
          sRel = {0,0,0};
        };
        AnyRefNode Flexordigitorumsuperficialis2 = {
          sRel = {0,0,0.02};
        };
        AnyRefNode Palmarislongus = {
          sRel = {0,0,0};
        };
            }; // Model.Links.Hand
