//--------------------------------
//    Joints
//--------------------------------


      AnySphericalJoint Shoulder = {
        AnyFixedRefFrame& Ground = Main.Model.GlobalRef;
        AnyRefNode &Prox1 = Main.Model.Links.Arm.Shoulder;
      };

      AnyUniversalJoint Elbow = {
        Axis1 = x;
        Axis2 = z;
        AnyRefNode &Dist1 = Main.Model.Links.Arm.Elbow;
        AnyRefNode &Prox2 = Main.Model.Links.Forearm.Elbow;
      };

      AnyUniversalJoint Wrist = {
        Axis1 = x;
        Axis2 = y;
        AnyRefNode &Dist1 = Main.Model.Links.Forearm.Wrist;
        AnyRefNode &Prox2 = Main.Model.Links.Hand.Wrist;
      };
