/** Folder with definitions of the the segments of the rat body model */
AnyFolder Seg = {

  // Definition of Spine and Pelvis segment
  #include "SpinePelvis.any"

  // Definition of Femur segment(s)
  #if FRACTUREMODEL
  #include "Femur_Split.any"
  #else
  #include "Femur.any"
  #endif

  // Definition of Patella segment
  #include "Patella.any"

  // Definition of Tibia segment
  #include "Tibia.any"

  // Definition of Metatarsus segment
  #include "Metatarsus.any"

  // Definition of Phalanges segment
  #include "Phalanges.any"


}; // AnyFolderSeg
