/*
This include file contains the coordinates of the ligaments on the skull.
*/

AnyRefNode TemporomandibularLigamentNode1R = {DEFINE_LOCAL_COORDINATE(32.2878, 108.388, -60.5893) #include "DrawLigamentAttachmentPoints.any"};
AnyRefNode TemporomandibularLigamentNode2R = {DEFINE_LOCAL_COORDINATE(32.5175, 111.176, -61.4359) #include "DrawLigamentAttachmentPoints.any"};
AnyRefNode TemporomandibularLigamentNode3R = {DEFINE_LOCAL_COORDINATE(32.716, 116.318, -58.9846) #include "DrawLigamentAttachmentPoints.any"};

AnyRefNode TemporomandibularLigamentNode1L = {DEFINE_LOCAL_COORDINATE(152.551, 107.421,-64.6785 ) #include "DrawLigamentAttachmentPoints.any"};
AnyRefNode TemporomandibularLigamentNode2L = {DEFINE_LOCAL_COORDINATE(152.554, 111.562, -65.3036) #include "DrawLigamentAttachmentPoints.any"};
AnyRefNode TemporomandibularLigamentNode3L = {DEFINE_LOCAL_COORDINATE(152.54, 114.351, -64.3664) #include "DrawLigamentAttachmentPoints.any"};
