AnyFolder LigamentProperties = {
  AnyVar Stiffness = 272.4*2.0;
  AnyVar StrainAtReference = 0.04;

  AnyFolder Left = {

    AnyVar TMJ_1_er = .StrainAtReference;

    AnyVar TMJ_1_Stiffness = .Stiffness/3;


    AnyVar TMJ_2_er = .StrainAtReference;

    AnyVar TMJ_2_Stiffness = .Stiffness/3;

    AnyVar TMJ_3_er = .StrainAtReference;

    AnyVar TMJ_3_Stiffness = .Stiffness/3;


  };

  AnyFolder Right = {

    AnyVar TMJ_1_er = .StrainAtReference;

    AnyVar TMJ_1_Stiffness = .Stiffness/3;

    AnyVar TMJ_2_er = .StrainAtReference;

    AnyVar TMJ_2_Stiffness = .Stiffness/3;

    AnyVar TMJ_3_er = .StrainAtReference;

    AnyVar TMJ_3_Stiffness = .Stiffness/3;
  };

};
