/*
AnyLigamentModelPol <ObjectName> = {
L0 = 0.000000;
eps1 = 0.000000;
F1 = 0.000000;
a0 = ..aa0;
a1 = ..aa1;
//LinRegionOnOff = On;
};

*/

AnyVar aa0 = 0.0;
AnyVar aa1 = 2.0;
AnyVar EpsilonFactor = 3.0;

Right = {

  AnyLigamentModelPol SuperficialMasseterParPE = {

    L0 = 0.049624;
    eps1 = (0.5*.SuperficialMasseterPar.Lfbar)/L0*..EpsilonFactor;
    F1 = .SuperficialMasseterPar.F0;
    a0 = 0.000000;
    a1 = 2.000000;
    LinRegionOnOff = On;
  };
  AnyLigamentModelPol DeepAnteriorMasseterParPE = {

    L0 = 0.038789;
    eps1 = (0.5*.DeepAnteriorMasseterPar.Lfbar)/L0*..EpsilonFactor;
    F1 = .DeepAnteriorMasseterPar.F0;
    a0 = 0.000000;
    a1 = 2.000000;
    LinRegionOnOff = On;
  };
  AnyLigamentModelPol DeepPosteriorMasseterParPE = {

    L0 = 0.034278;
    eps1 = (0.5*.DeepPosteriorMasseterPar.Lfbar)/L0*..EpsilonFactor;
    F1 = .DeepPosteriorMasseterPar.F0;
    a0 = 0.000000;
    a1 = 2.000000;
    LinRegionOnOff = On;
  };
  AnyLigamentModelPol AnteriorTemporalisParPE = {

    L0 = 0.060850;
    eps1 = (0.5*.AnteriorTemporalisPar.Lfbar)/L0*..EpsilonFactor;
    F1 = .AnteriorTemporalisPar.F0;
    a0 = 0.000000;
    a1 = 2.000000;
    LinRegionOnOff = On;
  };
  AnyLigamentModelPol PosteriorTemporalisParPE = {

    L0 = 0.085314;
    //L0 = 0.005314;
    eps1 = (0.5*.PosteriorTemporalisPar.Lfbar)/L0*..EpsilonFactor;
    F1 = .PosteriorTemporalisPar.F0;
    a0 = 0.000000;
    a1 = 2.000000;
    LinRegionOnOff = On;
  };
  AnyLigamentModelPol MedialPterygoidParPE = {
    //L0 = 0.044044*1.2;
    L0 = 0.044044;
    eps1 = (0.5*.MedialPterygoidPar.Lfbar)/L0*..EpsilonFactor;
    F1 = .MedialPterygoidPar.F0;
    a0 = 0.000000;
    a1 = 2.000000;
    LinRegionOnOff = On;
  };
  AnyLigamentModelPol SuperiorLateralPterygoidParPE = {

    L0 = 0.030603;
    eps1 = (0.5*.SuperiorLateralPterygoidPar.Lfbar)/L0*..EpsilonFactor;
    F1 = .SuperiorLateralPterygoidPar.F0;
    a0 = 0.000000;
    a1 = 2.000000;
    LinRegionOnOff = On;
  };
  AnyLigamentModelPol InferiorLateralPterygoidParPE = {

    L0 = 0.032314;
    eps1 = (0.5*.InferiorLateralPterygoidPar.Lfbar)/L0*..EpsilonFactor;
    F1 = .InferiorLateralPterygoidPar.F0;
    a0 = 0.000000;
    a1 = 2.000000;
    LinRegionOnOff = On;
  };
  AnyLigamentModelPol AnteriorDigastricParPE = {

    L0 = 0.046261;
    eps1 = (0.5*.AnteriorDigastricPar.Lfbar)/L0*..EpsilonFactor;
    F1 = .AnteriorDigastricPar.F0;
    a0 = 0.000000;
    a1 = 2.000000;
    LinRegionOnOff = On;
  };
  AnyLigamentModelPol GeniohyoidParPE = {

    L0 = 0.043251;
    eps1 = (0.5*.GeniohyoidPar.Lfbar)/L0*..EpsilonFactor;
    F1 = .GeniohyoidPar.F0;
    a0 = 0.000000;
    a1 = 2.000000;
    LinRegionOnOff = On;
  };
  AnyLigamentModelPol AnteriorMylohyoidParPE = {

    L0 = 0.016265;
    eps1 = (0.5*.AnteriorMylohyoidPar.Lfbar)/L0*..EpsilonFactor;
    F1 = .AnteriorMylohyoidPar.F0;
    a0 = 0.000000;
    a1 = 2.000000;
    LinRegionOnOff = On;
  };
  AnyLigamentModelPol PosteriorMylohyoidParPE = {

    L0 = 0.046340;
    eps1 = (0.5*.PosteriorMylohyoidPar.Lfbar)/L0*..EpsilonFactor;
    F1 = .PosteriorMylohyoidPar.F0;
    a0 = 0.000000;
    a1 = 2.000000;
    LinRegionOnOff = On;
  };
};

Left = {

  AnyLigamentModelPol SuperficialMasseterParPE = {

    L0 = 0.049624;
    eps1 = (0.5*.SuperficialMasseterPar.Lfbar)/L0*..EpsilonFactor;
    F1 = .SuperficialMasseterPar.F0;
    a0 = 0.000000;
    a1 = 2.000000;
    LinRegionOnOff = On;
  };
  AnyLigamentModelPol DeepAnteriorMasseterParPE = {

    L0 = 0.038789;
    eps1 = (0.5*.DeepAnteriorMasseterPar.Lfbar)/L0*..EpsilonFactor;
    F1 = .DeepAnteriorMasseterPar.F0;
    a0 = 0.000000;
    a1 = 2.000000;
    LinRegionOnOff = On;
  };
  AnyLigamentModelPol DeepPosteriorMasseterParPE = {

    L0 = 0.034278;
    eps1 = (0.5*.DeepPosteriorMasseterPar.Lfbar)/L0*..EpsilonFactor;
    F1 = .DeepPosteriorMasseterPar.F0;
    a0 = 0.000000;
    a1 = 2.000000;
    LinRegionOnOff = On;
  };
  AnyLigamentModelPol AnteriorTemporalisParPE = {

    L0 = 0.060850;
    eps1 = (0.5*.AnteriorTemporalisPar.Lfbar)/L0*..EpsilonFactor;
    F1 = .AnteriorTemporalisPar.F0;
    a0 = 0.000000;
    a1 = 2.000000;
    LinRegionOnOff = On;
  };
  AnyLigamentModelPol PosteriorTemporalisParPE = {

    L0 = 0.085314;
    eps1 = (0.5*.PosteriorTemporalisPar.Lfbar)/L0*..EpsilonFactor;
    F1 = .PosteriorTemporalisPar.F0;
    a0 = 0.000000;
    a1 = 2.000000;
    LinRegionOnOff = On;
  };
  AnyLigamentModelPol MedialPterygoidParPE = {
    //L0 = 0.044044*1.2;
    L0 = 0.044044;
    eps1 = (0.5*.MedialPterygoidPar.Lfbar)/L0*..EpsilonFactor;
    F1 = .MedialPterygoidPar.F0;
    a0 = 0.000000;
    a1 = 2.000000;
    LinRegionOnOff = On;
  };
  AnyLigamentModelPol SuperiorLateralPterygoidParPE = {

    L0 = 0.030603;
    eps1 = (0.5*.SuperiorLateralPterygoidPar.Lfbar)/L0*..EpsilonFactor;
    F1 = .SuperiorLateralPterygoidPar.F0;
    a0 = 0.000000;
    a1 = 2.000000;
    LinRegionOnOff = On;
  };
  AnyLigamentModelPol InferiorLateralPterygoidParPE = {

    L0 = 0.032314;
    eps1 = (0.5*.InferiorLateralPterygoidPar.Lfbar)/L0*..EpsilonFactor;
    F1 = .InferiorLateralPterygoidPar.F0;
    a0 = 0.000000;
    a1 = 2.000000;
    LinRegionOnOff = On;
  };
  AnyLigamentModelPol AnteriorDigastricParPE = {

    L0 = 0.046261;
    eps1 = (0.5*.AnteriorDigastricPar.Lfbar)/L0*..EpsilonFactor;
    F1 = .AnteriorDigastricPar.F0;
    a0 = 0.000000;
    a1 = 2.000000;
    LinRegionOnOff = On;
  };
  AnyLigamentModelPol GeniohyoidParPE = {

    L0 = 0.043251;
    eps1 = (0.5*.GeniohyoidPar.Lfbar)/L0*..EpsilonFactor;
    F1 = .GeniohyoidPar.F0;
    a0 = 0.000000;
    a1 = 2.000000;
    LinRegionOnOff = On;
  };
  AnyLigamentModelPol AnteriorMylohyoidParPE = {

    L0 = 0.016265;
    eps1 = (0.5*.AnteriorMylohyoidPar.Lfbar)/L0*..EpsilonFactor;
    F1 = .AnteriorMylohyoidPar.F0;
    a0 = 0.000000;
    a1 = 2.000000;
    LinRegionOnOff = On;
  };
  AnyLigamentModelPol PosteriorMylohyoidParPE = {

    L0 = 0.046340;
    eps1 = (0.5*.PosteriorMylohyoidPar.Lfbar)/L0*..EpsilonFactor;
    F1 = .PosteriorMylohyoidPar.F0;
    a0 = 0.000000;
    a1 = 2.000000;
    LinRegionOnOff = On;
  };
};
