// Segments
AnyFolder Seg = {
  #include "Seg.any"
};

// Joints
AnyFolder Jnt = {
  #include "Jnt.any"
};


// Muscles
AnyFolder Mus = {
  #include "MusRight.any"
  #include "MusLeft.any"
};


// MuscleParameters
AnyFolder MusPar = {
  #include "MusParSimple.any"
};

#if TMJ_INCLUDE_LIGAMENTS == 1
AnyFolder Lig = {
  #include "LigamentConstants.any"
  #include "LigamentProperties.any"
  #include "LigLeft.any"
  #include "LigRight.any"
};
#endif
