// Segments
AnyFolder Seg = {
  #include "Seg.any"
};

#if FREE_MOVEMENT == 0
// Joints
AnyFolder Jnt = {
  #include "Jnt.any"
};


// Muscles
AnyFolder Mus = {
  #include "MusRight.any"
  #include "MusLeft.any"
};


// MuscleParameters
AnyFolder MusPar = {
  #include "MusParHill.any"
};


#if TMJ_INCLUDE_LIGAMENTS == 1
AnyFolder Lig = {
  #include "LigamentProperties.any"
  #include "LigLeft.any"
  #include "LigRight.any"
};
#endif
#endif
