    AnyVar BMI = BodyMass/(BodyHeight^2);
    ///Estimation from Frankenfield et al. (2001) valid for men
    AnyVar FatPercent = (-0.09 + 0.0149*BMI - 0.00009*BMI^2)*100;

    AnyVar BodyMass = 75 ;
    AnyVar BodyHeight = 180 /100;

    #define STATURE_SCALE_FACTOR 1.733/1.75

    AnyFolder SegmentMasses = {

    //Segment masses in kg from Winter ("Biomechanics and motor control of human movement." David A. Winter)
    AnyVar Lumbar = 0139*.BodyMass; // T12-L1 to L5-Sacrum
    AnyVar Thorax = 01894*.BodyMass; // C7-T1 to T12-L1 (modified from 0.216 winter to separate scapula)
    AnyVar Pelvis = 0142*.BodyMass;
    AnyVar Head = 0.081*.BodyMass; // head and cervical

    AnyFolder Right =
    {
        AnyVar Clavicle = 0.0133*..BodyMass; //< Combined mass of shoulder muscles and scapula/clavicula bones.
        AnyVar UpperArm = 0.028*..BodyMass;
        AnyVar LowerArm = 0.016*..BodyMass;
        AnyVar Hand = 0.006*..BodyMass;
        AnyVar Thigh = 01*..BodyMass;
        AnyVar Shank = 0.0465*..BodyMass;
        AnyVar Talus = 0.2*0.0145*..BodyMass; //20% of total foot (from bone volume ratio)
        AnyVar Foot =  0.8*0.0145*..BodyMass; //80% of total foot (from bone volume ratio)
    };

    AnyFolder Left =
    {
        AnyVar Clavicle = 0.0133*..BodyMass;
        AnyVar UpperArm = 0.028*..BodyMass;
        AnyVar LowerArm = 0.016*..BodyMass;
        AnyVar Hand = 0.006*..BodyMass;
        AnyVar Thigh = 01*..BodyMass;
        AnyVar Shank = 0.0465*..BodyMass;
        AnyVar Talus = 0.2*0.0145*..BodyMass; //20% of total foot (from bone volume ratio)
        AnyVar Foot =  0.8*0.0145*..BodyMass; //80% of total foot (from bone volume ratio)
    };
  };

  AnyFolder SegmentScaleFactors =
  {
    AnyFolder Pelvis = { AnyFloat LengthScale = STATURE_SCALE_FACTOR; AnyFloat DepthScale = STATURE_SCALE_FACTOR; AnyFloat WidthScale = STATURE_SCALE_FACTOR; };
    AnyFolder Trunk = { AnyFloat LengthScale = STATURE_SCALE_FACTOR; AnyFloat DepthScale = STATURE_SCALE_FACTOR; AnyFloat WidthScale = STATURE_SCALE_FACTOR; };
    AnyFolder Head = {

      // Standard unscaled values
      AnyVar HEAD_BREADTH = 0.19;
      AnyVar HEAD_LENGTH  = 0.239;
      AnyVar HEAD_HEIGHT  = 0.26;

      // Scale factor computation
      AnyFloat LengthScale = 0.228/HEAD_HEIGHT;///< 228mm, DIN 1986
      AnyFloat DepthScale = 0.193/HEAD_LENGTH; ///< 193mm, DIN 1986
      AnyFloat WidthScale = 0.156/HEAD_BREADTH;///< 156mm, DIN 1986

    };
    AnyFolder Neck = { AnyFloat LengthScale = STATURE_SCALE_FACTOR; AnyFloat DepthScale = STATURE_SCALE_FACTOR; AnyFloat WidthScale = STATURE_SCALE_FACTOR; };
    AnyFolder Lumbar = { AnyFloat LengthScale = STATURE_SCALE_FACTOR; AnyFloat DepthScale = STATURE_SCALE_FACTOR; AnyFloat WidthScale = STATURE_SCALE_FACTOR; };

    AnyFolder Right =
    {
        AnyFolder Clavicula =  { AnyFloat LengthScale = STATURE_SCALE_FACTOR; AnyFloat DepthScale = STATURE_SCALE_FACTOR; AnyFloat WidthScale = STATURE_SCALE_FACTOR; };
        AnyFolder Scapula =  { AnyFloat LengthScale = STATURE_SCALE_FACTOR; AnyFloat DepthScale = STATURE_SCALE_FACTOR; AnyFloat WidthScale = STATURE_SCALE_FACTOR; };
        AnyFolder Humerus =  { AnyFloat LengthScale = STATURE_SCALE_FACTOR; AnyFloat DepthScale = STATURE_SCALE_FACTOR; AnyFloat WidthScale = STATURE_SCALE_FACTOR; };
        AnyFolder Radius =  { AnyFloat LengthScale = STATURE_SCALE_FACTOR; AnyFloat DepthScale = STATURE_SCALE_FACTOR; AnyFloat WidthScale = STATURE_SCALE_FACTOR; };
        AnyFolder Ulna  =  { AnyFloat LengthScale = STATURE_SCALE_FACTOR; AnyFloat DepthScale = STATURE_SCALE_FACTOR; AnyFloat WidthScale = STATURE_SCALE_FACTOR; };
        AnyFolder Hand =  { AnyFloat LengthScale = STATURE_SCALE_FACTOR; AnyFloat DepthScale = STATURE_SCALE_FACTOR; AnyFloat WidthScale = STATURE_SCALE_FACTOR; };
        AnyFolder Foot =  { AnyFloat LengthScale = STATURE_SCALE_FACTOR; AnyFloat DepthScale = STATURE_SCALE_FACTOR; AnyFloat WidthScale = STATURE_SCALE_FACTOR; };
        AnyFolder Shank =  { AnyFloat LengthScale = STATURE_SCALE_FACTOR; AnyFloat DepthScale = STATURE_SCALE_FACTOR; AnyFloat WidthScale = STATURE_SCALE_FACTOR; };
        AnyFolder Thigh =  { AnyFloat LengthScale = STATURE_SCALE_FACTOR; AnyFloat DepthScale = STATURE_SCALE_FACTOR; AnyFloat WidthScale = STATURE_SCALE_FACTOR; };
    };
    AnyFolder Left =
    {
        AnyFolder Clavicula =  { AnyFloat LengthScale = STATURE_SCALE_FACTOR; AnyFloat DepthScale = STATURE_SCALE_FACTOR; AnyFloat WidthScale = STATURE_SCALE_FACTOR; };
        AnyFolder Scapula =  { AnyFloat LengthScale = STATURE_SCALE_FACTOR; AnyFloat DepthScale = STATURE_SCALE_FACTOR; AnyFloat WidthScale = STATURE_SCALE_FACTOR; };
        AnyFolder Humerus =  { AnyFloat LengthScale = STATURE_SCALE_FACTOR; AnyFloat DepthScale = STATURE_SCALE_FACTOR; AnyFloat WidthScale = STATURE_SCALE_FACTOR; };
        AnyFolder Radius =  { AnyFloat LengthScale = STATURE_SCALE_FACTOR; AnyFloat DepthScale = STATURE_SCALE_FACTOR; AnyFloat WidthScale = STATURE_SCALE_FACTOR; };
        AnyFolder Ulna  =  { AnyFloat LengthScale = STATURE_SCALE_FACTOR; AnyFloat DepthScale = STATURE_SCALE_FACTOR; AnyFloat WidthScale = STATURE_SCALE_FACTOR; };
        AnyFolder Hand =  { AnyFloat LengthScale = STATURE_SCALE_FACTOR; AnyFloat DepthScale = STATURE_SCALE_FACTOR; AnyFloat WidthScale = STATURE_SCALE_FACTOR; };
        AnyFolder Foot =  { AnyFloat LengthScale = STATURE_SCALE_FACTOR; AnyFloat DepthScale = STATURE_SCALE_FACTOR; AnyFloat WidthScale = STATURE_SCALE_FACTOR; };
        AnyFolder Shank =  { AnyFloat LengthScale = STATURE_SCALE_FACTOR; AnyFloat DepthScale = STATURE_SCALE_FACTOR; AnyFloat WidthScale = STATURE_SCALE_FACTOR; };
        AnyFolder Thigh =  { AnyFloat LengthScale = STATURE_SCALE_FACTOR; AnyFloat DepthScale = STATURE_SCALE_FACTOR; AnyFloat WidthScale = STATURE_SCALE_FACTOR; };
    };
  };
