#path ANYBODY_PATH_OUTPUT "."
#include "../../../../libdef.any"

#include "<ANYBODY_PATH_MODELUTILS>/Video/CameraClassTemplate.any"

#define BM_SCALING _SCALING_XYZ_
#path BM_SCALING_ANTHRO_FILE "AnyManXYZ.final.any"
#define HEAD_SCALING_XYZ
#include "<ANYBODY_PATH_AMMR>/Application/Examples/StandingModelScalingDisplay/StandingModelScalingDisplay.Main.any"

Main = {

  VideoLookAtCamera Static_image(UP_DIRECTION=y, _AUTO_OPEN_PREVIEW_=ON) =
  {
    VideoName = "ScalingXYZFinal";
    Analysis = {
      AnyOperation &ref = Main.Study.InitialConditions;
    };
    VideoInputScale = 5;
    VideoResolution = {300,500};
    CameraLookAtPoint = Main.HumanModel.BodyModel.Trunk.SegmentsLumbar.PelvisSeg.r + {0,-0.3,0};
    CameraFieldOfView = DesignVar(2.0);
    CameraDirection  = {1,0.2,1.0};
    BackgroundColor = DesignVar({1,1,1});

    Preview.FileName = VideoName + ".jpg";


  };
  /*VideoLookAtCamera Static_image2(UP_DIRECTION=y, _AUTO_OPEN_PREVIEW_=ON) =
  {
    VideoName = "AppliedForcesFront";
    Analysis = {
      AnyOperation &ref = Main.Study.InitialConditions;
    };
    VideoInputScale = 5;
    VideoResolution = {300,500};
    CameraLookAtPoint = Main.HumanModel.BodyModel.Trunk.SegmentsLumbar.PelvisSeg.r + {0,-0.2,0};
    CameraFieldOfView = DesignVar(2.2);
    CameraDirection  = {1,0.2,1.0};
    BackgroundColor = DesignVar({1,1,1});

    Preview.FileName = VideoName + ".jpg";

  };      */


  AnyOperationSequence GenerateImages =
  {
     AnyOperation&  init = Main.Study.InitialConditions;
     AnyOperation& CreateBack = Main.Static_image.Preview;
  };
};
