AnyFolder Joints = {

};

AnyFolder Drivers = {
  //Constraint the collective CoM to be right above the GlobalRef
  AnyKinEqSimpleDriver CoMDriver = {
    AnyKinCoM CoM = {
      AnyFolder &Body = ....HumanModel;
    };
    MeasureOrganizer = {0,2};  // Only the x and z directions
    DriverPos = {0.0,0.0};
    DriverVel = {0.0,0.0};
    Reaction.Type = {Off,Off};
  };

  #if BM_LEG_RIGHT != CONST_LEG_MODEL_OFF
    #include "RightFootDrivers.any"
  #endif

  #if BM_LEG_LEFT != CONST_LEG_MODEL_OFF
    #include "LeftFootDrivers.any"
  #endif

};
