  AnyReacForce LeftFootReaction = {

    AnyKinLinear LeftFootLinMeasure = {
      AnySeg &ref1=....HumanModel.BodyModel.Left.Leg.Seg.Foot;
      AnyFixedRefFrame &ref2 = ....Environment.GlobalRef;
    };
    AnyKinRotational LeftFootRotMeasure = {
      AnySeg &ref1=....HumanModel.BodyModel.Left.Leg.Seg.Foot;
      AnyFixedRefFrame &ref2 = ....Environment.GlobalRef;
      Type = RotVector;
      AngVelOnOff = On;
    };
  };


  // Place the Left toe and heel on the ground
  AnyKinEqSimpleDriver LToeGroundConstraint ={
    AnyKinLinear ToePos = {
      AnyFixedRefFrame &Ground = ....Environment.GlobalRef;
      AnyRefNode &Ball = ....HumanModel.BodyModel.Left.Leg.Seg.Foot.ToeJoint;
    };
   MeasureOrganizer = {1};  // Only the y coordinate
    DriverPos = {0.0};
    DriverVel = {0};
    Reaction.Type = {Off};   // Provide ground reaction forces

  };

  AnyKinEqSimpleDriver LHeelGroundConstraint ={
    AnyKinLinear HeelPos = {
      AnyFixedRefFrame &Ground = ....Environment.GlobalRef;
      #if BM_LEG_RIGHT == CONST_LEG_MODEL_TLEM
        AnyRefNode &Ball = ....HumanModel.BodyModel.Left.Leg.Seg.Foot.HeelNode;
      #else
        AnyRefNode &Ball = ....HumanModel.BodyModel.Left.Leg.Seg.Foot.HeelJoint;
      #endif
    };
    MeasureOrganizer = {1};  // Only the y coordinate
    DriverPos = {0.0};
    DriverVel = {0};
    Reaction.Type = {Off};   // Provide ground reaction forces
  };


    // Position the Ankles Left above the z axis
  AnyKinEqSimpleDriver LAnkleX = {
    AnyKinLinear AnklePos = {
      AnyFixedRefFrame &Ground = ....Environment.GlobalRef;
      #if BM_LEG_RIGHT == CONST_LEG_MODEL_TLEM
        AnyRefNode &Ankle = ....HumanModel.BodyModel.Left.Leg.Seg.Foot.SubTalarJoint;
      #else
        AnyRefNode &Ankle = ....HumanModel.BodyModel.Left.Leg.Seg.Foot.AnkleJoint;
      #endif
    };
    MeasureOrganizer = {0};  // Only the x coordinate
    DriverPos = {0.0};
    DriverVel = {0.0};
    Reaction.Type = {Off};
  };
