// Default mannequin values

AnyFolder Mannequin = {

  AnyFolder Posture = {
    //This controls the position of the pelvi wrt. to the global reference frame
    AnyVar PelvisPosX=0.046;
    AnyVar PelvisPosY=1.16;
    AnyVar PelvisPosZ=0;

    //This controls the rotation of the pelvis wrt. to the global reference frame
    AnyVar PelvisRotX=0;
    AnyVar PelvisRotY=0;
    AnyVar PelvisRotZ=0;

    // These variables control the rotation of the thorax wrt the
    // pelvis
    AnyVar PelvisThoraxExtension=0;
    AnyVar PelvisThoraxLateralBending=-15;
    AnyVar PelvisThoraxRotation=0;

    AnyVar NeckExtension=15;
    AnyVar NeckLateralBending=15;             // not used when neck is switched off
    AnyVar NeckRotation=0;                   // not used when neck is switched off

    AnyFolder Right = {
      //Arm
      AnyVar SternoClavicularProtraction=-23;   //This value is not used for initial position
      AnyVar SternoClavicularElevation=11.5;    //This value is not used for initial position
      AnyVar SternoClavicularAxialRotation=-20; //This value is not used for initial position

      AnyVar GlenohumeralFlexion =-25;
      AnyVar GlenohumeralAbduction = 0;
      AnyVar GlenohumeralExternalRotation = -20;

      AnyVar ElbowFlexion = 50;
      AnyVar ElbowPronation = 0.0;

      AnyVar WristFlexion =0;
      AnyVar WristAbduction =0;

      //Leg
      AnyVar HipFlexion = 15;
      AnyVar HipAbduction = 0;
      AnyVar HipExternalRotation = 90;

      AnyVar KneeFlexion = 30.0;

      AnyVar AnklePlantarFlexion =0.0;
      AnyVar SubTalarEversion =0.0;

      //Detail Hand
      AnyFolder Finger1 ={
        AnyVar CMCDeviation=-20;
        AnyVar CMCFlexion=20;
        AnyVar MCPFlexion= 20;
        AnyVar MCPDeviation=0;
        AnyVar DIPFlexion=20;
      };

      AnyFolder Finger2 ={
        AnyVar MCPFlexion=20;
        AnyVar PIPFlexion=20;
        AnyVar DIPFlexion=20;
      };

      AnyFolder Finger3 ={
        AnyVar MCPFlexion=20;
        AnyVar PIPFlexion=20;
        AnyVar DIPFlexion=20;
      };

      AnyFolder Finger4 ={
        AnyVar MCPFlexion=20;
        AnyVar PIPFlexion=20;
        AnyVar DIPFlexion=20;
      };

      AnyFolder Finger5 ={
        AnyVar MCPFlexion=20;
        AnyVar PIPFlexion=20;
        AnyVar DIPFlexion=20;
      };
    };

    AnyFolder Left = {
      //all values are set to be equal to the right side values
      //feel free to change this!

      //Arm
      AnyVar SternoClavicularProtraction=.Right.SternoClavicularProtraction;
      AnyVar SternoClavicularElevation=.Right.SternoClavicularElevation;
      AnyVar SternoClavicularAxialRotation=.Right.SternoClavicularAxialRotation;

      AnyVar GlenohumeralFlexion = 0 ;
      AnyVar GlenohumeralAbduction = 75 ;
      AnyVar GlenohumeralExternalRotation =-25 ;

      AnyVar ElbowFlexion = 135;
      AnyVar ElbowPronation = 0;

      AnyVar WristFlexion =.Right.WristFlexion;
      AnyVar WristAbduction =.Right.WristAbduction;

      //Leg
      AnyVar HipFlexion = 0;
      AnyVar HipAbduction = -5;
      AnyVar HipExternalRotation = 0.0;

      AnyVar KneeFlexion = 5;

      AnyVar AnklePlantarFlexion = .Right.AnklePlantarFlexion ;
      AnyVar SubTalarEversion =.Right.SubTalarEversion;

      //Detail Hand
      AnyFolder Finger1 ={
        AnyVar CMCDeviation= -10;
        AnyVar CMCFlexion= 10;
        AnyVar MCPFlexion= -20;
        AnyVar MCPDeviation= 30;
        AnyVar DIPFlexion= -30;
      };

      AnyFolder Finger2 ={
        AnyVar MCPFlexion= 80;
        AnyVar PIPFlexion= 100;
        AnyVar DIPFlexion= 100;
      };

      AnyFolder Finger3 ={
        AnyVar MCPFlexion= 80;
        AnyVar PIPFlexion= 100;
        AnyVar DIPFlexion= 100;
      };

      AnyFolder Finger4 ={
        AnyVar MCPFlexion= 80;
        AnyVar PIPFlexion= 100;
        AnyVar DIPFlexion= 100;
      };

      AnyFolder Finger5 ={
        AnyVar MCPFlexion= 80;
        AnyVar PIPFlexion= 100;
        AnyVar DIPFlexion= 100;
      };
    };
  };

  AnyFolder PostureVel={
    //This controls the position of the pelvi wrt. to the global reference frame
    AnyVar PelvisPosX=0;
    AnyVar PelvisPosY=0;
    AnyVar PelvisPosZ=0;

    //This controls the rotation of the pelvis wrt. to the global reference frame
    AnyVar PelvisRotX=0;
    AnyVar PelvisRotY=0;
    AnyVar PelvisRotZ=0;

    // These variables control the rotation of the thorax wrt the
    // pelvis
    AnyVar PelvisThoraxExtension=0;
    AnyVar PelvisThoraxLateralBending=0;
    AnyVar PelvisThoraxRotation=0;

    AnyVar NeckExtension=0;
    AnyVar NeckLateralBending=0;     // not used when neck is switched off
    AnyVar NeckRotation=0;           // not used when neck is switched off

    AnyFolder Right = {
      //Arm
      AnyVar SternoClavicularProtraction=0;   //This value is not used for initial position
      AnyVar SternoClavicularElevation=0;    //This value is not used for initial position
      AnyVar SternoClavicularAxialRotation=0; //This value is not used for initial position

      AnyVar GlenohumeralFlexion =0;
      AnyVar GlenohumeralAbduction = 0;
      AnyVar GlenohumeralExternalRotation = 0;

      AnyVar ElbowFlexion = 0.0;
      AnyVar ElbowPronation = 0.0;

      AnyVar WristFlexion =0;
      AnyVar WristAbduction =0;

      //Leg
      AnyVar HipFlexion = 0.0;
      AnyVar HipAbduction = 0.0;
      AnyVar HipExternalRotation = 50;

      AnyVar KneeFlexion = 0.0;

      AnyVar AnklePlantarFlexion =0.0;
      AnyVar SubTalarEversion =0.0;

    };

    AnyFolder Left = {
      //all values are set to be equal to the right side values
      //feel free to change this!

      //Arm
      AnyVar SternoClavicularProtraction=.Right.SternoClavicularProtraction;
      AnyVar SternoClavicularElevation=.Right.SternoClavicularElevation;
      AnyVar SternoClavicularAxialRotation=.Right.SternoClavicularAxialRotation;

      AnyVar GlenohumeralFlexion = .Right.GlenohumeralFlexion ;
      AnyVar GlenohumeralAbduction =.Right.GlenohumeralAbduction ;
      AnyVar GlenohumeralExternalRotation =.Right.GlenohumeralExternalRotation ;

      AnyVar ElbowFlexion = .Right.ElbowFlexion;
      AnyVar ElbowPronation = .Right.ElbowPronation;

      AnyVar WristFlexion =.Right.WristFlexion;
      AnyVar WristAbduction =.Right.WristAbduction;

      //Leg
      AnyVar HipFlexion =.Right.HipFlexion;
      AnyVar HipAbduction =.Right.HipAbduction;
      AnyVar HipExternalRotation = .Right.HipExternalRotation;

      AnyVar KneeFlexion = .Right.KneeFlexion;

      AnyVar AnklePlantarFlexion = .Right.AnklePlantarFlexion ;
      AnyVar SubTalarEversion =.Right.SubTalarEversion;

    };
  };

  AnyFolder Load = {
    AnyVec3 TopVertebra = {0.000, 0.000, 0.000};

    AnyFolder Right = {
      AnyVec3 Shoulder  = {0.000, 0.000, 0.000};
      AnyVec3 Elbow     = {0.000, 0.000, 0.000};
      AnyVec3 Hand      = {0.000, 0.000, 0.000};
      AnyVec3 Hip       = {0.000, 0.000, 0.000};
      AnyVec3 Knee      = {0.000, 0.000, 0.000};
      AnyVec3 Ankle     = {0.000, 0.000, 0.000};
    };
    AnyFolder Left = {
      AnyVec3 Shoulder  = {0.000, 0.000, 0.000};
      AnyVec3 Elbow     = {0.000, 0.000, 0.000};
      AnyVec3 Hand      = {0.000, 0.000, 0.000};
      AnyVec3 Hip       = {0.000, 0.000, 0.000};
      AnyVec3 Knee      = {0.000, 0.000, 0.000};
      AnyVec3 Ankle     = {0.000, 0.000, 0.000};
    };
  };  // Loads
};
