#include "../../../../libdef.any"

Main = {
  // ----------------------------------------------------------
  // Model configuration:
  // For more info on body model configuration options please load the model and double click on:
  // #include "<ANYBODY_PATH_BODY>\Documentation\BodyModel.parameters.any"
  // ----------------------------------------------------------

  //If you want to use your own draw settings, please outcomment the next line
  //#path BM_DRAWSETTINGS_FILE "Model\DrawSettings.any"
  #define BM_HAND_MODEL _HAND_MODEL_ANYBODY_
  // Using your own Mannequin.any file in the Model folder of your model
  #include "Model\Mannequin.any"


  // Include default human model
  #include "<ANYBODY_PATH_BODY>\HumanModel.any"

  AnyFolder Model = {
    // A link to the human model
    AnyFolder &BodyModel=.HumanModel.BodyModelWithDefaultDrivers;

    // Environment files are used to include objects surrounding human, e.g. global reference frame
    #include "Model\Environment.any"

    AnyFolder ModelEnvironmentConnection = {
      // This file contains all joint and foot reaction forces to simulate standing human
      #include "Model\JointsAndDrivers.any"
    };
  };

  AnyBodyStudy Study = {
    AnyFolder &Model = .Model;
    Gravity={0.0, -9.81, 0.0};
    nStep = 11;

    // these settings are needed for adding drivers without removing the default set
    Kinematics.SolverType = KinSolOverDeterminate;
    InitialConditions.SolverType = Kinematics.SolverType ;

  };

    #include "Model\RunAppSequence.any"

}; //Main
