#include "C:\Users\mel\Documents\AMMRs\ammr - Reference/libdef.any"


#define BM_LEG_MODEL OFF
#define BM_TRUNK_MUSCLES OFF

#define BM_ARM_MUSCLES_LEFT OFF
#define BM_ARM_MUSCLES_RIGHT OFF

#define BM_ARM_LEFT OFF

#define BM_SCALING _SCALING_NONE_

////#define BM_MANNEQUIN_DRIVER_PELVIS_POS_X OFF
////#define BM_MANNEQUIN_DRIVER_PELVIS_POS_Y OFF
////#define BM_MANNEQUIN_DRIVER_PELVIS_POS_Z  OFF
////#define BM_MANNEQUIN_DRIVER_PELVIS_ROT_X  OFF
////#define BM_MANNEQUIN_DRIVER_PELVIS_ROT_Y  OFF
////#define BM_MANNEQUIN_DRIVER_PELVIS_ROT_Z  OFF
////


// Disable shoulder mannequin drivers


Main = {

   HumanModel.Mannequin.Posture.PelvisPosX = 0;
   HumanModel.Mannequin.Posture.PelvisPosY = 0;


  #include "<ANYBODY_PATH_BODY>/HumanModel.any"


  AnyKinStudy study = {

     AnyFolder& BodyModel = Main.HumanModel.BodyModel;
     AnyFolder& Drivers = Main.HumanModel.DefaultMannequinDrivers;

     MechObjectExclude = {&Main.HumanModel.BodyModel.Right.ShoulderArm.Jnt.ConoideumLigamentDrv};

     AnyKinMotion AC_MedialRotation = {
       AnyKinMeasure& ref = Main.HumanModel.BodyModel.Interface.Right.AcromioClavicular.MedialRotation;
       //DriverPos0 = {-16.66207}*pi/180; // Current default, which is imposed by the conoid driver
       DriverPos0 = {-25}*pi/180;
       DriverVel0 = {20}*pi/180;
     };


     AnyFolder NewValues = {

        AnyFolder Clavicular = {
           AnyVec3 NeutralPositionOnPelvis_pos = Main.HumanModel.BodyModel.Right.ShoulderArm.Seg.Clavicula.r;
           AnyMat33 Clavicula_Axes = Main.HumanModel.BodyModel.Right.ShoulderArm.Seg.Clavicula.Axes;
       };
       AnyFolder Scapula = {
           AnyVec3 NeutralPositionOnPelvis_pos = Main.HumanModel.BodyModel.Right.ShoulderArm.Seg.Scapula.r;
           AnyMat33 Scapula_Axes = Main.HumanModel.BodyModel.Right.ShoulderArm.Seg.Scapula.Axes;
       };


     };


     nStep = 50;


  };

};
