//define = [
//  {'BM_LEG_MODEL':'_LEG_MODEL_TLEM1_'},
//  {'BM_LEG_MODEL':'_LEG_MODEL_TLEM2_'},
//]
//ignore_errors = ['FileReader.FileName']


#include "../libdef.any"

#path MOCAP_PATH_MAINFILEDIR "<ANYMOCAP_EXAMPLES>\BVH_Xsens\Trials\Static"
#path MOCAP_PATH_MAINFILE "<MOCAP_PATH_MAINFILEDIR>/Main.any"
#define MOCAP_NAME_MAINFILEDIR "Static"


#ifdef TEST_NAME
#define  MOCAP_TEST_FILENAME_PREFIX  TEST_NAME + "_"
#else
#define  MOCAP_TEST_FILENAME_PREFIX  "GUI1_"
#define BM_LEG_MODEL _LEG_MODEL_TLEM1_
#define CREATE_IMAGE
#endif


#ifdef CREATE_IMAGE
#undef MOCAP_TEST_FILENAME_PREFIX
#path TEMP_PATH "<MOCAP_PATH_MAINFILEDIR>/../../Output"
#endif


//// Run Analysis with a reduced number of time steps
//// to make test go faster.
//#define N_STEP_PARAM_OPT 10
//#define N_STEP_KINEMATICS 197
#define N_STEP 20


#include "<MOCAP_PATH_MAINFILE>"

Main =
{
  AnyOperationSequence  TestRunApplication =
  {
    AnyOperation& BVH_preprocess = Main.BVH_PreProcess;
    AnyOperation& RunAnalysis = Main.RunAnalysis;
  };


  #ifndef CREATE_IMAGE
    AnyOperation& RunTest = Main.TestRunApplication;
  #else
    #include "../Cameras.any"
    AnyOperation& CameraInitPos = Main.Studies.InverseDynamicStudy.InitialConditions;
    LoadTimeCam.CameraLookAtPoint = Main.HumanModel.BodyModel.Trunk.SegmentsLumbar.PelvisSeg.r +{0,-0.02,0};
    LoadTimeCam.CameraFieldOfView = DesignVar(2);
    LoadTimeCam.CameraDirection  = {-1,0.3,1};
  #endif

};
