//# Defintions for the python test framwork
//ignore_errors = ["'Set Value' operation on this value-object","Orientation close to Gimbal Lock"]
//fatal_warnings = True

#include "../libdef.any"

#path MOCAP_PATH_MAINFILEDIR "<ANYMOCAP_EXAMPLES>/Plug-in-gait_MultiTrial_StandingRef/Subjects/S1/S1_StandingRef/"
#path MOCAP_PATH_MAINFILE "<MOCAP_PATH_MAINFILEDIR>/Main.any"
#define MOCAP_NAME_MAINFILEDIR "S1_StandingRef"

#ifndef TEST_NAME
  #define CREATE_IMAGE 1
#endif

#ifdef CREATE_IMAGE
#path TEMP_PATH "<MOCAP_PATH_MAINFILEDIR>/../../../Output"
#define N_STEP_KINEMATICS 10
#endif


#include "<MOCAP_PATH_MAINFILE>"

Main =
{
  AnyOperation& TestRunApplication = Main.RunParameterIdentification;

  #ifndef CREATE_IMAGE
    AnyOperation& RunTest = Main.TestRunApplication;
  #else
    #include "../Cameras.any"
    AnyOperationSequence CameraInitPos =
    {
      AnyOperation& ref1 = Main.RunAnalysis.LoadParameters;
      AnyOperation& ref2 = Main.Studies.MarkerTracking.Kinematics;
      AnyOperation& ref3 = Main.Studies.InverseDynamicStudy.InitialConditions;
    };
    LoadTimeCam.CameraLookAtPoint = Main.HumanModel.BodyModel.Trunk.SegmentsLumbar.PelvisSeg.r+{0,0,-0.25};
    LoadTimeCam.CameraFieldOfView = DesignVar(1.9);
    LoadTimeCam.CameraDirection  = {0,-1,0.3};
  #endif
};
