//# Defintions for the python test framwork
//ignore_errors = ["'Set Value' operation on"]
//fatal_warnings = True
//# Todo fix warnings below
//expect_errors = [
// "clavicular_part_4.SPLine'  :  Number of",
// "'Extensor_Carpi_Radialis_Brevis.SPLine'  :  Number of allowed",
// "'pectoralis_major_thoracic_part_5.SPLine'  :  Number of allowed",
//]
//pytest_markers=["slow"]


#include "../libdef.any"

#path MOCAP_PATH_MAINFILEDIR "<ANYMOCAP_EXAMPLES>/Plug-in-gait_Simple"
#path MOCAP_PATH_MAINFILE "<MOCAP_PATH_MAINFILEDIR>/FullBody.main.any"
#define MOCAP_NAME_MAINFILEDIR "Plug-in-gait_Simple"


#ifdef TEST_NAME
#define  MOCAP_TEST_FILENAME_PREFIX  TEST_NAME + "_"
#else
#define  MOCAP_TEST_FILENAME_PREFIX  "GUI_"
#define BM_LEG_MODEL _LEG_MODEL_TLEM2_
#define CREATE_IMAGE
#endif

#ifdef CREATE_IMAGE
#undef MOCAP_TEST_FILENAME_PREFIX
#define MOCAP_TEST_FILENAME_PREFIX "FullBody_"
#path TEMP_PATH "<MOCAP_PATH_MAINFILEDIR>/Output"
#endif


#include "<MOCAP_PATH_MAINFILE>"

Main =
{

  AnyOperationSequence  TestRunApplication =
  {
    AnyOperation& ParameterId =  Main.RunParameterIdentification;
    AnyOperation& RunAnalysis = Main.RunAnalysis;
  };

  #ifndef CREATE_IMAGE
    AnyOperation& RunTest = Main.TestRunApplication;
  #else
    #include "../Cameras.any"
    AnyOperationSequence CameraInitPos =
    {
      AnyOperation& ref1 = Main.RunAnalysis.LoadParameters;
      AnyOperation& ref2 = Main.Studies.InverseDynamicStudy.InitialConditions;
    };
    LoadTimeCam.CameraLookAtPoint = {0.5,0.95,0};
    LoadTimeCam.CameraFieldOfView = DesignVar(2);
    LoadTimeCam.CameraDirection  = {-0.5,0.3,1};
  #endif
};
