//# Defintions for the python test framwork
//define = (
// [
//  {'BM_LEG_MODEL':'_LEG_MODEL_TLEM1_'},
//  {'BM_LEG_MODEL':'_LEG_MODEL_TLEM2_'},
// ],
// [
//  {'BM_SCALING':'_SCALING_NONE_'},
//  {'BM_SCALING':'_SCALING_STANDARD_'},
//  {'BM_SCALING':'_SCALING_UNIFORM_'},
//  {'BM_SCALING':'_SCALING_LENGTHMASS_'},
//  {'BM_SCALING':'_SCALING_LENGTHMASSFAT_'},
//  {'BM_SCALING':'_SCALING_XYZ_'},
// ]
//)
//fatal_warnings = True

#include "../libdef.any"

#path MOCAP_PATH_MAINFILEDIR "<ANYMOCAP_EXAMPLES>/Plug-in-gait_Simple"
#path MOCAP_PATH_MAINFILE "<MOCAP_PATH_MAINFILEDIR>/FullBody.main.any"
#define MOCAP_NAME_MAINFILEDIR "Plug-in-gait_Simple"


// Muscles are remove to speed up the test loading.
#define BM_ARM_MUSCLES_LEFT OFF
#define BM_ARM_MUSCLES_RIGHT OFF
#define BM_TRUNK_MUSCLES OFF
#define BM_LEG_MUSCLES_LEFT OFF
#define BM_LEG_MUSCLES_RIGHT OFF


#ifdef TEST_NAME
#define  MOCAP_TEST_FILENAME_PREFIX  TEST_NAME + "_"
#else
#define  MOCAP_TEST_FILENAME_PREFIX  "GUI_"
#define BM_LEG_MODEL _LEG_MODEL_TLEM2_
#define CREATE_IMAGE
#endif

#include "<MOCAP_PATH_MAINFILE>"
