//# Defintions for the python test framwork
//ignore_errors = ["'Set Value' operation on"]
//fatal_warnings = True
//pytest_markers=["slow"]
//save_study=[
//  "Main.Studies.MarkerTracking",
//  "Main.Studies.InverseDynamicStudy",
//]


#include "../libdef.any"

#path MOCAP_PATH_MAINFILEDIR "<ANYMOCAP_EXAMPLES>/Rehazenter-adult-walking-model/Subjects/2014001/2014001_C1_01"
#path MOCAP_PATH_MAINFILE "<MOCAP_PATH_MAINFILEDIR>/Main.any"
#define MOCAP_NAME_MAINFILEDIR "2014001_C1_01"

#define TEST_NAME "hallo"

#path TEMP_PATH "<ANYMOCAP_EXAMPLES>/Rehazenter-adult-walking-model/Output/"

#ifndef TEST_NAME
#define CREATE_IMAGE
#endif

#ifdef CREATE_IMAGE
#undef MOCAP_TEST_FILENAME_PREFIX
#endif


#include "<MOCAP_PATH_MAINFILE>"

Main =
{

  AnyOperationSequence  TestRunApplication =
  {
    //AnyOperation& ParameterId =  Main.RunParameterIdentification;
    AnyOperation& RunAnalysis = Main.RunAnalysis;
  };

  #ifndef CREATE_IMAGE
    AnyOperation& RunTest = Main.TestRunApplication;
  #else
    #include "../Cameras.any"
    AnyOperationSequence CameraInitPos =
    {
      AnyOperation& ref1 = Main.RunAnalysis.LoadParameters;
      AnyOperation& ref2 = Main.Studies.InverseDynamicStudy.InitialConditions;
    };
    LoadTimeCam.CameraLookAtPoint = {0.5,0.95,0};
    LoadTimeCam.CameraFieldOfView = DesignVar(2);
    LoadTimeCam.CameraDirection  = {-0.5,0.3,1};
  #endif
};
