//define = [
//  {'BM_LEG_MODEL':'_LEG_MODEL_TLEM1_'},
//  {'BM_LEG_MODEL':'_LEG_MODEL_TLEM2_'},
//]
//ignore_errors = ['FileReader.FileName']
// Test related setup.


#include "../libdef.any"


#ifndef BM_LEG_MODEL
#define BM_LEG_MODEL_LEG_MODEL_TLEM2_
#endif

#path MOCAP_PATH_MAINFILEDIR "<ANYMOCAP_EXAMPLES>/SpecialFeatures/"
#define MOCAP_NAME_MAINFILEDIR "SpecialFeatures"

#ifndef TEST_NAME
#define CREATE_IMAGE
#endif

#path TEMP_PATH "Output"

#include "<ANYMOCAP_EXAMPLES>/SpecialFeatures/ForcePlateSurfaceOffset.main.any"


Main = {
  #ifdef CREATE_IMAGE
  #include "../Cameras.any"
    AnyOperationDummy CameraInitPos = {};
    LoadTimeCam.CameraUpDirection = {0,0,1};
    LoadTimeCam.CameraLookAtPoint = {0,0.5,0.85};
    LoadTimeCam.CameraFieldOfView = DesignVar(2);
    LoadTimeCam.CameraDirection  = {-1,1,0.2};
  #endif
};
