//save_study="Main.Study"

#include "../libdef.any"

#ifndef TEST_NAME
#define CREATE_IMAGE 1

#endif


#include "../../Application/Examples/AirlinePassenger/AirlinePassenger.main.any"

Main =
{
#ifndef CREATE_IMAGE
  AnyOperation& RunTest = Main.RunApplication;
  Study = { FixTestStudyConfig TestStudyConfig = {  }; };
#else
  #include "../Cameras.any"
  // Use a a spical time for the initial position picture.
  AnyOperationSequence CameraInitPos =
  {
     AnyOperationSetValue setTime =
     {
       AnyFloat t_custom  = 33;
       Source = {&t_custom};
       Target = {&Main.Study.tStart};
     };
     AnyOperation& CameraInitPos = Main.Study.InitialConditions;
  };
  LoadTimeCam.CameraLookAtPoint = {0.25,-0.59,0};
  LoadTimeCam.CameraFieldOfView = DesignVar(1.45);
  LoadTimeCam.CameraDirection  = {0,0,1};
#endif
};
