//save_study = "Main.Study"

#include "../libdef.any"

#include "../../Application/Examples/BenchPress/BenchPress.Main.any"

Main =
{


AnyInt TestTrigger = DesignVar(0);
OPERATION_TEST_TRIGGER(Main.Study.InverseDynamics.PreOperation, Main.TestTrigger);
AnyFolder &StudyRef = TestStudy;

StudyRef ={
  SymmetryCheck.MirrorPlane = {1,1,-1};
  #include "../Symmetry/DynamicTest/Model/CheckFullBody.any"
};


  // Recreate the study to make test run faster
  AnyOperationSequence TestRunApplication =
  {
     AnyOperation& Calibration = Main.RunApplication.CalibrationAnal;
     AnyOperation& Inv = Main.TestStudy.InverseDynamics;
  };
  AnyBodyStudy TestStudy = {
    AnyFolder &Model = .Model;
    tEnd = 10.0;
    Gravity = {0.0, -9.81, 0.0};
    nStep = 10;
  }; // End of study


#ifndef CREATE_IMAGE
  AnyOperation& RunTest = Main.TestRunApplication;
  Study = { FixTestStudyConfig TestStudyConfig = {  }; };
#else
  #include "../Cameras.any"
  AnyOperation& CameraInitPos = Main.Study.InitialConditions;
  LoadTimeCam.CameraLookAtPoint = {-0.14,0.2,0};
  LoadTimeCam.CameraFieldOfView = DesignVar(1.8);
  LoadTimeCam.CameraDirection  = {0,0,1};
#endif


};
