//compare_study = 'Main.Study'

#include "../AnyTest_Templates.any"

#include "../../Application/Examples/BikeModel2D/BikeModel2D.main.any"

Main =
{
  AnyOperation& RunTest = Main.RunApplication;
};
