#include "../libdef.any"

#include "../../Application/Validation/EvaluateMaxExternalLoading/EvalMaxLoad.main.any"

Main =
{
#ifndef CREATE_IMAGE
//  AnyOperation& RunTest = Main.RunApplication;
  Study = { FixTestStudyConfig TestStudyConfig = {  }; };
#else
  #include "../Cameras.any"
  AnyOperation& CameraInitPos = Main.Study.InitialConditions;
  LoadTimeCam.CameraLookAtPoint = {0.15,0.3,0};
  LoadTimeCam.CameraFieldOfView = DesignVar(1);
  LoadTimeCam.CameraDirection  = {0,0,1};
#endif
};
