//save_study = None
//define = [
//    {'BM_LEG_MODEL': '_LEG_MODEL_TLEM2_',
//     'BM_ARM_LEFT':'OFF','BM_ARM_RIGHT':'OFF'},
//    {'BM_LEG_MODEL': '_LEG_MODEL_Leg_',
//     'BM_ARM_LEFT':'OFF','BM_ARM_RIGHT':'OFF'},
//    {'BM_LEG_MODEL': '_LEG_MODEL_TLEM_',
//     'BM_ARM_LEFT':'OFF','BM_ARM_RIGHT':'OFF'},
//    {'BM_LEG_MODEL': 'OFF',
//     'BM_ARM_LEFT':'ON','BM_ARM_RIGHT':'ON'}
//]


#include "../libdef.any"

#ifndef TEST_NAME
  #define BM_LEG_MODEL _LEG_MODEL_TLEM2_
  #define BM_ARM_LEFT 0
  #define BM_ARM_RIGHT 0
#endif

#include "../../Application/Validation/EvaluateMomentArms/EvaluateMomentArms.main.any"
