//save_study = "Main.Study"
#include "../libdef.any"

#include "../../Application/Examples/ExoskeletonContactElbow/ExoskeletonContact_Elbow.Main.any"

Main =
{
#ifndef CREATE_IMAGE
  AnyOperation& RunTest = Main.RunApplication;
#else
  #include "../Cameras.any"
  AnyOperation& CameraInitPos = Main.Study.InitialConditions;
  LoadTimeCam.CameraLookAtPoint = {-0.5,0.3,0};
  LoadTimeCam.CameraFieldOfView = DesignVar(1.45);
  LoadTimeCam.CameraDirection  = {0,0,1};
#endif
};
