//define = [
//  {'BM_SCALING':'_SCALING_STANDARD_'},
//  {'BM_SCALING':'_SCALING_UNIFORM_'},
//  {'BM_SCALING':'_SCALING_LENGTHMASS_'},
//  {'BM_SCALING':'_SCALING_LENGTHMASSFAT_'},
//  {'BM_SCALING':'_SCALING_XYZ_'},
//]
//save_study = "Main.Study"

#include "../libdef.any"

#ifndef TEST_NAME
 #define CREATE_IMAGE

#endif

#include "../../Application/Examples/FemoralTorsion/StandingModel.Main.any"

Main =
{
#ifndef CREATE_IMAGE
  AnyOperation& RunTest = Main.RunApplication;
  Study = { FixTestStudyConfig TestStudyConfig = {  }; };
#else
  #include "../Cameras.any"
  AnyOperation& CameraInitPos = Main.Study.InverseDynamics;
  LoadTimeCam.CameraLookAtPoint = {0.1,0.87,0};
  LoadTimeCam.CameraFieldOfView = DesignVar(2);
  LoadTimeCam.CameraDirection  = {1,0.2,0.5};
#endif
};
