//pytest_markers=["slow"]
//save_study=["Main.Study"]
//ignore_errors=["'expect' failed"]

#include "../libdef.any"

#include "../../Application/Validation/FlexibleThorax/DiscPressure/WilkeSpinalDiscPressure/SpinePressureLyingOnBack/SpinePressureLyingOnBack.main.any"

#include "../tools.any"

Main =
{


AnyFolder &StudyRef = Study;
StudyRef ={
  SymmetryCheck.MirrorPlane = {1,1,-1};
  #include "../Symmetry/DynamicTest/Model/CheckFullBody.any"
};


  Main.Study =
  {
    AnyVar RefValue = 111.4;
    EXPECT_RANGE(L5Sacrum, Main.Study.L5SacrumReac, 0.95*RefValue, 1.05*RefValue, Main.TestTrigger, "L5Sacrum outside validation");
    AnyVar todo = notice(0, "TODO: check L5SacrumReac");
  };

  AnyInt TestTrigger = DesignVar(0);

  OPERATION_TEST_TRIGGER(Main.Study.InverseDynamics.PreOperation, Main.TestTrigger);

#ifndef CREATE_IMAGE
  AnyOperation& RunTest = Main.RunApplication;
#else
  #include "../Cameras.any"
  AnyOperation& CameraInitPos = Main.Study.InitialConditions;
  LoadTimeCam.CameraLookAtPoint = {0.15,-0.5,0};
  LoadTimeCam.CameraFieldOfView = DesignVar(2);
  LoadTimeCam.CameraDirection  = {0,0,1};
#endif
};
