//# Note. Since these tests include main files from other
//# applications they alter the ANYBODY_PATH_MAINFILEDIR and
//# ANYBODY_PATH_MAINFILE preprocessor flags.
//#
//# If these flags are important to the model they must be mocked by the
//# test framework. This can be done by adding the following test directives.
//# path = {'ANYBODY_PATH_MAINFILEDIR':'../../Application/Examples/FreePosture',
//#         'ANYBODY_PATH_MAINFILE':'../../Application/Examples/FreePosture/FreePostureFullBodyShoulderRhythmMove.Main.any' }
//#
//ignore_errors = ["Hand model positions asymmetric", "HandPositions"]
//save_study=["Main.Study"]

#include "../libdef.any"

#include "../../Application/Examples/FreePosture/FreePostureFullBodyShoulderRhythmMove.Main.any"

Main =
{
       //check symmetry in model
 AnyInt TestTrigger = DesignVar(0);
OPERATION_TEST_TRIGGER(Main.Study.InverseDynamics.PreOperation, Main.TestTrigger);
AnyFolder &StudyRef = Study;
StudyRef ={
  SymmetryCheck.MirrorPlane = {1,1,-1};
  #include "../Symmetry/DynamicTest/Model/CheckFullBody.any"
};

#ifndef CREATE_IMAGE
  AnyOperation& RunTest = Main.RunApplication;
  Study = { FixTestStudyConfig TestStudyConfig = {  }; };
#else
  #include "../Cameras.any"
  AnyOperation& CameraInitPos = Main.Study.InitialConditions;
  LoadTimeCam.CameraLookAtPoint = {0,0.85,0};
  LoadTimeCam.CameraFieldOfView = DesignVar(1.9);
  LoadTimeCam.CameraDirection  = {0,0,1};
#endif
};
