//define = [
//    {'BM_LEG_MODEL': '_LEG_MODEL_LEG_'},
//    {'BM_LEG_MODEL': '_LEG_MODEL_TLEM1_'},
//]
//save_study=["Main.Study"]

#include "../libdef.any"


#ifndef TEST_NAME
  #define BM_LEG_MODEL 3
#endif

#include "../../Application/Examples/FreePosture/FreePostureFullBodyStatic.Main.any"


Main =
{
#ifndef CREATE_IMAGE
  AnyOperation& RunTest = Main.RunApplication;
  Study = { FixTestStudyConfig TestStudyConfig = {  }; };
#else
  #include "../Cameras.any"
  AnyOperation& CameraInitPos = Main.Study.InitialConditions;
  LoadTimeCam.CameraLookAtPoint = {0,0.85,0};
  LoadTimeCam.CameraFieldOfView = DesignVar(1.9);
  LoadTimeCam.CameraDirection  = {0,0,1};
#endif
};
