//save_study=["Main.Study"]

#include "../libdef.any"

#include "../../Application/Validation/GaitVaughan/GaitVaughan.main.any"

Main =
{
#ifndef CREATE_IMAGE
  AnyOperation& RunTest = Main.RunApplication;
  Study = { FixTestStudyConfig TestStudyConfig = {  }; };
#else
  #include "../Cameras.any"
  AnyOperation& CameraInitPos = Main.Study.InitialConditions;
  LoadTimeCam.CameraLookAtPoint = {0,0,0.8};
  LoadTimeCam.CameraFieldOfView = DesignVar(2);
  LoadTimeCam.CameraDirection  = {0,-1.0,0.0000000000001};
#endif
};
