//save_study=["Main.Study"]

#include "../libdef.any"

#include "../../Application/Validation/MandibleChewingAndClenching/MandibleChewingAndClenching.main.any"

Main =
{
#ifndef CREATE_IMAGE
  AnyOperation& RunTest = Main.RunApplication;
  Study = { FixTestStudyConfig TestStudyConfig = {  }; };
#else
  #include "../Cameras.any"
  AnyOperation& CameraInitPos = Main.Study.InitialConditions;
  LoadTimeCam.CameraUpDirection = {0,0,1};
  LoadTimeCam.CameraLookAtPoint = {0,0,0};
  LoadTimeCam.CameraFieldOfView = DesignVar(0.65);
  LoadTimeCam.CameraDirection  = {1,0,0};
#endif
};
