//save_study=["Main.Study"]

#include "../libdef.any"

#include "../../Application/Examples/MaxForceNeckModel/MaxForceNeckModel.main.any"

Main =
{
#ifndef CREATE_IMAGE
  AnyOperation& RunTest = Main.RunApplication;
  Study = { FixTestStudyConfig TestStudyConfig = {  }; };
#else
  #include "../Cameras.any"
  AnyOperation& CameraInitPos = Main.Study.InitialConditions;
  LoadTimeCam.CameraLookAtPoint = {0.1,0.29,0};
  LoadTimeCam.CameraFieldOfView = DesignVar(1);
  LoadTimeCam.CameraDirection  = {0,0,1};
#endif
};
