//# Note. Since these tests include main files from other
//# applications they alter the ANYBODY_PATH_MAINFILEDIR and
//# ANYBODY_PATH_MAINFILE preprocessor flags.
//#
//# If these flags are important to the model they must be mocked by the
//# test framework. This can be done by adding the following test directives.
//# path = {'ANYBODY_PATH_MAINFILEDIR':'../../Application/Examples/MoCapModel',
//#         'ANYBODY_PATH_MAINFILE':'../../Application/Examples/MoCapModel/MoCap_LowerBody.main.any' }
//#
//define = [
//  { 'MotionAndParameterOptimizationModel':'1',
//    'InverseDynamicModel':'0'},
//  { 'MotionAndParameterOptimizationModel':'0',
//    'InverseDynamicModel':'1'},
//]

#include "../libdef.any"

#include "../../Application/Examples/Deprecated/MoCapModel/MoCap_LowerBody.main.any"


#ifndef TEST_NAME
#define MotionAndParameterOptimizationModel 1
#define InverseDynamicModel 0
#endif


#if MotionAndParameterOptimizationModel == 1
#define OutputFileNamePrefix "_TEST_LowerBody"
#define _MACRO_ Main.RunMotionAndParameterOptimizationSequence
#endif

#if InverseDynamicModel == 1
#define _MACRO_ Main.InverseDynamicAnalysisSequence
#endif

Main =
{
  #ifndef _MACRO_
  #define _MACRO_ Main.InverseDynamicAnalysisSequence
  #endif

  AnyOperation& RunTest = _MACRO_;
};
