//save_study = "Main.Study"
#include "../libdef.any"

#include "../../Application/Examples/PedalDemo/PedalDemo.Main.any"

#ifndef TEST_NAME
#define CREATE_IMAGE 1
#define TEST_NAME "test_PedalDemo_0"
#endif

Main =
{
#ifndef CREATE_IMAGE
  AnyOperation& RunTest = Main.RunApplication;
  Study = { FixTestStudyConfig TestStudyConfig = {  }; };
#else
  #include "../Cameras.any"
  AnyOperation& CameraInitPos = Main.Study.InitialConditions;
  LoadTimeCam.CameraLookAtPoint = {-0.5,0.3,0};
  LoadTimeCam.CameraFieldOfView = DesignVar(1.45);
  LoadTimeCam.CameraDirection  = {0,0,1};
#endif
};
