//# Note. Since these tests include main files from other
//# applications they alter the ANYBODY_PATH_MAINFILEDIR and
//# ANYBODY_PATH_MAINFILE preprocessor flags.
//#
//# If these flags are important to the model they must be mocked by the
//# test framework. This can be done by adding the following test directives.
//# path = {'ANYBODY_PATH_MAINFILEDIR':'../../Application/Examples/SeatedHumanFullWithNeck',
//#         'ANYBODY_PATH_MAINFILE':'../../Application/Examples/SeatedHumanFullWithNeck/SeatedHumanFullWithNeck.main.any' }
//#
//save_study=["Main.Study"]

#include "../libdef.any"

#include "../../Application/Examples/SeatedHumanFullWithNeck/SeatedHumanFullWithNeck.main.any"

Main =
{
#ifndef CREATE_IMAGE
  AnyOperation& RunTest = Main.RunApplication;
  Study = { FixTestStudyConfig TestStudyConfig = {  }; };
#else
  #include "../Cameras.any"
  AnyOperation& CameraInitPos = Main.Study.InitialConditions;
  LoadTimeCam.CameraLookAtPoint = {0.3,-0.75,0};
  LoadTimeCam.CameraFieldOfView = DesignVar(1.8);
  LoadTimeCam.CameraDirection  = {0,0,1};
#endif
};
