#include "../../Application/Validation/WilkeSpinalDiscPressure/SpinePressureLyingOnBack/SpinePressureLyingOnBack.main.any"

#include "../test_tools.any"

Main =
{

  Main.Study =
  {
    EXPECT_RANGE(L5Sacrum, Main.Study.L5SacrumReac, 145, 153, Main.TestTrigger, "L5Sacrum outside validtion");
  };

  AnyInt TestTrigger = DesignVar(0);

  OPERATION_TEST_TRIGGER(Main.Study.InverseDynamics.PreOperation, Main.TestTrigger);

  AnyOperation& RunTest = Main.RunApplication;

};
