//save_study=["Main.Study"]
//fatal_warnings = ["Deltoid"]
//define =
//[
//    {'LOAD': '10', 'EXPECTED_PRESURE', '500'},
//    {'LOAD': '20', 'EXPECTED_PRESURE', '500'},
//    {'LOAD': '40', 'EXPECTED_PRESURE', '500'},
//    {'LOAD': '50', 'EXPECTED_PRESURE', '500'},
//]
//ignore_errors=["'expect' failed"]


#include "../libdef.any"

#include "../../Application/Validation/WilkeSpinalDiscPressure/SpinePressureStanding/SpinePressureStanding.Main.any"

#include "../tools.any"

Main =
{

  Main.Study =
  {
    AnyVar RefValue = 595.7;
    EXPECT_RANGE(L5Sacrum, Main.Study.L5SacrumReac, 0.95*RefValue, 1.05*RefValue, Main.TestTrigger, "L5Sacrum outside validation");
  };

  AnyInt TestTrigger = DesignVar(0);

  OPERATION_TEST_TRIGGER(Main.Study.InverseDynamics.PreOperation, Main.TestTrigger);

#ifndef CREATE_IMAGE
  AnyOperation& RunTest = Main.RunApplication;
#else
  #include "../Cameras.any"
  AnyOperation& CameraInitPos = Main.Study.InitialConditions;
  LoadTimeCam.CameraLookAtPoint = {0.1,0.9,0};
  LoadTimeCam.CameraFieldOfView = DesignVar(2);
  LoadTimeCam.CameraDirection  = {0,0,1};
#endif
};
