#include "../../Application/Validation/WilkeSpinalDiscPressure/SpinePressureStandingLiftClose/SpinePressureStandingLiftClose.main.any"

#include "../test_tools.any"

Main =
{

  Main.Study =
  {
    EXPECT_RANGE(L5Sacrum, Main.Study.L5SacrumReac, 1180, 1304, Main.TestTrigger, "L5Sacrum outside validtion");
  };

  AnyInt TestTrigger = DesignVar(0);

  OPERATION_TEST_TRIGGER(Main.Study.InverseDynamics.PreOperation, Main.TestTrigger);

  AnyOperation& RunTest = Main.RunApplication;

};
