//save_study = "Main.Study"
#include "../libdef.any"

#include "../../Application/Examples/StandingPosturePredictionWithLoad/StandingPosturePrediction.main.any"


#ifndef TEST_NAME
   #define CREATE_IMAGE 1
#endif


Main =
{

   #ifndef CREATE_IMAGE
     AnyOperation& RunTest = Main.WidgetOperation;
   #else
     #define _MODEL_UP_DIRECTION z
     #include "../Cameras.any"
     AnyOperation& CameraInitPos = Main.Study.Kinematics;
     LoadTimeCam.CameraLookAtPoint = {0.2, 0.09769414, 0.76};
     LoadTimeCam.CameraFieldOfView = DesignVar(1.75);
     LoadTimeCam.CameraDirection  = {0.5, -1, 0.5};
   #endif


};
