//save_study=["Main.Study"]

#include "../libdef.any"

#include "../../Application/Examples/ThoracicModel/Thoracic.main.any"

Main =
{
#ifndef CREATE_IMAGE
  AnyOperation& RunTest = Main.RunApplication;
#else
  #include "../Cameras.any"
  AnyOperationSequence CameraInitPos =  {
    // Use a a spical time for the initial position picture.
     AnyOperationSetValue setTime =  {
       AnyFloat t_custom  = 1.0;
       Source = {&t_custom};
       Target = {&Main.Study.tStart};
     };
     AnyOperation& CameraInitPos = Main.Study.InitialConditions;
  };


  LoadTimeCam.CameraLookAtPoint = {-0.060, 1.36, -0.017};
  LoadTimeCam.CameraFieldOfView = DesignVar(1.2);
  LoadTimeCam.CameraDirection  = {1,0,0};
#endif
};
