//expect_errors=["extrapolations are not allowed", "Error in evaluation", "Model loading skipped"]
//save_study=["Main.Study"]

#include "../libdef.any"

#include "../../Application/Examples/WheelChairRancho/WheelChairRancho.Main.any"

Main =
{
#ifndef CREATE_IMAGE
  AnyOperation& RunTest = Main.RunApplication;
  Study = { FixTestStudyConfig TestStudyConfig = {  }; };
#else
  #include "../Cameras.any"
  AnyOperation& CameraInitPos = Main.Study.InitialConditions;
  LoadTimeCam.CameraLookAtPoint = {3,0.0,0.9};
  LoadTimeCam.CameraFieldOfView = DesignVar(1.4);
  LoadTimeCam.CameraDirection  = {0,-1,0.00000001};
#endif
};
