//# Note. Since these tests include main files from other
//# applications they alter the ANYBODY_PATH_MAINFILEDIR and
//# ANYBODY_PATH_MAINFILE preprocessor flags.
//#
//# If these flags are important to the model they must be mocked by the
//# test framework. This can be done by adding the following test directives.
//# path = {'ANYBODY_PATH_MAINFILEDIR':'../../Application/Examples/WheelTurn',
//#         'ANYBODY_PATH_MAINFILE':'../../Application/Examples/WheelTurn/WheelTurn.Main.any' }
//#
#include "../AnyTest_Templates.any"

#include "../../Application/Examples/WheelTurn/WheelTurn.Main.any"

Main =
{
  AnyOperation& RunTest = Main.RunApplication;
};
