//define = (
//  [
//    {'BM_ARM_MUSCLES_LEFT': 'OFF'},
//    {'BM_ARM_MUSCLES_LEFT': '_MUSCLES_SIMPLE_'},
//    {'BM_ARM_MUSCLES_LEFT': '_MUSCLES_3E_HILL_'},
//  ],
//  [
//    {'BM_ARM_MUSCLES_RIGHT': 'OFF'},
//    {'BM_ARM_MUSCLES_RIGHT': '_MUSCLES_SIMPLE_'},
//    {'BM_ARM_MUSCLES_RIGHT': '_MUSCLES_3E_HILL_'},
//  ],
//  [
//    {'BM_TRUNK_MUSCLES': 'OFF'},
//    {'BM_TRUNK_MUSCLES': '_MUSCLES_SIMPLE_'},
//  ],
//  [
//    {'BM_TRUNK_NECK': 'OFF'},
//    {'BM_TRUNK_NECK': 'ON', 'BM_TRUNK_NECK_MUSCLES': 'OFF'},
//    {'BM_TRUNK_NECK': 'ON', 'BM_TRUNK_NECK_MUSCLES': '_MUSCLES_SIMPLE_'},
//    {'BM_TRUNK_NECK': 'ON', 'BM_TRUNK_NECK_MUSCLES': '_MUSCLES_SIMPLE_',
//     'BM_TRUNK_NECK_SIMPLE_MUSCLES_ONLY_ON_NECK': 'ON'},
//  ],
//)
//ignore_errors = ['BodyModel.UnhallowedCombination','Model loading skipped']
//

#path ANYBODY_PATH_OUTPUT "."
#include "libdef.any"

#ifndef TEST_NAME
  #define BM_ARM_MUSCLES_LEFT 2
  #define BM_ARM_MUSCLES_RIGHT 2
  #define BM_TRUNK_MUSCLES 1
  #define BM_TRUNK_NECK 1
  #define BM_TRUNK_NECK_MUSCLES 1
  #define BM_TRUNK_NECK_SIMPLE_MUSCLES_ONLY_ON_NECK 1
  #define TEST_NAME "GUI"
#endif

Main =
{
  // #path HTML_DOC "<ANYBODY_PATH_BODY>\Documentation\BM_Config\index.html"
  #include "<ANYBODY_PATH_BODY>\HumanModel.any"

  AnyOperationDummy RunApplication = {};
};
