//define = (
//  [
//    {'BM_LEG_MODEL':'OFF'},
//    {'BM_LEG_MODEL':'_LEG_MODEL_Leg_'},
//    {'BM_LEG_MODEL':'_LEG_MODEL_TLEM_'},
//    {'BM_LEG_MODEL':'_LEG_MODEL_TLEM2_'},
//  ],
//  [ {'BM_TRUNK_NECK': 'OFF'},
//    {'BM_TRUNK_NECK': 'ON'},
//  ],
//  [
//    {'BM_ARM_RIGHT': 'OFF'},
//    {'BM_ARM_RIGHT': 'ON'},
//  ],
//  [
//    {'BM_ARM_DETAIL_HAND_RIGHT': 'OFF'},
//    {'BM_ARM_DETAIL_HAND_RIGHT': 'ON'},
//  ],
//)
//ignore_errors = ['BodyModel.UnhallowedCombination','Model loading skipped']
//
#path ANYBODY_PATH_OUTPUT "."
#include "libdef.any"

#ifdef BM_ARM_RIGHT
#define BM_ARM_LEFT BM_ARM_RIGHT
#endif

#ifdef BM_ARM_DETAIL_HAND_RIGHT
#define BM_ARM_DETAIL_HAND_LEFT BM_ARM_DETAIL_HAND_RIGHT
#endif
Main =
{
  // #include "<ANYBODY_PATH_BODY>\Documentation\BodyModel.parameters.any"
  #include "<ANYBODY_PATH_BODY>\HumanModel.any"

  AnyOperationDummy RunApplication = {};
};
