//define = (
//  [
//    {'BM_LEG_RIGHT':'CONST_LEG_MODEL_OFF'},
//    {'BM_LEG_RIGHT':'CONST_LEG_MODEL_Leg'},
//    {'BM_LEG_RIGHT':'CONST_LEG_MODEL_TLEM'},
//  ],
//  [ {'BM_TRUNK_NECK': 'OFF'},
//    {'BM_TRUNK_NECK': 'ON'},
//  ],
//  [
//    {'BM_ARM_RIGHT': 'OFF'},
//    {'BM_ARM_RIGHT': 'ON'},
//  ],
//  [
//    {'BM_ARM_DETAIL_HAND_RIGHT': 'CONST_HAND_SIMPLE'},
//    {'BM_ARM_DETAIL_HAND_RIGHT': 'CONST_HAND_DETAILED'},
//  ],
//)
//ignore_errors = ['BodyModel.UnhallowedCombination','Model loading skipped']
//
#path ANYBODY_PATH_OUTPUT "."
#include "libdef.any"

// MIRROR THE INPUTS TO THE LEFT SIDE
#ifdef BM_LEG_RIGHT
#define BM_LEG_LEFT BM_LEG_RIGHT
#endif

#ifdef BM_ARM_RIGHT
#define BM_ARM_LEFT BM_ARM_RIGHT
#endif

#ifdef BM_ARM_DETAIL_HAND_RIGHT
#define BM_ARM_DETAIL_HAND_LEFT BM_ARM_DETAIL_HAND_RIGHT
#endif

Main =
{
  // #include "<ANYBODY_PATH_BODY>\Documentation\BodyModel.parameters.any"
  #include "<ANYBODY_PATH_BODY>\HumanModel.any"

  AnyOperationDummy RunApplication = {};
};
