//define = (
//  [
//    {'BM_JOINT_TYPE_KNEE_RIGHT':'_JOINT_TYPE_DEFAULT_',
//     'BM_JOINT_TYPE_KNEE_LEFT':'_JOINT_TYPE_DEFAULT_',
//     'BM_JOINT_TYPE_PATELLOFEMORAL_RIGHT':'_JOINT_TYPE_DEFAULT_',
//     'BM_JOINT_TYPE_PATELLOFEMORAL_LEFT':'_JOINT_TYPE_DEFAULT_',
//     'BM_JOINT_TYPE_ANKLE_RIGHT':'_JOINT_TYPE_DEFAULT_',
//     'BM_JOINT_TYPE_ANKLE_LEFT':'_JOINT_TYPE_DEFAULT_',
//     'BM_JOINT_TYPE_SUBTALAR_RIGHT':'_JOINT_TYPE_DEFAULT_',
//     'BM_JOINT_TYPE_SUBTALAR_LEFT':'_JOINT_TYPE_DEFAULT_',
//    },
//    {'BM_JOINT_TYPE_KNEE_RIGHT':'_JOINT_TYPE_BONY_LANDMARK_',
//     'BM_JOINT_TYPE_KNEE_LEFT':'_JOINT_TYPE_BONY_LANDMARK_',
//     'BM_JOINT_TYPE_PATELLOFEMORAL_RIGHT':'_JOINT_TYPE_BONY_LANDMARK_',
//     'BM_JOINT_TYPE_PATELLOFEMORAL_LEFT':'_JOINT_TYPE_BONY_LANDMARK_',
//     'BM_JOINT_TYPE_ANKLE_RIGHT':'_JOINT_TYPE_BONY_LANDMARK_',
//     'BM_JOINT_TYPE_ANKLE_LEFT':'_JOINT_TYPE_BONY_LANDMARK_',
//     'BM_JOINT_TYPE_SUBTALAR_RIGHT':'_JOINT_TYPE_BONY_LANDMARK_',
//     'BM_JOINT_TYPE_SUBTALAR_LEFT':'_JOINT_TYPE_BONY_LANDMARK_',
//    },
//  ],
//)
//ignore_errors = ['BodyModel.UnhallowedCombination','Model loading skipped']
//
#include "libdef.any"


Main =
{
  // #path HTML_DOC "<AMMR_PATH_DOC>/bm_config/index.html"
  #include "<ANYBODY_PATH_BODY>\HumanModel.any"

  AnyOperationDummy RunApplication = {};
};
