//define = (
//  [
//    {'BM_TRUNK_THORACIC_STERNUM_TOPOLOGY': 2},
//    {'BM_TRUNK_THORACIC_STERNUM_TOPOLOGY': 4},
//  ],
//  [
//    {'BM_TRUNK_THORACIC_MODEL': 'OFF'},
//    {'BM_TRUNK_THORACIC_MODEL': 'ON'},
//  ],
//  [
//    {'BM_TRUNK_CAVITY_MODEL': 'OFF'},
//    {'BM_TRUNK_CAVITY_MODEL': 'ON'},
//  ],
//  [
//    {'BM_ARM_RIGHT': 'OFF'},
//    {'BM_ARM_RIGHT': 'ON'},
//  ],
//  [
//    {'ALL_MUSCLES_AND_LIGAMENTS': 'OFF'},
//    {'ALL_MUSCLES_AND_LIGAMENTS': 'ON'},
//  ],

//)
//ignore_errors = ['BodyModel.UnhallowedCombination','Model loading skipped']
//
#include "libdef.any"


#ifndef TEST_NAME
#define ALL_MUSCLES_AND_LIGAMENTS OFF
#define BM_ARM_RIGHT ON
#define BM_TRUNK_CAVITY_MODEL ON
#define BM_TRUNK_THORACIC_MODEL ON
#define BM_TRUNK_THORACIC_STERNUM_TOPOLOGY 2

#endif

#ifdef ALL_MUSCLES_AND_LIGAMENTS
#define BM_LEG_MUSCLES_RIGHT ALL_MUSCLES_AND_LIGAMENTS
#define BM_LEG_MUSCLES_LEFT ALL_MUSCLES_AND_LIGAMENTS
#define BM_ARM_MUSCLES_RIGHT ALL_MUSCLES_AND_LIGAMENTS
#define BM_ARM_MUSCLES_LEFT ALL_MUSCLES_AND_LIGAMENTS
#define BM_TRUNK_MUSCLES ALL_MUSCLES_AND_LIGAMENTS
#define BM_TRUNK_LIGAMENTS ALL_MUSCLES_AND_LIGAMENTS
#define BM_CERVICAL_MUSCLES ALL_MUSCLES_AND_LIGAMENTS
#endif

#ifdef BM_ARM_RIGHT
#define BM_ARM_LEFT BM_ARM_RIGHT
#endif

#define BM_LEG_MODEL OFF
#define BM_SCALING _SCALING_XYZ_


Main =
{
  // #path HTML_DOC "<AMMR_PATH_DOC>/bm_config/index.html"
  #include "<ANYBODY_PATH_BODY>\HumanModel.any"

  AnyOperationDummy RunApplication = {};
};
