//define = (
//  [
//    {'BM_LEG_LEFT': '_LEG_MODEL_TLEM2_',
//     'BM_LEG_RIGHT': '_LEG_MODEL_TLEM2_'},
//    {'BM_LEG_LEFT': '_LEG_MODEL_TLEM_',
//     'BM_LEG_RIGHT': '_LEG_MODEL_TLEM_'},
//    {'BM_LEG_LEFT': '_LEG_MODEL_Leg_',
//     'BM_LEG_RIGHT': '_LEG_MODEL_Leg_'},
//  ],
//  [
//    {'BM_LEG_MUSCLES_LEFT': '_MUSCLES_NONE_'},
//    {'BM_LEG_MUSCLES_LEFT': '_MUSCLES_SIMPLE_'},
//    {'BM_LEG_MUSCLES_LEFT': '_MUSCLES_3E_HILL_'},
//  ],
//  [
//    {'BM_LEG_MUSCLES_RIGHT': '_MUSCLES_NONE_'},
//    {'BM_LEG_MUSCLES_RIGHT': '_MUSCLES_SIMPLE_'},
//    {'BM_LEG_MUSCLES_RIGHT': '_MUSCLES_3E_HILL_'},
//  ],
//  [
//    {'BM_TRUNK_MUSCLES': '_MUSCLES_NONE_'},
//    {'BM_TRUNK_MUSCLES': '_MUSCLES_SIMPLE_'},
//  ],
//)
//ignore_errors = ['BodyModel.UnhallowedCombination','Model loading skipped']
//

#path ANYBODY_PATH_OUTPUT "."
#include "libdef.any"

#ifndef TEST_NAME
  #define BM_LEG_LEFT 2
  #define BM_LEG_RIGHT 2
  #define BM_LEG_MUSCLES_LEFT 1
  #define BM_LEG_MUSCLES_RIGHT 0
  #define BM_TRUNK_MUSCLES 0
#endif

Main =
{
  // #include "<ANYBODY_PATH_BODY>\Documentation\BodyModel.parameters.any"
  #include "<ANYBODY_PATH_BODY>\HumanModel.any"

  AnyOperationDummy RunApplication = {};
};
