//define = (
//  [
//    {'BM_TRUNK_EXPERIMENTAL_RECTUS_ABDOMINIS': 'OFF'},
//    {'BM_TRUNK_EXPERIMENTAL_RECTUS_ABDOMINIS': 'ON'},
//  ],
//)
//ignore_errors = ['BodyModel.UnhallowedCombination','Model loading skipped']
//
#include "libdef.any"

#define BM_LEG_MODEL OFF
#define BM_ARM_RIGHT ON
#define BM_ARM_LEFT ON
#define BM_TRUNK_THORACIC_MODEL ON
#define BM_TRUNK_CAVITY_MODEL ON


#ifndef TEST_NAME

#define BM_TRUNK_EXPERIMENTAL_RECTUS_ABDOMINIS ON

#endif


Main =
{
  // #path HTML_DOC "<AMMR_PATH_DOC>/bm_config/index.html"
  #include "<ANYBODY_PATH_BODY>\HumanModel.any"

  AnyOperationDummy RunApplication = {};
};
