//define = (
//   [
//    {'BM_JOINT_TYPE_KNEE_RIGHT':'_JOINT_TYPE_DEFAULT_'},
//    {'BM_JOINT_TYPE_KNEE_RIGHT':'_JOINT_TYPE_USERDEFINED_'},
//   ],[
//    {'BM_LEG_MUSCLES_BOTH':'OFF'},
//    {'BM_LEG_MUSCLES_BOTH':'_MUSCLES_SIMPLE_'},
//    {'BM_LEG_MUSCLES_BOTH':'_MUSCLES_3E_HILL_'},
//  ])

#include "libdef.any"


Main = {


  // ----------------------------------------------------------
  // Model configuration:
  // For more info on body model configuration options please load the model and double click on:
  // #path HTML_DOC "<AMMR_PATH_DOC>/bm_config/index.html"
  // ----------------------------------------------------------
  //  moving-axis knee will only work for TLEM2 right now
  #define BM_LEG_MODEL _LEG_MODEL_TLEM2_

  #ifndef TEST_NAME
  #define BM_JOINT_TYPE_KNEE_RIGHT _JOINT_TYPE_USERDEFINED_
  #define BM_LEG_MUSCLES_BOTH 1
  #endif

  #if BM_JOINT_TYPE_KNEE_RIGHT == _JOINT_TYPE_USERDEFINED_
  //Include right Moving-axis knee joint
  #include "<ANYBODY_PATH_MODELUTILS>/MovingAxisKnee/AddOnKnee.any"
  #endif


  // Model of the human body to be used for the analysis
  #include "<ANYBODY_PATH_BODY>/HumanModel.any"

  /// The actual model where all components are assembled
  AnyFolder Model ={
    /// Body model without default drivers
    AnyFolder &BodyModel=.HumanModel.BodyModel;
    /// Reference to the mannequin folder (used by drivers)
    AnyFolder &Mannequin =.HumanModel.Mannequin;

  };

  AnyBodyStudy Study = {
    AnyFolder &Model = .Model;

    tEnd = 1.0;
    Gravity = {0.0, -9.81, 0.0};
    nStep = 1;


  }; // End of study

}; //Main
