//define = (
//  [
//    {'BM_HAND_MODEL': '_HAND_MODEL_RUHM_'},
//    {'BM_HAND_MODEL': '_HAND_MODEL_ANYBODY_'},
//    {'BM_HAND_MODEL': '_HAND_MODEL_OFF_'},
//  ],
//  [
//    {'BM_SCALING': '_SCALING_NONE_'},
//    {'BM_SCALING': '_SCALING_STANDARD_'},
//    {'BM_SCALING': '_SCALING_XYZ_'},
//  ],
//  [
//    {'BM_ARM_MUSCLES_RIGHT': 'OFF'},
//    {'BM_ARM_MUSCLES_RIGHT': '_MUSCLES_SIMPLE_'},
//    {'BM_ARM_MUSCLES_RIGHT': '_MUSCLES_3E_HILL_'},
//  ]
//)

#include "libdef.any"

Main = {
  AnyFixedRefFrame root = {};
  #define BM_TRUNK_MUSCLES OFF
  #define BM_ARM_LEFT ON
  #define BM_ARM_RIGHT ON
  #define BM_LEG_MODEL OFF


#ifndef TEST_NAME
  #define BM_HAND_MODEL 2
  #define BM_SCALING _SCALING_NONE_
  #define BM_ARM_MUSCLES_RIGHT 0
  #define TEST_NAME "test_ruhm.any_0"
#endif


  #include "<ANYBODY_PATH_BODY>/HumanModel.any"


  AnyKinStudy Study = {
    AnyFolder& Model = Main.HumanModel.BodyModelWithDefaultDrivers;
    nStep = 1;
    Gravity = {0,0,0};


  };


};
