//#fatal_warnings = ["Deltoid"]
//define = (
//[
//    {'BODY_HEIGHT': '1.6'},
//    {'BODY_HEIGHT': '1.75'},
//    {'BODY_HEIGHT': '1.95'},
//],
//[
//    {'BODY_MASS': '60'},
//    {'BODY_MASS': '75'},
//    {'BODY_MASS': '90'},
//],
//)

#include "libdef.any"

#define BM_LEG_MODEL OFF
#define BM_SCALING _SCALING_LENGTHMASSFAT_
#define BM_ARM_RIGHT ON

//#define BM_TRUNK_MUSCLES OFF


#ifndef TEST_NAME
  #define BODY_HEIGHT 1.75
  #define BODY_MASS 60
  #define TEST_NAME "test_deltoid_wrapping.any_3"
#endif

#include "../../../Application/Validation/EvaluateMomentArms/EvaluateMomentArms.main.any"

Main =
{

Main.HumanModel.Anthropometrics.BodyHeight = BODY_HEIGHT;
Main.HumanModel.Anthropometrics.BodyMass = BODY_MASS;

AnyOperation& RunTest = Main.HumanModel.EvaluateMomentArms.Right.Arm.GHFlexion.Study.Kinematics;
};
