//define = (
//  [
//    {'EXTENSION_ROM':'{0,0}'},
//    {'EXTENSION_ROM':'{-55,20}'},
//  ],
//  [
//    {'ROTATION_ROM':'{0,0}'},
//    {'ROTATION_ROM':'{-35,35}'},
//  ],
//  [
//    {'LATBEND_ROM':'{0,0}'},
//    {'LATBEND_ROM':'{-40,40}'},
//  ],
//)
//fatal_warnings = ["Overloaded muscle configuration"]

#define ANYBODY_PATH_OUTPUT "."
#include "../libdef.any"

#include "<ANYBODY_PATH_MODELUTILS>/Drivers/Fourier.any"

#ifndef TEST_NAME
  #define EXTENSION_ROM { 0 , 0 }
  #define ROTATION_ROM { 0 , 0  }
  #define LATBEND_ROM { -40 , 40  }
  #define TEST_NAME "test_thoracic.any_0"
#endif

#define BM_TRUNK_MUSCLES ON
#define BM_LEG_MODEL OFF
#define BM_ARM_LEFT OFF
#define BM_ARM_RIGHT OFF
#define BM_TRUNK_THORACIC_MODEL _THORACIC_MODEL_FLEXIBLE_
#define BM_TRUNK_CAVITY_MODEL _CAVITY_MODEL_VOLUME_
#define BM_MANNEQUIN_DRIVER_DEFAULT ON
#define BM_MANNEQUIN_DRIVER_PELVIS_THORAX_EXTENSION OFF
#define BM_MANNEQUIN_DRIVER_PELVIS_THORAX_ROTATION OFF
#define BM_MANNEQUIN_DRIVER_PELVIS_THORAX_LATERAL_BENDING OFF

Main = {
  #include "<ANYBODY_PATH_BODY>/HumanModel.any"

  Main.HumanModel.DefaultMannequinDrivers = {
    PelvisGroundDriverPosX.Reaction.Type = {On};
    PelvisGroundDriverPosY.Reaction.Type = {On};
    PelvisGroundDriverPosZ.Reaction.Type = {On};
    PelvisGroundDriverRotZ.Reaction.Type = {On};
    PelvisGroundDriverRotY.Reaction.Type = {On};
    PelvisGroundDriverRotX.Reaction.Type = {On};
  };

  AnyOperation& RunTest = Study.InverseDynamics;

  AnyBodyStudy Study = {

    AnyFolder& BodyModel = Main.HumanModel.BodyModel;
    AnyFolder& DefaultDrivers = Main.HumanModel.DefaultMannequinDrivers;

    SimpleFourierDriver Trunk_Extension = {
      AnyKinMeasure &ref1 = .BodyModel.Interface.Trunk.PelvisThoraxExtension;
      RangeOfMotion = EXTENSION_ROM * pi/180;
      Freq = 1/(Main.Study.tEnd-Main.Study.tStart);
    };

    SimpleFourierDriver Trunk_LateralBending = {
      AnyKinMeasure &ref1 = .BodyModel.Interface.Trunk.PelvisThoraxLateralBending;
      RangeOfMotion = LATBEND_ROM * pi/180;
      Freq = 1/(Main.Study.tEnd-Main.Study.tStart);
      Phase = -90*pi/180;
    };

    SimpleFourierDriver Trunk_AxialRotation = {
      AnyKinMeasure &ref1 = .BodyModel.Interface.Trunk.PelvisThoraxRotation;
      RangeOfMotion = ROTATION_ROM * pi/180;
      Freq = 1/(Main.Study.tEnd-Main.Study.tStart);
      Phase = 90*pi/180;
    };

    tEnd = 10.0;
    Gravity = {0, -9.81, 0};
    nStep = 20;
  };
};
