//ignore_errors = ['Currently, no room for tendon']
//fatal_warnings = [
//    "Penetration of surface",
//]
//define = (
//   [
//    {'BM_CALIBRATION_TYPE':'1'},
//    {'BM_CALIBRATION_TYPE':'2'},
//    {'BM_CALIBRATION_TYPE':'3'},
//   ]
//)
//
#include "libdef.any"

#ifndef TEST_NAME
  #define BM_CALIBRATION_TYPE 3
  #define TEST_NAME "test_calibration_upperbody.any_1"
#endif


#define BM_ARM_SHOULDER_RHYTHM ON

#define BM_ARM_MUSCLES_RIGHT _MUSCLES_3E_HILL_
#define BM_ARM_MUSCLES_LEFT _MUSCLES_3E_HILL_

#define BM_TRUNK_LUMBAR_LIGAMENTS OFF
#define BM_TRUNK_CERVICAL_MUSCLES OFF

#define BM_LEG_LEFT OFF
#define BM_LEG_RIGHT OFF


Main =
{
  #include "<ANYBODY_PATH_BODY>/HumanModel.any"

  AnyOperation& RunTest = Main.HumanModel.Calibration.CalibrationSequence;
};
