//save_study = "Main.Study"
#include "../libdef.any"

#include "../../Tools/EnvironmentConnection/ClassDemos/Demo_CondContactMultiPoints.main.any"

Main =
{
#ifndef CREATE_IMAGE
  AnyOperation& RunTest = Main.RunApplication;
#else
  #include "../Cameras.any"
  AnyOperation& CameraInitPos = Main.Study.InitialConditions;
  LoadTimeCam.CameraLookAtPoint = {0.4,0.3,0};
  LoadTimeCam.CameraFieldOfView = DesignVar(1.1);
  LoadTimeCam.CameraDirection  = {0,0,1};
#endif
};
