//define = (
//   [
//    {'BM_ARM_THORAX_SCAPULA_CONTACT':'_ELLIPSOID_CONTACT_'},
//    {'BM_ARM_THORAX_SCAPULA_CONTACT':'_MULTIPLE_POINT_CONTACT_'},
//   ],
//   [
//    {'STUDY_TYPE':'1'},
//    {'STUDY_TYPE':'2'},
//   ],
//)
//fatal_warnings = True;
//ignore_errors = ['Close to singular position']


#include "../libdef.any"

#ifndef TEST_NAME
  #define BM_ARM_THORAX_SCAPULA_CONTACT 0
  #define STUDY_TYPE 2
  #define TEST_NAME "test_ShoulderTestModel.main.any_3"

#endif


#define BM_ARM_SHOULDER_RHYTHM ON
#define MOVE_PELVIS ON

#ifndef STUDY_TYPE
#define STUDY_TYPE 2
#endif


#include "ShoulderArmTestModel/Main.any"


Main ={

  #if STUDY_TYPE == 1
  AnyOperation& RunTest = Main.Study.Kinematics;
  #endif
  #if STUDY_TYPE == 2
  AnyOperation& RunTest = Main.Study2.Kinematics;
  #endif

};
