AnyFolder Joints = {

};

AnyFolder Drivers = {

//
//  //Move Pelvis to test if this will break kin
//  AnyKinEqSimpleDriver PelvisMover ={
//    AnyKinMeasureOrg &ref=.Main.HumanModel.BodyModel.Interface.Trunk.PelvisPosX;
//  DriverPos ={0};
//    DriverVel ={-10};
//
//  };
//
//    //Move Pelvis to test if this will break kin
//  AnyKinEqSimpleDriver PelvisMoverRot ={
//    AnyKinMeasureOrg &ref=.Main.HumanModel.BodyModel.Interface.Trunk.PelvisRotY;
//  DriverPos ={0};
//    DriverVel ={3*pi};
//
//
//
//
//  };


AnyReacForce LockPelvis ={
AnyKinMeasureOrg &ref1=.Main.HumanModel.BodyModel.Interface.Trunk.PelvisPosX;
AnyKinMeasureOrg &ref2=.Main.HumanModel.BodyModel.Interface.Trunk.PelvisPosY;
 AnyKinMeasureOrg &ref3=.Main.HumanModel.BodyModel.Interface.Trunk.PelvisPosZ;
AnyKinMeasureOrg &ref4=.Main.HumanModel.BodyModel.Interface.Trunk.PelvisRotX;
AnyKinMeasureOrg &ref5=.Main.HumanModel.BodyModel.Interface.Trunk.PelvisRotY;
AnyKinMeasureOrg &ref6=.Main.HumanModel.BodyModel.Interface.Trunk.PelvisRotZ;


};


   #if BM_ARM_SHOULDER_RHYTHM == ON
  #include "ExcludeShoulderRhythm.any"
  #endif

  AnyFloat Neutral = {  0,  0,   0,  -23,  12} * pi/180;

  //                               GH Abd   GH Flex      GH ext       SC Pro    SC Elev
  AnyFloat pos1         = {       178,       0,          0,         0,         20} * pi/180;
  AnyFloat pos2   ={        160,       0,         0,         0,         15} * pi/180;
  AnyFloat pos3  = {        150,       0,        0,         0,         15} * pi/180;
  AnyFloat pos4 = {        100,     0,          0,          0,          9} * pi/180;
  AnyFloat pos5         = {        60,      0,        -0,          0,         -5} * pi/180;
  AnyFloat pos6 = {         40,     0,          0,         0,         -5} * pi/180;
  AnyFloat pos7   = {         30,     0,        -0,         0,         10} * pi/180;
  AnyFloat pos8        = {         20,      0,        -0,          0,         10} * pi/180;
  AnyFloat pos9        = {         0,      0,        -0,          0,          10} * pi/180;


  AnyFloat ElbowFlexPosData  = {0,0,0,0,0,0,0} * pi/180;

  AnyFloat GHPosData         = repmat(1,{
      pos1,
      pos2,
      pos3,
      pos4,
      pos5,
      pos6,
      pos7,
      pos8,
      pos9
  }');


  #if BM_ARM_RIGHT
  AnyKinEqInterPolDriver GHDriverRight ={
    AnyKinMeasure& GHAbduction = ...HumanModel.BodyModel.Interface.Right.GlenohumeralAbduction;
    AnyKinMeasure& GHFlexion = ...HumanModel.BodyModel.Interface.Right.GlenohumeralFlexion;
    AnyKinMeasure& GHExtRot = ...HumanModel.BodyModel.Interface.Right.GlenohumeralExternalRotation;
    AnyKinMeasure& SCProtraction = ...HumanModel.BodyModel.Interface.Right.SternoClavicularProtraction;
    AnyKinMeasure& SCElevation = ...HumanModel.BodyModel.Interface.Right.SternoClavicularElevation;
    Type = PiecewiseLinear;
    T = linspace(0,1,SizesOf(Data)[1]);
    Data = .GHPosData;
    Reaction.Type = repmat(nDim,{Off});
  };
#endif

    #if BM_ARM_LEFT
  AnyKinEqInterPolDriver GHDriverLeft ={
    AnyKinMeasure& GHAbduction = ...HumanModel.BodyModel.Interface.Left.GlenohumeralAbduction;
    AnyKinMeasure& GHFlexion = ...HumanModel.BodyModel.Interface.Left.GlenohumeralFlexion;
    AnyKinMeasure& GHExtRot = ...HumanModel.BodyModel.Interface.Left.GlenohumeralExternalRotation;
    AnyKinMeasure& SCProtraction = ...HumanModel.BodyModel.Interface.Left.SternoClavicularProtraction;
    AnyKinMeasure& SCElevation = ...HumanModel.BodyModel.Interface.Left.SternoClavicularElevation;
    Type = PiecewiseLinear;
    T = linspace(0,1,SizesOf(Data)[1]);
    Data = .GHPosData;
    Reaction.Type = repmat(nDim,{Off});
  };
#endif


//  //Constraint the collective CoM to be right above the GlobalRef
//  AnyKinEqSimpleDriver CoMDriver = {
//    AnyKinCoM CoM = {
//      AnyFolder &Body = ....HumanModel;
//    };
//    MeasureOrganizer = {0,2};  // Only the x and z directions
//    DriverPos = {0.0,0.0};
//    DriverVel = {0.0,0.0};
//    Reaction.Type = {Off,Off};
//  };

  #if BM_LEG_RIGHT
    #include "RightFootDrivers.any"
  #endif

  #if BM_LEG_LEFT
    #include "LeftFootDrivers.any"
  #endif

};
