  // ************************************
  // Drivers for attaching the pelvis to the global reference system
  // ************************************

  AnyKinEqSimpleDriver PelvisGroundDriver ={
    AnyKinMeasureOrg PelvisGround =
    {
      AnyKinMeasure& PosX = .....HumanModel.BodyModel.Interface.Trunk.PelvisPosX;
      AnyKinMeasure& PosY = .....HumanModel.BodyModel.Interface.Trunk.PelvisPosY;
      AnyKinMeasure& PosZ = .....HumanModel.BodyModel.Interface.Trunk.PelvisPosZ;
      AnyKinMeasure& RotX = .....HumanModel.BodyModel.Interface.Trunk.PelvisRotX;
      AnyKinMeasure& RotY = .....HumanModel.BodyModel.Interface.Trunk.PelvisRotY;
      AnyKinMeasure& RotZ = .....HumanModel.BodyModel.Interface.Trunk.PelvisRotZ;
    };
    DriverPos={
      .JntPos.PelvisPosX,
      .JntPos.PelvisPosY,
      .JntPos.PelvisPosZ,
      pi/180*.JntPos.PelvisRotZ,
      pi/180*.JntPos.PelvisRotY,
      pi/180*.JntPos.PelvisRotX
    };
    DriverVel={
      .JntVel.PelvisPosX,
      .JntVel.PelvisPosY,
      .JntVel.PelvisPosZ,
      pi/180*.JntVel.PelvisRotX,
      pi/180*.JntVel.PelvisRotY,
      pi/180*.JntVel.PelvisRotZ
    };
    Reaction.Type={On,On,On,On,On,On};
  };


  // ************************************
  // Drivers for the spine
  // ************************************

  //Neck driver
  AnyKinEqSimpleDriver NeckJntDriver = {
    AnyKinMeasure &lb = ....HumanModel.BodyModel.Interface.Trunk.SkullThoraxLateralBending;
    AnyKinMeasure &ar = ....HumanModel.BodyModel.Interface.Trunk.SkullThoraxRotation;
    AnyKinMeasure &fe = ....HumanModel.BodyModel.Interface.Trunk.SkullThoraxFlexion;
    DriverPos = pi/180*{
      .JntPos.NeckLateralBending,
      .JntPos.NeckRotation,
      .JntPos.NeckExtension};
    DriverVel = pi/180*{
      .JntVel.NeckExtension,
      .JntVel.NeckRotation,
      .JntVel.NeckExtension};
    Reaction.Type = {Off,Off,Off};
  };

  //Thorax pelvis rotation driver
  AnyKinEqSimpleDriver PostureDriver ={
    AnyKinMeasureOrg &Ref2 = ...HumanModel.Interface.Trunk.PelvisThoraxLateralBending;
    AnyKinMeasureOrg &Ref3 = ...HumanModel.Interface.Trunk.PelvisThoraxRotation;
    AnyKinMeasureOrg &Ref1 = ...HumanModel.Interface.Trunk.PelvisThoraxExtension;

    DriverPos = pi/180*{
          .JntPos.PelvisThoraxLateralBending,
      .JntPos.PelvisThoraxRotation,
      .JntPos.PelvisThoraxExtension
    };
    DriverVel = pi/180*{
      .JntVel.PelvisThoraxLateralBending,
      .JntVel.PelvisThoraxRotation,
      .JntVel.PelvisThoraxExtension
    };
    Reaction.Type = {Off,Off,Off};
  };
