#define ANYBODY_PATH_OUTPUT "."


#include "libdef.any"

// ----------------------------------------------------------
// Model configuration:
// For more info on body model configuration options please load the model and double click on:
// #path HTML_DOC "<AMMR_PATH_DOC>/BM_Config/index.html"
// ----------------------------------------------------------

#define BM_ARM_RIGHT ON
#define BM_ARM_LEFT ON
#define BM_ARM_MUSCLES_BOTH ON
#define BM_LEG_RIGHT OFF
#define BM_LEG_LEFT OFF
#define BM_TRUNK_NECK ON


#define BM_SCALING _SCALING_LENGTHMASSFAT_
#define BM_TRUNK_CERVICAL_MUSCLES ON

// Use interpolation drivers to define motion
#define DriverSelection "FreePostureMove"


// actual model
#include "DynamicTest/FreePostureFullBodyStatic.Main.any"

Main = {

  Main.HumanModel.Anthropometrics.SegmentDimensions.HeadHeight = 0.13;
  Main.HumanModel.Anthropometrics.SegmentDimensions.TrunkHeight = 0.58;
  Main.HumanModel.Anthropometrics.SegmentDimensions.PelvisWidth = 0.18;


  Main.Study ={

    AnyInt test1= assert(ltfun(Main.Study.SymmetryCheck.Trunk.Muscle.Comparison.MaxFtDif,0.3),
    "Trunk model symmetry");


  };


  AnyOperation& RunTest = Main.RunApplication;
};
