#define ANYBODY_PATH_OUTPUT "."
#include "../libdef.any"

#include "<ANYBODY_PATH_MODELUTILS>/Drivers/Fourier.any"

#ifndef TEST_NAME
  //#define EXTENSION_ROM { 50 , 50 }
  #define EXTENSION_ROM 0*{ 20 , 20 }
  #define ROTATION_ROM 0*{ 50 , 50  }
  #define LATBEND_ROM 0*{ -50 , 50  }
  #define TEST_NAME "test_thoracic.any_0"
#endif

#define BM_TRUNK_MUSCLES ON
#define BM_LEG_MODEL OFF
#define BM_ARM_LEFT OFF
#define BM_ARM_RIGHT OFF
#define BM_TRUNK_THORACIC_MODEL _THORACIC_MODEL_FLEXIBLE_
#define BM_TRUNK_CAVITY_MODEL _CAVITY_MODEL_VOLUME_

#define BM_SCALING _SCALING_NONE_


// Ensure zero posture when using flexible thorax
#if BM_TRUNK_THORACIC_MODEL == _THORACIC_MODEL_FLEXIBLE_
  #define BM_MANNEQUIN_DRIVER_PELVIS_THORAX_EXTENSION OFF
  #define BM_MANNEQUIN_DRIVER_PELVIS_THORAX_ROTATION OFF
  #define BM_MANNEQUIN_DRIVER_PELVIS_THORAX_LATERAL_BENDING OFF
  #define BM_TRUNK_LUMBAR_THORACIC_LINK OFF
  #define BM_TRUNK_THORACIC_RHYTHM OFF
#endif


Main = {
  #include "<ANYBODY_PATH_BODY>/HumanModel.any"


  AnyOperation& RunTest = Study.InverseDynamics;

  AnyBodyStudy Study = {
   // Correct the load time position of the Pelvis so we can drive the AnatomicalFrameTrunk to zero, without the model moving
    Main.HumanModel.Mannequin.Posture.PelvisPosX = Main.HumanModel.BodyModel.Trunk.Segments.PelvisSeg.AnatomicalFrameTrunk.sRel[0];
    Main.HumanModel.Mannequin.Posture.PelvisPosY = Main.HumanModel.BodyModel.Trunk.Segments.PelvisSeg.AnatomicalFrameTrunk.sRel[1];
    Main.HumanModel.Mannequin.Posture.PelvisPosZ = Main.HumanModel.BodyModel.Trunk.Segments.PelvisSeg.AnatomicalFrameTrunk.sRel[2];


     AnyKinEq extension_constraint = {
        AnyKinMeasure &pelvis_t12_ext = Main.HumanModel.BodyModel.Interface.Trunk.PelvisT12Extension;
        AnyKinMeasure &t12_t1_ext = Main.HumanModel.BodyModel.Interface.Trunk.T12T1Extension;
        AnyKinMeasure& PelvisT12_Rot_ref = Main.HumanModel.BodyModel.Interface.Trunk.PelvisT12Rotation;
        AnyKinMeasure& T12T1_Rot_ref = Main.HumanModel.BodyModel.Interface.Trunk.T12T1Rotation;
        AnyKinMeasure& PelvisT12_Latbend_ref = Main.HumanModel.BodyModel.Interface.Trunk.PelvisT12LateralBending;
        AnyKinMeasure& T12T1_latbend_ref = Main.HumanModel.BodyModel.Interface.Trunk.T12T1LateralBending;
      };

      AnyKinEqSimpleDriver spine_driver = {
        AnyKinMeasure& T11T12_1 = Main.HumanModel.BodyModel.Interface.Trunk.IntervertebralAngles.T11T12.Extension;
        AnyKinMeasure& T10T11_2 = Main.HumanModel.BodyModel.Interface.Trunk.IntervertebralAngles.T10T11.Extension;
        AnyKinMeasure& T9T10_3 = Main.HumanModel.BodyModel.Interface.Trunk.IntervertebralAngles.T9T10.Extension;
        AnyKinMeasure& T8T9_4 = Main.HumanModel.BodyModel.Interface.Trunk.IntervertebralAngles.T8T9.Extension;
        AnyKinMeasure& T7T8_5 = Main.HumanModel.BodyModel.Interface.Trunk.IntervertebralAngles.T7T8.Extension;
        AnyKinMeasure& T6T7_6 = Main.HumanModel.BodyModel.Interface.Trunk.IntervertebralAngles.T6T7.Extension;
        AnyKinMeasure& T5T6_7 = Main.HumanModel.BodyModel.Interface.Trunk.IntervertebralAngles.T5T6.Extension;
        AnyKinMeasure& T4T5_8 = Main.HumanModel.BodyModel.Interface.Trunk.IntervertebralAngles.T4T5.Extension;
        AnyKinMeasure& T3T4_9 = Main.HumanModel.BodyModel.Interface.Trunk.IntervertebralAngles.T3T4.Extension;
        AnyKinMeasure& T2T3_10 = Main.HumanModel.BodyModel.Interface.Trunk.IntervertebralAngles.T2T3.Extension;
        AnyKinMeasure& T1T2_11 = Main.HumanModel.BodyModel.Interface.Trunk.IntervertebralAngles.T1T2.Extension;
        AnyKinMeasure& T11T12_12 = Main.HumanModel.BodyModel.Interface.Trunk.IntervertebralAngles.T11T12.LateralBending;
        AnyKinMeasure& T10T11_13 = Main.HumanModel.BodyModel.Interface.Trunk.IntervertebralAngles.T10T11.LateralBending;
        AnyKinMeasure& T9T10_14 = Main.HumanModel.BodyModel.Interface.Trunk.IntervertebralAngles.T9T10.LateralBending;
        AnyKinMeasure& T8T9_15 = Main.HumanModel.BodyModel.Interface.Trunk.IntervertebralAngles.T8T9.LateralBending;
        AnyKinMeasure& T7T8_16 = Main.HumanModel.BodyModel.Interface.Trunk.IntervertebralAngles.T7T8.LateralBending;
        AnyKinMeasure& T6T7_17 = Main.HumanModel.BodyModel.Interface.Trunk.IntervertebralAngles.T6T7.LateralBending;
        AnyKinMeasure& T5T6_18 = Main.HumanModel.BodyModel.Interface.Trunk.IntervertebralAngles.T5T6.LateralBending;
        AnyKinMeasure& T4T5_19 = Main.HumanModel.BodyModel.Interface.Trunk.IntervertebralAngles.T4T5.LateralBending;
        AnyKinMeasure& T3T4_20 = Main.HumanModel.BodyModel.Interface.Trunk.IntervertebralAngles.T3T4.LateralBending;
        AnyKinMeasure& T2T3_21 = Main.HumanModel.BodyModel.Interface.Trunk.IntervertebralAngles.T2T3.LateralBending;
        AnyKinMeasure& T1T2_22 = Main.HumanModel.BodyModel.Interface.Trunk.IntervertebralAngles.T1T2.LateralBending;
        AnyKinMeasure& T11T12_23 = Main.HumanModel.BodyModel.Interface.Trunk.IntervertebralAngles.T11T12.Rotation;
        AnyKinMeasure& T10T11_24 = Main.HumanModel.BodyModel.Interface.Trunk.IntervertebralAngles.T10T11.Rotation;
        AnyKinMeasure& T9T10_25 = Main.HumanModel.BodyModel.Interface.Trunk.IntervertebralAngles.T9T10.Rotation;
        AnyKinMeasure& T8T9_26 = Main.HumanModel.BodyModel.Interface.Trunk.IntervertebralAngles.T8T9.Rotation;
        AnyKinMeasure& T7T8_27 = Main.HumanModel.BodyModel.Interface.Trunk.IntervertebralAngles.T7T8.Rotation;
        AnyKinMeasure& T6T7_28 = Main.HumanModel.BodyModel.Interface.Trunk.IntervertebralAngles.T6T7.Rotation;
        AnyKinMeasure& T5T6_29 = Main.HumanModel.BodyModel.Interface.Trunk.IntervertebralAngles.T5T6.Rotation;
        AnyKinMeasure& T4T5_30 = Main.HumanModel.BodyModel.Interface.Trunk.IntervertebralAngles.T4T5.Rotation;
        AnyKinMeasure& T3T4_31 = Main.HumanModel.BodyModel.Interface.Trunk.IntervertebralAngles.T3T4.Rotation;
        AnyKinMeasure& T2T3_32 = Main.HumanModel.BodyModel.Interface.Trunk.IntervertebralAngles.T2T3.Rotation;
        AnyKinMeasure& T1T2_33 = Main.HumanModel.BodyModel.Interface.Trunk.IntervertebralAngles.T1T2.Rotation;

        DriverPos = repmat(nDim, 0);
        DriverVel = repmat(nDim, 0);
      };

      AnyReacForce PelvisReactionToWorld ={
        AnyKinMeasureOrg &ref1=Main.HumanModel.DefaultMannequinDrivers.PelvisGroundDriverPosX;
        AnyKinMeasureOrg &ref2=Main.HumanModel.DefaultMannequinDrivers.PelvisGroundDriverPosY;
        AnyKinMeasureOrg &ref3=Main.HumanModel.DefaultMannequinDrivers.PelvisGroundDriverPosZ;
        AnyKinMeasureOrg &ref4=Main.HumanModel.DefaultMannequinDrivers.PelvisGroundDriverRotZ;
        AnyKinMeasureOrg &ref5=Main.HumanModel.DefaultMannequinDrivers.PelvisGroundDriverRotY;
        AnyKinMeasureOrg &ref6=Main.HumanModel.DefaultMannequinDrivers.PelvisGroundDriverRotX;
      };


    AnyFolder& BodyModel = Main.HumanModel.BodyModel;
    AnyFolder& DefaultDrivers = Main.HumanModel.DefaultMannequinDrivers;


    tEnd = 10.0;
    Gravity = {0, -9.81, 0};
    nStep = 1;
  };
};
