Main.HumanModel.BodyModel.Trunk.Segments.Right.R1Seg.BoneInertiaObject.CreateMotionOutput.r= On;
Main.HumanModel.BodyModel.Trunk.Segments.Right.R2Seg.BoneInertiaObject.CreateMotionOutput.r= On;
Main.HumanModel.BodyModel.Trunk.Segments.Right.R3Seg.BoneInertiaObject.CreateMotionOutput.r= On;
Main.HumanModel.BodyModel.Trunk.Segments.Right.R4Seg.BoneInertiaObject.CreateMotionOutput.r= On;
Main.HumanModel.BodyModel.Trunk.Segments.Right.R5Seg.BoneInertiaObject.CreateMotionOutput.r= On;
Main.HumanModel.BodyModel.Trunk.Segments.Right.R6Seg.BoneInertiaObject.CreateMotionOutput.r= On;
Main.HumanModel.BodyModel.Trunk.Segments.Right.R7Seg.BoneInertiaObject.CreateMotionOutput.r= On;
Main.HumanModel.BodyModel.Trunk.Segments.Right.R8Seg.BoneInertiaObject.CreateMotionOutput.r= On;
Main.HumanModel.BodyModel.Trunk.Segments.Right.R9Seg.BoneInertiaObject.CreateMotionOutput.r= On;
Main.HumanModel.BodyModel.Trunk.Segments.Right.R10Seg.BoneInertiaObject.CreateMotionOutput.r= On;
Main.HumanModel.BodyModel.Trunk.Segments.Right.R11Seg.BoneInertiaObject.CreateMotionOutput.r= On;
Main.HumanModel.BodyModel.Trunk.Segments.Right.R12Seg.BoneInertiaObject.CreateMotionOutput.r= On;

Main.HumanModel.BodyModel.Trunk.Segments.Right.R1Seg.OuterInertiaObject.CreateMotionOutput.r= On;
Main.HumanModel.BodyModel.Trunk.Segments.Right.R2Seg.OuterInertiaObject.CreateMotionOutput.r= On;
Main.HumanModel.BodyModel.Trunk.Segments.Right.R3Seg.OuterInertiaObject.CreateMotionOutput.r= On;
Main.HumanModel.BodyModel.Trunk.Segments.Right.R4Seg.OuterInertiaObject.CreateMotionOutput.r= On;
Main.HumanModel.BodyModel.Trunk.Segments.Right.R5Seg.OuterInertiaObject.CreateMotionOutput.r= On;
Main.HumanModel.BodyModel.Trunk.Segments.Right.R6Seg.OuterInertiaObject.CreateMotionOutput.r= On;
Main.HumanModel.BodyModel.Trunk.Segments.Right.R7Seg.OuterInertiaObject.CreateMotionOutput.r= On;
Main.HumanModel.BodyModel.Trunk.Segments.Right.R8Seg.OuterInertiaObject.CreateMotionOutput.r= On;
Main.HumanModel.BodyModel.Trunk.Segments.Right.R9Seg.OuterInertiaObject.CreateMotionOutput.r= On;
Main.HumanModel.BodyModel.Trunk.Segments.Right.R10Seg.OuterInertiaObject.CreateMotionOutput.r= On;
Main.HumanModel.BodyModel.Trunk.Segments.Right.R11Seg.OuterInertiaObject.CreateMotionOutput.r= On;
Main.HumanModel.BodyModel.Trunk.Segments.Right.R12Seg.OuterInertiaObject.CreateMotionOutput.r= On;

Main.HumanModel.BodyModel.Trunk.Segments.Left.R1Seg.BoneInertiaObject.CreateMotionOutput.r= On;
Main.HumanModel.BodyModel.Trunk.Segments.Left.R2Seg.BoneInertiaObject.CreateMotionOutput.r= On;
Main.HumanModel.BodyModel.Trunk.Segments.Left.R3Seg.BoneInertiaObject.CreateMotionOutput.r= On;
Main.HumanModel.BodyModel.Trunk.Segments.Left.R4Seg.BoneInertiaObject.CreateMotionOutput.r= On;
Main.HumanModel.BodyModel.Trunk.Segments.Left.R5Seg.BoneInertiaObject.CreateMotionOutput.r= On;
Main.HumanModel.BodyModel.Trunk.Segments.Left.R6Seg.BoneInertiaObject.CreateMotionOutput.r= On;
Main.HumanModel.BodyModel.Trunk.Segments.Left.R7Seg.BoneInertiaObject.CreateMotionOutput.r= On;
Main.HumanModel.BodyModel.Trunk.Segments.Left.R8Seg.BoneInertiaObject.CreateMotionOutput.r= On;
Main.HumanModel.BodyModel.Trunk.Segments.Left.R9Seg.BoneInertiaObject.CreateMotionOutput.r= On;
Main.HumanModel.BodyModel.Trunk.Segments.Left.R10Seg.BoneInertiaObject.CreateMotionOutput.r= On;
Main.HumanModel.BodyModel.Trunk.Segments.Left.R11Seg.BoneInertiaObject.CreateMotionOutput.r= On;
Main.HumanModel.BodyModel.Trunk.Segments.Left.R12Seg.BoneInertiaObject.CreateMotionOutput.r= On;

Main.HumanModel.BodyModel.Trunk.Segments.Left.R1Seg.OuterInertiaObject.CreateMotionOutput.r= On;
Main.HumanModel.BodyModel.Trunk.Segments.Left.R2Seg.OuterInertiaObject.CreateMotionOutput.r= On;
Main.HumanModel.BodyModel.Trunk.Segments.Left.R3Seg.OuterInertiaObject.CreateMotionOutput.r= On;
Main.HumanModel.BodyModel.Trunk.Segments.Left.R4Seg.OuterInertiaObject.CreateMotionOutput.r= On;
Main.HumanModel.BodyModel.Trunk.Segments.Left.R5Seg.OuterInertiaObject.CreateMotionOutput.r= On;
Main.HumanModel.BodyModel.Trunk.Segments.Left.R6Seg.OuterInertiaObject.CreateMotionOutput.r= On;
Main.HumanModel.BodyModel.Trunk.Segments.Left.R7Seg.OuterInertiaObject.CreateMotionOutput.r= On;
Main.HumanModel.BodyModel.Trunk.Segments.Left.R8Seg.OuterInertiaObject.CreateMotionOutput.r= On;
Main.HumanModel.BodyModel.Trunk.Segments.Left.R9Seg.OuterInertiaObject.CreateMotionOutput.r= On;
Main.HumanModel.BodyModel.Trunk.Segments.Left.R10Seg.OuterInertiaObject.CreateMotionOutput.r= On;
Main.HumanModel.BodyModel.Trunk.Segments.Left.R11Seg.OuterInertiaObject.CreateMotionOutput.r= On;
Main.HumanModel.BodyModel.Trunk.Segments.Left.R12Seg.OuterInertiaObject.CreateMotionOutput.r= On;
