//define = (
//   [
//    {'xxx':'1'},
//   ]
//)
//ignore_errors = ['Currently, no room for tendon']

#include "libdef.any"

#include "<ANYBODY_PATH_MODELUTILS>/Video/CameraClassTemplate.any"

//#include "..\Body\AAUHuman\Arm\EvaluateMomentArmsStudy.any"

#ifndef TEST_NAME
   #define TEST_NAME "GUI"
   #define CREATE_IMAGE

#endif

#define BM_ARM_DELTOID_WRAPPING ON

#define BM_ARM_SHOULDER_RHYTHM ON
#if BM_ARM_SHOULDER_RHYTHM == ON
#define BM_MANNEQUIN_DRIVER_STERNOCLAVICULAR_PROTRACTION_RIGHT OFF
#define BM_MANNEQUIN_DRIVER_STERNOCLAVICULAR_ELEVATION_RIGHT OFF
#define BM_MANNEQUIN_DRIVER_STERNOCLAVICULAR_AXIAL_ROTATION_RIGHT OFF
#define BM_MANNEQUIN_DRIVER_STERNOCLAVICULAR_PROTRACTION_LEFT OFF
#define BM_MANNEQUIN_DRIVER_STERNOCLAVICULAR_ELEVATION_LEFT OFF
#define BM_MANNEQUIN_DRIVER_STERNOCLAVICULAR_AXIAL_ROTATION_LEFT OFF
#endif

#define BM_ARM_MUSCLES_BOTH _MUSCLES_SIMPLE_
#define BM_LEG_LEFT OFF
//#define BM_ARM_LEFT OFF
#define BM_LEG_RIGHT OFF
#define EVALUATE_MOMENT_ARMS 0
#define BM_TRUNK_MUSCLES OFF


Main =
{

  Main.DrawSettings.BonesOpacity.RightHumerus = 0.9;
  Main.DrawSettings.Muscle.Opacity = 0.6;


  Main.HumanModel.Mannequin.Posture.Right.ElbowFlexion = 70;
  Main.HumanModel.Mannequin.Posture.Left.ElbowFlexion =  70;

//  Main.HumanModel.Mannequin.Posture.Right.GlenohumeralExternalRotation = 0;
//  Main.HumanModel.Mannequin.Posture.Left.GlenohumeralExternalRotation = 0;

//  Main.HumanModel.Mannequin.PostureVel.Right.GlenohumeralExternalRotation = 90;
//  Main.HumanModel.Mannequin.PostureVel.Left.GlenohumeralExternalRotation = 90;

//  Main.HumanModel.Mannequin.PostureVel.Right.GlenohumeralAbduction = 170;
//  Main.HumanModel.Mannequin.PostureVel.Left.GlenohumeralAbduction = 170;


  Main.HumanModel.Mannequin.Posture.Right.GlenohumeralFlexion = -30;

  Main.HumanModel.Mannequin.PostureVel.Right.GlenohumeralFlexion = 100;
  Main.HumanModel.Mannequin.PostureVel.Left.GlenohumeralFlexion = 100;


  #include "<ANYBODY_PATH_BODY>/HumanModel.any"

  AnyBodyStudy Study =
  {
     Gravity = {0,-9.81, 0};
     nStep = 50;

     AnyFolder& BodyModel = Main.HumanModel.BodyModel;
     AnyFolder& Drivers = Main.HumanModel.DefaultMannequinDrivers;

     AnyReacForce PelvisGroundReaction =
     {
        AnyKinMeasureOrg &ref1= Main.HumanModel.DefaultMannequinDrivers.PelvisGroundDriverPosX;
        AnyKinMeasureOrg &ref2= Main.HumanModel.DefaultMannequinDrivers.PelvisGroundDriverPosY;
        AnyKinMeasureOrg &ref3= Main.HumanModel.DefaultMannequinDrivers.PelvisGroundDriverPosZ;
        AnyKinMeasureOrg &ref4= Main.HumanModel.DefaultMannequinDrivers.PelvisGroundDriverRotX;
        AnyKinMeasureOrg &ref5= Main.HumanModel.DefaultMannequinDrivers.PelvisGroundDriverRotY;
        AnyKinMeasureOrg &ref6= Main.HumanModel.DefaultMannequinDrivers.PelvisGroundDriverRotZ;
     };


  };


 #ifndef CREATE_IMAGE
  AnyOperation& RunTest = Main.Study.Kinematics;
#else
  #include "Cameras.any"
  AnyOperation& CameraInitPos = Main.Study.InitialConditions;
  LoadTimeCam.CameraLookAtPoint = {0.22, 0.8,0};
  LoadTimeCam.CameraFieldOfView = DesignVar(1.8);
  LoadTimeCam.CameraDirection  = {0,0,1};
#endif
};
