//define = (
//   [
//    {'xxx':'1'},
//   ]
//)
//ignore_errors = ['Currently, no room for tendon']

#include "libdef.any"

#ifndef TEST_NAME
   #define TEST_NAME "GUI"
#endif


#define BM_ARM_SHOULDER_RHYTHM OFF

#define BM_ARM_MUSCLES_BOTH _MUSCLES_SIMPLE_
#define BM_LEG_LEFT OFF
#define BM_LEG_RIGHT OFF


Main =
{
  Main.DrawSettings.BonesOpacity.RightHumerus = 0.9;
  Main.DrawSettings.Muscle.Opacity = 0.6;


  Main.HumanModel.Mannequin.Posture.Right.ElbowFlexion = 80;
  Main.HumanModel.Mannequin.Posture.Left.ElbowFlexion =  80;

  Main.HumanModel.Mannequin.Posture.Right.GlenohumeralExternalRotation = 0;
  Main.HumanModel.Mannequin.Posture.Left.GlenohumeralExternalRotation = 0;

  Main.HumanModel.Mannequin.PostureVel.Right.GlenohumeralExternalRotation = 90;
  Main.HumanModel.Mannequin.PostureVel.Left.GlenohumeralExternalRotation = 90;


  #include "<ANYBODY_PATH_BODY>/HumanModel.any"

  AnyBodyStudy Study =
  {
     Gravity = {0,-9.81, 0};
     nStep = 20;

     AnyFolder& BodyModel = Main.HumanModel.BodyModel;
     AnyFolder& Drivers = Main.HumanModel.DefaultMannequinDrivers;

  };

  AnyOperation& RunTest = Main.Study.Kinematics;
};
