//This file creates the environment around the human
AnyFolder EnvironmentModel = {
  AnyComponentDefinition obj = {};
  AnyFixedRefFrame GlobalRef ={
    Origin={0,0,0};
    AnyDrawRefFrame drw={ScaleXYZ=0.2*{1,1,1};};
  };
  AnyFolder ForcePlates = {
     #include "<MOCAP_FORCE_PLATE_FILE>"
  };
};
