  #if MOCAP_HUMAN_GROUND_RESIDUALS == "PelvisWeak"
    #include "<ANYBODY_PATH_AMMR>/Tools/GRFPrediction/WeakResiduals.any"
  #endif

  #if MOCAP_HUMAN_GROUND_RESIDUALS == "Pelvis"
  /// Dynamic balance residuals between the human and ground segments.
  /// This is also sometimes refered to as the 'Hand of God' in some biomechanical
  /// text books. This residual force is added to the Pelvis segment
  AnyReacForce HumanGroundResiduals =
  {
    AnyKinMeasure &PelvisPosX = ..BodyModel.Interface.Trunk.PelvisPosX;
    AnyKinMeasure &PelvisPosY = ..BodyModel.Interface.Trunk.PelvisPosY;
    AnyKinMeasure &PelvisPosZ = ..BodyModel.Interface.Trunk.PelvisPosZ;
    AnyKinMeasure &PelvisRotX = ..BodyModel.Interface.Trunk.PelvisRotX;
    AnyKinMeasure &PelvisRotY = ..BodyModel.Interface.Trunk.PelvisRotY;
    AnyKinMeasure &PelvisRotZ = ..BodyModel.Interface.Trunk.PelvisRotZ;
  };
  #endif

  #if MOCAP_HUMAN_GROUND_RESIDUALS == "Trunk"
  /// Dynamic balance residuals between the human and ground segments.
  /// This is also sometimes refered to as the 'Hand of God' in some biomechanical
  /// text books. This residual force is added to the Trunk segment
  AnyReacForce HumanGroundResiduals =
  {
    AnyKinLinear Lin = { Ref = 0; AnyRefFrame& ref = ...BodyModel.Trunk.SegmentsThorax.ThoraxSeg; };
    AnyKinRotational Rot = { Type = RotAxesAngles; AnyRefFrame& ref = ...BodyModel.Trunk.SegmentsThorax.ThoraxSeg; };
  };
  #endif
