#ifndef _ANYMOCAP_OPTIMIZE_ANTHROPOMETRICS_ON_OFF_ANY_
#define _ANYMOCAP_OPTIMIZE_ANTHROPOMETRICS_ON_OFF_ANY_


#class_template OptimizeAnthropometricsOnOff (
  PELVIS_WIDTH=0,
  PELVIS_HEIGHT=0,
  PELVIS_DEPTH=0,
  HEAD_HEIGHT =0,
  HEAD_WIDTH=0,
  HEAD_DEPTH=0,
  TRUNK_HEIGHT = 0,
  TRUNK_WIDTH=0,
  TRUNK_DEPTH=0,
  NECK_LENGTH=0,
  RIGHT_THIGH_LENGTH =0,
  LEFT_THIGH_LENGTH =0,
  RIGHT_SHANK_LENGTH =0,
  LEFT_SHANK_LENGTH =0,
  RIGHT_FOOT_LENGTH =0,
  LEFT_FOOT_LENGTH =0,
  RIGHT_UPPERARM_LENGTH =0,
  LEFT_UPPERARM_LENGTH =0,
  RIGHT_LOWERARM_LENGTH =0,
  LEFT_LOWERARM_LENGTH =0,
  RIGHT_HAND_LENGTH = 0,
  LEFT_HAND_LENGTH = 0,
  RIGHT_HAND_BREADTH = 0,
  LEFT_HAND_BREADTH = 0,
  RIGHT_VARUS_VALGUS = 0,
  LEFT_VARUS_VALGUS = 0,
  RIGHT_TIBIAL_TORSION = 0,
  LEFT_TIBIAL_TORSION = 0,
  LEFT_RIGHT_SYMMETRY = 0,

  RIGHT_CARPALS_LENGTH = 0,
  RIGHT_THUMB_MC_LENGTH =0,
  RIGHT_THUMB_PP_LENGTH =0,
  RIGHT_THUMB_DP_LENGTH =0,
  RIGHT_FINGER2_MC_LENGTH =0,
  RIGHT_FINGER2_PP_LENGTH =0,
  RIGHT_FINGER2_MP_LENGTH =0,
  RIGHT_FINGER2_DP_LENGTH =0,
  RIGHT_FINGER3_MC_LENGTH =0,
  RIGHT_FINGER3_PP_LENGTH =0,
  RIGHT_FINGER3_MP_LENGTH =0,
  RIGHT_FINGER3_DP_LENGTH =0,
  RIGHT_FINGER4_MC_LENGTH =0,
  RIGHT_FINGER4_PP_LENGTH =0,
  RIGHT_FINGER4_MP_LENGTH =0,
  RIGHT_FINGER4_DP_LENGTH =0,
  RIGHT_FINGER5_MC_LENGTH =0,
  RIGHT_FINGER5_PP_LENGTH =0,
  RIGHT_FINGER5_MP_LENGTH =0,
  RIGHT_FINGER5_DP_LENGTH =0,

  LEFT_CARPALS_LENGTH = 0,
  LEFT_THUMB_MC_LENGTH =0,
  LEFT_THUMB_PP_LENGTH =0,
  LEFT_THUMB_DP_LENGTH =0,
  LEFT_FINGER2_MC_LENGTH =0,
  LEFT_FINGER2_PP_LENGTH =0,
  LEFT_FINGER2_MP_LENGTH =0,
  LEFT_FINGER2_DP_LENGTH =0,
  LEFT_FINGER3_MC_LENGTH =0,
  LEFT_FINGER3_PP_LENGTH =0,
  LEFT_FINGER3_MP_LENGTH =0,
  LEFT_FINGER3_DP_LENGTH =0,
  LEFT_FINGER4_MC_LENGTH =0,
  LEFT_FINGER4_PP_LENGTH =0,
  LEFT_FINGER4_MP_LENGTH =0,
  LEFT_FINGER4_DP_LENGTH =0,
  LEFT_FINGER5_MC_LENGTH =0,
  LEFT_FINGER5_PP_LENGTH =0,
  LEFT_FINGER5_MP_LENGTH =0,
  LEFT_FINGER5_DP_LENGTH =0,

  PARAMETER_OPT_STUDY = Main.Studies.ParameterIdentification,
  SEGMENTS_LENGTHS = Main.HumanModel.Anthropometrics.SegmentDimensions,
  HUMAN_MODEL_FOLDER = Main.HumanModel,
  CREATE_ALL_DESVARS=0
  ){

  // These should be set as default values in the argument to the tempalte
  Main.ModelSetup.ParameterIdentification =
  {
    #if CREATE_ALL_DESVARS | PELVIS_WIDTH
    AnyDesVar PelvisWidth = {
      Val = SEGMENTS_LENGTHS.PelvisWidth;
      Min = 0.05;
      Max = 0.5;
    };
    #endif
    #if PELVIS_WIDTH
    PARAMETER_OPT_STUDY = { AnyDesVar& PelvisWidth = Main.ModelSetup.ParameterIdentification.PelvisWidth; };
    #endif

    #if CREATE_ALL_DESVARS | PELVIS_HEIGHT
    AnyDesVar PelvisHeight = {
      Val = SEGMENTS_LENGTHS.PelvisHeight;
      Min = 0.05;
      Max = 0.5;
    };
    #endif
    #if PELVIS_HEIGHT
    PARAMETER_OPT_STUDY = { AnyDesVar& PelvisHeight = Main.ModelSetup.ParameterIdentification.PelvisHeight; };
    #endif

    #if CREATE_ALL_DESVARS | PELVIS_DEPTH
    AnyDesVar PelvisDepth = {
      Val = SEGMENTS_LENGTHS.PelvisDepth;
      Min = 0.05;
      Max = 0.5;
    };
    #endif
    #if PELVIS_DEPTH
    PARAMETER_OPT_STUDY = { AnyDesVar& PelvisDepth = Main.ModelSetup.ParameterIdentification.PelvisDepth; };
    #endif

    #if CREATE_ALL_DESVARS | HEAD_HEIGHT
    AnyDesVar HeadHeight = {
      Val = SEGMENTS_LENGTHS.HeadHeight;
      Min = 0.05;
      Max = 0.5;
    };
    #endif
    #if HEAD_HEIGHT
    PARAMETER_OPT_STUDY = { AnyDesVar& HeadHeight = Main.ModelSetup.ParameterIdentification.HeadHeight; };
    #endif

    #if CREATE_ALL_DESVARS | HEAD_WIDTH
    AnyDesVar HeadWidth = {
      Val = SEGMENTS_LENGTHS.HeadWidth;
      Min = 0.05;
      Max = 0.5;
    };
    #endif
    #if HEAD_WIDTH
    PARAMETER_OPT_STUDY = { AnyDesVar& HeadWidth = Main.ModelSetup.ParameterIdentification.HeadWidth; };
    #endif

    #if CREATE_ALL_DESVARS | HEAD_DEPTH
    AnyDesVar HeadDepth = {
      Val = SEGMENTS_LENGTHS.HeadDepth;
      Min = 0.05;
      Max = 0.5;
    };
    #endif
    #if HEAD_DEPTH
    PARAMETER_OPT_STUDY = { AnyDesVar& HeadDepth = Main.ModelSetup.ParameterIdentification.HeadDepth; };
    #endif

    #if CREATE_ALL_DESVARS | NECK_LENGTH
    AnyDesVar NeckLength = {
      Val = SEGMENTS_LENGTHS.NeckLength;
      Min = 0.05;
      Max = 0.5;
    };
    #endif
    #if NECK_LENGTH
    PARAMETER_OPT_STUDY = { AnyDesVar& NeckLength = Main.ModelSetup.ParameterIdentification.NeckLength; };
    #endif


    #if CREATE_ALL_DESVARS | TRUNK_HEIGHT
    AnyDesVar TrunkHeight = {
      Val = SEGMENTS_LENGTHS.TrunkHeight;
      Min = 0.1;
      Max = 1.5;
    };
    #endif
    #if TRUNK_HEIGHT
    PARAMETER_OPT_STUDY = { AnyDesVar& TrunkHeight = Main.ModelSetup.ParameterIdentification.TrunkHeight; };
    #endif

    #if CREATE_ALL_DESVARS | TRUNK_WIDTH
    AnyDesVar TrunkWidth = {
      Val = SEGMENTS_LENGTHS.TrunkWidth;
      Min = 0.1;
      Max = 1.5;
    };
    #endif
    #if TRUNK_WIDTH
    PARAMETER_OPT_STUDY = { AnyDesVar& TrunkWidth = Main.ModelSetup.ParameterIdentification.TrunkWidth; };
    #endif

    #if CREATE_ALL_DESVARS | TRUNK_DEPTH
    AnyDesVar TrunkDepth = {
      Val = SEGMENTS_LENGTHS.TrunkDepth;
      Min = 0.1;
      Max = 1.5;
    };
    #endif
    #if TRUNK_DEPTH
    PARAMETER_OPT_STUDY = { AnyDesVar& TrunkDepth = Main.ModelSetup.ParameterIdentification.TrunkDepth; };
    #endif

    #if CREATE_ALL_DESVARS | RIGHT_THIGH_LENGTH
    AnyDesVar RightThighLength = {
      Val = SEGMENTS_LENGTHS.Right.ThighLength;
      Min = 0.1;
      Max = 1;
    };
    #endif
    #if RIGHT_THIGH_LENGTH
    PARAMETER_OPT_STUDY = { AnyDesVar& RightThighLength = Main.ModelSetup.ParameterIdentification.RightThighLength; };
    #endif

    #if CREATE_ALL_DESVARS | LEFT_THIGH_LENGTH
    AnyDesVar LeftThighLength = {
      Val = SEGMENTS_LENGTHS.Left.ThighLength;
      Min = 0.1;
      Max = 1;
    };
    #endif
    #if LEFT_THIGH_LENGTH
    PARAMETER_OPT_STUDY = { AnyDesVar& LeftThighLength = Main.ModelSetup.ParameterIdentification.LeftThighLength; };
    #endif

    #if CREATE_ALL_DESVARS | (RIGHT_THIGH_LENGTH & LEFT_THIGH_LENGTH & LEFT_RIGHT_SYMMETRY)
    AnyDesMeasure ThighLengthSymmetry = {
      Val = .LeftThighLength.Val - .RightThighLength.Val;
      Type = EqualToZero;
    };
    #endif
    #if RIGHT_THIGH_LENGTH & LEFT_THIGH_LENGTH & LEFT_RIGHT_SYMMETRY
    PARAMETER_OPT_STUDY = { AnyDesMeasure& ThighLengthSymmetry = Main.ModelSetup.ParameterIdentification.ThighLengthSymmetry; };
    #endif

    #if CREATE_ALL_DESVARS | RIGHT_SHANK_LENGTH
    AnyDesVar RightShankLength = {
      Val = SEGMENTS_LENGTHS.Right.ShankLength;
      Min = 0.1;
      Max = 1;
    };
    #endif
    #if RIGHT_SHANK_LENGTH
    PARAMETER_OPT_STUDY = { AnyDesVar& RightShankLength = Main.ModelSetup.ParameterIdentification.RightShankLength; };
    #endif

    #if CREATE_ALL_DESVARS | LEFT_SHANK_LENGTH
    AnyDesVar LeftShankLength = {
      Val = SEGMENTS_LENGTHS.Left.ShankLength;
      Min = 0.1;
      Max = 1;
    };
    #endif
    #if LEFT_SHANK_LENGTH
    PARAMETER_OPT_STUDY = { AnyDesVar& LeftShankLength = Main.ModelSetup.ParameterIdentification.LeftShankLength; };
    #endif

    #if CREATE_ALL_DESVARS | (RIGHT_SHANK_LENGTH & LEFT_SHANK_LENGTH & LEFT_RIGHT_SYMMETRY)
    AnyDesMeasure ShankLengthSymmetry = {
      Val = .LeftShankLength.Val - .RightShankLength.Val;
      Type = EqualToZero;
    };
    #endif
    #if RIGHT_SHANK_LENGTH & LEFT_SHANK_LENGTH & LEFT_RIGHT_SYMMETRY
    PARAMETER_OPT_STUDY = { AnyDesMeasure& ShankLengthSymmetry = Main.ModelSetup.ParameterIdentification.ShankLengthSymmetry; };
    #endif


    #if CREATE_ALL_DESVARS | RIGHT_FOOT_LENGTH
    AnyDesVar RightFootLength = {
      Val = SEGMENTS_LENGTHS.Right.FootLength;
      Min = 0.05;
      Max = 0.5;
    };
    #endif
    #if RIGHT_FOOT_LENGTH
    PARAMETER_OPT_STUDY = { AnyDesVar& RightFootLength = Main.ModelSetup.ParameterIdentification.RightFootLength; };
    #endif

    #if CREATE_ALL_DESVARS | LEFT_FOOT_LENGTH
    AnyDesVar LeftFootLength = {
      Val = SEGMENTS_LENGTHS.Left.FootLength;
      Min = 0.05;
      Max = 0.5;
    };
    #endif
    #if LEFT_FOOT_LENGTH
    PARAMETER_OPT_STUDY = { AnyDesVar& LeftFootLength = Main.ModelSetup.ParameterIdentification.LeftFootLength; };
    #endif

    #if CREATE_ALL_DESVARS | (RIGHT_FOOT_LENGTH & LEFT_FOOT_LENGTH & LEFT_RIGHT_SYMMETRY)
    AnyDesMeasure FootLengthSymmetry = {
      Val = .LeftFootLength.Val - .RightFootLength.Val;
      Type = EqualToZero;
    };
    #endif
    #if RIGHT_FOOT_LENGTH & LEFT_FOOT_LENGTH & LEFT_RIGHT_SYMMETRY
    PARAMETER_OPT_STUDY = { AnyDesMeasure& FootLengthSymmetry = Main.ModelSetup.ParameterIdentification.FootLengthSymmetry; };
    #endif


    #if CREATE_ALL_DESVARS | RIGHT_UPPERARM_LENGTH
    AnyDesVar RightUpperArmLength = {
      Val = SEGMENTS_LENGTHS.Right.UpperArmLength;
      Min = 0.01;
      Max = 1;
    };
    #endif
    #if RIGHT_UPPERARM_LENGTH
    PARAMETER_OPT_STUDY = { AnyDesVar& RightUpperArmLength = Main.ModelSetup.ParameterIdentification.RightUpperArmLength; };
    #endif

    #if CREATE_ALL_DESVARS | LEFT_UPPERARM_LENGTH
    AnyDesVar LeftUpperArmLength = {
      Val = SEGMENTS_LENGTHS.Left.UpperArmLength;
      Min = 0.1;
      Max = 1;
    };
    #endif
    #if LEFT_UPPERARM_LENGTH
    PARAMETER_OPT_STUDY = { AnyDesVar& LeftUpperArmLength = Main.ModelSetup.ParameterIdentification.LeftUpperArmLength; };
    #endif

    #if CREATE_ALL_DESVARS | (RIGHT_UPPERARM_LENGTH & LEFT_UPPERARM_LENGTH & LEFT_RIGHT_SYMMETRY)
    AnyDesMeasure UpperArmLengthSymmetry = {
      Val = .LeftUpperArmLength.Val - .RightUpperArmLength.Val;
      Type = EqualToZero;
    };
    #endif
    #if RIGHT_UPPERARM_LENGTH & LEFT_UPPERARM_LENGTH & LEFT_RIGHT_SYMMETRY
    PARAMETER_OPT_STUDY = { AnyDesMeasure& UpperArmLengthSymmetry = Main.ModelSetup.ParameterIdentification.UpperArmLengthSymmetry; };
    #endif


    #if CREATE_ALL_DESVARS | RIGHT_LOWERARM_LENGTH
    AnyDesVar RightLowerArmLength = {
      Val = SEGMENTS_LENGTHS.Right.LowerArmLength;
      Min = 0.1;
      Max = 1;
    };
    #endif
    #if RIGHT_LOWERARM_LENGTH
    PARAMETER_OPT_STUDY = { AnyDesVar& RightLowerArmLength = Main.ModelSetup.ParameterIdentification.RightLowerArmLength; };
    #endif

    #if CREATE_ALL_DESVARS | LEFT_LOWERARM_LENGTH
    AnyDesVar LeftLowerArmLength = {
      Val = SEGMENTS_LENGTHS.Left.LowerArmLength;
      Min = 0.1;
      Max = 1;
    };
    #endif
    #if LEFT_LOWERARM_LENGTH
    PARAMETER_OPT_STUDY = { AnyDesVar& LeftLowerArmLength = Main.ModelSetup.ParameterIdentification.LeftLowerArmLength; };
    #endif

    #if CREATE_ALL_DESVARS | (RIGHT_LOWERARM_LENGTH & LEFT_LOWERARM_LENGTH & LEFT_RIGHT_SYMMETRY)
    AnyDesMeasure LowerArmLengthSymmetry = {
      Val = .LeftLowerArmLength.Val - .RightLowerArmLength.Val;
      Type = EqualToZero;
    };
    #endif
    #if RIGHT_LOWERARM_LENGTH & LEFT_LOWERARM_LENGTH & LEFT_RIGHT_SYMMETRY
    PARAMETER_OPT_STUDY = { AnyDesMeasure& LowerArmLengthSymmetry = Main.ModelSetup.ParameterIdentification.LowerArmLengthSymmetry; };
    #endif


    #if CREATE_ALL_DESVARS | RIGHT_HAND_LENGTH
    AnyDesVar RightHandLength = {
      Val = SEGMENTS_LENGTHS.Right.HandLength;
      Min = 0.05;
      Max = 0.5;
    };
    #endif
    #if RIGHT_HAND_LENGTH
    PARAMETER_OPT_STUDY = { AnyDesVar& RightHandLength = Main.ModelSetup.ParameterIdentification.RightHandLength; };
    #endif

    #if CREATE_ALL_DESVARS | LEFT_HAND_LENGTH
    AnyDesVar LeftHandLength = {
      Val = SEGMENTS_LENGTHS.Left.HandLength;
      Min = 0.05;
      Max = 0.5;
    };
    #endif
    #if LEFT_HAND_LENGTH
    PARAMETER_OPT_STUDY = { AnyDesVar& LeftHandLength = Main.ModelSetup.ParameterIdentification.LeftHandLength; };
    #endif


    #if CREATE_ALL_DESVARS | RIGHT_CARPALS_LENGTH
    AnyDesVar RightCarpalsLength = {
       Val = SEGMENTS_LENGTHS.Right.Hand.CarpalsLength;
       Min = Val-0.005;
       Max = Val+0.005;
    };
    #endif
    #if RIGHT_CARPALS_LENGTH
    PARAMETER_OPT_STUDY = { AnyDesVar& RightCarpalsLength = Main.ModelSetup.ParameterIdentification.RightCarpalsLength; };
    #endif

    #if CREATE_ALL_DESVARS | LEFT_CARPALS_LENGTH
    AnyDesVar LeftCarpalsLength = {
       Val = SEGMENTS_LENGTHS.Left.Hand.CarpalsLength;
       Min = Val-0.005;
       Max = Val+0.005;
     };
     #endif
     #if LEFT_CARPALS_LENGTH
     PARAMETER_OPT_STUDY = { AnyDesVar& LeftCarpalsLength = Main.ModelSetup.ParameterIdentification.LeftCarpalsLength; };
     #endif

    #if CREATE_ALL_DESVARS | (RIGHT_CARPALS_LENGTH & LEFT_CARPALS_LENGTH & LEFT_RIGHT_SYMMETRY)
    AnyDesMeasure CarpalLengthSymmetry = {
      Val = .LeftCarpalsLength.Val - .RightCarpalsLength.Val;
      Type = EqualToZero;
    };
    #endif
    #if RIGHT_CARPALS_LENGTH & LEFT_CARPALS_LENGTH & LEFT_RIGHT_SYMMETRY
    PARAMETER_OPT_STUDY = { AnyDesMeasure& CarpalLengthSymmetry = Main.ModelSetup.ParameterIdentification.CarpalLengthSymmetry; };
    #endif


    #if CREATE_ALL_DESVARS | RIGHT_THUMB_MC_LENGTH
    AnyDesVar RightThumbMCLength = {
       Val = SEGMENTS_LENGTHS.Right.Hand.Finger1.MCLength;
       Min = Val-0.005;
       Max = Val+0.005;
    };
    #endif
    #if RIGHT_THUMB_MC_LENGTH
    PARAMETER_OPT_STUDY = { AnyDesVar& RightThumbMCLength = Main.ModelSetup.ParameterIdentification.RightThumbMCLength; };
    #endif

    #if CREATE_ALL_DESVARS | LEFT_THUMB_MC_LENGTH
    AnyDesVar LeftThumbMCLength = {
       Val = SEGMENTS_LENGTHS.Left.Hand.Finger1.MCLength;
       Min = Val-0.005;
       Max = Val+0.005;
     };
     #endif
     #if LEFT_THUMB_MC_LENGTH
     PARAMETER_OPT_STUDY = { AnyDesVar& LeftThumbMCLength = Main.ModelSetup.ParameterIdentification.LeftThumbMCLength; };
     #endif

    #if CREATE_ALL_DESVARS | (RIGHT_THUMB_MC_LENGTH & LEFT_THUMB_MC_LENGTH & LEFT_RIGHT_SYMMETRY)
    AnyDesMeasure ThumbMCLengthSymmetry = {
      Val = .LeftThumbMCLength.Val - .RightThumbMCLength.Val;
      Type = EqualToZero;
    };
    #endif
    #if RIGHT_THUMB_MC_LENGTH & LEFT_THUMB_MC_LENGTH & LEFT_RIGHT_SYMMETRY
    PARAMETER_OPT_STUDY = { AnyDesMeasure& ThumbMCLengthSymmetry = Main.ModelSetup.ParameterIdentification.ThumbMCLengthSymmetry; };
    #endif


    #if CREATE_ALL_DESVARS | RIGHT_THUMB_PP_LENGTH
    AnyDesVar RightThumbPPLength = {
       Val = SEGMENTS_LENGTHS.Right.Hand.Finger1.PPLength;
       Min = Val-0.005;
       Max = Val+0.005;
    };
    #endif
    #if RIGHT_THUMB_PP_LENGTH
    PARAMETER_OPT_STUDY = { AnyDesVar& RightThumbPPLength = Main.ModelSetup.ParameterIdentification.RightThumbPPLength; };
    #endif

    #if CREATE_ALL_DESVARS | LEFT_THUMB_PP_LENGTH
    AnyDesVar LeftThumbPPLength = {
       Val = SEGMENTS_LENGTHS.Left.Hand.Finger1.PPLength;
       Min = Val-0.005;
       Max = Val+0.005;
     };
     #endif
     #if LEFT_THUMB_PP_LENGTH
     PARAMETER_OPT_STUDY = { AnyDesVar& LeftThumbPPLength = Main.ModelSetup.ParameterIdentification.LeftThumbPPLength; };
     #endif

    #if CREATE_ALL_DESVARS | (RIGHT_THUMB_PP_LENGTH & LEFT_THUMB_PP_LENGTH & LEFT_RIGHT_SYMMETRY)
    AnyDesMeasure ThumbPPLengthSymmetry = {
      Val = .LeftThumbPPLength.Val - .RightThumbPPLength.Val;
      Type = EqualToZero;
    };
    #endif
    #if RIGHT_THUMB_PP_LENGTH & LEFT_THUMB_PP_LENGTH & LEFT_RIGHT_SYMMETRY
    PARAMETER_OPT_STUDY = { AnyDesMeasure& ThumbPPLengthSymmetry = Main.ModelSetup.ParameterIdentification.ThumbPPLengthSymmetry; };
    #endif

    #if CREATE_ALL_DESVARS | RIGHT_THUMB_DP_LENGTH
    AnyDesVar RightThumbDPLength = {
       Val = SEGMENTS_LENGTHS.Right.Hand.Finger1.DPLength;
       Min = Val-0.005;
       Max = Val+0.005;
    };
    #endif
    #if RIGHT_THUMB_DP_LENGTH
    PARAMETER_OPT_STUDY = { AnyDesVar& RightThumbDPLength = Main.ModelSetup.ParameterIdentification.RightThumbDPLength; };
    #endif

    #if CREATE_ALL_DESVARS | LEFT_THUMB_DP_LENGTH
    AnyDesVar LeftThumbDPLength = {
       Val = SEGMENTS_LENGTHS.Left.Hand.Finger1.DPLength;
       Min = Val-0.005;
       Max = Val+0.005;
     };
     #endif
     #if LEFT_THUMB_DP_LENGTH
     PARAMETER_OPT_STUDY = { AnyDesVar& LeftThumbDPLength = Main.ModelSetup.ParameterIdentification.LeftThumbDPLength; };
     #endif

    #if CREATE_ALL_DESVARS | (RIGHT_THUMB_DP_LENGTH & LEFT_THUMB_DP_LENGTH & LEFT_RIGHT_SYMMETRY)
    AnyDesMeasure ThumbDPLengthSymmetry = {
      Val = .LeftThumbDPLength.Val - .RightThumbDPLength.Val;
      Type = EqualToZero;
    };
    #endif
    #if RIGHT_THUMB_DP_LENGTH & LEFT_THUMB_DP_LENGTH & LEFT_RIGHT_SYMMETRY
    PARAMETER_OPT_STUDY = { AnyDesMeasure& ThumbDPLengthSymmetry = Main.ModelSetup.ParameterIdentification.ThumbDPLengthSymmetry; };
    #endif


    #if CREATE_ALL_DESVARS | RIGHT_FINGER2_MC_LENGTH
    AnyDesVar RightFinger2MCLength = {
       Val = SEGMENTS_LENGTHS.Right.Hand.Finger2.MCLength;
       Min = Val-0.005;
       Max = Val+0.005;
    };
    #endif
    #if RIGHT_FINGER2_MC_LENGTH
    PARAMETER_OPT_STUDY = { AnyDesVar& RightFinger2MCLength = Main.ModelSetup.ParameterIdentification.RightFinger2MCLength; };
    #endif

    #if CREATE_ALL_DESVARS | LEFT_FINGER2_MC_LENGTH
    AnyDesVar LeftFinger2MCLength = {
       Val = SEGMENTS_LENGTHS.Left.Hand.Finger2.MCLength;
       Min = Val-0.005;
       Max = Val+0.005;
     };
     #endif
     #if LEFT_FINGER2_MC_LENGTH
     PARAMETER_OPT_STUDY = { AnyDesVar& LeftFinger2MCLength = Main.ModelSetup.ParameterIdentification.LeftFinger2MCLength; };
     #endif

    #if CREATE_ALL_DESVARS | (RIGHT_FINGER2_MC_LENGTH & LEFT_FINGER2_MC_LENGTH & LEFT_RIGHT_SYMMETRY)
    AnyDesMeasure Finger2MCLengthSymmetry = {
      Val = .LeftFinger2MCLength.Val - .RightFinger2MCLength.Val;
      Type = EqualToZero;
    };
    #endif
    #if RIGHT_FINGER2_MC_LENGTH & LEFT_FINGER2_MC_LENGTH & LEFT_RIGHT_SYMMETRY
    PARAMETER_OPT_STUDY = { AnyDesMeasure& Finger2MCLengthSymmetry = Main.ModelSetup.ParameterIdentification.Finger2MCLengthSymmetry; };
    #endif


    #if CREATE_ALL_DESVARS | RIGHT_FINGER2_MP_LENGTH
    AnyDesVar RightFinger2MPLength = {
       Val = SEGMENTS_LENGTHS.Right.Hand.Finger2.MPLength;
       Min = Val-0.005;
       Max = Val+0.005;
    };
    #endif
    #if RIGHT_FINGER2_MP_LENGTH
    PARAMETER_OPT_STUDY = { AnyDesVar& RightFinger2MPLength = Main.ModelSetup.ParameterIdentification.RightFinger2MPLength; };
    #endif

    #if CREATE_ALL_DESVARS | LEFT_FINGER2_MP_LENGTH
    AnyDesVar LeftFinger2MPLength = {
       Val = SEGMENTS_LENGTHS.Left.Hand.Finger2.MPLength;
       Min = Val-0.005;
       Max = Val+0.005;
     };
     #endif
     #if LEFT_FINGER2_MP_LENGTH
     PARAMETER_OPT_STUDY = { AnyDesVar& LeftFinger2MPLength = Main.ModelSetup.ParameterIdentification.LeftFinger2MPLength; };
     #endif

    #if CREATE_ALL_DESVARS | (RIGHT_FINGER2_MP_LENGTH & LEFT_FINGER2_MP_LENGTH & LEFT_RIGHT_SYMMETRY)
    AnyDesMeasure Finger2MPLengthSymmetry = {
      Val = .LeftFinger2MPLength.Val - .RightFinger2MPLength.Val;
      Type = EqualToZero;
    };
    #endif
    #if RIGHT_FINGER2_MP_LENGTH & LEFT_FINGER2_MP_LENGTH & LEFT_RIGHT_SYMMETRY
    PARAMETER_OPT_STUDY = { AnyDesMeasure& Finger2MPLengthSymmetry = Main.ModelSetup.ParameterIdentification.Finger2MPLengthSymmetry; };
    #endif


    #if CREATE_ALL_DESVARS | RIGHT_FINGER2_PP_LENGTH
    AnyDesVar RightFinger2PPLength = {
       Val = SEGMENTS_LENGTHS.Right.Hand.Finger2.PPLength;
       Min = Val-0.005;
       Max = Val+0.005;
    };
    #endif
    #if RIGHT_FINGER2_PP_LENGTH
    PARAMETER_OPT_STUDY = { AnyDesVar& RightFinger2PPLength = Main.ModelSetup.ParameterIdentification.RightFinger2PPLength; };
    #endif

    #if CREATE_ALL_DESVARS | LEFT_FINGER2_PP_LENGTH
    AnyDesVar LeftFinger2PPLength = {
       Val = SEGMENTS_LENGTHS.Left.Hand.Finger2.PPLength;
       Min = Val-0.005;
       Max = Val+0.005;
     };
     #endif
     #if LEFT_FINGER2_PP_LENGTH
     PARAMETER_OPT_STUDY = { AnyDesVar& LeftFinger2PPLength = Main.ModelSetup.ParameterIdentification.LeftFinger2PPLength; };
     #endif

    #if CREATE_ALL_DESVARS | (RIGHT_FINGER2_PP_LENGTH & LEFT_FINGER2_PP_LENGTH & LEFT_RIGHT_SYMMETRY)
    AnyDesMeasure Finger2PPLengthSymmetry = {
      Val = .LeftFinger2PPLength.Val - .RightFinger2PPLength.Val;
      Type = EqualToZero;
    };
    #endif
    #if RIGHT_FINGER2_PP_LENGTH & LEFT_FINGER2_PP_LENGTH & LEFT_RIGHT_SYMMETRY
    PARAMETER_OPT_STUDY = { AnyDesMeasure& Finger2PPLengthSymmetry = Main.ModelSetup.ParameterIdentification.Finger2PPLengthSymmetry; };
    #endif


    #if CREATE_ALL_DESVARS | RIGHT_FINGER2_DP_LENGTH
    AnyDesVar RightFinger2DPLength = {
       Val = SEGMENTS_LENGTHS.Right.Hand.Finger2.DPLength;
       Min = Val-0.005;
       Max = Val+0.005;
    };
    #endif
    #if RIGHT_FINGER2_DP_LENGTH
    PARAMETER_OPT_STUDY = { AnyDesVar& RightFinger2DPLength = Main.ModelSetup.ParameterIdentification.RightFinger2DPLength; };
    #endif

    #if CREATE_ALL_DESVARS | LEFT_FINGER2_DP_LENGTH
    AnyDesVar LeftFinger2DPLength = {
       Val = SEGMENTS_LENGTHS.Left.Hand.Finger2.DPLength;
       Min = Val-0.005;
       Max = Val+0.005;
     };
     #endif
     #if LEFT_FINGER2_DP_LENGTH
     PARAMETER_OPT_STUDY = { AnyDesVar& LeftFinger2DPLength = Main.ModelSetup.ParameterIdentification.LeftFinger2DPLength; };
     #endif

    #if CREATE_ALL_DESVARS | (RIGHT_FINGER2_DP_LENGTH & LEFT_FINGER2_DP_LENGTH & LEFT_RIGHT_SYMMETRY)
    AnyDesMeasure Finger2DPLengthSymmetry = {
      Val = .LeftFinger2DPLength.Val - .RightFinger2DPLength.Val;
      Type = EqualToZero;
    };
    #endif
    #if RIGHT_FINGER2_DP_LENGTH & LEFT_FINGER2_DP_LENGTH & LEFT_RIGHT_SYMMETRY
    PARAMETER_OPT_STUDY = { AnyDesMeasure& Finger2DPLengthSymmetry = Main.ModelSetup.ParameterIdentification.Finger2DPLengthSymmetry; };
    #endif


    #if CREATE_ALL_DESVARS | RIGHT_FINGER3_MC_LENGTH
    AnyDesVar RightFinger3MCLength = {
       Val = SEGMENTS_LENGTHS.Right.Hand.Finger3.MCLength;
       Min = Val-0.005;
       Max = Val+0.005;
    };
    #endif
    #if RIGHT_FINGER3_MC_LENGTH
    PARAMETER_OPT_STUDY = { AnyDesVar& RightFinger3MCLength = Main.ModelSetup.ParameterIdentification.RightFinger3MCLength; };
    #endif

    #if CREATE_ALL_DESVARS | LEFT_FINGER3_MC_LENGTH
    AnyDesVar LeftFinger3MCLength = {
       Val = SEGMENTS_LENGTHS.Left.Hand.Finger3.MCLength;
       Min = Val-0.005;
       Max = Val+0.005;
     };
     #endif
     #if LEFT_FINGER3_MC_LENGTH
     PARAMETER_OPT_STUDY = { AnyDesVar& LeftFinger3MCLength = Main.ModelSetup.ParameterIdentification.LeftFinger3MCLength; };
     #endif

    #if CREATE_ALL_DESVARS | (RIGHT_FINGER3_MC_LENGTH & LEFT_FINGER3_MC_LENGTH & LEFT_RIGHT_SYMMETRY)
    AnyDesMeasure Finger3MCLengthSymmetry = {
      Val = .LeftFinger3MCLength.Val - .RightFinger3MCLength.Val;
      Type = EqualToZero;
    };
    #endif
    #if RIGHT_FINGER3_MC_LENGTH & LEFT_FINGER3_MC_LENGTH & LEFT_RIGHT_SYMMETRY
    PARAMETER_OPT_STUDY = { AnyDesMeasure& Finger3MCLengthSymmetry = Main.ModelSetup.ParameterIdentification.Finger3MCLengthSymmetry; };
    #endif


    #if CREATE_ALL_DESVARS | RIGHT_FINGER3_MP_LENGTH
    AnyDesVar RightFinger3MPLength = {
       Val = SEGMENTS_LENGTHS.Right.Hand.Finger3.MPLength;
       Min = Val-0.005;
       Max = Val+0.005;
    };
    #endif
    #if RIGHT_FINGER3_MP_LENGTH
    PARAMETER_OPT_STUDY = { AnyDesVar& RightFinger3MPLength = Main.ModelSetup.ParameterIdentification.RightFinger3MPLength; };
    #endif

    #if CREATE_ALL_DESVARS | LEFT_FINGER3_MP_LENGTH
    AnyDesVar LeftFinger3MPLength = {
       Val = SEGMENTS_LENGTHS.Left.Hand.Finger3.MPLength;
       Min = Val-0.005;
       Max = Val+0.005;
     };
     #endif
     #if LEFT_FINGER3_MP_LENGTH
     PARAMETER_OPT_STUDY = { AnyDesVar& LeftFinger3MPLength = Main.ModelSetup.ParameterIdentification.LeftFinger3MPLength; };
     #endif

    #if CREATE_ALL_DESVARS | (RIGHT_FINGER3_MP_LENGTH & LEFT_FINGER3_MP_LENGTH & LEFT_RIGHT_SYMMETRY)
    AnyDesMeasure Finger3MPLengthSymmetry = {
      Val = .LeftFinger3MPLength.Val - .RightFinger3MPLength.Val;
      Type = EqualToZero;
    };
    #endif
    #if RIGHT_FINGER3_MP_LENGTH & LEFT_FINGER3_MP_LENGTH & LEFT_RIGHT_SYMMETRY
    PARAMETER_OPT_STUDY = { AnyDesMeasure& Finger3MPLengthSymmetry = Main.ModelSetup.ParameterIdentification.Finger3MPLengthSymmetry; };
    #endif


    #if CREATE_ALL_DESVARS | RIGHT_FINGER3_PP_LENGTH
    AnyDesVar RightFinger3PPLength = {
       Val = SEGMENTS_LENGTHS.Right.Hand.Finger3.PPLength;
       Min = Val-0.005;
       Max = Val+0.005;
    };
    #endif
    #if RIGHT_FINGER3_PP_LENGTH
    PARAMETER_OPT_STUDY = { AnyDesVar& RightFinger3PPLength = Main.ModelSetup.ParameterIdentification.RightFinger3PPLength; };
    #endif

    #if CREATE_ALL_DESVARS | LEFT_FINGER3_PP_LENGTH
    AnyDesVar LeftFinger3PPLength = {
       Val = SEGMENTS_LENGTHS.Left.Hand.Finger3.PPLength;
       Min = Val-0.005;
       Max = Val+0.005;
     };
     #endif
     #if LEFT_FINGER3_PP_LENGTH
     PARAMETER_OPT_STUDY = { AnyDesVar& LeftFinger3PPLength = Main.ModelSetup.ParameterIdentification.LeftFinger3PPLength; };
     #endif

    #if CREATE_ALL_DESVARS | (RIGHT_FINGER3_PP_LENGTH & LEFT_FINGER3_PP_LENGTH & LEFT_RIGHT_SYMMETRY)
    AnyDesMeasure Finger3PPLengthSymmetry = {
      Val = .LeftFinger3PPLength.Val - .RightFinger3PPLength.Val;
      Type = EqualToZero;
    };
    #endif
    #if RIGHT_FINGER3_PP_LENGTH & LEFT_FINGER3_PP_LENGTH & LEFT_RIGHT_SYMMETRY
    PARAMETER_OPT_STUDY = { AnyDesMeasure& Finger3PPLengthSymmetry = Main.ModelSetup.ParameterIdentification.Finger3PPLengthSymmetry; };
    #endif


    #if CREATE_ALL_DESVARS | RIGHT_FINGER3_DP_LENGTH
    AnyDesVar RightFinger3DPLength = {
       Val = SEGMENTS_LENGTHS.Right.Hand.Finger3.DPLength;
       Min = Val-0.005;
       Max = Val+0.005;
    };
    #endif
    #if RIGHT_FINGER3_DP_LENGTH
    PARAMETER_OPT_STUDY = { AnyDesVar& RightFinger3DPLength = Main.ModelSetup.ParameterIdentification.RightFinger3DPLength; };
    #endif

    #if CREATE_ALL_DESVARS | LEFT_FINGER3_DP_LENGTH
    AnyDesVar LeftFinger3DPLength = {
       Val = SEGMENTS_LENGTHS.Left.Hand.Finger3.DPLength;
       Min = Val-0.005;
       Max = Val+0.005;
     };
     #endif
     #if LEFT_FINGER3_DP_LENGTH
     PARAMETER_OPT_STUDY = { AnyDesVar& LeftFinger3DPLength = Main.ModelSetup.ParameterIdentification.LeftFinger3DPLength; };
     #endif

    #if CREATE_ALL_DESVARS | (RIGHT_FINGER3_DP_LENGTH & LEFT_FINGER3_DP_LENGTH & LEFT_RIGHT_SYMMETRY)
    AnyDesMeasure Finger3DPLengthSymmetry = {
      Val = .LeftFinger3DPLength.Val - .RightFinger3DPLength.Val;
      Type = EqualToZero;
    };
    #endif
    #if RIGHT_FINGER3_DP_LENGTH & LEFT_FINGER3_DP_LENGTH & LEFT_RIGHT_SYMMETRY
    PARAMETER_OPT_STUDY = { AnyDesMeasure& Finger3DPLengthSymmetry = Main.ModelSetup.ParameterIdentification.Finger3DPLengthSymmetry; };
    #endif


    #if CREATE_ALL_DESVARS | RIGHT_FINGER4_MC_LENGTH
    AnyDesVar RightFinger4MCLength = {
       Val = SEGMENTS_LENGTHS.Right.Hand.Finger4.MCLength;
       Min = Val-0.005;
       Max = Val+0.005;
    };
    #endif
    #if RIGHT_FINGER4_MC_LENGTH
    PARAMETER_OPT_STUDY = { AnyDesVar& RightFinger4MCLength = Main.ModelSetup.ParameterIdentification.RightFinger4MCLength; };
    #endif

    #if CREATE_ALL_DESVARS | LEFT_FINGER4_MC_LENGTH
    AnyDesVar LeftFinger4MCLength = {
       Val = SEGMENTS_LENGTHS.Left.Hand.Finger4.MCLength;
       Min = Val-0.005;
       Max = Val+0.005;
     };
     #endif
     #if LEFT_FINGER4_MC_LENGTH
     PARAMETER_OPT_STUDY = { AnyDesVar& LeftFinger4MCLength = Main.ModelSetup.ParameterIdentification.LeftFinger4MCLength; };
     #endif

    #if CREATE_ALL_DESVARS | (RIGHT_FINGER4_MC_LENGTH & LEFT_FINGER4_MC_LENGTH & LEFT_RIGHT_SYMMETRY)
    AnyDesMeasure Finger4MCLengthSymmetry = {
      Val = .LeftFinger4MCLength.Val - .RightFinger4MCLength.Val;
      Type = EqualToZero;
    };
    #endif
    #if RIGHT_FINGER4_MC_LENGTH & LEFT_FINGER4_MC_LENGTH & LEFT_RIGHT_SYMMETRY
    PARAMETER_OPT_STUDY = { AnyDesMeasure& Finger4MCLengthSymmetry = Main.ModelSetup.ParameterIdentification.Finger4MCLengthSymmetry; };
    #endif


    #if CREATE_ALL_DESVARS | RIGHT_FINGER4_MP_LENGTH
    AnyDesVar RightFinger4MPLength = {
       Val = SEGMENTS_LENGTHS.Right.Hand.Finger4.MPLength;
       Min = Val-0.005;
       Max = Val+0.005;
    };
    #endif
    #if RIGHT_FINGER4_MP_LENGTH
    PARAMETER_OPT_STUDY = { AnyDesVar& RightFinger4MPLength = Main.ModelSetup.ParameterIdentification.RightFinger4MPLength; };
    #endif

    #if CREATE_ALL_DESVARS | LEFT_FINGER4_MP_LENGTH
    AnyDesVar LeftFinger4MPLength = {
       Val = SEGMENTS_LENGTHS.Left.Hand.Finger4.MPLength;
       Min = Val-0.005;
       Max = Val+0.005;
     };
     #endif
     #if LEFT_FINGER4_MP_LENGTH
     PARAMETER_OPT_STUDY = { AnyDesVar& LeftFinger4MPLength = Main.ModelSetup.ParameterIdentification.LeftFinger4MPLength; };
     #endif

    #if CREATE_ALL_DESVARS | (RIGHT_FINGER4_MP_LENGTH & LEFT_FINGER4_MP_LENGTH & LEFT_RIGHT_SYMMETRY)
    AnyDesMeasure Finger4MPLengthSymmetry = {
      Val = .LeftFinger4MPLength.Val - .RightFinger4MPLength.Val;
      Type = EqualToZero;
    };
    #endif
    #if RIGHT_FINGER4_MP_LENGTH & LEFT_FINGER4_MP_LENGTH & LEFT_RIGHT_SYMMETRY
    PARAMETER_OPT_STUDY = { AnyDesMeasure& Finger4MPLengthSymmetry = Main.ModelSetup.ParameterIdentification.Finger4MPLengthSymmetry; };
    #endif


    #if CREATE_ALL_DESVARS | RIGHT_FINGER4_PP_LENGTH
    AnyDesVar RightFinger4PPLength = {
       Val = SEGMENTS_LENGTHS.Right.Hand.Finger4.PPLength;
       Min = Val-0.005;
       Max = Val+0.005;
    };
    #endif
    #if RIGHT_FINGER4_PP_LENGTH
    PARAMETER_OPT_STUDY = { AnyDesVar& RightFinger4PPLength = Main.ModelSetup.ParameterIdentification.RightFinger4PPLength; };
    #endif

    #if CREATE_ALL_DESVARS | LEFT_FINGER4_PP_LENGTH
    AnyDesVar LeftFinger4PPLength = {
       Val = SEGMENTS_LENGTHS.Left.Hand.Finger4.PPLength;
       Min = Val-0.005;
       Max = Val+0.005;
     };
     #endif
     #if LEFT_FINGER4_PP_LENGTH
     PARAMETER_OPT_STUDY = { AnyDesVar& LeftFinger4PPLength = Main.ModelSetup.ParameterIdentification.LeftFinger4PPLength; };
     #endif

    #if CREATE_ALL_DESVARS | (RIGHT_FINGER4_PP_LENGTH & LEFT_FINGER4_PP_LENGTH & LEFT_RIGHT_SYMMETRY)
    AnyDesMeasure Finger4PPLengthSymmetry = {
      Val = .LeftFinger4PPLength.Val - .RightFinger4PPLength.Val;
      Type = EqualToZero;
    };
    #endif
    #if RIGHT_FINGER4_PP_LENGTH & LEFT_FINGER4_PP_LENGTH & LEFT_RIGHT_SYMMETRY
    PARAMETER_OPT_STUDY = { AnyDesMeasure& Finger4PPLengthSymmetry = Main.ModelSetup.ParameterIdentification.Finger4PPLengthSymmetry; };
    #endif


    #if CREATE_ALL_DESVARS | RIGHT_FINGER4_DP_LENGTH
    AnyDesVar RightFinger4DPLength = {
       Val = SEGMENTS_LENGTHS.Right.Hand.Finger4.DPLength;
       Min = Val-0.005;
       Max = Val+0.005;
    };
    #endif
    #if RIGHT_FINGER4_DP_LENGTH
    PARAMETER_OPT_STUDY = { AnyDesVar& RightFinger4DPLength = Main.ModelSetup.ParameterIdentification.RightFinger4DPLength; };
    #endif

    #if CREATE_ALL_DESVARS | LEFT_FINGER4_DP_LENGTH
    AnyDesVar LeftFinger4DPLength = {
       Val = SEGMENTS_LENGTHS.Left.Hand.Finger4.DPLength;
       Min = Val-0.005;
       Max = Val+0.005;
     };
     #endif
     #if LEFT_FINGER4_DP_LENGTH
     PARAMETER_OPT_STUDY = { AnyDesVar& LeftFinger4DPLength = Main.ModelSetup.ParameterIdentification.LeftFinger4DPLength; };
     #endif

    #if CREATE_ALL_DESVARS | (RIGHT_FINGER4_DP_LENGTH & LEFT_FINGER4_DP_LENGTH & LEFT_RIGHT_SYMMETRY)
    AnyDesMeasure Finger4DPLengthSymmetry = {
      Val = .LeftFinger4DPLength.Val - .RightFinger4DPLength.Val;
      Type = EqualToZero;
    };
    #endif
    #if RIGHT_FINGER4_DP_LENGTH & LEFT_FINGER4_DP_LENGTH & LEFT_RIGHT_SYMMETRY
    PARAMETER_OPT_STUDY = { AnyDesMeasure& Finger4DPLengthSymmetry = Main.ModelSetup.ParameterIdentification.Finger2DPLengthSymmetry; };
    #endif


    #if CREATE_ALL_DESVARS | RIGHT_FINGER5_MC_LENGTH
    AnyDesVar RightFinger5MCLength = {
       Val = SEGMENTS_LENGTHS.Right.Hand.Finger5.MCLength;
       Min = Val-0.005;
       Max = Val+0.005;
    };
    #endif
    #if RIGHT_FINGER5_MC_LENGTH
    PARAMETER_OPT_STUDY = { AnyDesVar& RightFinger5MCLength = Main.ModelSetup.ParameterIdentification.RightFinger5MCLength; };
    #endif

    #if CREATE_ALL_DESVARS | LEFT_FINGER5_MC_LENGTH
    AnyDesVar LeftFinger5MCLength = {
       Val = SEGMENTS_LENGTHS.Left.Hand.Finger5.MCLength;
       Min = Val-0.005;
       Max = Val+0.005;
     };
     #endif
     #if LEFT_FINGER5_MC_LENGTH
     PARAMETER_OPT_STUDY = { AnyDesVar& LeftFinger5MCLength = Main.ModelSetup.ParameterIdentification.LeftFinger5MCLength; };
     #endif

    #if CREATE_ALL_DESVARS | (RIGHT_FINGER5_MC_LENGTH & LEFT_FINGER5_MC_LENGTH & LEFT_RIGHT_SYMMETRY)
    AnyDesMeasure Finger5MCLengthSymmetry = {
      Val = .LeftFinger5MCLength.Val - .RightFinger5MCLength.Val;
      Type = EqualToZero;
    };
    #endif
    #if RIGHT_FINGER5_MC_LENGTH & LEFT_FINGER5_MC_LENGTH & LEFT_RIGHT_SYMMETRY
    PARAMETER_OPT_STUDY = { AnyDesMeasure& Finger5MCLengthSymmetry = Main.ModelSetup.ParameterIdentification.Finger5MCLengthSymmetry; };
    #endif


    #if CREATE_ALL_DESVARS | RIGHT_FINGER5_MP_LENGTH
    AnyDesVar RightFinger5MPLength = {
       Val = SEGMENTS_LENGTHS.Right.Hand.Finger5.MPLength;
       Min = Val-0.005;
       Max = Val+0.005;
    };
    #endif
    #if RIGHT_FINGER5_MP_LENGTH
    PARAMETER_OPT_STUDY = { AnyDesVar& RightFinger5MPLength = Main.ModelSetup.ParameterIdentification.RightFinger5MPLength; };
    #endif

    #if CREATE_ALL_DESVARS | LEFT_FINGER5_MP_LENGTH
    AnyDesVar LeftFinger5MPLength = {
       Val = SEGMENTS_LENGTHS.Left.Hand.Finger5.MPLength;
       Min = Val-0.005;
       Max = Val+0.005;
     };
     #endif
     #if LEFT_FINGER5_MP_LENGTH
     PARAMETER_OPT_STUDY = { AnyDesVar& LeftFinger5MPLength = Main.ModelSetup.ParameterIdentification.LeftFinger5MPLength; };
     #endif

    #if CREATE_ALL_DESVARS | (RIGHT_FINGER5_MP_LENGTH & LEFT_FINGER5_MP_LENGTH & LEFT_RIGHT_SYMMETRY)
    AnyDesMeasure Finger5MPLengthSymmetry = {
      Val = .LeftFinger5MPLength.Val - .RightFinger5MPLength.Val;
      Type = EqualToZero;
    };
    #endif
    #if RIGHT_FINGER5_MP_LENGTH & LEFT_FINGER5_MP_LENGTH & LEFT_RIGHT_SYMMETRY
    PARAMETER_OPT_STUDY = { AnyDesMeasure& Finger5MPLengthSymmetry = Main.ModelSetup.ParameterIdentification.Finger5MPLengthSymmetry; };
    #endif


    #if CREATE_ALL_DESVARS | RIGHT_FINGER5_PP_LENGTH
    AnyDesVar RightFinger5PPLength = {
       Val = SEGMENTS_LENGTHS.Right.Hand.Finger5.PPLength;
       Min = Val-0.005;
       Max = Val+0.005;
    };
    #endif
    #if RIGHT_FINGER5_PP_LENGTH
    PARAMETER_OPT_STUDY = { AnyDesVar& RightFinger5PPLength = Main.ModelSetup.ParameterIdentification.RightFinger5PPLength; };
    #endif

    #if CREATE_ALL_DESVARS | LEFT_FINGER5_PP_LENGTH
    AnyDesVar LeftFinger5PPLength = {
       Val = SEGMENTS_LENGTHS.Left.Hand.Finger5.PPLength;
       Min = Val-0.005;
       Max = Val+0.005;
     };
     #endif
     #if LEFT_FINGER5_PP_LENGTH
     PARAMETER_OPT_STUDY = { AnyDesVar& LeftFinger5PPLength = Main.ModelSetup.ParameterIdentification.LeftFinger5PPLength; };
     #endif

    #if CREATE_ALL_DESVARS | (RIGHT_FINGER5_PP_LENGTH & LEFT_FINGER5_PP_LENGTH & LEFT_RIGHT_SYMMETRY)
    AnyDesMeasure Finger5PPLengthSymmetry = {
      Val = .LeftFinger5PPLength.Val - .RightFinger5PPLength.Val;
      Type = EqualToZero;
    };
    #endif
    #if RIGHT_FINGER5_PP_LENGTH & LEFT_FINGER5_PP_LENGTH & LEFT_RIGHT_SYMMETRY
    PARAMETER_OPT_STUDY = { AnyDesMeasure& Finger5PPLengthSymmetry = Main.ModelSetup.ParameterIdentification.Finger5PPLengthSymmetry; };
    #endif


    #if CREATE_ALL_DESVARS | RIGHT_FINGER5_DP_LENGTH
    AnyDesVar RightFinger5DPLength = {
       Val = SEGMENTS_LENGTHS.Right.Hand.Finger5.DPLength;
       Min = Val-0.005;
       Max = Val+0.005;
    };
    #endif
    #if RIGHT_FINGER5_DP_LENGTH
    PARAMETER_OPT_STUDY = { AnyDesVar& RightFinger5DPLength = Main.ModelSetup.ParameterIdentification.RightFinger5DPLength; };
    #endif

    #if CREATE_ALL_DESVARS | LEFT_FINGER5_DP_LENGTH
    AnyDesVar LeftFinger5DPLength = {
       Val = SEGMENTS_LENGTHS.Left.Hand.Finger5.DPLength;
       Min = Val-0.005;
       Max = Val+0.005;
     };
     #endif
     #if LEFT_FINGER5_DP_LENGTH
     PARAMETER_OPT_STUDY = { AnyDesVar& LeftFinger5DPLength = Main.ModelSetup.ParameterIdentification.LeftFinger5DPLength; };
     #endif

    #if CREATE_ALL_DESVARS | (RIGHT_FINGER5_DP_LENGTH & LEFT_FINGER5_DP_LENGTH & LEFT_RIGHT_SYMMETRY)
    AnyDesMeasure Finger5DPLengthSymmetry = {
      Val = .LeftFinger5DPLength.Val - .RightFinger5DPLength.Val;
      Type = EqualToZero;
    };
    #endif
    #if RIGHT_FINGER5_DP_LENGTH & LEFT_FINGER5_DP_LENGTH & LEFT_RIGHT_SYMMETRY
    PARAMETER_OPT_STUDY = { AnyDesMeasure& Finger5DPLengthSymmetry = Main.ModelSetup.ParameterIdentification.Finger5DPLengthSymmetry; };
    #endif


    #if CREATE_ALL_DESVARS | (RIGHT_HAND_LENGTH & LEFT_HAND_LENGTH & LEFT_RIGHT_SYMMETRY)
    AnyDesMeasure HandLengthSymmetry = {
      Val = .LeftHandLength.Val - .RightHandLength.Val;
      Type = EqualToZero;
    };
    #endif
    #if RIGHT_HAND_LENGTH & LEFT_HAND_LENGTH & LEFT_RIGHT_SYMMETRY
    PARAMETER_OPT_STUDY = { AnyDesMeasure& HandLengthSymmetry = Main.ModelSetup.ParameterIdentification.HandLengthSymmetry; };
    #endif


    #if CREATE_ALL_DESVARS | RIGHT_HAND_BREADTH
    AnyDesVar RightHandBreadth = {
      Val = SEGMENTS_LENGTHS.Right.HandBreadth;
      Min = 0.05;
      Max = 0.5;
    };
    #endif
    #if RIGHT_HAND_BREADTH
    PARAMETER_OPT_STUDY = { AnyDesVar& RightHandBreadth = Main.ModelSetup.ParameterIdentification.RightHandBreadth; };
    #endif


    #if CREATE_ALL_DESVARS | LEFT_HAND_BREADTH
    AnyDesVar LeftHandBreadth = {
      Val = SEGMENTS_LENGTHS.Left.HandBreadth;
      Min = 0.05;
      Max = 0.5;
    };
    #endif
    #if LEFT_HAND_BREADTH
    PARAMETER_OPT_STUDY = { AnyDesVar& LeftHandBreadth = Main.ModelSetup.ParameterIdentification.LeftHandBreadth; };
    #endif

    #if CREATE_ALL_DESVARS | (RIGHT_HAND_BREADTH & LEFT_HAND_BREADTH & LEFT_RIGHT_SYMMETRY)
    AnyDesMeasure HandBreadthSymmetry = {
      Val = .LeftHandBreadth.Val - .RightHandBreadth.Val;
      Type = EqualToZero;
    };
    #endif
    #if RIGHT_HAND_BREADTH & LEFT_HAND_BREADTH & LEFT_RIGHT_SYMMETRY
    PARAMETER_OPT_STUDY = { AnyDesMeasure& HandBreadthSymmetry = Main.ModelSetup.ParameterIdentification.HandBreadthSymmetry; };
    #endif

    #if CREATE_ALL_DESVARS | RIGHT_TIBIAL_TORSION
    AnyDesVar RightTibialTorsionOffset = {
      Val = HUMAN_MODEL_FOLDER.BodyModel.Right.Leg.Seg.Shank.AnkleJoint.TibialTorsionOffset;
      Min = -pi/4;
      Max = pi/4;
    };
    #endif
    #if RIGHT_TIBIAL_TORSION
    PARAMETER_OPT_STUDY = { AnyDesVar& RightTibialTorsionOffset = Main.ModelSetup.ParameterIdentification.RightTibialTorsionOffset; };
    #endif

    #if CREATE_ALL_DESVARS | LEFT_TIBIAL_TORSION
    AnyDesVar LeftTibialTorsionOffset = {
      Val = HUMAN_MODEL_FOLDER.BodyModel.Left.Leg.Seg.Shank.AnkleJoint.TibialTorsionOffset;
      Min = -pi/4;
      Max = pi/4;
    };
    #endif
    #if LEFT_TIBIAL_TORSION
    PARAMETER_OPT_STUDY = { AnyDesVar& LeftTibialTorsionOffset = Main.ModelSetup.ParameterIdentification.LeftTibialTorsionOffset; };
    #endif

    #if CREATE_ALL_DESVARS | (RIGHT_TIBIAL_TORSION & LEFT_TIBIAL_TORSION & LEFT_RIGHT_SYMMETRY)
    AnyDesMeasure TibialTorsionSymmetry = {
      Val = .LeftTibialTorsionOffset.Val + .RightTibialTorsionOffset.Val;
      Type = EqualToZero;
    };
    #endif
    #if RIGHT_TIBIAL_TORSION & LEFT_TIBIAL_TORSION & LEFT_RIGHT_SYMMETRY
    PARAMETER_OPT_STUDY = { AnyDesMeasure& TibialTorsionSymmetry = Main.ModelSetup.ParameterIdentification.TibialTorsionSymmetry; };
    #endif


    #if CREATE_ALL_DESVARS | RIGHT_VARUS_VALGUS
    AnyDesVar RightVarusValgusOffset = {
      Val = HUMAN_MODEL_FOLDER.BodyModel.Right.Leg.Seg.Thigh.KneeJoint.VarusValgusRotation;
      Min = -pi/4;
      Max = pi/4;
    };
    #endif
    #if RIGHT_VARUS_VALGUS
    PARAMETER_OPT_STUDY = { AnyDesVar& RightVarusValgusOffset = Main.ModelSetup.ParameterIdentification.RightVarusValgusOffset; };
    #endif

    #if CREATE_ALL_DESVARS | LEFT_VARUS_VALGUS
    AnyDesVar LeftVarusValgusOffset = {
      Val = HUMAN_MODEL_FOLDER.BodyModel.Left.Leg.Seg.Thigh.KneeJoint.VarusValgusRotation;
      Min = -pi/4;
      Max = pi/4;
    };
    #endif
    #if LEFT_VARUS_VALGUS
    PARAMETER_OPT_STUDY = { AnyDesVar& LeftVarusValgusOffset = Main.ModelSetup.ParameterIdentification.LeftVarusValgusOffset; };
    #endif

    #if CREATE_ALL_DESVARS | (RIGHT_VARUS_VALGUS & LEFT_VARUS_VALGUS & LEFT_RIGHT_SYMMETRY)
    AnyDesMeasure VarusValgusSymmetry = {
      Val = .RightVarusValgusOffset.Val + .LeftVarusValgusOffset.Val;
      Type = EqualToZero;
    };
    #endif
    #if RIGHT_VARUS_VALGUS & LEFT_VARUS_VALGUS & LEFT_RIGHT_SYMMETRY
    PARAMETER_OPT_STUDY = { AnyDesMeasure& VarusValgusSymmetry = Main.ModelSetup.ParameterIdentification.VarusValgusSymmetry; };
    #endif


 };


}; // End of InsertSegmentClass


#class_template CreateDesVar (
    NAME,
    PARAMETER,
    ENABLE=1,
    PARAMETER_OPT_STUDY = Main.Studies.ParameterIdentification
    )
{
   Main.ModelSetup.ParameterIdentification =
   {
     AnyDesVar NAME = {
       Val = .....PARAMETER;
       #var Min = 0.01;
       #var Max = 1;
     };
   };
   #if ENABLE
   PARAMETER_OPT_STUDY =
   {
      AnyDesVar& NAME = Main.ModelSetup.ParameterIdentification.NAME;
   };
   #endif
};


#endif
