#include "../Connection/Generic/PointsGenerator/EllipticCylinderPointsGrid.any"
/**
This is a demo for the class template EllipticCylinderPointsGrid. The
class generates a uniformly distributed grid of nodes in an elliptical
cylinder shape. The reference frames of the generated nodes are oriented
such that one axis is tangential to the ellipse, one axis is parallel to
the axis of the cylinder, and the third axis points inwards.

The class requires an AnyRefFrame object as the CENTER_FRAME along with
parameters defining the cylinder and ellipse (axis, length, major_axis,
minor_axis) and the number of points to be generated in the form of
n_rows and n_columns.

The generated nodes are created using an AnyRefNodeGroup object in the
format Node#, for eg., Node0, Node1, Node2, etc. The name of the
AnyRefNodeGroup object and the term "Node" for the nodes can be set by
the user. However, the numbering is fixed and starts from 0.

In this example, a node defined on the Global Ref is used as the center
frame for demonstrating the features of the class. Please load the model.
In case the nodes are not visible, please right-click on GlobalRef in the
model tree -> Model View -> Refframes -> Show
*/
Main = {
  AnyFixedRefFrame GlobalRef =
  {
    Origin ={0.0,0.0,0.0};
    AnyDrawRefFrame drw = {ScaleXYZ = 0.3*{1,1,1};};

    AnyRefNode TestNode = {
      sRel = {0.1,0.1,0.2};
      ARel = RotMat(pi/2,y);
      AnyDrawRefFrame drw = {
        ScaleXYZ = 0.2*{1,1,1};
        RGB = {1,0,0};
      };
    };
  };

  // -----------------------------------------------------------
  // Generate points grid using default settings
  // -----------------------------------------------------------
  EllipticCylinderPointsGrid Points (
  CENTER_FRAME = Main.GlobalRef.TestNode,
  AXIS = "Z") = {
    Length = 0.5;
    Maj_ax = 0.2;
    Min_ax = 0.1;
    nRows = 3;
    nCols = 20;
    };


  // -----------------------------------------------------------
  // Generate points using optional settings: Customize names
  // -----------------------------------------------------------
  // The class creates an AnyRefNodeGroup object inside the
  // CENTER_FRAME. In this example, the same Center Frame is
  // used to create multiple instances of points grid. Thus,
  // different naming is required. The class template takes
  // care of it by setting the name of the AnyRefNodeGroup
  // to the name used to initialize the class (for example,
  // see previous instance: Main.GlobalRef.TestNode.Points).
  // However, if desired, the name of the AnyRefNodeGroup
  // object can be set during the initialization of the class
  // as shown in this example. Further, the names of the nodes
  // inside the AnyRefNodeGroup Object can also be initialized
  // in the settings.
  EllipticCylinderPointsGrid PointsNaming (
  CENTER_FRAME = Main.GlobalRef.TestNode,
  AXIS = "X",
  NAME = MyNodes) = {  // Default is <Name used to initialize the class template>
    Length = 0.5;
    Maj_ax = 0.4;
    Min_ax = 0.2;
    nRows = 1;
    nCols = 20;
    Settings = {
      NodesName = "MyPoints";  // Default is Node.
    };
  };

  // -----------------------------------------------------------
  // Generate points using optional settings: offset from center frame
  // -----------------------------------------------------------
  // The generated nodes can be offset from the center frame by
  // specifying NodesLinOffset and NodesRotOffset in the settings.
  EllipticCylinderPointsGrid PointsOffset (
  CENTER_FRAME = Main.GlobalRef.TestNode,
  AXIS = "Y") = {
    Length = 0.5;
    Maj_ax = 0.2;
    Min_ax = 0.1;
    nRows = 2;
    nCols = 20;
    Settings = {
      // Please note the relative offsets are measured from CENETER_FRAME
      NodesLinOffset = {0.0,0.6,0.0};
      NodesRotOffset = RotMat(pi/2, x);
    };
  };

  // -----------------------------------------------------------
  // Generate points using optional settings: partial loop
  // -----------------------------------------------------------
  // You can use StartAngle and EndAngle in case you do not
  // want points in the entire circumference of the ellipse.
  EllipticCylinderPointsGrid PointsPartial (
  CENTER_FRAME = Main.GlobalRef.TestNode,
  AXIS = "X") = {
    Length = 0.5;
    Maj_ax = 0.2;
    Min_ax = 0.1;
    nRows = 2;
    nCols = 20;
    Settings = {
      StartAngle = -1/2*pi;
      EndAngle = 1/2*pi;
      NodesLinOffset = {0.0,0.0,0.4}; // Offset 0.4 along z axis of Center_Frame
    };
  };

};
