AnyFolder HumanGroundResiduals = {
  AnyComponentDefinition obj = {};

  AnyFolder CenterOfMass = {
    AnySeg DummySeg={
      Mass=0;
      Jii={0,0,0};
    };
    AnyKinEqSimpleDriver  FixRotation ={
      AnyKinRotational rot ={
        AnySeg &ref1=..DummySeg;
        Type=RotAxesAngles;
      };
      DriverPos ={0,0,0}; DriverVel={0,0,0};
    };
    AnyKinEqSimpleDriver  DummySegDriver ={
      AnyKinMeasureLinComb LinComb ={
        AnyKinLinear LinSeg ={
          AnySeg &ref=...DummySeg;
        };
        AnyKinCoM CoMMeasure =  {
          AnyFolder& ref = Main.HumanModel.BodyModel;
        };
        Coef ={{1,0,0,-1,0,0},{0,1,0,0,-1,0},{0,0,1,0,0,-1}};
        OutDim =3;
      };
      DriverPos ={0,0,0}; DriverVel={0,0,0};
    };
  };


  AnyFolder &PelvisSegment = ..BodyModel.Trunk.SegmentsLumbar.PelvisSeg;
  AnyFolder &COMSegment = CenterOfMass.DummySeg;

  AnyFolder Measures = {
    AnyKinMeasureOrg PosX ={
      AnyKinLinear lin ={
        AnySeg &ref2 = ...COMSegment;
      };
      MeasureOrganizer={0};
    };
    AnyKinMeasureOrg PosY ={
      AnyKinLinear &ref=.PosX.lin;
      MeasureOrganizer={1};
    };
    AnyKinMeasureOrg PosZ ={
      AnyKinLinear &ref=.PosX.lin;
      MeasureOrganizer={2};
    };
    AnyKinMeasureOrg RotX ={
      AnyKinRotational rot ={
        AnySeg &ref2 = ...PelvisSegment;
        Type=RotAxesAngles;
      };
      MeasureOrganizer={2};
    };
    AnyKinMeasureOrg RotY ={
      AnyKinRotational &ref=.RotX.rot;
      MeasureOrganizer={1};
    };
    AnyKinMeasureOrg RotZ ={
      AnyKinRotational &ref=.RotX.rot;
      MeasureOrganizer={0};
    };
  };

  AnyFolder WeakGeneralMuscles =
  {
    AnyMuscleModel MusMoldel1 =
    {
      F0 = 5;
    };
    AnyMuscleModel MusMoldel2 =
    {
      F0 = 2;
    };
    // For PosX
    AnyGeneralMuscle PosX_Push=
    {
      AnyKinMeasure& ref= ..Measures.PosX;
      AnyMuscleModel & mus = .MusMoldel1;
      ForceDirection = 1;
      #include "<ANYBODY_PATH_MODELUTILS>/ZeroMetabolicMdl.any"
      MetabModel = &ZeroMetabolicMdl;
    };
    AnyGeneralMuscle PosX_Pull=
    {
      AnyKinMeasure& ref= ..Measures.PosX;
      AnyMuscleModel & mus = .MusMoldel1;
      ForceDirection = -1;
      #include "<ANYBODY_PATH_MODELUTILS>/ZeroMetabolicMdl.any"
      MetabModel = &ZeroMetabolicMdl;
    };
    // For PosY
    AnyGeneralMuscle PosY_Push=
    {
      AnyKinMeasure& ref= ..Measures.PosY;
      AnyMuscleModel & mus = .MusMoldel1;
      ForceDirection = 1;
      #include "<ANYBODY_PATH_MODELUTILS>/ZeroMetabolicMdl.any"
      MetabModel = &ZeroMetabolicMdl;
    };
    AnyGeneralMuscle PosY_Pull=
    {
      AnyKinMeasure& ref= ..Measures.PosY;
      AnyMuscleModel & mus = .MusMoldel1;
      ForceDirection = -1;
      #include "<ANYBODY_PATH_MODELUTILS>/ZeroMetabolicMdl.any"
      MetabModel = &ZeroMetabolicMdl;
    };
    // For PosZ
    AnyGeneralMuscle PosZ_Push=
    {
      AnyKinMeasure& ref= ..Measures.PosZ;
      AnyMuscleModel & mus = .MusMoldel1;
      ForceDirection = 1;
      #include "<ANYBODY_PATH_MODELUTILS>/ZeroMetabolicMdl.any"
      MetabModel = &ZeroMetabolicMdl;
    };
    AnyGeneralMuscle PosZ_Pull=
    {
      AnyKinMeasure& ref= ..Measures.PosZ;
      AnyMuscleModel & mus = .MusMoldel1;
      ForceDirection = -1;
      #include "<ANYBODY_PATH_MODELUTILS>/ZeroMetabolicMdl.any"
      MetabModel = &ZeroMetabolicMdl;
    };
    // For RotX
    AnyGeneralMuscle RotX_Push=
    {
      AnyKinMeasure& ref= ..Measures.RotX;
      AnyMuscleModel & mus = .MusMoldel2;
      ForceDirection = 1;
      #include "<ANYBODY_PATH_MODELUTILS>/ZeroMetabolicMdl.any"
      MetabModel = &ZeroMetabolicMdl;
    };
    AnyGeneralMuscle RotX_Pull=
    {
      AnyKinMeasure& ref= ..Measures.RotX;
      AnyMuscleModel & mus = .MusMoldel2;
      ForceDirection = -1;
      #include "<ANYBODY_PATH_MODELUTILS>/ZeroMetabolicMdl.any"
      MetabModel = &ZeroMetabolicMdl;
    };
    // For RotY
    AnyGeneralMuscle RotY_Push=
    {
      AnyKinMeasure& ref= ..Measures.RotY;
      AnyMuscleModel & mus = .MusMoldel2;
      ForceDirection = 1;
      #include "<ANYBODY_PATH_MODELUTILS>/ZeroMetabolicMdl.any"
      MetabModel = &ZeroMetabolicMdl;
    };
    AnyGeneralMuscle RotY_Pull=
    {
      AnyKinMeasure& ref= ..Measures.RotY;
      AnyMuscleModel & mus = .MusMoldel2;
      ForceDirection = -1;
      #include "<ANYBODY_PATH_MODELUTILS>/ZeroMetabolicMdl.any"
      MetabModel = &ZeroMetabolicMdl;
    };
    // For RotZ
    AnyGeneralMuscle RotZ_Push=
    {
      AnyKinMeasure& ref= ..Measures.RotZ;
      AnyMuscleModel & mus = .MusMoldel2;
      ForceDirection = 1;
      #include "<ANYBODY_PATH_MODELUTILS>/ZeroMetabolicMdl.any"
      MetabModel = &ZeroMetabolicMdl;
    };
    AnyGeneralMuscle RotZ_Pull=
    {
      AnyKinMeasure& ref= ..Measures.RotZ;
      AnyMuscleModel & mus = .MusMoldel2;
      ForceDirection = -1;
      #include "<ANYBODY_PATH_MODELUTILS>/ZeroMetabolicMdl.any"
      MetabModel = &ZeroMetabolicMdl;
    };
  };
  AnyVar PosX_Force = WeakGeneralMuscles.PosX_Push.Fout[0] + WeakGeneralMuscles.PosX_Pull.Fout[0];
  AnyVar PosY_Force = WeakGeneralMuscles.PosY_Push.Fout[0] + WeakGeneralMuscles.PosY_Pull.Fout[0];
  AnyVar PosZ_Force = WeakGeneralMuscles.PosZ_Push.Fout[0] + WeakGeneralMuscles.PosZ_Pull.Fout[0];
  AnyVar RotX_Torque = WeakGeneralMuscles.RotX_Push.Fout[0] + WeakGeneralMuscles.RotX_Pull.Fout[0];
  AnyVar RotY_Torque = WeakGeneralMuscles.RotY_Push.Fout[0] + WeakGeneralMuscles.RotY_Pull.Fout[0];
  AnyVar RotZ_Torque = WeakGeneralMuscles.RotZ_Push.Fout[0] + WeakGeneralMuscles.RotZ_Pull.Fout[0];

};
