AnyFolder Push ={

  AnyKinPLine LinS={
    AnyRefFrame &BaseObject=..BaseObject;
    AnyRefFrame &StrengthObject=..StrengthObject;
  };

  AnyVar UserDefinedMeasure=LinS.Pos[0];


  AnyIntVar LowerThanHighLimit = ltfun(UserDefinedMeasure,.UserDefinedLimitHigh);
  AnyIntVar GreaterThanLowLimit = gtfun(UserDefinedMeasure,.UserDefinedLimitLow);


  AnyVar UserDefinedStrengthFunction= iffun(andfun(LowerThanHighLimit,GreaterThanLowLimit),.Strength,0.0);


  //create the directions vectors

  AnyVec3 NormalVector0={
    iffun(.Direction[0]-0,0,1),
    iffun(.Direction[0]-1,0,1),
    iffun(.Direction[0]-2,0,1)};

  AnyVec3 NormalVector1={
    iffun(.Direction[1]-0,0,1),
    iffun(.Direction[1]-1,0,1),
    iffun(.Direction[1]-2,0,1)};

  AnyVec3 NormalVector2={
    iffun(.Direction[2]-0,0,1),
    iffun(.Direction[2]-1,0,1),
    iffun(.Direction[2]-2,0,1)};


  AnyMuscleModelUsr1 ContactMuscleModel2=   {
    F0 = 0.000000;
    S = .UserDefinedStrengthFunction;
  };


  AnyKinLinear Lin={
    AnyRefFrame &Box =..BaseObject;
    AnyRefFrame &Hand = ..TargetObject;
    Ref=0;
  };


  AnyFolder Direction0Muscle ={
    AnyGeneralMuscle Push={
      AnyKinMeasureOrg NormalDir={
        AnyKinLinear &ref=...Lin;
        MeasureOrganizer={....Direction[0]}; //always pick first element
      };
      AnyMuscleModelUsr1 &ref1=..ContactMuscleModel2;
      ForceDirection=1;
    };

    AnyGeneralMuscle Pull={
      AnyKinMeasureOrg NormalDir={
        AnyKinLinear &ref=...Lin;
        MeasureOrganizer={....Direction[0]}; //always pick first element
      };
      AnyMuscleModelUsr1 &ref1=..ContactMuscleModel2;
      ForceDirection=-1;
    };

  };


  AnyFolder Direction1Muscle ={
    AnyGeneralMuscle Push={
      AnyKinMeasureOrg NormalDir={
        AnyKinLinear &ref=...Lin;
        MeasureOrganizer={....Direction[1]}; //always pick first element
      };
      AnyMuscleModelUsr1 &ref1=..ContactMuscleModel2;
      ForceDirection=1;
    };

    AnyGeneralMuscle Pull={
      AnyKinMeasureOrg NormalDir={
        AnyKinLinear &ref=...Lin;
        MeasureOrganizer={....Direction[1]}; //always pick first element
      };
      AnyMuscleModelUsr1 &ref1=..ContactMuscleModel2;
      ForceDirection=-1;
    };

  };


  AnyFolder Direction2Muscle ={
    AnyGeneralMuscle Push={
      AnyKinMeasureOrg NormalDir={
        AnyKinLinear &ref=...Lin;
        MeasureOrganizer={....Direction[2]}; //always pick first element
      };
      AnyMuscleModelUsr1 &ref1=..ContactMuscleModel2;
      ForceDirection=1;
    };

    AnyGeneralMuscle Pull={
      AnyKinMeasureOrg NormalDir={
        AnyKinLinear &ref=...Lin;
        MeasureOrganizer={....Direction[2]}; //always pick first element
      };
      AnyMuscleModelUsr1 &ref1=..ContactMuscleModel2;
      ForceDirection=-1;
    };

  };


  AnyDrawVector DrawNormalForceDir0 =     {
    AnyRefFrame &ref=..TargetObject;
    Vec =..ScaleFactor*..DrawRef.DrawSettingsSupport.Lin.ScaleFactor*(.NormalVector0*(.Direction0Muscle.Push.Ft-.Direction0Muscle.Pull.Ft )*..BaseObject.Axes');

    PointAway = Off;
    DrawCoord = Off;

    Line.RGB = ..DrawRef.DrawSettingsSupport.Lin.RGB;
    Line.Thickness = ..DrawRef.DrawSettingsSupport.Lin.Thickness;
    Line.End.Thickness = 2*..DrawRef.DrawSettingsSupport.Lin.Thickness;
    Line.End.Length = 4*..DrawRef.DrawSettingsSupport.Lin.Thickness;

  };

  AnyDrawVector DrawNormalForceDir1 =     {
    AnyRefFrame &ref=..TargetObject;
    Vec =..ScaleFactor*..DrawRef.DrawSettingsSupport.Lin.ScaleFactor*(.NormalVector1*(.Direction1Muscle.Push.Ft-.Direction1Muscle.Pull.Ft )*..BaseObject.Axes');

    PointAway = Off;
    DrawCoord = Off;

    Line.RGB = ..DrawRef.DrawSettingsSupport.Lin.RGB;
    Line.Thickness = ..DrawRef.DrawSettingsSupport.Lin.Thickness;
    Line.End.Thickness = 2*..DrawRef.DrawSettingsSupport.Lin.Thickness;
    Line.End.Length = 4*..DrawRef.DrawSettingsSupport.Lin.Thickness;

  };


  AnyDrawVector DrawNormalForceDir2 =     {
    AnyRefFrame &ref=..TargetObject;
    Vec =..ScaleFactor*..DrawRef.DrawSettingsSupport.Lin.ScaleFactor*(.NormalVector2*(.Direction2Muscle.Push.Ft-.Direction2Muscle.Pull.Ft )*..BaseObject.Axes');

    PointAway = Off;
    DrawCoord = Off;

    Line.RGB = ..DrawRef.DrawSettingsSupport.Lin.RGB;
    Line.Thickness = ..DrawRef.DrawSettingsSupport.Lin.Thickness;
    Line.End.Thickness = 2*..DrawRef.DrawSettingsSupport.Lin.Thickness;
    Line.End.Length = 4*..DrawRef.DrawSettingsSupport.Lin.Thickness;

  };


  //resultan force given in global ref system
  AnyVec3 TotalForceVec =
  DrawNormalForceDir0.Vec/(.ScaleFactor*.DrawRef.DrawSettingsSupport.Lin.ScaleFactor)+
  DrawNormalForceDir1.Vec/(.ScaleFactor*.DrawRef.DrawSettingsSupport.Lin.ScaleFactor)+
  DrawNormalForceDir2.Vec/(.ScaleFactor*.DrawRef.DrawSettingsSupport.Lin.ScaleFactor);

  AnyVar TotalForceScalar = (TotalForceVec[0]^2+TotalForceVec[1]^2+TotalForceVec[2]^2)^0.5;


};
