AnyFolder Pull ={
  AnyKinMeasureOrg Dist={
    AnyKinLinear  Lin={
      AnyRefNode &Box =...BaseObject;
      AnyRefFrame &Hand = ...TargetObject;
    };
    MeasureOrganizer ={..AxisNormalToSurfaceOfBaseObject};

  };

  AnyMuscleModelUsr1 ContactMuscleModel=   {
    F0 = 0.000000;
    S = ..UserDefinedStrengthFunction;

  };


  AnyKinLinear Lin={
    AnyRefNode &Box =..BaseObject;
    AnyRefFrame &Hand = ..TargetObject;
    Ref=0;
    //AnyDrawPLine drw={Thickness=.005; RGB={0,0,1};};
  };

  AnyGeneralMuscle ContactMuscle={
    AnyKinMeasureOrg LinX={
      AnyKinLinear &ref=..Lin;
      MeasureOrganizer={...Direction};
    };
    AnyMuscleModelUsr1 &ref1=.ContactMuscleModel;
    ForceDirection=-1;
  };

  AnyDrawVector DrawContact =     {
    AnyRefFrame &ref=..TargetObject;

    Vec =0.004*..DirectionVector*.ContactMuscle.Ft*..BaseObject.Axes';

    PointAway = Off;
    DrawCoord = Off;
    Line.RGB = {0,0,1};
    Line.Thickness = 0.004;
    Line.End.Thickness = 2*0.004;
    Line.End.Length = 4*0.004;
  };

};
