//Draw a sphere at the node
AnyDrawNode drw={
  RGB=Main.DrawSettings.Names.RGB; //make reference to color
  ScaleXYZ=Main.DrawSettings.Names.ScaleXYZ; //make reference to size
};
/*
//Use a AnyDrawvector to display a name
AnyDrawVector  DrawName = {
  Vec = {0.0,0,0};  //use zero length
  Line.Thickness = 0.1; //arbitary value
  Text = .Name; //make reference to name
  Line.RGB=Main.DrawSettings.Names.RGB;//make reference to color
};

*/
