  AnyRefNode P101 = {sRel = {0,.ra,0};};
  AnyRefNode P102 = {sRel ={0,cos(10/180*pi)*.ra,sin(10/180*pi)*.ra};};
  AnyRefNode P103 = {sRel ={0,cos(20/180*pi)*.ra,sin(20/180*pi)*.ra};};
  AnyRefNode P104 = {sRel ={0,cos(30/180*pi)*.ra,sin(30/180*pi)*.ra};};
  AnyRefNode P105 = {sRel ={0,cos(40/180*pi)*.ra,sin(40/180*pi)*.ra};};
  AnyRefNode P106 = {sRel ={0,cos(50/180*pi)*.ra,sin(50/180*pi)*.ra};};
  AnyRefNode P107 = {sRel ={0,cos(60/180*pi)*.ra,sin(60/180*pi)*.ra};};
  AnyRefNode P108 = {sRel ={0,cos(70/180*pi)*.ra,sin(70/180*pi)*.ra};};
  AnyRefNode P109 = {sRel ={0,cos(80/180*pi)*.ra,sin(80/180*pi)*.ra};};
  AnyRefNode P110 = {sRel ={0,cos(90/180*pi)*.ra,sin(90/180*pi)*.ra};};

  AnyRefNode P111 = {sRel ={0,-cos(90/180*pi)*.ra,sin(90/180*pi)*.ra};};
  AnyRefNode P112 = {sRel ={0,-cos(80/180*pi)*.ra,sin(80/180*pi)*.ra};};
  AnyRefNode P113 = {sRel ={0,-cos(70/180*pi)*.ra,sin(70/180*pi)*.ra};};
  AnyRefNode P114 = {sRel ={0,-cos(60/180*pi)*.ra,sin(60/180*pi)*.ra};};
  AnyRefNode P115 = {sRel ={0,-cos(50/180*pi)*.ra,sin(50/180*pi)*.ra};};
  AnyRefNode P116 = {sRel ={0,-cos(40/180*pi)*.ra,sin(40/180*pi)*.ra};};
  AnyRefNode P117 = {sRel ={0,-cos(30/180*pi)*.ra,sin(30/180*pi)*.ra};};
  AnyRefNode P118 = {sRel ={0,-cos(20/180*pi)*.ra,sin(20/180*pi)*.ra};};
  AnyRefNode P119 = {sRel ={0,-cos(10/180*pi)*.ra,sin(10/180*pi)*.ra};};
  AnyRefNode P120 = {sRel = {0,-.ra,0};};

  AnyRefNode P121 = {sRel = {0,-.ra,0};};
  AnyRefNode P122 = {sRel ={0,-cos(10/180*pi)*.ra,-sin(10/180*pi)*.ra};};
  AnyRefNode P123 = {sRel ={0,-cos(20/180*pi)*.ra,-sin(20/180*pi)*.ra};};
  AnyRefNode P124 = {sRel ={0,-cos(30/180*pi)*.ra,-sin(30/180*pi)*.ra};};
  AnyRefNode P125 = {sRel ={0,-cos(40/180*pi)*.ra,-sin(40/180*pi)*.ra};};
  AnyRefNode P126 = {sRel ={0,-cos(50/180*pi)*.ra,-sin(50/180*pi)*.ra};};
  AnyRefNode P127 = {sRel ={0,-cos(60/180*pi)*.ra,-sin(60/180*pi)*.ra};};
  AnyRefNode P128 = {sRel ={0,-cos(70/180*pi)*.ra,-sin(70/180*pi)*.ra};};
  AnyRefNode P129 = {sRel ={0,-cos(80/180*pi)*.ra,-sin(80/180*pi)*.ra};};
  AnyRefNode P130 = {sRel ={0,-cos(90/180*pi)*.ra,-sin(90/180*pi)*.ra};};

  AnyRefNode P131 = {sRel ={0,cos(90/180*pi)*.ra,-sin(90/180*pi)*.ra};};
  AnyRefNode P132 = {sRel ={0,cos(80/180*pi)*.ra,-sin(80/180*pi)*.ra};};
  AnyRefNode P133 = {sRel ={0,cos(70/180*pi)*.ra,-sin(70/180*pi)*.ra};};
  AnyRefNode P134 = {sRel ={0,cos(60/180*pi)*.ra,-sin(60/180*pi)*.ra};};
  AnyRefNode P135 = {sRel ={0,cos(50/180*pi)*.ra,-sin(50/180*pi)*.ra};};
  AnyRefNode P136 = {sRel ={0,cos(40/180*pi)*.ra,-sin(40/180*pi)*.ra};};
  AnyRefNode P137 = {sRel ={0,cos(30/180*pi)*.ra,-sin(30/180*pi)*.ra};};
  AnyRefNode P138 = {sRel ={0,cos(20/180*pi)*.ra,-sin(20/180*pi)*.ra};};
  AnyRefNode P139 = {sRel ={0,cos(10/180*pi)*.ra,-sin(10/180*pi)*.ra};};
  AnyRefNode P140 = {sRel = {0,.ra,0};};


 // AnyDrawNodes drw ={};

  AnyDrawPLine drw =
  {
    Thickness = .th;
    RGB = {0,1,0};
  };
