AnyFolder Push ={

    AnyKinPLine LinS={
      AnyRefFrame &BaseObject=..BaseObject;
      AnyRefFrame &StrengthObject=..StrengthObject;
    };

    AnyVar UserDefinedMeasure=LinS.Pos[0];
   /*
    AnyVar UserDefinedStrengthFunction=
    (UserDefinedMeasure-.UserDefinedLimitLow)/sqrt((UserDefinedMeasure-.UserDefinedLimitLow)^2)*
    (.UserDefinedLimitHigh-UserDefinedMeasure)/sqrt((.UserDefinedLimitHigh-UserDefinedMeasure)^2)*.Strength;
    */


    AnyIntVar LowerThanHighLimit = ltfun(UserDefinedMeasure,.UserDefinedLimitHigh);
  AnyIntVar GreaterThanLowLimit = gtfun(UserDefinedMeasure,.UserDefinedLimitLow);


  AnyVar UserDefinedStrengthFunction= iffun(andfun(LowerThanHighLimit,GreaterThanLowLimit),.Strength,0.0);


  //create the directions vectors

  AnyVec3 NormalVector={
    iffun(.Direction[0]-0,0,1),
    iffun(.Direction[0]-1,0,1),
    iffun(.Direction[0]-2,0,1)};

  AnyVec3 FrictionVector1={
    iffun(.Direction[1]-0,0,1),
    iffun(.Direction[1]-1,0,1),
    iffun(.Direction[1]-2,0,1)};

  AnyVec3 FrictionVector2={
    iffun(.Direction[2]-0,0,1),
    iffun(.Direction[2]-1,0,1),
    iffun(.Direction[2]-2,0,1)};


  AnyMuscleModelUsr1 ContactMuscleModel=   {
    F0 = 0.000000;
    S = .UserDefinedStrengthFunction;
  };

   AnyMuscleModelUsr1 ContactMuscleModel1=   {
    F0 = 0.000000;
    S = .UserDefinedStrengthFunction;
  };

     AnyMuscleModelUsr1 ContactMuscleModel2=   {
    F0 = 0.000000;
    S = .UserDefinedStrengthFunction;
  };


  AnyKinLinear Lin={
    AnyRefFrame &Box =..BaseObject;
    AnyRefFrame &Hand = ..TargetObject;
    Ref=0;
  };


  /*
  AnyFolder Direction0Muscle ={
    AnyGeneralMuscle NormalDirectionMuscle={
      AnyKinMeasureOrg NormalDir={
        AnyKinLinear &ref=...Lin;
        MeasureOrganizer={....Direction[0]}; //always pick first element
      };
      AnyMuscleModelUsr1 &ref1=..ContactMuscleModel2;
      ForceDirection=1;
    };
  };
  */


  AnyFolder Direction01Muscle={
    AnyFolder Push={
      AnyKinMeasureOrg NormalDir={
        AnyKinLinear &ref=...Lin;
        MeasureOrganizer={....Direction[0]}; //always pick first element
      };
      AnyKinMeasureOrg FrictionDir={
        AnyKinLinear &ref=...Lin;
        MeasureOrganizer={....Direction[1]}; // pick second element
      };
      AnyKinMeasureLinComb LinCombinationMeasure ={
        AnyKinMeasure& u1=.NormalDir;
        AnyKinMeasure& u2=.FrictionDir;
        Coef={
          {1,....StaticFrictionCoefficient}
        };
      };

      AnyGeneralMuscle FrictionMuscle={
         //       AnyKinMeasure& ref1=.FrictionDir;
        AnyKinMeasureLinComb &ref1=.LinCombinationMeasure;
        AnyMuscleModelUsr1 &ref2=...ContactMuscleModel1;
        ForceDirection=1;
        #include "<ANYBODY_PATH_MODELUTILS>/ZeroMetabolicMdl.any"
        MetabModel = &ZeroMetabolicMdl;
      };

    };//Push

    AnyFolder Pull={
      AnyKinMeasureOrg NormalDir={
        AnyKinLinear &ref=...Lin;
        MeasureOrganizer={....Direction[0]}; //always pick first element
      };
      AnyKinMeasureOrg FrictionDir={
        AnyKinLinear &ref=...Lin;
        MeasureOrganizer={....Direction[1]}; // pick second element
      };
      AnyKinMeasureLinComb LinCombinationMeasure ={
        AnyKinMeasure& u1=.NormalDir;
        AnyKinMeasure& u2=.FrictionDir;
        Coef={
          {-1,....StaticFrictionCoefficient}
        };

      };

      AnyGeneralMuscle FrictionMuscle={
        AnyKinMeasureLinComb &ref1=.LinCombinationMeasure;
        //        AnyKinMeasure& ref1=.FrictionDir;
        AnyMuscleModelUsr1 &ref2=...ContactMuscleModel1;
        ForceDirection=-1;
        #include "<ANYBODY_PATH_MODELUTILS>/ZeroMetabolicMdl.any"
        MetabModel = &ZeroMetabolicMdl;
      };

    };//Pull

  };


  AnyFolder Direction02Muscle={
    AnyFolder Push={
      AnyKinMeasureOrg NormalDir={
        AnyKinLinear &ref=...Lin;
        MeasureOrganizer={....Direction[0]}; //always pick first element
      };
      AnyKinMeasureOrg FrictionDir={
        AnyKinLinear &ref=...Lin;
        MeasureOrganizer={....Direction[2]}; // pick last element
      };
      AnyKinMeasureLinComb LinCombinationMeasure ={
        AnyKinMeasure& u1=.NormalDir;
        AnyKinMeasure& u2=.FrictionDir;
        Coef={
          {1,....StaticFrictionCoefficient}
        };

      };

      AnyGeneralMuscle FrictionMuscle={
        AnyKinMeasureLinComb &ref1=.LinCombinationMeasure;
        //        AnyKinMeasure& ref1=.FrictionDir;

        AnyMuscleModelUsr1 &ref2=...ContactMuscleModel2;
        ForceDirection=1;
        #include "<ANYBODY_PATH_MODELUTILS>/ZeroMetabolicMdl.any"
        MetabModel = &ZeroMetabolicMdl;
      };

    };//Push

    AnyFolder Pull={
      AnyKinMeasureOrg NormalDir={
        AnyKinLinear &ref=...Lin;
        MeasureOrganizer={....Direction[0]}; //always pick first element
      };
      AnyKinMeasureOrg FrictionDir={
        AnyKinLinear &ref=...Lin;
        MeasureOrganizer={....Direction[2]}; // pick last element
      };
      AnyKinMeasureLinComb LinCombinationMeasure ={
        AnyKinMeasure& u1=.NormalDir;
        AnyKinMeasure& u2=.FrictionDir;
        Coef={
          {-1,....StaticFrictionCoefficient}
        };

      };

      AnyGeneralMuscle FrictionMuscle={
        AnyKinMeasureLinComb &ref1=.LinCombinationMeasure;
        //        AnyKinMeasure& ref1=.FrictionDir;
        AnyMuscleModelUsr1 &ref2=...ContactMuscleModel2;
        ForceDirection=-1;
        #include "<ANYBODY_PATH_MODELUTILS>/ZeroMetabolicMdl.any"
        MetabModel = &ZeroMetabolicMdl;
      };

    };//Pull

  };

  AnyDrawVector DrawNormalForce =     {
    AnyRefFrame &ref=..TargetObject;
    AnyVar Strength=   iffun(.ContactMuscleModel.S,.ContactMuscleModel.S,0.00001);
    Vec =..ScaleFactor*..DrawRef.DrawSettingsSupport.Lin.ScaleFactor*(
    //.NormalVector*.Direction0Muscle.NormalDirectionMuscle.Ft*..BaseObject.Axes'

    .NormalVector*.Direction01Muscle.Push.FrictionMuscle.Ft*..BaseObject.Axes'
    +.NormalVector*.Direction02Muscle.Push.FrictionMuscle.Ft*..BaseObject.Axes'
    +.NormalVector*.Direction01Muscle.Pull.FrictionMuscle.Ft*..BaseObject.Axes'
    +.NormalVector*.Direction02Muscle.Pull.FrictionMuscle.Ft*..BaseObject.Axes');
    AnyVar lenght=Strength*(2-(1-Strength/sqrt(Strength^2)));

 PointAway = Off;
  DrawCoord = Off;

  Line.RGB = ..DrawRef.DrawSettingsSupport.Lin.RGB;
  Line.Thickness = ..DrawRef.DrawSettingsSupport.Lin.Thickness;
  Line.End.Thickness = 2*..DrawRef.DrawSettingsSupport.Lin.Thickness;
  Line.End.Length = 4*..DrawRef.DrawSettingsSupport.Lin.Thickness;

  };


  AnyDrawVector DrawFrictionForce =     {

    AnyRefFrame &ref=..TargetObject;

   Vec =..ScaleFactor*..DrawRef.DrawSettingsSupport.Lin.ScaleFactor*..StaticFrictionCoefficient*(
    .FrictionVector1*.Direction01Muscle.Push.FrictionMuscle.Ft
    -.FrictionVector1*.Direction01Muscle.Pull.FrictionMuscle.Ft
    +.FrictionVector2*.Direction02Muscle.Push.FrictionMuscle.Ft
    -.FrictionVector2*.Direction02Muscle.Pull.FrictionMuscle.Ft)*..BaseObject.Axes';

    PointAway = Off;
  DrawCoord = Off;

  Line.RGB = ..DrawRef.DrawSettingsSupport.Lin.RGB;
  Line.Thickness = ..DrawRef.DrawSettingsSupport.Lin.Thickness;
  Line.End.Thickness = 2*..DrawRef.DrawSettingsSupport.Lin.Thickness;
  Line.End.Length = 4*..DrawRef.DrawSettingsSupport.Lin.Thickness;
  };


  /*
    AnyDrawVector DrawFrictionForce1 =     {

    AnyRefFrame &ref=..TargetObject;

    Vec =0.001*..StaticFrictionCoefficient*(
    .FrictionVector1*.Direction01Muscle.Push.FrictionMuscle.Ft*..BaseObject.Axes'+
    -.FrictionVector1*.Direction01Muscle.Pull.FrictionMuscle.Ft*..BaseObject.Axes');

    PointAway = Off;
    DrawCoord = Off;
    Line.RGB = {0,1,0};
    Line.Thickness = 0.015;
    Line.End.Thickness = 2*0.015;
    Line.End.Length = 4*0.015;
  };


    AnyDrawVector DrawFrictionForce2 =     {

    AnyRefFrame &ref=..TargetObject;

    Vec =0.001*..StaticFrictionCoefficient*(
    .FrictionVector2*.Direction02Muscle.Push.FrictionMuscle.Ft*..BaseObject.Axes'+
    -.FrictionVector2*.Direction02Muscle.Pull.FrictionMuscle.Ft*..BaseObject.Axes');

    PointAway = Off;
    DrawCoord = Off;
    Line.RGB = {1,0,0};
    Line.Thickness = 0.015;
    Line.End.Thickness = 2*0.015;
    Line.End.Length = 4*0.015;
  };
*/


};
