AnyFolder Push={

AnyKinMeasureOrg Dist={
  AnyKinLinear  Lin={
  AnyRefNode &Box =...BaseObject;
  AnySeg &Hand = ...TargetObject;
};
MeasureOrganizer ={..AxisNormalToSurfaceOfBaseObject};

};

AnyMuscleModelUsr1 ContactMuscleModel=   {
  F0 = 0.000000;
  AnyVar limit=0;
  S = 1e-5*(1/(sqrt((.Dist.Pos[0]-limit)^2)+..Epsilon))^2;
};

AnyKinRotational Rot={
  AnyRefNode &Box =..BaseObject;
  AnySeg &Hand = ..TargetObject;
  Type=RotVector;
};

AnyRecruitedActuator ContactMuscle={
  AnyKinMeasureOrg RotX={
    AnyKinLinear &ref=..Rot;
    MeasureOrganizer={...Direction};
  };
  AnyMuscleModelUsr1 &ref1=.ContactMuscleModel;
  Type = NonNegative;
  EXCLUDE_MUSCLE_METABOLISM

};

};
