SegmentsLumbar ={


  PelvisSeg={
    //Asis right
    AnyRefNode RFWT_Marker = {
      sRel=.Scale({0.108750, -0.058906, 0.117813});
      AnyDrawNode drw={
        ScaleXYZ=Main.DrawSettings.Marker.Radius*{1,1,1};
        RGB=Main.DrawSettings.Marker.Color;
      };
    };
    //Asis left
    AnyRefNode LFWT_Marker = {
      sRel=.Scale({0.108750, -0.058906, -0.117813});

          AnyDrawNode drw={
        ScaleXYZ=Main.DrawSettings.Marker.Radius*{1,1,1};
        RGB=Main.DrawSettings.Marker.Color;
      };
    };


    //Back wait markers right side
    AnyRefNode RBWT_Marker ={
      sRel= .Scale({-0.025, -0.00000, 0.0450000});

      AnyDrawNode drw={
        ScaleXYZ=Main.DrawSettings.Marker.Radius*{1,1,1};
        RGB=Main.DrawSettings.Marker.Color;
      };

    };

    //Back wait markers left side
    AnyRefNode LBWT_Marker ={
      sRel= .Scale({-0.025, -0.00000, -0.0450000});

      AnyDrawNode drw={
        ScaleXYZ=Main.DrawSettings.Marker.Radius*{1,1,1};
        RGB=Main.DrawSettings.Marker.Color;
      };


    };


  };


};

SegmentsThorax={
  SkullSeg={
    AnyRefNode RFHD_Marker={
      sRel=.Scale({0.08,0.06,0.07});

      AnyVar radius =Main.DrawSettings.Marker.Radius;
      AnyVec3 rgb =Main.DrawSettings.Marker.Color;
      AnyString Name="RightEye";
      #include "../DimensionArrowWithText/SphereWithLabel.any"
    };

    AnyRefNode LFHD_Marker={
      sRel=.Scale({0.08,0.06,-0.07});
      AnyVar radius =Main.DrawSettings.Marker.Radius;
      AnyVec3 rgb =Main.DrawSettings.Marker.Color;
      AnyString Name="LeftEye";
      #include "../DimensionArrowWithText/SphereWithLabel.any"
    };

    AnyRefNode RBHD_Marker={
      sRel=.Scale({-0.07,0.05,0.08});
      AnyVar radius =Main.DrawSettings.Marker.Radius;
      AnyVec3 rgb =Main.DrawSettings.Marker.Color;
      AnyString Name="RightEye";
      #include "../DimensionArrowWithText/SphereWithLabel.any"
    };

    AnyRefNode LBHD_Marker={
      sRel=.Scale({-0.07,0.05,-0.08});
      AnyVar radius =Main.DrawSettings.Marker.Radius;
      AnyVec3 rgb =Main.DrawSettings.Marker.Color;
      AnyString Name="LeftEye";
      #include "../DimensionArrowWithText/SphereWithLabel.any"

    };
  };

  ThoraxSeg={

    AnyRefNode T10_Marker = {
      sRel= .Scale({-0.052,0.187,0});
      AnyVar radius =Main.DrawSettings.Marker.Radius;
      AnyVec3 rgb =Main.DrawSettings.Marker.Color;
      AnyString Name="T10Marker";
      #include "../DimensionArrowWithText/SphereWithLabel.any"
    };

    AnyRefNode C7_Marker = {
      sRel= .Scale({-0.04,0.47,0});
      AnyVar radius =Main.DrawSettings.Marker.Radius;
      AnyVec3 rgb =Main.DrawSettings.Marker.Color;
      AnyString Name="C7Marker";
      #include "../DimensionArrowWithText/SphereWithLabel.any"
    };


    AnyRefNode STRN_Marker={
      sRel=.Scale({0.15,0.24,0.0});
      AnyVar radius =Main.DrawSettings.Marker.Radius;
      AnyVec3 rgb =Main.DrawSettings.Marker.Color;
      AnyString Name="ProcessusXiphoideusMarker";
      #include "../DimensionArrowWithText/SphereWithLabel.any"

    };

    AnyRefNode CLAV_Marker={
      sRel=.ij.sRel;
      AnyVar radius =Main.DrawSettings.Marker.Radius;
      AnyVec3 rgb =Main.DrawSettings.Marker.Color;
      AnyString Name="IncisuraJungularisMarker";
      #include "../DimensionArrowWithText/SphereWithLabel.any"
    };

  }; // End of ThoraxSeg

};
