AnyFolder MomentMeasure={
  AnyFolder Right={
    AnyFolder &Side=...HumanModel.Right;
    #include "..\..\Arm\ArmMoments.any"
    #include "..\..\Arm\LegMoments.any"

  };
  AnyFolder Left={
    AnyFolder &Side=...HumanModel.Left;
    #include "..\..\Arm\ArmMoments.any"
    #include "..\..\Arm\LegMoments.any"

  };

};
