AnyFolder MomentMeasure={
  AnyFolder Right={
    AnyFolder &Side=...HumanModel.Right;
    #include "..\..\Leg\LegMoments.any"
    #include "..\..\Arm\ArmMoments.any"


  };
  AnyFolder Left={
    AnyFolder &Side=...HumanModel.Left;
    #include "..\..\Leg\LegMoments.any"

  };

};
