#class_template ForcePlateType3Pressure (PlateName, Folder,No,Fx_12,Fx_34,Fy_14,Fy_23,Fz_1,Fz_2,Fz_3,Fz_4){
  AnyComponentDefinition obj = {};

  AnyFixedRefFrame Corners ={
    AnyVar CoordinateSystemSize= 0.1;

    AnyRefNode c01={
      AnyInt i=0;
      AnyInt plnr=No;
      sRel=Folder.PointsScaleFactor*{Folder.Groups.FORCE_PLATFORM.CORNERS.Data[plnr][i][0],Folder.Groups.FORCE_PLATFORM.CORNERS.Data[No][i][1],Folder.Groups.FORCE_PLATFORM.CORNERS.Data[No][i][2]};
      AnyDrawNode drw={ScaleXYZ=0.01*{1,1,1};RGB={1,0,0};};
      AnyDrawVector  DrawName = {
        Vec = {0.0,0,0};  //use zero length
        Line.Thickness = 0.025; //arbitary value
        Text = "1"; //make reference to name
        Line.RGB={1,0,0};//make reference to color
      };
    };

    AnyRefNode c02={
      AnyInt i=1;
      AnyInt plnr=No;
      sRel=Folder.PointsScaleFactor*{Folder.Groups.FORCE_PLATFORM.CORNERS.Data[plnr][i][0],Folder.Groups.FORCE_PLATFORM.CORNERS.Data[No][i][1],Folder.Groups.FORCE_PLATFORM.CORNERS.Data[No][i][2]};
      AnyDrawNode drw={ScaleXYZ=0.01*{1,1,1};RGB={1,0,0};};
      AnyDrawVector  DrawName = {
        Vec = {0.0,0,0};  //use zero length
        Line.Thickness = 0.025; //arbitary value
        Text = "2"; //make reference to name
        Line.RGB={1,0,0};//make reference to color
      };
    };

    AnyRefNode c03={
      AnyInt i=2;
      AnyInt plnr=No;
      sRel=Folder.PointsScaleFactor*{Folder.Groups.FORCE_PLATFORM.CORNERS.Data[plnr][i][0],Folder.Groups.FORCE_PLATFORM.CORNERS.Data[No][i][1],Folder.Groups.FORCE_PLATFORM.CORNERS.Data[No][i][2]};
      AnyDrawNode drw={ScaleXYZ=0.01*{1,1,1};RGB={1,0,0};};

      AnyDrawVector  DrawName = {
        Vec = {0.0,0,0};  //use zero length
        Line.Thickness = 0.025; //arbitary value
        Text = "3"; //make reference to name
        Line.RGB={1,0,0};//make reference to color
      };
    };

    AnyRefNode c04={
      AnyInt i=3;
      AnyInt plnr=No;
      sRel=Folder.PointsScaleFactor*{Folder.Groups.FORCE_PLATFORM.CORNERS.Data[plnr][i][0],Folder.Groups.FORCE_PLATFORM.CORNERS.Data[No][i][1],Folder.Groups.FORCE_PLATFORM.CORNERS.Data[No][i][2]};
      AnyDrawNode drw={ScaleXYZ=0.01*{1,1,1};RGB={1,0,0};};
      AnyDrawVector  DrawName = {
        Vec = {0.0,0,0};  //use zero length
        Line.Thickness = 0.025; //arbitary value
        Text = "4"; //make reference to name
        Line.RGB={1,0,0};//make reference to color
      };

    };


    AnyRefNode PlateCenter={
      sRel=0.25*(.c01.sRel+.c02.sRel+.c03.sRel+.c04.sRel);
      AnyVec3 p1=sRel;
      AnyVec3 p2=0.5*(.c01.sRel+.c04.sRel);
      AnyVec3 p3=0.5*(.c01.sRel+.c02.sRel);
      ARel =RotMat(p1,p2,p3);

          //  AnyDrawRefFrame drw={ScaleXYZ=..CoordinateSystemSize*{1,1,1};RGB={0,1,0};};

    };

  };


  AnySeg ForcePlate={
    Mass=0.0;
    Jii={0,0,0};
    r0=.Corners.PlateCenter.sRel;

    //AnyDrawRefFrame drw2={};


    //Rotational tranformation matrix for a coordinate system defined by three points. The first point is the origin of the system; the second gives the direction of the first (x) axis. Together all three points must span a plane which will be the plane of the first (x) and the second (y) axes, having the third (z) axis as normal.
    AnyVec3 p1=.Corners.PlateCenter.sRel;
    AnyVec3 p2=0.5*(.Corners.c01.sRel+.Corners.c04.sRel);
    AnyVec3 p3=0.5*(.Corners.c01.sRel+.Corners.c02.sRel);
    Axes0 =RotMat(p1,p2,p3);


    AnyFloat Origins= Folder.Groups.FORCE_PLATFORM.ORIGIN.Data;
    AnyVar ydist=Origins[0][0]; //distance from y axis on transducer to y axis of center of plate
    AnyVar xdist=Origins[0][1];//distance from x axis on transducer to x axis of center of plate
    AnyVar zdist=-Origins[0][2];//distance from z axis on transducer to z surface of plate

    AnyRefNode P1={
      sRel=Folder.PointsScaleFactor*{.ydist,.xdist,.zdist};
      AnyDrawNode drw={ScaleXYZ = 0.02*{1,1,0.1}; RGB={1,0,0};};
    };
    AnyRefNode P2={
      sRel=Folder.PointsScaleFactor*{-.ydist,.xdist,.zdist};
      AnyDrawNode drw={ScaleXYZ = 0.02*{1,1,0.1}; RGB={1,0,0};};
    };
    AnyRefNode P3={
      sRel=Folder.PointsScaleFactor*{-.ydist,-.xdist,.zdist};
      AnyDrawNode drw={ScaleXYZ = 0.02*{1,1,0.1}; RGB={1,0,0};};
    };
    AnyRefNode P4={
      sRel=Folder.PointsScaleFactor*{.ydist,-.xdist,.zdist};
      AnyDrawNode drw={ScaleXYZ = 0.02*{1,1,0.1}; RGB={1,0,0};};
    };
    AnyRefNode P1P2={
      sRel=0.5*(.P1.sRel+.P2.sRel);
      AnyDrawNode drw={ScaleXYZ = 0.02*{1,1,0.1}; RGB={1,0,0};};
    };
    AnyRefNode P3P4={
      sRel=0.5*(.P3.sRel+.P4.sRel);
      AnyDrawNode drw={ScaleXYZ = 0.02*{1,1,0.1}; RGB={1,0,0};};
    };
    AnyRefNode P1P4={
      sRel=0.5*(.P1.sRel+.P4.sRel);
      AnyDrawNode drw={ScaleXYZ = 0.02*{1,1,0.1}; RGB={1,0,0};};
    };
    AnyRefNode P2P3={
      sRel=0.5*(.P2.sRel+.P3.sRel);
      AnyDrawNode drw={ScaleXYZ = 0.02*{1,1,0.1}; RGB={1,0,0};};
    };


    AnyRefNode PlateGraphics ={
      sRel={0,0,..ForcePlate.zdist*Folder.PointsScaleFactor};

      AnyVec3 Size={vnorm(..Corners.c01.sRel-..Corners.c02.sRel,2),vnorm(..Corners.c02.sRel-..Corners.c03.sRel,2), ..ForcePlate.zdist*Folder.PointsScaleFactor*2};

      AnyDrawSurf DrwBox = {
        FileName = "box";
        RGB = 0.45*{1,1,1};
        ScaleXYZ=.Size/0.30;
        Opacity =0.4;
        Face=-1;
      };

    };


  };

  AnyKinEqSimpleDriver ForcePlateDriver ={
    AnyKinLinear ForcePlateLin={
      AnyRefNode &ref1=..Corners.PlateCenter;
      AnySeg &ref2=..ForcePlate;
      Ref=0;
    };

    AnyKinRotational ForcePlateRot={
      AnyRefNode &ref1=..Corners.PlateCenter;
      AnySeg &ref2=..ForcePlate;
      Type=RotAxesAngles;
    };
    DriverPos={0,0,0,0,0,0};
    DriverVel={0,0,0,0,0,0};
//    Reaction.Type = {Off,Off,On,On,On,On};
  };

//  AnyReacForce PlateFootReaction={
//
//    AnyKinLinear Lin={
//      Ref=0;
//      AnySeg &ref2=..ForcePlate;
//      AnySeg &ref1=..Limb;
//    };
//
//    AnyKinRotational Rot={
//      AnySeg &ref2=..ForcePlate;
//      AnySeg &ref1=..Limb;
//      Type=RotAxesAngles;
//    };
//  };


  AnyFloatVar tStart = Folder.Header.FirstFrameNo/Folder.Header.VideoFrameRate;
  AnyFloatVar tEnd =  (Folder.Header.LastFrameNo+1)/Folder.Header.VideoFrameRate;
  AnyInt NoAnalogData= (Folder.Header.LastFrameNo - Folder.Header.FirstFrameNo +1)*Folder.Header.NoAnalogSamplesPer3DFrame;
  AnyFloat Time= farr( tStart, (tEnd-tStart)/NoAnalogData,  NoAnalogData);


  AnyVar FzTotal=Fz1.f(ForcePlateDriver.t)[0]+Fz2.f(ForcePlateDriver.t)[0]+Fz3.f(ForcePlateDriver.t)[0]+Fz4.f(ForcePlateDriver.t)[0];
  AnyVar OnOff=iffun(gtfun(-FzTotal,10.0),1.0,0.0);


  AnyForce3D Fx12 ={

    AnyFunInterpol f ={
      Type=PiecewiseLinear;
      T=..Time;
      Data={Fx_12} ;
    };


    AnyRefNode &ref1=.ForcePlate.P1P2;
    Flocal=.OnOff*{f(.ForcePlateDriver.t )[0],0,0};

    AnyDrawVector DrawForce =     {
     AnyRefFrame &ref=.ref1;
     Vec=.Flocal*Folder.PointsScaleFactor;
     PointAway = Off;
     DrawCoord = Off;

     Line.RGB ={0,0,1};
     Line.Thickness = 0.01;
     Line.End.Thickness = 2*0.01;
     Line.End.Length = 4*0.01;
     GlobalCoord=Off;
   };

  };

  AnyForce3D Fx34 ={
    AnyFunInterpol f ={
      Type=PiecewiseLinear;
      T=..Time;
      Data={Fx_34} ;
    };


    AnyRefNode &ref1=.ForcePlate.P3P4;

    Flocal=.OnOff*{f(.ForcePlateDriver.t )[0],0,0};

    AnyDrawVector DrawForce =     {
     AnyRefFrame &ref=.ref1;
     Vec=.Flocal*Folder.PointsScaleFactor;
     PointAway = Off;
     DrawCoord = Off;

     Line.RGB ={0,0,1};
     Line.Thickness = 0.01;
     Line.End.Thickness = 2*0.01;
     Line.End.Length = 4*0.01;
     GlobalCoord=Off;
   };
 };


  AnyForce3D Fy14 ={
    AnyFunInterpol f ={
      Type=PiecewiseLinear;
      T=..Time;
      Data={Fy_14} ;
    };
    AnyRefNode &ref1=.ForcePlate.P1P4;
    Flocal=.OnOff*{0,f(.ForcePlateDriver.t)[0],0};


    AnyDrawVector DrawForce =     {
     AnyRefFrame &ref=.ref1;
     Vec=.Flocal*Folder.PointsScaleFactor;
     PointAway = Off;
     DrawCoord = Off;

     Line.RGB ={0,0,1};
     Line.Thickness = 0.01;
     Line.End.Thickness = 2*0.01;
     Line.End.Length = 4*0.01;
     GlobalCoord=Off;
   };
 };


  AnyForce3D Fy23 ={
    AnyFunInterpol f ={
      Type=PiecewiseLinear;
      T=..Time;
      Data={Fy_23} ;
    };

    AnyRefNode &ref1=.ForcePlate.P2P3;
    Flocal=.OnOff*{0,f(.ForcePlateDriver.t)[0],0};


    AnyDrawVector DrawForce =     {
     AnyRefFrame &ref=.ref1;
     Vec=.Flocal*Folder.PointsScaleFactor;
     PointAway = Off;
     DrawCoord = Off;

     Line.RGB ={0,0,1};
     Line.Thickness = 0.01;
     Line.End.Thickness = 2*0.01;
     Line.End.Length = 4*0.01;
     GlobalCoord=Off;
   };
 };


  AnyForce3D Fz1 ={
    AnyFunInterpol f ={
      Type=PiecewiseLinear;
      T=..Time;
      Data={Fz_1};
    };


    AnyRefNode &ref1=.ForcePlate.P1;
    Flocal=.OnOff*{0,0,f(.ForcePlateDriver.t)[0]};


    AnyDrawVector DrawForce =     {
     AnyRefFrame &ref=.ref1;
     Vec=.Flocal*Folder.PointsScaleFactor;
     PointAway = Off;
     DrawCoord = Off;

     Line.RGB ={0,0,1};
     Line.Thickness = 0.01;
     Line.End.Thickness = 2*0.01;
     Line.End.Length = 4*0.01;
     GlobalCoord=Off;
   };
 };


  AnyForce3D Fz2 ={
    AnyFunInterpol f ={
      Type=PiecewiseLinear;
      T=..Time;
      Data={Fz_2} ;
    };

    AnyRefNode &ref1=.ForcePlate.P2;
    Flocal=.OnOff*{0,0,f(.ForcePlateDriver.t)[0]};

    AnyDrawVector DrawForce =     {
     AnyRefFrame &ref=.ref1;
     Vec=.Flocal*Folder.PointsScaleFactor;
     PointAway = Off;
     DrawCoord = Off;

     Line.RGB ={0,0,1};
     Line.Thickness = 0.01;
     Line.End.Thickness = 2*0.01;
     Line.End.Length = 4*0.01;
     GlobalCoord=Off;
   };
 };

  AnyForce3D Fz3 ={
    AnyFunInterpol f ={
      Type=PiecewiseLinear;
      T=..Time;
      Data={Fz_3};
    };

    AnyRefNode &ref1=.ForcePlate.P3;
    Flocal=.OnOff*{0,0,f(.ForcePlateDriver.t)[0]};


    AnyDrawVector DrawForce =     {
     AnyRefFrame &ref=.ref1;
     Vec=.Flocal*Folder.PointsScaleFactor;
     PointAway = Off;
     DrawCoord = Off;

     Line.RGB ={0,0,1};
     Line.Thickness = 0.01;
     Line.End.Thickness = 2*0.01;
     Line.End.Length = 4*0.01;
     GlobalCoord=Off;
   };
 };


  AnyForce3D Fz4 ={
    AnyFunInterpol f ={
      Type=PiecewiseLinear;
      T=..Time;
      Data={Fz_4};
    };

    AnyRefNode &ref1=.ForcePlate.P4;
    Flocal=.OnOff*{0,0,f(.ForcePlateDriver.t)[0]};


    AnyDrawVector DrawForce =     {
     AnyRefFrame &ref=.ref1;
     Vec=.Flocal*Folder.PointsScaleFactor;
     PointAway = Off;
     DrawCoord = Off;

     Line.RGB ={0,0,1};
     Line.Thickness = 0.01;
     Line.End.Thickness = 2*0.01;
     Line.End.Length = 4*0.01;
     GlobalCoord=Off;
   };
 };


  AnyFolder CenterOfPressureAndResultant ={
   AnyDrawVector CenterOfPressure =   {
     AnyVar time=..ForcePlateDriver.t;

     AnyVar az0= -..ForcePlate.zdist*Folder.PointsScaleFactor;


     AnyVar Fz1 = ..Fz1.f(..ForcePlateDriver.t)[0];
     AnyVar Fz2 = ..Fz2.f(..ForcePlateDriver.t)[0];
     AnyVar Fz3 = ..Fz3.f(..ForcePlateDriver.t)[0];
     AnyVar Fz4 = ..Fz4.f(..ForcePlateDriver.t)[0];

     AnyVar Fx12 = ..Fx12.f(..ForcePlateDriver.t)[0];
     AnyVar Fx34 = ..Fx34.f(..ForcePlateDriver.t)[0];

     AnyVar Fy14 = ..Fy14.f(..ForcePlateDriver.t)[0];
     AnyVar Fy23 = ..Fy23.f(..ForcePlateDriver.t)[0];

     AnyVar Fx=Fx12+Fx34;
     AnyVar Fy=Fy14+Fy23;
     AnyVar Fz=Fz1+Fz2+Fz3+Fz4;

     AnyVar a = ..ForcePlate.P1.sRel[0];
     AnyVar b = ..ForcePlate.P1.sRel[1];

     AnyVar Mx=b*(Fz1+Fz2-Fz3-Fz4);
     AnyVar My=a*(-Fz1+Fz2+Fz3-Fz4);
     AnyVar Mz=b*(-Fx12+Fx34)+a*(Fy14-Fy23);

     AnyVar Mx_top=Mx+Fy*az0;
     AnyVar My_top=My-Fx*az0;

     AnyVar Vx=-My_top/Fz;
     AnyVar Vy=Mx_top/Fz;
     AnyVar Vz=0;


     Vec = ..OnOff*{Vx,Vy,Vz};
     GlobalCoord=Off;
     PointAway = On;
     DrawCoord = Off;
     Line.Style=Line3DStyleFull;
     Line.RGB = {0,1,0};
     Line.Thickness = 0.000001;

     Line.End.Thickness = 2*0.015;
     Line.End.Length = 4*0.015;
     Line.End.Style=Line3DCapStyleEllipsoid;
     //
     Line.Start.Thickness = 0*0.015;
     Line.Start.Length = 0*0.015;
     Line.Start.Style=Line3DCapStyleEllipsoid;

     AnyRefFrame &ref = ..ForcePlate;
   };


   AnyDrawVector Resultant =   {
     AnyVar time=..ForcePlateDriver.t;

     AnyVec3 F1 = ..Fz1.Flocal;
     AnyVec3 F2 = ..Fz2.Flocal;
     AnyVec3 F3 = ..Fz3.Flocal;
     AnyVec3 F4 = ..Fz4.Flocal;
     AnyVec3 F5 = ..Fx12.Flocal;
     AnyVec3 F6 = ..Fx34.Flocal;
     AnyVec3 F7 = ..Fy14.Flocal;
     AnyVec3 F8 = ..Fy23.Flocal;


     Vec = -..OnOff*(F1+F2+F3+F4+F5+F6+F7+F8)/1000;
     GlobalCoord=Off;
     PointAway = On;
     DrawCoord = Off;
     Line.Style=Line3DStyleFull;
     Line.RGB = {0,0,1};
     Line.Thickness = 0.01;

     AnyRefFrame &ref = ..ForcePlate;
   };
 };


};
