// fit cylinder to given point cloud without fixed direction
#define FitCylinder(name) AnyRefNode name = {sRel = test_cylinder_fit.sRel; ARel = test_cylinder_fit.ARel;AnyDrawNode drw={Visible=Off;ScaleXYZ={0,0,0}*0.001;};AnyDrawRefFrame fr = {Visible=Off;ScaleXYZ={1,1,1}*0.1;RGB={1,0,0};};  AnySurfCylinderFit test_cylinder_fit = {Length = 0.000001;FixedDirection = Off;Direction = {0.0, 0.0, 1.0}; Points = DesignVar(..name##_points);AnyDrawParamSurf srf_##name={Visible = Off;RGB={0,1,1};Opacity=0.2;};};};
