// fit cylinder to condyle point clouds with direction fixed to secondary PC of a cylinder fit to medial and lateral condyles combined
#define FitCylinder_PC(name1,name2,Vis_n,Vis_fr) AnyRefNode name2 = {sRel = test_cylinder_fit.sRel; ARel = (test_cylinder_fit.ARel);AnyDrawNode drw={Visible=Vis_n;ScaleXYZ={1,1,1}*0.002;}; AnyDrawRefFrame fr = {Visible=Vis_fr;ScaleXYZ={1,1,1}*0.1;}; AnySurfCylinderFit test_cylinder_fit = {Length = 0.00001;FixedDirection =On;Direction = ..name1.test_cylinder_fit.ARel[2]; Points = DesignVar(..name2##_surf.points);AnyDrawParamSurf srf_##name2={Visible = Off;RGB={0,1,1};Opacity=0.2;};};};
