//------------------------------------------------------------------------------
// Surface fits for entire lateral and medial condyles, for new hinge joint model

  AnyDrawSurf Medial_TF_surf = {
    FileName = ANYBODY_PATH_MODELUTILS +"\MovingAxisKnee\STLs\Medial_TF.stl";
    Visible=On;
    ScaleXYZ = {1.0, 1.0, 1.0}*..AMirroring;
    RGB = {0,1,0};
    AnyFunTransform3D &Scale =.CustomMarkerScaling;
    Face=-1;
    AnyInt NumPoints = STL_Size(FileName, 1)[0];
    AnyFloat points = GetVertices(iarr(0, 1, NumPoints-1));
  };

  AnyDrawSurf Lateral_TF_surf = {
    FileName = ANYBODY_PATH_MODELUTILS +"\MovingAxisKnee\STLs\Lateral_TF.stl";
    Visible=On;
    ScaleXYZ = {1.0, 1.0, 1.0}*..AMirroring;
    RGB = {0,1,0};
    AnyFunTransform3D &Scale =.CustomMarkerScaling;
    Face=-1;
    AnyInt NumPoints = STL_Size(FileName, 1)[0];
    AnyFloat points = GetVertices(iarr(0, 1, NumPoints-1));
  };

  AnyFloat TF_points =arrcat(Medial_TF_surf.points, Lateral_TF_surf.points);
  FitCylinder(TF)
  FitCylinder_PC(TF,Medial_TF,On,On)
  FitCylinder_PC(TF,Lateral_TF,On,On)


  AnyRefNode KneeJoint = {
    sRel=(.Medial_TF.sRel-.Lateral_TF.sRel)/2;
    ARel=RotMat(sRel,.Lateral_TF.sRel,.HipJoint.sRel)*RotMat(...Sign*pi/2,y);
    AnyDrawRefFrame drw={Visible=On;ScaleXYZ=0.1*{1,1,1};RGB={0,1,0};};
  };
  AnyFolder CT_Data={
  AnyVec3 Medial_TF = .Femur2CT(.Medial_TF.sRel);
  AnyVec3 Lateral_TF = .Femur2CT(.Lateral_TF.sRel);
  AnyVec3 MedialEpicondyle= .Femur2CT(.EpicondylusFemorisMedialis.sRel);
  AnyVec3 LateralEpicondyle= .Femur2CT(.EpicondylusFemorisLateralis.sRel);
  AnyVec3 HipJointCenter= .Femur2CT(.HipJoint.sRel);
  };
