 AnyFolder StiffnessDriver  ={


  AnyKinMeasureOrg Dof0 ={    AnyKinMeasure &ref=..Measure; MeasureOrganizer ={0}; };
  AnyKinMeasureOrg Dof1 ={    AnyKinMeasure &ref=..Measure; MeasureOrganizer ={1}; };
  AnyKinMeasureOrg Dof2 ={    AnyKinMeasure &ref=..Measure; MeasureOrganizer ={2}; };


  AnyFunPolynomial SpringDof0 = { PolyCoef = {{0,0,(1.0/2.0)*..Stiffness[0]}};};
  AnyFunPolynomial SpringDof1 = { PolyCoef = {{0,0,(1.0/2.0)*..Stiffness[1]}};};
  AnyFunPolynomial SpringDof2 = { PolyCoef = {{0,0,(1.0/2.0)*..Stiffness[2]}};};


  AnyFunInterpol funPotSpringDof0Sqrt = {
    Type = Bspline;
    T=farr(-7.0, 0.001, 1000001);
    Data={sqrt(.SpringDof0 (T))'};
  };

  AnyFunInterpol funPotSpringDof1Sqrt = {
    Type = Bspline;
    T=farr(-7.0, 0.001, 1000001);
    Data={sqrt(.SpringDof1 (T))'};
  };

  AnyFunInterpol funPotSpringDof2Sqrt = {
    Type = Bspline;
    T=farr(-7.0, 0.001, 1000001);
    Data={sqrt(.SpringDof2 (T))'};
  };

  AnyFloat test = funPotSpringDof2Sqrt(farr(-6.990, 1.0, 101));


  AnyKinMeasureFunComb1 PotSpringDof0= {AnyKinMeasure &org = .Dof0 ; Functions = {&.funPotSpringDof0Sqrt }; };
  AnyKinMeasureFunComb1 PotSpringDof1= {AnyKinMeasure &org = .Dof1 ; Functions = {&.funPotSpringDof1Sqrt }; };
  AnyKinMeasureFunComb1 PotSpringDof2= {AnyKinMeasure &org = .Dof2 ; Functions = {&.funPotSpringDof2Sqrt }; };


  AnyKinEqSimpleDriver PotDriverSpring0= {
    AnyKinMeasure &ref0=.PotSpringDof0;
    AnyKinMeasure &ref1=.PotSpringDof1;
    AnyKinMeasure &ref2=.PotSpringDof2;
    DriverPos={0,0,0}; DriverVel={0,0,0};Reaction.Type={Off,Off,Off};
    CType = {Soft,Soft,Soft};
    AnyFunConst wf ={Value = 0.001*{1,1,1};};
    WeightFun = {&wf};
  };


};
