//Will only work in AMS > 7.2.1
#if (ANYBODY_V1 > 7)|(ANYBODY_V1 == 7 & ANYBODY_V2 > 2)|(ANYBODY_V1 == 7 & ANYBODY_V2 == 2 & ANYBODY_V3 >= 1)

 AnyFunEx PickPointsReaderByName =
 {
   AnyVec3 Return = {0.0, 0.0, 0.0};
   AnyFunExMonoPy read_point =
   {
    ModuleFile = "pick_points_reader.py";
    ArgList = {
      AnyStringVar ppfile = "meshlab_picked_point_file.pp";
      AnyStringVar pointname = "0";
    };
   };
 };

#endif
