/*
Simple metabolic model set to zero.
This eliminates the metabolic contribution of muscles such as:
- Artificial
- Diagnostics
*/

AnyMetabModelSimple ZeroMetabolicMdl = {
    EtaCon = 2e22; // Huge number to eliminate the metabolic power
    EtaEcc = 2e22; // Huge number to eliminate the metabolic power
};
