#path ANYBODY_PATH_PLUGINPYTHONHOME "C:\Program Files\AnyBody Technology\AnyBody.7.5_Beta\Python-py37"


AnyGUIPlugin ANSURPlugin = {
   PluginFile = "C:\Users\mel\Documents\AnyBodyModels\ansur_plugin\ansur_plugin\__main__.py";
   ToolTip = "Change Model Scaling";
   Console = On;
   Interactive = Off;
   DisplayName =  "ANSUR Configuration";
};
