#include "../libdef.any"

Main =
{

  // Body Model configuration:
  #include "Model/BodyModelConfiguration.any"

  // Using your own Mannequin.any file in the Model folder of your model
  #path BM_MANNEQUIN_FILE "Model\Mannequin.any"

  // Include default human model
  #include "<ANYBODY_PATH_BODY>\HumanModel.any"

  AnyFolder Model =
  {
    // A link to the human model
    AnyFolder &BodyModel = .HumanModel.BodyModel;
    AnyFolder &DefaultMannequinDrivers = .HumanModel.DefaultMannequinDrivers;

    // Environment files are used to include objects surrounding human, e.g. global reference frame
    #include "Model\Environment.any"

    AnyFolder ModelEnvironmentConnection =
    {
      // This file contains all joint and foot reaction forces to simulate standing human
      #include "Model\JointsAndDrivers.any"
    };
  };

  AnyBodyStudy Study =
  {
    AnyFolder &Model = .Model;

    Gravity={0.0, -9.81, 0.0};
    nStep = 11;

    // Overdeterminate solver is needed while using the
    // soft default mannequin drivers.
    Kinematics.SolverType = KinSolOverDeterminate;
    InitialConditions.SolverType = Kinematics.SolverType ;

  };

    #include "Model\RunAppSequence.any"

}; //Main
