#ifdef ANYBODY_APPLICATION_LIBRARY_NAME
#undef ANYBODY_APPLICATION_LIBRARY_NAME
#endif
#define ANYBODY_APPLICATION_LIBRARY_NAME "AMMR Public Templates"

#ifndef ANYBODY_PATH_BODY
  #path ANYBODY_PATH_BODY "<ANYBODY_PATH_INSTALLDIR>\AMMR\Body\AAUHuman"
#endif

#ifndef ANYBODY_PATH_MAINFILEDIR
 #define ANYBODY_PATH_MAINFILEDIR "."
#endif

#ifndef ANYBODY_PATH_OUTPUT
  #path ANYBODY_PATH_OUTPUT "<ANYBODY_PATH_MAINFILEDIR>/Output/"
#endif

#ifndef ANYBODY_PATH_INPUT
  #path ANYBODY_PATH_INPUT "<ANYBODY_PATH_MAINFILEDIR>/Input/"
#endif

#ifndef ANYBODY_PATH_TOOLBOX
#path ANYBODY_PATH_TOOLBOX "<ANYBODY_PATH_BODY>ToolBox/"
#endif

#include "<ANYBODY_PATH_BODY>/HumanModel.defs.any"
