#include "libdef.any"

Main = {


  #define BM_SCALING _SCALING_NONE_

  #define BM_TRUNK_MUSCLES OFF
  #define BM_ARM_LEFT OFF

  #define BM_LEG_MODEL OFF
  #define BM_HAND_MODEL _HAND_MODEL_RUHM_

  #define RUHM_ENABLE_JOINT_MUSCLES ON

  #include "<ANYBODY_PATH_BODY>/HumanModel.any"


  AnyKinStudy Study = {
    AnyFolder& Model = Main.HumanModel.BodyModelWithDefaultDrivers;
    nStep = 1;
    Gravity = {0,0,0};
  };


};
